// SBML level 3 version 2

model Bcell()

  // Compartments:
  compartment cell = 1;

  // Species:
  species ALK in cell = 1/cell;
  species ALK_g in cell = 1/cell;
  species ALK_p in cell = 1/cell;
  species ALK_rna in cell = 1/cell;
  species ANGPT2 in cell = 1/cell;
  species ANGPT2_g in cell = 1/cell;
  species ANGPT2_rna in cell = 1/cell;
  species AR in cell = 1/cell;
  species AR_g in cell = 1/cell;
  species AR_p in cell = 1/cell;
  species AR_rna in cell = 1/cell;
  species BAD in cell = 1/cell;
  species BAD_g in cell = 1/cell;
  species BAD_p in cell = 1/cell;
  species BAD_rna in cell = 1/cell;
  species CAT in cell = 1/cell;
  species CAT_g in cell = 1/cell;
  species CAT_rna in cell = 1/cell;
  species CD79A in cell = 1/cell;
  species CD79A_g in cell = 1/cell;
  species CD79A_p in cell = 1/cell;
  species CD79A_rna in cell = 1/cell;
  species CDH1 in cell = 1/cell;
  species CDH1_g in cell = 1/cell;
  species CDH1_p in cell = 1/cell;
  species CDH1_rna in cell = 1/cell;
  species CLTC in cell = 1/cell;
  species CLTC_g in cell = 1/cell;
  species CLTC_p in cell = 1/cell;
  species CLTC_rna in cell = 1/cell;
  species CTNNB1 in cell = 1/cell;
  species CTNNB1_g in cell = 1/cell;
  species CTNNB1_p in cell = 1/cell;
  species CTNNB1_rna in cell = 1/cell;
  species DEPTOR in cell = 1/cell;
  species DEPTOR_g in cell = 1/cell;
  species DEPTOR_rna in cell = 1/cell;
  species ENG in cell = 1/cell;
  species ENG_g in cell = 1/cell;
  species ENG_p in cell = 1/cell;
  species ENG_rna in cell = 1/cell;
  species EZH2 in cell = 1/cell;
  species EZH2_g in cell = 1/cell;
  species EZH2_p in cell = 1/cell;
  species EZH2_rna in cell = 1/cell;
  species FABP4 in cell = 1/cell;
  species FABP4_g in cell = 1/cell;
  species FABP4_p in cell = 1/cell;
  species FABP4_rna in cell = 1/cell;
  species FYN in cell = 1/cell;
  species FYN_g in cell = 1/cell;
  species FYN_p in cell = 1/cell;
  species FYN_rna in cell = 1/cell;
  species GJB1 in cell = 1/cell;
  species GJB1_g in cell = 1/cell;
  species GJB1_p in cell = 1/cell;
  species GJB1_rna in cell = 1/cell;
  species HMOX1 in cell = 1/cell;
  species HMOX1_g in cell = 1/cell;
  species HMOX1_rna in cell = 1/cell;
  species IL6 in cell = 1/cell;
  species IL6_g in cell = 1/cell;
  species IL6_rna in cell = 1/cell;
  species INS in cell = 1/cell;
  species INSR in cell = 1/cell;
  species INSR_g in cell = 1/cell;
  species INSR_p in cell = 1/cell;
  species INSR_rna in cell = 1/cell;
  species INS_g in cell = 1/cell;
  species INS_rna in cell = 1/cell;
  species IRF3 in cell = 1/cell;
  species IRF3_g in cell = 1/cell;
  species IRF3_p in cell = 1/cell;
  species IRF3_rna in cell = 1/cell;
  species JAK2 in cell = 1/cell;
  species JAK2_g in cell = 1/cell;
  species JAK2_p in cell = 1/cell;
  species JAK2_rna in cell = 1/cell;
  species JAK3 in cell = 1/cell;
  species JAK3_g in cell = 1/cell;
  species JAK3_p in cell = 1/cell;
  species JAK3_rna in cell = 1/cell;
  species KDR in cell = 1/cell;
  species KDR_g in cell = 1/cell;
  species KDR_p in cell = 1/cell;
  species KDR_rna in cell = 1/cell;
  species KIT in cell = 1/cell;
  species KIT_g in cell = 1/cell;
  species KIT_p in cell = 1/cell;
  species KIT_rna in cell = 1/cell;
  species KRT19 in cell = 1/cell;
  species KRT19_g in cell = 1/cell;
  species KRT19_p in cell = 1/cell;
  species KRT19_rna in cell = 1/cell;
  species MDM2 in cell = 1/cell;
  species MDM2_g in cell = 1/cell;
  species MDM2_rna in cell = 1/cell;
  species MRTFA in cell = 1/cell;
  species MRTFA_g in cell = 1/cell;
  species MRTFA_p in cell = 1/cell;
  species MRTFA_rna in cell = 1/cell;
  species NCF1 in cell = 1/cell;
  species NCF1_g in cell = 1/cell;
  species NCF1_p in cell = 1/cell;
  species NCF1_rna in cell = 1/cell;
  species NFE2L2 in cell = 1/cell;
  species NFE2L2_g in cell = 1/cell;
  species NFE2L2_p in cell = 1/cell;
  species NFE2L2_rna in cell = 1/cell;
  species NOTCH2 in cell = 1/cell;
  species NOTCH2_g in cell = 1/cell;
  species NOTCH2_rna in cell = 1/cell;
  species NPHS1 in cell = 1/cell;
  species NPHS1_g in cell = 1/cell;
  species NPHS1_p in cell = 1/cell;
  species NPHS1_rna in cell = 1/cell;
  species NR1H4 in cell = 1/cell;
  species NR1H4_g in cell = 1/cell;
  species NR1H4_p in cell = 1/cell;
  species NR1H4_rna in cell = 1/cell;
  species NUMB in cell = 1/cell;
  species NUMB_g in cell = 1/cell;
  species NUMB_rna in cell = 1/cell;
  species PANX1 in cell = 1/cell;
  species PANX1_g in cell = 1/cell;
  species PANX1_p in cell = 1/cell;
  species PANX1_rna in cell = 1/cell;
  species PIK3CA in cell = 1/cell;
  species PIK3CA_g in cell = 1/cell;
  species PIK3CA_p in cell = 1/cell;
  species PIK3CA_rna in cell = 1/cell;
  species PKM in cell = 1/cell;
  species PKM_g in cell = 1/cell;
  species PKM_p in cell = 1/cell;
  species PKM_rna in cell = 1/cell;
  species PKN1 in cell = 1/cell;
  species PKN1_g in cell = 1/cell;
  species PKN1_p in cell = 1/cell;
  species PKN1_rna in cell = 1/cell;
  species PRDX1 in cell = 1/cell;
  species PRDX1_g in cell = 1/cell;
  species PRDX1_p in cell = 1/cell;
  species PRDX1_rna in cell = 1/cell;
  species PRKCA in cell = 1/cell;
  species PRKCA_g in cell = 1/cell;
  species PRKCA_p in cell = 1/cell;
  species PRKCA_rna in cell = 1/cell;
  species PRKCZ in cell = 1/cell;
  species PRKCZ_g in cell = 1/cell;
  species PRKCZ_p in cell = 1/cell;
  species PRKCZ_rna in cell = 1/cell;
  species PTPN2 in cell = 1/cell;
  species PTPN2_g in cell = 1/cell;
  species PTPN2_rna in cell = 1/cell;
  species PTPN6 in cell = 1/cell;
  species PTPN6_g in cell = 1/cell;
  species PTPN6_p in cell = 1/cell;
  species PTPN6_rna in cell = 1/cell;
  species PTPRB in cell = 1/cell;
  species PTPRB_g in cell = 1/cell;
  species PTPRB_rna in cell = 1/cell;
  species RHO in cell = 1/cell;
  species RHO_g in cell = 1/cell;
  species RHO_p in cell = 1/cell;
  species RHO_rna in cell = 1/cell;
  species RNF7 in cell = 1/cell;
  species RNF7_g in cell = 1/cell;
  species RNF7_rna in cell = 1/cell;
  species SMAD1 in cell = 1/cell;
  species SMAD1_g in cell = 1/cell;
  species SMAD1_rna in cell = 1/cell;
  species SMAD4 in cell = 1/cell;
  species SMAD4_g in cell = 1/cell;
  species SMAD4_p in cell = 1/cell;
  species SMAD4_rna in cell = 1/cell;
  species SMURF1 in cell = 1/cell;
  species SMURF1_g in cell = 1/cell;
  species SMURF1_rna in cell = 1/cell;
  species SOCS1 in cell = 1/cell;
  species SOCS1_g in cell = 1/cell;
  species SOCS1_p in cell = 1/cell;
  species SOCS1_rna in cell = 1/cell;
  species SOD1 in cell = 1/cell;
  species SOD1_g in cell = 1/cell;
  species SOD1_rna in cell = 1/cell;
  species SP1 in cell = 1/cell;
  species SP1_g in cell = 1/cell;
  species SP1_p in cell = 1/cell;
  species SP1_rna in cell = 1/cell;
  species SRC in cell = 1/cell;
  species SRC_g in cell = 1/cell;
  species SRC_p in cell = 1/cell;
  species SRC_rna in cell = 1/cell;
  species SREBF1 in cell = 1/cell;
  species SREBF1_g in cell = 1/cell;
  species SREBF1_rna in cell = 1/cell;
  species STAT3 in cell = 1/cell;
  species STAT3_g in cell = 1/cell;
  species STAT3_p in cell = 1/cell;
  species STAT3_rna in cell = 1/cell;
  species STK4 in cell = 1/cell;
  species STK4_g in cell = 1/cell;
  species STK4_p in cell = 1/cell;
  species STK4_rna in cell = 1/cell;
  species SUV39H1 in cell = 1/cell;
  species SUV39H1_g in cell = 1/cell;
  species SUV39H1_rna in cell = 1/cell;
  species TEK in cell = 1/cell;
  species TEK_g in cell = 1/cell;
  species TEK_p in cell = 1/cell;
  species TEK_rna in cell = 1/cell;
  species TRAF6 in cell = 1/cell;
  species TRAF6_g in cell = 1/cell;
  species TRAF6_p in cell = 1/cell;
  species TRAF6_rna in cell = 1/cell;
  species TRIM23 in cell = 1/cell;
  species TRIM23_g in cell = 1/cell;
  species TRIM23_rna in cell = 1/cell;
  species VEGFD in cell = 1/cell;
  species VEGFD_g in cell = 1/cell;
  species VEGFD_rna in cell = 1/cell;

  // Reactions:
  // V(1) = K(1,1) * [STAT3_p] * [SP1_p] -K(1,2) * [SIGNOR-C74];
  R1: STAT3_p => SP1_p; 1;
  // V(2) = K(2,1) * [SMAD4_p] * [SMAD1] * [SMAD1] -K(2,2) * [SIGNOR-C85];
  R2: SMAD1 => SMAD4_p; 1;
  // V(3) = K(3,1) * [PRKCA_p] * [CTNNB1] -K(3,2) * [PRKCA_p |CTNNB1];
  R3: CTNNB1 => PRKCA_p; 1;
  // V(4) = K(4,1) * [PRKCA_p |CTNNB1];
  R4: CTNNB1 => PRKCA_p; 1;
  // V(5) = K(5,1) * [PRKCA_p] * [RHO] -K(5,2) * [PRKCA_p |RHO];
  R5: PRKCA_p => RHO; 1;
  // V(6) = K(6,1) * [PRKCA_p |RHO];
  R6: PRKCA_p => RHO; 1;
  // V(7) = K(7,1) * [PRKCZ_p] * [SP1] -K(7,2) * [PRKCZ_p |SP1];
  R7: SP1 => PRKCZ_p; 1;
  // V(8) = K(8,1) * [PRKCZ_p |SP1];
  R8: SP1 => PRKCZ_p; 1;
  // V(9) = K(9,1) * [SRC_p] * [PANX1] -K(9,2) * [SRC_p |PANX1];
  R9: PANX1 => SRC_p; 1;
  // V(10) = K(10,1) * [SRC_p |PANX1];
  R10: PANX1 => SRC_p; 1;
  // V(11) = K(11,1) * [JAK2_p] * [JAK2] -K(11,2) * [JAK2_p |JAK2];
  R11: JAK2_p => JAK2; 1;
  // V(12) = K(12,1) * [JAK2_p |JAK2];
  R12: JAK2_p => JAK2; 1;
  // V(13) = K(13,1) * [PRKCA_p] * [PTPN6] -K(13,2) * [PRKCA_p |PTPN6];
  R13: PTPN6 => PRKCA_p; 1;
  // V(14) = K(14,1) * [PRKCA_p |PTPN6];
  R14: PTPN6 => PRKCA_p; 1;
  // V(15) = K(15,1) * [PRKCA_p] * [NCF1] -K(15,2) * [PRKCA_p |NCF1];
  R15: NCF1 => PRKCA_p; 1;
  // V(16) = K(16,1) * [PRKCA_p |NCF1];
  R16: NCF1 => PRKCA_p; 1;
  // V(17) = K(17,1) * [PRKCZ_p] * [NCF1] -K(17,2) * [PRKCZ_p |NCF1];
  R17: NCF1 => PRKCZ_p; 1;
  // V(18) = K(18,1) * [PRKCZ_p |NCF1];
  R18: NCF1 => PRKCZ_p; 1;
  // V(19) = K(19,1) * [KDR_p] * [KDR] -K(19,2) * [KDR_p |KDR];
  R19: KDR => KDR_p; 1;
  // V(20) = K(20,1) * [KDR_p |KDR];
  R20: KDR => KDR_p; 1;
  // V(21) = K(21,1) * [SRC_p] * [SRC] -K(21,2) * [SRC_p |SRC];
  R21: SRC => SRC_p; 1;
  // V(22) = K(22,1) * [SRC_p |SRC];
  R22: SRC => SRC_p; 1;
  // V(23) = K(23,1) * [JAK3_p] * [CTNNB1] -K(23,2) * [JAK3_p |CTNNB1];
  R23: CTNNB1 => JAK3_p; 1;
  // V(24) = K(24,1) * [JAK3_p |CTNNB1];
  R24: CTNNB1 => JAK3_p; 1;
  // V(25) = K(25,1) * [FYN_p] * [PTPN6] -K(25,2) * [FYN_p |PTPN6];
  R25: FYN_p => PTPN6; 1;
  // V(26) = K(26,1) * [FYN_p |PTPN6];
  R26: FYN_p => PTPN6; 1;
  // V(27) = K(27,1) * [KIT_p] * [CTNNB1] -K(27,2) * [KIT_p |CTNNB1];
  R27: CTNNB1 => KIT_p; 1;
  // V(28) = K(28,1) * [KIT_p |CTNNB1];
  R28: CTNNB1 => KIT_p; 1;
  // V(29) = K(29,1) * [INSR_p] * [INSR] -K(29,2) * [INSR_p |INSR];
  R29: INSR_p => INSR; 1;
  // V(30) = K(30,1) * [INSR_p |INSR];
  R30: INSR_p => INSR; 1;
  // V(31) = K(31,1) * [PRKCZ_p] * [NR1H4] -K(31,2) * [PRKCZ_p |NR1H4];
  R31: PRKCZ_p => NR1H4; 1;
  // V(32) = K(32,1) * [PRKCZ_p |NR1H4];
  R32: PRKCZ_p => NR1H4; 1;
  // V(33) = K(33,1) * [PKN1_p] * [PKN1] -K(33,2) * [PKN1_p |PKN1];
  R33: PKN1 => PKN1_p; 1;
  // V(34) = K(34,1) * [PKN1_p |PKN1];
  R34: PKN1 => PKN1_p; 1;
  // V(35) = K(35,1) * [KIT_p] * [KIT] -K(35,2) * [KIT_p |KIT];
  R35: KIT => KIT_p; 1;
  // V(36) = K(36,1) * [KIT_p |KIT];
  R36: KIT => KIT_p; 1;
  // V(37) = K(37,1) * [PRKCA_p] * [PRKCA] -K(37,2) * [PRKCA_p |PRKCA];
  R37: PRKCA => PRKCA_p; 1;
  // V(38) = K(38,1) * [PRKCA_p |PRKCA];
  R38: PRKCA => PRKCA_p; 1;
  // V(39) = K(39,1) * [SRC_p] * [TRAF6] -K(39,2) * [SRC_p |TRAF6];
  R39: SRC_p => TRAF6; 1;
  // V(40) = K(40,1) * [SRC_p |TRAF6];
  R40: SRC_p => TRAF6; 1;
  // V(41) = K(41,1) * [PRKCA_p] * [KIT] -K(41,2) * [PRKCA_p |KIT];
  R41: PRKCA_p => KIT; 1;
  // V(42) = K(42,1) * [PRKCA_p |KIT];
  R42: PRKCA_p => KIT; 1;
  // V(43) = K(43,1) * [FYN_p] * [CD79A] -K(43,2) * [FYN_p |CD79A];
  R43: FYN_p => CD79A; 1;
  // V(44) = K(44,1) * [FYN_p |CD79A];
  R44: FYN_p => CD79A; 1;
  // V(45) = K(45,1) * [STK4_p] * [STK4] -K(45,2) * [STK4_p |STK4];
  R45: STK4_p => STK4; 1;
  // V(46) = K(46,1) * [STK4_p |STK4];
  R46: STK4_p => STK4; 1;
  // V(47) = K(47,1) * [PRKCA_p] * [SRC] -K(47,2) * [PRKCA_p |SRC];
  R47: PRKCA_p => SRC; 1;
  // V(48) = K(48,1) * [PRKCA_p |SRC];
  R48: PRKCA_p => SRC; 1;
  // V(49) = K(49,1) * [PRKCA_p] * [JAK2] -K(49,2) * [PRKCA_p |JAK2];
  R49: PRKCA_p => JAK2; 1;
  // V(50) = K(50,1) * [PRKCA_p |JAK2];
  R50: PRKCA_p => JAK2; 1;
  // V(51) = K(51,1) * [FYN_p] * [FYN] -K(51,2) * [FYN_p |FYN];
  R51: FYN_p => FYN; 1;
  // V(52) = K(52,1) * [FYN_p |FYN];
  R52: FYN_p => FYN; 1;
  // V(53) = K(53,1) * [PRKCA_p] * [INSR] -K(53,2) * [PRKCA_p |INSR];
  R53: PRKCA_p => INSR; 1;
  // V(54) = K(54,1) * [PRKCA_p |INSR];
  R54: PRKCA_p => INSR; 1;
  // V(55) = K(55,1) * [PRKCZ_p] * [PRKCZ] -K(55,2) * [PRKCZ_p |PRKCZ];
  R55: PRKCZ_p => PRKCZ; 1;
  // V(56) = K(56,1) * [PRKCZ_p |PRKCZ];
  R56: PRKCZ_p => PRKCZ; 1;
  // V(57) = K(57,1) * [TEK_p] * [TEK] -K(57,2) * [TEK_p |TEK];
  R57: TEK_p => TEK; 1;
  // V(58) = K(58,1) * [TEK_p |TEK];
  R58: TEK_p => TEK; 1;
  // V(59) = K(59,1) * [ALK_p] * [ALK] -K(59,2) * [ALK_p |ALK];
  R59: ALK_p => ALK; 1;
  // V(60) = K(60,1) * [ALK_p |ALK];
  R60: ALK_p => ALK; 1;
  // V(61) = K(61,1) * [JAK3_p] * [JAK3] -K(61,2) * [JAK3_p |JAK3];
  R61: JAK3_p => JAK3; 1;
  // V(62) = K(62,1) * [JAK3_p |JAK3];
  R62: JAK3_p => JAK3; 1;
  // V(63) = K(63,1) * [SRC_p] * [KRT19] -K(63,2) * [SRC_p |KRT19];
  R63: SRC_p => KRT19; 1;
  // V(64) = K(64,1) * [SRC_p |KRT19];
  R64: SRC_p => KRT19; 1;
  // V(65) = K(65,1) * [PRKCA_p] * [NR1H4] -K(65,2) * [PRKCA_p |NR1H4];
  R65: PRKCA_p => NR1H4; 1;
  // V(66) = K(66,1) * [PRKCA_p |NR1H4];
  R66: PRKCA_p => NR1H4; 1;
  // V(67) = K(67,1) * [SRC_p] * [CLTC] -K(67,2) * [SRC_p |CLTC];
  R67: SRC_p => CLTC; 1;
  // V(68) = K(68,1) * [SRC_p |CLTC];
  R68: SRC_p => CLTC; 1;
  // V(69) = K(69,1) * [STK4_p] * [PIK3CA] -K(69,2) * [STK4_p |PIK3CA];
  R69: STK4_p => PIK3CA; 1;
  // V(70) = K(70,1) * [STK4_p |PIK3CA];
  R70: STK4_p => PIK3CA; 1;
  // V(71) = K(71,1) * [STK4_p] * [IRF3] -K(71,2) * [STK4_p |IRF3];
  R71: STK4_p => IRF3; 1;
  // V(72) = K(72,1) * [STK4_p |IRF3];
  R72: STK4_p => IRF3; 1;
  // V(73) = K(73,1) * [SMAD1] * [SMAD4] -K(73,2) * [SMAD1 |SMAD4];
  R73: SMAD4 => SMAD1; 1;
  // V(74) = K(74,1) * [SMAD1 |SMAD4];
  R74: SMAD4 => SMAD1; 1;
  // V(75) = K(75,1) * [PRKCA_p] * [NPHS1] -K(75,2) * [PRKCA_p |NPHS1];
  R75: NPHS1 => PRKCA_p; 1;
  // V(76) = K(76,1) * [PRKCA_p |NPHS1];
  R76: NPHS1 => PRKCA_p; 1;
  // V(77) = K(77,1) * [PKN1_p] * [MRTFA] -K(77,2) * [PKN1_p |MRTFA];
  R77: MRTFA => PKN1_p; 1;
  // V(78) = K(78,1) * [PKN1_p |MRTFA];
  R78: MRTFA => PKN1_p; 1;
  // V(79) = K(79,1) * [PRKCA_p] * [BAD] -K(79,2) * [PRKCA_p |BAD];
  R79: PRKCA_p => BAD; 1;
  // V(80) = K(80,1) * [PRKCA_p |BAD];
  R80: PRKCA_p => BAD; 1;
  // V(81) = K(81,1) * [SRC_p] * [NPHS1] -K(81,2) * [SRC_p |NPHS1];
  R81: NPHS1 => SRC_p; 1;
  // V(82) = K(82,1) * [SRC_p |NPHS1];
  R82: NPHS1 => SRC_p; 1;
  // V(83) = K(83,1) * [STK4_p] * [AR] -K(83,2) * [STK4_p |AR];
  R83: STK4_p => AR; 1;
  // V(84) = K(84,1) * [STK4_p |AR];
  R84: STK4_p => AR; 1;
  // V(85) = K(85,1) * [STK4_p] * [PRKCA] -K(85,2) * [STK4_p |PRKCA];
  R85: STK4_p => PRKCA; 1;
  // V(86) = K(86,1) * [STK4_p |PRKCA];
  R86: STK4_p => PRKCA; 1;
  // V(87) = K(87,1) * [SRC_p] * [CDH1] -K(87,2) * [SRC_p |CDH1];
  R87: CDH1 => SRC_p; 1;
  // V(88) = K(88,1) * [SRC_p |CDH1];
  R88: CDH1 => SRC_p; 1;
  // V(89) = K(89,1) * [PRKCZ_p] * [CTNNB1] -K(89,2) * [PRKCZ_p |CTNNB1];
  R89: CTNNB1 => PRKCZ_p; 1;
  // V(90) = K(90,1) * [PRKCZ_p |CTNNB1];
  R90: CTNNB1 => PRKCZ_p; 1;
  // V(91) = K(91,1) * [PKN1_p] * [AR] -K(91,2) * [PKN1_p |AR];
  R91: AR => PKN1_p; 1;
  // V(92) = K(92,1) * [PKN1_p |AR];
  R92: AR => PKN1_p; 1;
  // V(93) = K(93,1) * [SRC_p] * [KIT] -K(93,2) * [SRC_p |KIT];
  R93: SRC_p => KIT; 1;
  // V(94) = K(94,1) * [SRC_p |KIT];
  R94: SRC_p => KIT; 1;
  // V(95) = K(95,1) * [SRC_p] * [CTNNB1] -K(95,2) * [SRC_p |CTNNB1];
  R95: CTNNB1 => SRC_p; 1;
  // V(96) = K(96,1) * [SRC_p |CTNNB1];
  R96: CTNNB1 => SRC_p; 1;
  // V(97) = K(97,1) * [ALK_p] * [STAT3] -K(97,2) * [ALK_p |STAT3];
  R97: ALK_p => STAT3; 1;
  // V(98) = K(98,1) * [ALK_p |STAT3];
  R98: ALK_p => STAT3; 1;
  // V(99) = K(99,1) * [SRC_p] * [IRF3] -K(99,2) * [SRC_p |IRF3];
  R99: IRF3 => SRC_p; 1;
  // V(100) = K(100,1) * [SRC_p |IRF3];
  R100: IRF3 => SRC_p; 1;
  // V(101) = K(101,1) * [FYN_p] * [NPHS1] -K(101,2) * [FYN_p |NPHS1];
  R101: FYN_p => NPHS1; 1;
  // V(102) = K(102,1) * [FYN_p |NPHS1];
  R102: FYN_p => NPHS1; 1;
  // V(103) = K(103,1) * [INSR_p] * [FABP4] -K(103,2) * [INSR_p |FABP4];
  R103: INSR_p => FABP4; 1;
  // V(104) = K(104,1) * [INSR_p |FABP4];
  R104: INSR_p => FABP4; 1;
  // V(105) = K(105,1) * [PKM_p] * [STAT3] -K(105,2) * [PKM_p |STAT3];
  R105: PKM_p => STAT3; 1;
  // V(106) = K(106,1) * [PKM_p |STAT3];
  R106: PKM_p => STAT3; 1;
  // V(107) = K(107,1) * [SRC_p] * [AR] -K(107,2) * [SRC_p |AR];
  R107: AR => SRC_p; 1;
  // V(108) = K(108,1) * [SRC_p |AR];
  R108: AR => SRC_p; 1;
  // V(109) = K(109,1) * [INSR_p] * [PTPN6] -K(109,2) * [INSR_p |PTPN6];
  R109: PTPN6 => INSR_p; 1;
  // V(110) = K(110,1) * [INSR_p |PTPN6];
  R110: PTPN6 => INSR_p; 1;
  // V(111) = K(111,1) * [JAK2_p] * [STAT3] -K(111,2) * [JAK2_p |STAT3];
  R111: JAK2_p => STAT3; 1;
  // V(112) = K(112,1) * [JAK2_p |STAT3];
  R112: JAK2_p => STAT3; 1;
  // V(113) = K(113,1) * [STK4_p] * [PRDX1] -K(113,2) * [STK4_p |PRDX1];
  R113: STK4_p => PRDX1; 1;
  // V(114) = K(114,1) * [STK4_p |PRDX1];
  R114: STK4_p => PRDX1; 1;
  // V(115) = K(115,1) * [SRC_p] * [STAT3] -K(115,2) * [SRC_p |STAT3];
  R115: STAT3 => SRC_p; 1;
  // V(116) = K(116,1) * [SRC_p |STAT3];
  R116: STAT3 => SRC_p; 1;
  // V(117) = K(117,1) * [SRC_p] * [KDR] -K(117,2) * [SRC_p |KDR];
  R117: KDR => SRC_p; 1;
  // V(118) = K(118,1) * [SRC_p |KDR];
  R118: KDR => SRC_p; 1;
  // V(119) = K(119,1) * [PRKCA_p] * [NFE2L2] -K(119,2) * [PRKCA_p |NFE2L2];
  R119: PRKCA_p => NFE2L2; 1;
  // V(120) = K(120,1) * [PRKCA_p |NFE2L2];
  R120: PRKCA_p => NFE2L2; 1;
  // V(121) = K(121,1) * [SRC_p] * [SOCS1] -K(121,2) * [SRC_p |SOCS1];
  R121: SRC_p => SOCS1; 1;
  // V(122) = K(122,1) * [SRC_p |SOCS1];
  R122: SRC_p => SOCS1; 1;
  // V(123) = K(123,1) * [PRKCA_p] * [GJB1] -K(123,2) * [PRKCA_p |GJB1];
  R123: PRKCA_p => GJB1; 1;
  // V(124) = K(124,1) * [PRKCA_p |GJB1];
  R124: PRKCA_p => GJB1; 1;
  // V(125) = K(125,1) * [FYN_p] * [CTNNB1] -K(125,2) * [FYN_p |CTNNB1];
  R125: FYN_p => CTNNB1; 1;
  // V(126) = K(126,1) * [FYN_p |CTNNB1];
  R126: FYN_p => CTNNB1; 1;
  // V(127) = K(127,1) * [FYN_p] * [NFE2L2] -K(127,2) * [FYN_p |NFE2L2];
  R127: FYN_p => NFE2L2; 1;
  // V(128) = K(128,1) * [FYN_p |NFE2L2];
  R128: FYN_p => NFE2L2; 1;
  // V(129) = K(129,1) * [SRC_p] * [ENG] -K(129,2) * [SRC_p |ENG];
  R129: ENG => SRC_p; 1;
  // V(130) = K(130,1) * [SRC_p |ENG];
  R130: ENG => SRC_p; 1;
  // V(131) = K(131,1) * [JAK2_p] * [EZH2] -K(131,2) * [JAK2_p |EZH2];
  R131: JAK2_p => EZH2; 1;
  // V(132) = K(132,1) * [JAK2_p |EZH2];
  R132: JAK2_p => EZH2; 1;
  // V(133) = K(133,1) * [SRC_p] * [PTPN6] -K(133,2) * [SRC_p |PTPN6];
  R133: PTPN6 => SRC_p; 1;
  // V(134) = K(134,1) * [SRC_p |PTPN6];
  R134: PTPN6 => SRC_p; 1;
  // V(135) = K(135,1) * [JAK3_p] * [STAT3] -K(135,2) * [JAK3_p |STAT3];
  R135: STAT3 => JAK3_p; 1;
  // V(136) = K(136,1) * [JAK3_p |STAT3];
  R136: STAT3 => JAK3_p; 1;
  // V(137) = K(137,1) * [JAK3_p] * [EZH2] -K(137,2) * [JAK3_p |EZH2];
  R137: JAK3_p => EZH2; 1;
  // V(138) = K(138,1) * [JAK3_p |EZH2];
  R138: JAK3_p => EZH2; 1;
  // V(139) = K(139,1) * [PTPN2] * [KDR_p] -K(139,2) * [PTPN2 |KDR_p];
  R139: PTPN2 => KDR_p; 1;
  // V(140) = K(140,1) * [PTPN2 |KDR_p];
  R140: PTPN2 => KDR_p; 1;
  // V(141) = K(141,1) * [PTPN6_p] * [JAK2_p] -K(141,2) * [PTPN6_p |JAK2_p];
  R141: PTPN6_p => JAK2_p; 1;
  // V(142) = K(142,1) * [PTPN6_p |JAK2_p];
  R142: PTPN6_p => JAK2_p; 1;
  // V(143) = K(143,1) * [PTPN6_p] * [KDR_p] -K(143,2) * [PTPN6_p |KDR_p];
  R143: PTPN6_p => KDR_p; 1;
  // V(144) = K(144,1) * [PTPN6_p |KDR_p];
  R144: PTPN6_p => KDR_p; 1;
  // V(145) = K(145,1) * [PTPN2] * [INSR_p] -K(145,2) * [PTPN2 |INSR_p];
  R145: INSR_p => PTPN2; 1;
  // V(146) = K(146,1) * [PTPN2 |INSR_p];
  R146: INSR_p => PTPN2; 1;
  // V(147) = K(147,1) * [PTPN2] * [FYN_p] -K(147,2) * [PTPN2 |FYN_p];
  R147: FYN_p => PTPN2; 1;
  // V(148) = K(148,1) * [PTPN2 |FYN_p];
  R148: FYN_p => PTPN2; 1;
  // V(149) = K(149,1) * [PTPN6_p] * [PKM_p] -K(149,2) * [PTPN6_p |PKM_p];
  R149: PTPN6_p => PKM_p; 1;
  // V(150) = K(150,1) * [PTPN6_p |PKM_p];
  R150: PTPN6_p => PKM_p; 1;
  // V(151) = K(151,1) * [PTPN2] * [SRC_p] -K(151,2) * [PTPN2 |SRC_p];
  R151: PTPN2 => SRC_p; 1;
  // V(152) = K(152,1) * [PTPN2 |SRC_p];
  R152: PTPN2 => SRC_p; 1;
  // V(153) = K(153,1) * [PTPN6_p] * [INSR_p] -K(153,2) * [PTPN6_p |INSR_p];
  R153: PTPN6_p => INSR_p; 1;
  // V(154) = K(154,1) * [PTPN6_p |INSR_p];
  R154: PTPN6_p => INSR_p; 1;
  // V(155) = K(155,1) * [PTPN6_p] * [SRC_p] -K(155,2) * [PTPN6_p |SRC_p];
  R155: PTPN6_p => SRC_p; 1;
  // V(156) = K(156,1) * [PTPN6_p |SRC_p];
  R156: PTPN6_p => SRC_p; 1;
  // V(157) = K(157,1) * [PTPRB] * [INSR_p] -K(157,2) * [PTPRB |INSR_p];
  R157: INSR_p => PTPRB; 1;
  // V(158) = K(158,1) * [PTPRB |INSR_p];
  R158: INSR_p => PTPRB; 1;
  // V(159) = K(159,1) * [PTPN2] * [STAT3_p] -K(159,2) * [PTPN2 |STAT3_p];
  R159: STAT3_p => PTPN2; 1;
  // V(160) = K(160,1) * [PTPN2 |STAT3_p];
  R160: STAT3_p => PTPN2; 1;
  // V(161) = K(161,1) * [PTPRB] * [TEK_p] -K(161,2) * [PTPRB |TEK_p];
  R161: TEK_p => PTPRB; 1;
  // V(162) = K(162,1) * [PTPRB |TEK_p];
  R162: TEK_p => PTPRB; 1;
  // V(163) = K(163,1) * [PTPRB] * [SRC_p] -K(163,2) * [PTPRB |SRC_p];
  R163: PTPRB => SRC_p; 1;
  // V(164) = K(164,1) * [PTPRB |SRC_p];
  R164: PTPRB => SRC_p; 1;
  // V(165) = K(165,1) * [PTPN6_p] * [STAT3_p] -K(165,2) * [PTPN6_p |STAT3_p];
  R165: PTPN6_p => STAT3_p; 1;
  // V(166) = K(166,1) * [PTPN6_p |STAT3_p];
  R166: PTPN6_p => STAT3_p; 1;
  // V(167) = K(167,1) * [PTPRB] * [KDR_p] -K(167,2) * [PTPRB |KDR_p];
  R167: PTPRB => KDR_p; 1;
  // V(168) = K(168,1) * [PTPRB |KDR_p];
  R168: PTPRB => KDR_p; 1;
  // V(169) = K(169,1) * [PTPRB] * [ALK_p] -K(169,2) * [PTPRB |ALK_p];
  R169: ALK_p => PTPRB; 1;
  // V(170) = K(170,1) * [PTPRB |ALK_p];
  R170: ALK_p => PTPRB; 1;
  // V(171) = K(171,1) * [PTPN6_p] * [CTNNB1_p] -K(171,2) * [PTPN6_p |CTNNB1_p];
  R171: PTPN6_p => CTNNB1_p; 1;
  // V(172) = K(172,1) * [PTPN6_p |CTNNB1_p];
  R172: PTPN6_p => CTNNB1_p; 1;
  // V(173) = K(173,1) * [PTPN2] * [JAK3_p] -K(173,2) * [PTPN2 |JAK3_p];
  R173: PTPN2 => JAK3_p; 1;
  // V(174) = K(174,1) * [PTPN2 |JAK3_p];
  R174: PTPN2 => JAK3_p; 1;
  // V(175) = K(175,1) * [PTPN6_p] * [JAK3_p] -K(175,2) * [PTPN6_p |JAK3_p];
  R175: PTPN6_p => JAK3_p; 1;
  // V(176) = K(176,1) * [PTPN6_p |JAK3_p];
  R176: PTPN6_p => JAK3_p; 1;
  // V(177) = K(177,1) * [TRAF6_p] * [STAT3] -K(177,2) * [TRAF6_p |STAT3];
  R177: TRAF6_p => STAT3; 1;
  // V(178) = K(178,1) * [TRAF6_p |STAT3];
  R178: TRAF6_p => STAT3; 1;
  // V(179) = K(179,1) * [MDM2] * [SUV39H1] -K(179,2) * [MDM2 |SUV39H1];
  R179: SUV39H1 => MDM2; 1;
  // V(180) = K(180,1) * [MDM2 |SUV39H1];
  R180: SUV39H1 => MDM2; 1;
  // V(181) = K(181,1) * [TRAF6_p] * [TRAF6] -K(181,2) * [TRAF6_p |TRAF6];
  R181: TRAF6_p => TRAF6; 1;
  // V(182) = K(182,1) * [TRAF6_p |TRAF6];
  R182: TRAF6_p => TRAF6; 1;
  // V(183) = K(183,1) * [MDM2] * [NUMB] -K(183,2) * [MDM2 |NUMB];
  R183: NUMB => MDM2; 1;
  // V(184) = K(184,1) * [MDM2 |NUMB];
  R184: NUMB => MDM2; 1;
  // V(185) = K(185,1) * [RNF7] * [DEPTOR] -K(185,2) * [RNF7 |DEPTOR];
  R185: DEPTOR => RNF7; 1;
  // V(186) = K(186,1) * [RNF7 |DEPTOR];
  R186: DEPTOR => RNF7; 1;
  // V(187) = K(187,1) * [SMURF1] * [SMAD1] -K(187,2) * [SMURF1 |SMAD1];
  R187: SMURF1 => SMAD1; 1;
  // V(188) = K(188,1) * [SMURF1 |SMAD1];
  R188: SMURF1 => SMAD1; 1;
  // V(189) = K(189,1) * [SOCS1] * [JAK2] -K(189,2) * [SOCS1 |JAK2];
  R189: JAK2 => SOCS1; 1;
  // V(190) = K(190,1) * [SOCS1 |JAK2];
  R190: JAK2 => SOCS1; 1;
  // V(191) = K(191,1) * [TRIM23] * [TRAF6] -K(191,2) * [TRIM23 |TRAF6];
  R191: TRIM23 => TRAF6; 1;
  // V(192) = K(192,1) * [TRIM23 |TRAF6];
  R192: TRIM23 => TRAF6; 1;
  // V(193) = K(193,1) * [TRAF6_p] * [PIK3CA] -K(193,2) * [TRAF6_p |PIK3CA];
  R193: PIK3CA => TRAF6_p; 1;
  // V(194) = K(194,1) * [TRAF6_p |PIK3CA];
  R194: PIK3CA => TRAF6_p; 1;
  // V(195) = K(195,1) * [SMURF1] * [SMAD4] -K(195,2) * [SMURF1 |SMAD4];
  R195: SMAD4 => SMURF1; 1;
  // V(196) = K(196,1) * [SMURF1 |SMAD4];
  R196: SMAD4 => SMURF1; 1;
  // V(197) = K(197,1) * [NFE2L2_p] * [SOD1_g] -K(197,2) * [NFE2L2_p |SOD1_g];
  R197: SOD1_g => NFE2L2_p; 1;
  // V(198) = K(198,1) * [NFE2L2_p |SOD1_g];
  R198: SOD1_g => NFE2L2_p; 1;
  // V(199) = K(199,1) * [SOD1_rna];
  R199: SOD1_rna => ; 1;
  // V(200) = K(200,1) * [SREBF1] * [PKM_g] -K(200,2) * [SREBF1 |PKM_g];
  R200: PKM_g => SREBF1; 1;
  // V(201) = K(201,1) * [SREBF1 |PKM_g];
  R201: PKM_g => SREBF1; 1;
  // V(202) = K(202,1) * [PKM_rna];
  R202: PKM_rna => ; 1;
  // V(203) = K(203,1) * [NFE2L2_p] * [CAT_g] -K(203,2) * [NFE2L2_p |CAT_g];
  R203: CAT_g => NFE2L2_p; 1;
  // V(204) = K(204,1) * [NFE2L2_p |CAT_g];
  R204: CAT_g => NFE2L2_p; 1;
  // V(205) = K(205,1) * [CAT_rna];
  R205: CAT_rna => ; 1;
  // V(206) = K(206,1) * [IRF3_p] * [IL6_g] -K(206,2) * [IRF3_p |IL6_g];
  R206: IRF3_p => IL6_g; 1;
  // V(207) = K(207,1) * [IRF3_p |IL6_g];
  R207: IRF3_p => IL6_g; 1;
  // V(208) = K(208,1) * [IL6_rna];
  R208: IL6_rna => ; 1;
  // V(209) = K(209,1) * [NFE2L2_p] * [HMOX1_g] -K(209,2) * [NFE2L2_p |HMOX1_g];
  R209: HMOX1_g => NFE2L2_p; 1;
  // V(210) = K(210,1) * [NFE2L2_p |HMOX1_g];
  R210: HMOX1_g => NFE2L2_p; 1;
  // V(211) = K(211,1) * [HMOX1_rna];
  R211: HMOX1_rna => ; 1;
  // V(212) = K(212,1) * [ANGPT2];
  R212: ANGPT2 => ; 1;
  // V(213) = K(213,1) * [SOCS1];
  R213: SOCS1 => ; 1;
  // V(214) = K(214,1) * [SUV39H1];
  R214: SUV39H1 => ; 1;
  // V(215) = K(215,1) * [VEGFD];
  R215: VEGFD => ; 1;
  // V(216) = K(216,1) * [NPHS1];
  R216: NPHS1 => ; 1;
  // V(217) = K(217,1) * [JAK2];
  R217: JAK2 => ; 1;
  // V(218) = K(218,1) * [SOD1];
  R218: SOD1 => ; 1;
  // V(219) = K(219,1) * [INS];
  R219: INS => ; 1;
  // V(220) = K(220,1) * [CAT];
  R220: CAT => ; 1;
  // V(221) = K(221,1) * [IL6];
  R221: IL6 => ; 1;
  // V(222) = K(222,1) * [INSR];
  R222: INSR => ; 1;
  // V(223) = K(223,1) * [FYN];
  R223: FYN => ; 1;
  // V(224) = K(224,1) * [GJB1];
  R224: GJB1 => ; 1;
  // V(225) = K(225,1) * [SP1];
  R225: SP1 => ; 1;
  // V(226) = K(226,1) * [RHO];
  R226: RHO => ; 1;
  // V(227) = K(227,1) * [KRT19];
  R227: KRT19 => ; 1;
  // V(228) = K(228,1) * [HMOX1];
  R228: HMOX1 => ; 1;
  // V(229) = K(229,1) * [AR];
  R229: AR => ; 1;
  // V(230) = K(230,1) * [KIT];
  R230: KIT => ; 1;
  // V(231) = K(231,1) * [CD79A];
  R231: CD79A => ; 1;
  // V(232) = K(232,1) * [CDH1];
  R232: CDH1 => ; 1;
  // V(233) = K(233,1) * [SRC];
  R233: SRC => ; 1;
  // V(234) = K(234,1) * [NCF1];
  R234: NCF1 => ; 1;
  // V(235) = K(235,1) * [PKM];
  R235: PKM => ; 1;
  // V(236) = K(236,1) * [FABP4];
  R236: FABP4 => ; 1;
  // V(237) = K(237,1) * [PRKCA];
  R237: PRKCA => ; 1;
  // V(238) = K(238,1) * [PTPN2];
  R238: PTPN2 => ; 1;
  // V(239) = K(239,1) * [ENG];
  R239: ENG => ; 1;
  // V(240) = K(240,1) * [PTPRB];
  R240: PTPRB => ; 1;
  // V(241) = K(241,1) * [PTPN6];
  R241: PTPN6 => ; 1;
  // V(242) = K(242,1) * [CTNNB1];
  R242: CTNNB1 => ; 1;
  // V(243) = K(243,1) * [KDR];
  R243: KDR => ; 1;
  // V(244) = K(244,1) * [TRIM23];
  R244: TRIM23 => ; 1;
  // V(245) = K(245,1) * [SREBF1];
  R245: SREBF1 => ; 1;
  // V(246) = K(246,1) * [STAT3];
  R246: STAT3 => ; 1;
  // V(247) = K(247,1) * [PIK3CA];
  R247: PIK3CA => ; 1;
  // V(248) = K(248,1) * [NUMB];
  R248: NUMB => ; 1;
  // V(249) = K(249,1) * [JAK3];
  R249: JAK3 => ; 1;
  // V(250) = K(250,1) * [CLTC];
  R250: CLTC => ; 1;
  // V(251) = K(251,1) * [MDM2];
  R251: MDM2 => ; 1;
  // V(252) = K(252,1) * [TEK];
  R252: TEK => ; 1;
  // V(253) = K(253,1) * [NOTCH2];
  R253: NOTCH2 => ; 1;
  // V(254) = K(254,1) * [PRKCZ];
  R254: PRKCZ => ; 1;
  // V(255) = K(255,1) * [PRDX1];
  R255: PRDX1 => ; 1;
  // V(256) = K(256,1) * [STK4];
  R256: STK4 => ; 1;
  // V(257) = K(257,1) * [SMAD4];
  R257: SMAD4 => ; 1;
  // V(258) = K(258,1) * [IRF3];
  R258: IRF3 => ; 1;
  // V(259) = K(259,1) * [SMAD1];
  R259: SMAD1 => ; 1;
  // V(260) = K(260,1) * [EZH2];
  R260: EZH2 => ; 1;
  // V(261) = K(261,1) * [NFE2L2];
  R261: NFE2L2 => ; 1;
  // V(262) = K(262,1) * [PKN1];
  R262: PKN1 => ; 1;
  // V(263) = K(263,1) * [DEPTOR];
  R263: DEPTOR => ; 1;
  // V(264) = K(264,1) * [BAD];
  R264: BAD => ; 1;
  // V(265) = K(265,1) * [MRTFA];
  R265: MRTFA => ; 1;
  // V(266) = K(266,1) * [PANX1];
  R266: PANX1 => ; 1;
  // V(267) = K(267,1) * [NR1H4];
  R267: NR1H4 => ; 1;
  // V(268) = K(268,1) * [SMURF1];
  R268: SMURF1 => ; 1;
  // V(269) = K(269,1) * [RNF7];
  R269: RNF7 => ; 1;
  // V(270) = K(270,1) * [ALK];
  R270: ALK => ; 1;
  // V(271) = K(271,1) * [TRAF6];
  R271: TRAF6 => ; 1;
  // V(272) = K(272,1) * [SOD1_rna];
  R272: SOD1_rna => ; 1;
  // V(273) = K(273,1) * [CAT_rna];
  R273: CAT_rna => ; 1;
  // V(274) = K(274,1) * [IL6_rna];
  R274: IL6_rna => ; 1;
  // V(275) = K(275,1) * [HMOX1_rna];
  R275: HMOX1_rna => ; 1;
  // V(276) = K(276,1) * [PKM_rna];
  R276: PKM_rna => ; 1;
  // V(277) = K(277,1) * [ANGPT2_g];
  R277: ANGPT2_g => ; 1;
  // V(278) = K(278,1) * [ANGPT2_rna];
  R278: ANGPT2_rna => ; 1;
  // V(279) = K(279,1) * [SOCS1_g];
  R279: SOCS1_g => ; 1;
  // V(280) = K(280,1) * [SOCS1_rna];
  R280: SOCS1_rna => ; 1;
  // V(281) = K(281,1) * [SUV39H1_g];
  R281: SUV39H1_g => ; 1;
  // V(282) = K(282,1) * [SUV39H1_rna];
  R282: SUV39H1_rna => ; 1;
  // V(283) = K(283,1) * [VEGFD_g];
  R283: VEGFD_g => ; 1;
  // V(284) = K(284,1) * [VEGFD_rna];
  R284: VEGFD_rna => ; 1;
  // V(285) = K(285,1) * [NPHS1_g];
  R285: NPHS1_g => ; 1;
  // V(286) = K(286,1) * [NPHS1_rna];
  R286: NPHS1_rna => ; 1;
  // V(287) = K(287,1) * [JAK2_g];
  R287: JAK2_g => ; 1;
  // V(288) = K(288,1) * [JAK2_rna];
  R288: JAK2_rna => ; 1;
  // V(289) = K(289,1) * [INS_g];
  R289: INS_g => ; 1;
  // V(290) = K(290,1) * [INS_rna];
  R290: INS_rna => ; 1;
  // V(291) = K(291,1) * [INSR_g];
  R291: INSR_g => ; 1;
  // V(292) = K(292,1) * [INSR_rna];
  R292: INSR_rna => ; 1;
  // V(293) = K(293,1) * [FYN_g];
  R293: FYN_g => ; 1;
  // V(294) = K(294,1) * [FYN_rna];
  R294: FYN_rna => ; 1;
  // V(295) = K(295,1) * [GJB1_g];
  R295: GJB1_g => ; 1;
  // V(296) = K(296,1) * [GJB1_rna];
  R296: GJB1_rna => ; 1;
  // V(297) = K(297,1) * [SP1_g];
  R297: SP1_g => ; 1;
  // V(298) = K(298,1) * [SP1_rna];
  R298: SP1_rna => ; 1;
  // V(299) = K(299,1) * [RHO_g];
  R299: RHO_g => ; 1;
  // V(300) = K(300,1) * [RHO_rna];
  R300: RHO_rna => ; 1;
  // V(301) = K(301,1) * [KRT19_g];
  R301: KRT19_g => ; 1;
  // V(302) = K(302,1) * [KRT19_rna];
  R302: KRT19_rna => ; 1;
  // V(303) = K(303,1) * [AR_g];
  R303: AR_g => ; 1;
  // V(304) = K(304,1) * [AR_rna];
  R304: AR_rna => ; 1;
  // V(305) = K(305,1) * [KIT_g];
  R305: KIT_g => ; 1;
  // V(306) = K(306,1) * [KIT_rna];
  R306: KIT_rna => ; 1;
  // V(307) = K(307,1) * [CD79A_g];
  R307: CD79A_g => ; 1;
  // V(308) = K(308,1) * [CD79A_rna];
  R308: CD79A_rna => ; 1;
  // V(309) = K(309,1) * [CDH1_g];
  R309: CDH1_g => ; 1;
  // V(310) = K(310,1) * [CDH1_rna];
  R310: CDH1_rna => ; 1;
  // V(311) = K(311,1) * [SRC_g];
  R311: SRC_g => ; 1;
  // V(312) = K(312,1) * [SRC_rna];
  R312: SRC_rna => ; 1;
  // V(313) = K(313,1) * [NCF1_g];
  R313: NCF1_g => ; 1;
  // V(314) = K(314,1) * [NCF1_rna];
  R314: NCF1_rna => ; 1;
  // V(315) = K(315,1) * [FABP4_g];
  R315: FABP4_g => ; 1;
  // V(316) = K(316,1) * [FABP4_rna];
  R316: FABP4_rna => ; 1;
  // V(317) = K(317,1) * [PRKCA_g];
  R317: PRKCA_g => ; 1;
  // V(318) = K(318,1) * [PRKCA_rna];
  R318: PRKCA_rna => ; 1;
  // V(319) = K(319,1) * [PTPN2_g];
  R319: PTPN2_g => ; 1;
  // V(320) = K(320,1) * [PTPN2_rna];
  R320: PTPN2_rna => ; 1;
  // V(321) = K(321,1) * [ENG_g];
  R321: ENG_g => ; 1;
  // V(322) = K(322,1) * [ENG_rna];
  R322: ENG_rna => ; 1;
  // V(323) = K(323,1) * [PTPRB_g];
  R323: PTPRB_g => ; 1;
  // V(324) = K(324,1) * [PTPRB_rna];
  R324: PTPRB_rna => ; 1;
  // V(325) = K(325,1) * [PTPN6_g];
  R325: PTPN6_g => ; 1;
  // V(326) = K(326,1) * [PTPN6_rna];
  R326: PTPN6_rna => ; 1;
  // V(327) = K(327,1) * [CTNNB1_g];
  R327: CTNNB1_g => ; 1;
  // V(328) = K(328,1) * [CTNNB1_rna];
  R328: CTNNB1_rna => ; 1;
  // V(329) = K(329,1) * [KDR_g];
  R329: KDR_g => ; 1;
  // V(330) = K(330,1) * [KDR_rna];
  R330: KDR_rna => ; 1;
  // V(331) = K(331,1) * [TRIM23_g];
  R331: TRIM23_g => ; 1;
  // V(332) = K(332,1) * [TRIM23_rna];
  R332: TRIM23_rna => ; 1;
  // V(333) = K(333,1) * [SREBF1_g];
  R333: SREBF1_g => ; 1;
  // V(334) = K(334,1) * [SREBF1_rna];
  R334: SREBF1_rna => ; 1;
  // V(335) = K(335,1) * [STAT3_g];
  R335: STAT3_g => ; 1;
  // V(336) = K(336,1) * [STAT3_rna];
  R336: STAT3_rna => ; 1;
  // V(337) = K(337,1) * [PIK3CA_g];
  R337: PIK3CA_g => ; 1;
  // V(338) = K(338,1) * [PIK3CA_rna];
  R338: PIK3CA_rna => ; 1;
  // V(339) = K(339,1) * [NUMB_g];
  R339: NUMB_g => ; 1;
  // V(340) = K(340,1) * [NUMB_rna];
  R340: NUMB_rna => ; 1;
  // V(341) = K(341,1) * [JAK3_g];
  R341: JAK3_g => ; 1;
  // V(342) = K(342,1) * [JAK3_rna];
  R342: JAK3_rna => ; 1;
  // V(343) = K(343,1) * [CLTC_g];
  R343: CLTC_g => ; 1;
  // V(344) = K(344,1) * [CLTC_rna];
  R344: CLTC_rna => ; 1;
  // V(345) = K(345,1) * [MDM2_g];
  R345: MDM2_g => ; 1;
  // V(346) = K(346,1) * [MDM2_rna];
  R346: MDM2_rna => ; 1;
  // V(347) = K(347,1) * [TEK_g];
  R347: TEK_g => ; 1;
  // V(348) = K(348,1) * [TEK_rna];
  R348: TEK_rna => ; 1;
  // V(349) = K(349,1) * [NOTCH2_g];
  R349: NOTCH2_g => ; 1;
  // V(350) = K(350,1) * [NOTCH2_rna];
  R350: NOTCH2_rna => ; 1;
  // V(351) = K(351,1) * [PRKCZ_g];
  R351: PRKCZ_g => ; 1;
  // V(352) = K(352,1) * [PRKCZ_rna];
  R352: PRKCZ_rna => ; 1;
  // V(353) = K(353,1) * [PRDX1_g];
  R353: PRDX1_g => ; 1;
  // V(354) = K(354,1) * [PRDX1_rna];
  R354: PRDX1_rna => ; 1;
  // V(355) = K(355,1) * [STK4_g];
  R355: STK4_g => ; 1;
  // V(356) = K(356,1) * [STK4_rna];
  R356: STK4_rna => ; 1;
  // V(357) = K(357,1) * [SMAD4_g];
  R357: SMAD4_g => ; 1;
  // V(358) = K(358,1) * [SMAD4_rna];
  R358: SMAD4_rna => ; 1;
  // V(359) = K(359,1) * [IRF3_g];
  R359: IRF3_g => ; 1;
  // V(360) = K(360,1) * [IRF3_rna];
  R360: IRF3_rna => ; 1;
  // V(361) = K(361,1) * [SMAD1_g];
  R361: SMAD1_g => ; 1;
  // V(362) = K(362,1) * [SMAD1_rna];
  R362: SMAD1_rna => ; 1;
  // V(363) = K(363,1) * [EZH2_g];
  R363: EZH2_g => ; 1;
  // V(364) = K(364,1) * [EZH2_rna];
  R364: EZH2_rna => ; 1;
  // V(365) = K(365,1) * [NFE2L2_g];
  R365: NFE2L2_g => ; 1;
  // V(366) = K(366,1) * [NFE2L2_rna];
  R366: NFE2L2_rna => ; 1;
  // V(367) = K(367,1) * [PKN1_g];
  R367: PKN1_g => ; 1;
  // V(368) = K(368,1) * [PKN1_rna];
  R368: PKN1_rna => ; 1;
  // V(369) = K(369,1) * [DEPTOR_g];
  R369: DEPTOR_g => ; 1;
  // V(370) = K(370,1) * [DEPTOR_rna];
  R370: DEPTOR_rna => ; 1;
  // V(371) = K(371,1) * [BAD_g];
  R371: BAD_g => ; 1;
  // V(372) = K(372,1) * [BAD_rna];
  R372: BAD_rna => ; 1;
  // V(373) = K(373,1) * [MRTFA_g];
  R373: MRTFA_g => ; 1;
  // V(374) = K(374,1) * [MRTFA_rna];
  R374: MRTFA_rna => ; 1;
  // V(375) = K(375,1) * [PANX1_g];
  R375: PANX1_g => ; 1;
  // V(376) = K(376,1) * [PANX1_rna];
  R376: PANX1_rna => ; 1;
  // V(377) = K(377,1) * [NR1H4_g];
  R377: NR1H4_g => ; 1;
  // V(378) = K(378,1) * [NR1H4_rna];
  R378: NR1H4_rna => ; 1;
  // V(379) = K(379,1) * [SMURF1_g];
  R379: SMURF1_g => ; 1;
  // V(380) = K(380,1) * [SMURF1_rna];
  R380: SMURF1_rna => ; 1;
  // V(381) = K(381,1) * [RNF7_g];
  R381: RNF7_g => ; 1;
  // V(382) = K(382,1) * [RNF7_rna];
  R382: RNF7_rna => ; 1;
  // V(383) = K(383,1) * [ALK_g];
  R383: ALK_g => ; 1;
  // V(384) = K(384,1) * [ALK_rna];
  R384: ALK_rna => ; 1;
  // V(385) = K(385,1) * [TRAF6_g];
  R385: TRAF6_g => ; 1;
  // V(386) = K(386,1) * [TRAF6_rna];
  R386: TRAF6_rna => ; 1;
  // V(387) = K(387,1) * [SOCS1_p];
  R387: SOCS1_p => ; 1;
  // V(388) = K(388,1) * [NPHS1_p];
  R388: NPHS1_p => ; 1;
  // V(389) = K(389,1) * [JAK2_p];
  R389: JAK2_p => ; 1;
  // V(390) = K(390,1) * [INSR_p];
  R390: INSR_p => ; 1;
  // V(391) = K(391,1) * [FYN_p];
  R391: FYN_p => ; 1;
  // V(392) = K(392,1) * [GJB1_p];
  R392: GJB1_p => ; 1;
  // V(393) = K(393,1) * [SP1_p];
  R393: SP1_p => ; 1;
  // V(394) = K(394,1) * [RHO_p];
  R394: RHO_p => ; 1;
  // V(395) = K(395,1) * [KRT19_p];
  R395: KRT19_p => ; 1;
  // V(396) = K(396,1) * [AR_p];
  R396: AR_p => ; 1;
  // V(397) = K(397,1) * [KIT_p];
  R397: KIT_p => ; 1;
  // V(398) = K(398,1) * [CD79A_p];
  R398: CD79A_p => ; 1;
  // V(399) = K(399,1) * [CDH1_p];
  R399: CDH1_p => ; 1;
  // V(400) = K(400,1) * [SRC_p];
  R400: SRC_p => ; 1;
  // V(401) = K(401,1) * [NCF1_p];
  R401: NCF1_p => ; 1;
  // V(402) = K(402,1) * [PKM_p];
  R402: PKM_p => ; 1;
  // V(403) = K(403,1) * [FABP4_p];
  R403: FABP4_p => ; 1;
  // V(404) = K(404,1) * [PRKCA_p];
  R404: PRKCA_p => ; 1;
  // V(405) = K(405,1) * [ENG_p];
  R405: ENG_p => ; 1;
  // V(406) = K(406,1) * [PTPN6_p];
  R406: PTPN6_p => ; 1;
  // V(407) = K(407,1) * [CTNNB1_p];
  R407: CTNNB1_p => ; 1;
  // V(408) = K(408,1) * [KDR_p];
  R408: KDR_p => ; 1;
  // V(409) = K(409,1) * [STAT3_p];
  R409: STAT3_p => ; 1;
  // V(410) = K(410,1) * [PIK3CA_p];
  R410: PIK3CA_p => ; 1;
  // V(411) = K(411,1) * [JAK3_p];
  R411: JAK3_p => ; 1;
  // V(412) = K(412,1) * [CLTC_p];
  R412: CLTC_p => ; 1;
  // V(413) = K(413,1) * [TEK_p];
  R413: TEK_p => ; 1;
  // V(414) = K(414,1) * [PRKCZ_p];
  R414: PRKCZ_p => ; 1;
  // V(415) = K(415,1) * [PRDX1_p];
  R415: PRDX1_p => ; 1;
  // V(416) = K(416,1) * [STK4_p];
  R416: STK4_p => ; 1;
  // V(417) = K(417,1) * [SMAD4_p];
  R417: SMAD4_p => ; 1;
  // V(418) = K(418,1) * [IRF3_p];
  R418: IRF3_p => ; 1;
  // V(419) = K(419,1) * [EZH2_p];
  R419: EZH2_p => ; 1;
  // V(420) = K(420,1) * [NFE2L2_p];
  R420: NFE2L2_p => ; 1;
  // V(421) = K(421,1) * [PKN1_p];
  R421: PKN1_p => ; 1;
  // V(422) = K(422,1) * [BAD_p];
  R422: BAD_p => ; 1;
  // V(423) = K(423,1) * [MRTFA_p];
  R423: MRTFA_p => ; 1;
  // V(424) = K(424,1) * [PANX1_p];
  R424: PANX1_p => ; 1;
  // V(425) = K(425,1) * [NR1H4_p];
  R425: NR1H4_p => ; 1;
  // V(426) = K(426,1) * [ALK_p];
  R426: ALK_p => ; 1;
  // V(427) = K(427,1) * [TRAF6_p];
  R427: TRAF6_p => ; 1;
  // V(428) = K(428,1) * [ANGPT2_rna];
  R428: ANGPT2_rna => ; 1;
  // V(429) = K(429,1) * [SOCS1_rna];
  R429: SOCS1_rna => ; 1;
  // V(430) = K(430,1) * [SUV39H1_rna];
  R430: SUV39H1_rna => ; 1;
  // V(431) = K(431,1) * [VEGFD_rna];
  R431: VEGFD_rna => ; 1;
  // V(432) = K(432,1) * [NPHS1_rna];
  R432: NPHS1_rna => ; 1;
  // V(433) = K(433,1) * [JAK2_rna];
  R433: JAK2_rna => ; 1;
  // V(434) = K(434,1) * [INS_rna];
  R434: INS_rna => ; 1;
  // V(435) = K(435,1) * [INSR_rna];
  R435: INSR_rna => ; 1;
  // V(436) = K(436,1) * [FYN_rna];
  R436: FYN_rna => ; 1;
  // V(437) = K(437,1) * [GJB1_rna];
  R437: GJB1_rna => ; 1;
  // V(438) = K(438,1) * [SP1_rna];
  R438: SP1_rna => ; 1;
  // V(439) = K(439,1) * [RHO_rna];
  R439: RHO_rna => ; 1;
  // V(440) = K(440,1) * [KRT19_rna];
  R440: KRT19_rna => ; 1;
  // V(441) = K(441,1) * [AR_rna];
  R441: AR_rna => ; 1;
  // V(442) = K(442,1) * [KIT_rna];
  R442: KIT_rna => ; 1;
  // V(443) = K(443,1) * [CD79A_rna];
  R443: CD79A_rna => ; 1;
  // V(444) = K(444,1) * [CDH1_rna];
  R444: CDH1_rna => ; 1;
  // V(445) = K(445,1) * [SRC_rna];
  R445: SRC_rna => ; 1;
  // V(446) = K(446,1) * [NCF1_rna];
  R446: NCF1_rna => ; 1;
  // V(447) = K(447,1) * [FABP4_rna];
  R447: FABP4_rna => ; 1;
  // V(448) = K(448,1) * [PRKCA_rna];
  R448: PRKCA_rna => ; 1;
  // V(449) = K(449,1) * [PTPN2_rna];
  R449: PTPN2_rna => ; 1;
  // V(450) = K(450,1) * [ENG_rna];
  R450: ENG_rna => ; 1;
  // V(451) = K(451,1) * [PTPRB_rna];
  R451: PTPRB_rna => ; 1;
  // V(452) = K(452,1) * [PTPN6_rna];
  R452: PTPN6_rna => ; 1;
  // V(453) = K(453,1) * [CTNNB1_rna];
  R453: CTNNB1_rna => ; 1;
  // V(454) = K(454,1) * [KDR_rna];
  R454: KDR_rna => ; 1;
  // V(455) = K(455,1) * [TRIM23_rna];
  R455: TRIM23_rna => ; 1;
  // V(456) = K(456,1) * [SREBF1_rna];
  R456: SREBF1_rna => ; 1;
  // V(457) = K(457,1) * [STAT3_rna];
  R457: STAT3_rna => ; 1;
  // V(458) = K(458,1) * [PIK3CA_rna];
  R458: PIK3CA_rna => ; 1;
  // V(459) = K(459,1) * [NUMB_rna];
  R459: NUMB_rna => ; 1;
  // V(460) = K(460,1) * [JAK3_rna];
  R460: JAK3_rna => ; 1;
  // V(461) = K(461,1) * [CLTC_rna];
  R461: CLTC_rna => ; 1;
  // V(462) = K(462,1) * [MDM2_rna];
  R462: MDM2_rna => ; 1;
  // V(463) = K(463,1) * [TEK_rna];
  R463: TEK_rna => ; 1;
  // V(464) = K(464,1) * [NOTCH2_rna];
  R464: NOTCH2_rna => ; 1;
  // V(465) = K(465,1) * [PRKCZ_rna];
  R465: PRKCZ_rna => ; 1;
  // V(466) = K(466,1) * [PRDX1_rna];
  R466: PRDX1_rna => ; 1;
  // V(467) = K(467,1) * [STK4_rna];
  R467: STK4_rna => ; 1;
  // V(468) = K(468,1) * [SMAD4_rna];
  R468: SMAD4_rna => ; 1;
  // V(469) = K(469,1) * [IRF3_rna];
  R469: IRF3_rna => ; 1;
  // V(470) = K(470,1) * [SMAD1_rna];
  R470: SMAD1_rna => ; 1;
  // V(471) = K(471,1) * [EZH2_rna];
  R471: EZH2_rna => ; 1;
  // V(472) = K(472,1) * [NFE2L2_rna];
  R472: NFE2L2_rna => ; 1;
  // V(473) = K(473,1) * [PKN1_rna];
  R473: PKN1_rna => ; 1;
  // V(474) = K(474,1) * [DEPTOR_rna];
  R474: DEPTOR_rna => ; 1;
  // V(475) = K(475,1) * [BAD_rna];
  R475: BAD_rna => ; 1;
  // V(476) = K(476,1) * [MRTFA_rna];
  R476: MRTFA_rna => ; 1;
  // V(477) = K(477,1) * [PANX1_rna];
  R477: PANX1_rna => ; 1;
  // V(478) = K(478,1) * [NR1H4_rna];
  R478: NR1H4_rna => ; 1;
  // V(479) = K(479,1) * [SMURF1_rna];
  R479: SMURF1_rna => ; 1;
  // V(480) = K(480,1) * [RNF7_rna];
  R480: RNF7_rna => ; 1;
  // V(481) = K(481,1) * [ALK_rna];
  R481: ALK_rna => ; 1;
  // V(482) = K(482,1) * [TRAF6_rna];
  R482: TRAF6_rna => ; 1;
end
