// SBML level 3 version 2

model Fibroblast()

  // Compartments:
  compartment cell = 1;

  // Species:
  species ABCA1 in cell = 1/cell;
  species ABCA1_g in cell = 1/cell;
  species ABCA1_p in cell = 1/cell;
  species ABCA1_rna in cell = 1/cell;
  species ADD3 in cell = 1/cell;
  species ADD3_g in cell = 1/cell;
  species ADD3_p in cell = 1/cell;
  species ADD3_rna in cell = 1/cell;
  species AEBP1 in cell = 1/cell;
  species AEBP1_g in cell = 1/cell;
  species AEBP1_p in cell = 1/cell;
  species AEBP1_rna in cell = 1/cell;
  species AGO2 in cell = 1/cell;
  species AGO2_g in cell = 1/cell;
  species AGO2_p in cell = 1/cell;
  species AGO2_rna in cell = 1/cell;
  species AKT1 in cell = 1/cell;
  species AKT1_g in cell = 1/cell;
  species AKT1_p in cell = 1/cell;
  species AKT1_rna in cell = 1/cell;
  species ANXA1 in cell = 1/cell;
  species ANXA1_g in cell = 1/cell;
  species ANXA1_p in cell = 1/cell;
  species ANXA1_rna in cell = 1/cell;
  species AQP1 in cell = 1/cell;
  species AQP1_g in cell = 1/cell;
  species AQP1_p in cell = 1/cell;
  species AQP1_rna in cell = 1/cell;
  species AR in cell = 1/cell;
  species AR_g in cell = 1/cell;
  species AR_p in cell = 1/cell;
  species AR_rna in cell = 1/cell;
  species ATR in cell = 1/cell;
  species ATR_g in cell = 1/cell;
  species ATR_rna in cell = 1/cell;
  species AXL in cell = 1/cell;
  species AXL_g in cell = 1/cell;
  species AXL_p in cell = 1/cell;
  species AXL_rna in cell = 1/cell;
  species BAD in cell = 1/cell;
  species BAD_g in cell = 1/cell;
  species BAD_p in cell = 1/cell;
  species BAD_rna in cell = 1/cell;
  species BAX in cell = 1/cell;
  species BAX_g in cell = 1/cell;
  species BAX_p in cell = 1/cell;
  species BAX_rna in cell = 1/cell;
  species BCL2 in cell = 1/cell;
  species BCL2_g in cell = 1/cell;
  species BCL2_p in cell = 1/cell;
  species BCL2_rna in cell = 1/cell;
  species BECN1 in cell = 1/cell;
  species BECN1_g in cell = 1/cell;
  species BECN1_p in cell = 1/cell;
  species BECN1_rna in cell = 1/cell;
  species CALM1 in cell = 1/cell;
  species CALM1_g in cell = 1/cell;
  species CALM1_p in cell = 1/cell;
  species CALM1_rna in cell = 1/cell;
  species CASP3 in cell = 1/cell;
  species CASP3_g in cell = 1/cell;
  species CASP3_rna in cell = 1/cell;
  species CAT in cell = 1/cell;
  species CAT_g in cell = 1/cell;
  species CAT_rna in cell = 1/cell;
  species CCL2 in cell = 1/cell;
  species CCL2_g in cell = 1/cell;
  species CCL2_rna in cell = 1/cell;
  species CCND1 in cell = 1/cell;
  species CCND1_g in cell = 1/cell;
  species CCND1_rna in cell = 1/cell;
  species CD34 in cell = 1/cell;
  species CD34_g in cell = 1/cell;
  species CD34_rna in cell = 1/cell;
  species CDKN1A in cell = 1/cell;
  species CDKN1A_g in cell = 1/cell;
  species CDKN1A_p in cell = 1/cell;
  species CDKN1A_rna in cell = 1/cell;
  species CDKN1B in cell = 1/cell;
  species CDKN1B_g in cell = 1/cell;
  species CDKN1B_p in cell = 1/cell;
  species CDKN1B_rna in cell = 1/cell;
  species CLDN5 in cell = 1/cell;
  species CLDN5_g in cell = 1/cell;
  species CLDN5_rna in cell = 1/cell;
  species CREB1 in cell = 1/cell;
  species CREB1_g in cell = 1/cell;
  species CREB1_p in cell = 1/cell;
  species CREB1_rna in cell = 1/cell;
  species CTNNB1 in cell = 1/cell;
  species CTNNB1_g in cell = 1/cell;
  species CTNNB1_p in cell = 1/cell;
  species CTNNB1_rna in cell = 1/cell;
  species CUL3 in cell = 1/cell;
  species CUL3_g in cell = 1/cell;
  species CUL3_rna in cell = 1/cell;
  species CYBA in cell = 1/cell;
  species CYBA_g in cell = 1/cell;
  species CYBA_p in cell = 1/cell;
  species CYBA_rna in cell = 1/cell;
  species DDIT3 in cell = 1/cell;
  species DDIT3_g in cell = 1/cell;
  species DDIT3_p in cell = 1/cell;
  species DDIT3_rna in cell = 1/cell;
  species DEPTOR in cell = 1/cell;
  species DEPTOR_g in cell = 1/cell;
  species DEPTOR_p in cell = 1/cell;
  species DEPTOR_rna in cell = 1/cell;
  species DNM1L in cell = 1/cell;
  species DNM1L_g in cell = 1/cell;
  species DNM1L_p in cell = 1/cell;
  species DNM1L_rna in cell = 1/cell;
  species DNMT1 in cell = 1/cell;
  species DNMT1_g in cell = 1/cell;
  species DNMT1_p in cell = 1/cell;
  species DNMT1_rna in cell = 1/cell;
  species DUSP1 in cell = 1/cell;
  species DUSP1_g in cell = 1/cell;
  species DUSP1_p in cell = 1/cell;
  species DUSP1_rna in cell = 1/cell;
  species EGF in cell = 1/cell;
  species EGFR in cell = 1/cell;
  species EGFR_g in cell = 1/cell;
  species EGFR_p in cell = 1/cell;
  species EGFR_rna in cell = 1/cell;
  species EGF_g in cell = 1/cell;
  species EGF_rna in cell = 1/cell;
  species EP300 in cell = 1/cell;
  species EP300_g in cell = 1/cell;
  species EP300_p in cell = 1/cell;
  species EP300_rna in cell = 1/cell;
  species ERG in cell = 1/cell;
  species ERG_g in cell = 1/cell;
  species ERG_rna in cell = 1/cell;
  species ERN1 in cell = 1/cell;
  species ERN1_g in cell = 1/cell;
  species ERN1_p in cell = 1/cell;
  species ERN1_rna in cell = 1/cell;
  species ESR1 in cell = 1/cell;
  species ESR1_g in cell = 1/cell;
  species ESR1_p in cell = 1/cell;
  species ESR1_rna in cell = 1/cell;
  species ETS1 in cell = 1/cell;
  species ETS1_g in cell = 1/cell;
  species ETS1_rna in cell = 1/cell;
  species F2R in cell = 1/cell;
  species F2R_g in cell = 1/cell;
  species F2R_p in cell = 1/cell;
  species F2R_rna in cell = 1/cell;
  species F3 in cell = 1/cell;
  species F3_g in cell = 1/cell;
  species F3_p in cell = 1/cell;
  species F3_rna in cell = 1/cell;
  species FABP4 in cell = 1/cell;
  species FABP4_g in cell = 1/cell;
  species FABP4_p in cell = 1/cell;
  species FABP4_rna in cell = 1/cell;
  species FOS in cell = 1/cell;
  species FOS_g in cell = 1/cell;
  species FOS_p in cell = 1/cell;
  species FOS_rna in cell = 1/cell;
  species GPX4 in cell = 1/cell;
  species GPX4_g in cell = 1/cell;
  species GPX4_rna in cell = 1/cell;
  species HDAC1 in cell = 1/cell;
  species HDAC1_g in cell = 1/cell;
  species HDAC1_rna in cell = 1/cell;
  species HES1 in cell = 1/cell;
  species HES1_g in cell = 1/cell;
  species HES1_p in cell = 1/cell;
  species HES1_rna in cell = 1/cell;
  species HGF in cell = 1/cell;
  species HGF_g in cell = 1/cell;
  species HGF_rna in cell = 1/cell;
  species HIF1A in cell = 1/cell;
  species HIF1A_g in cell = 1/cell;
  species HIF1A_p in cell = 1/cell;
  species HIF1A_rna in cell = 1/cell;
  species HIPK2 in cell = 1/cell;
  species HIPK2_g in cell = 1/cell;
  species HIPK2_p in cell = 1/cell;
  species HIPK2_rna in cell = 1/cell;
  species HMGN1 in cell = 1/cell;
  species HMGN1_g in cell = 1/cell;
  species HMGN1_p in cell = 1/cell;
  species HMGN1_rna in cell = 1/cell;
  species HSPB1 in cell = 1/cell;
  species HSPB1_g in cell = 1/cell;
  species HSPB1_p in cell = 1/cell;
  species HSPB1_rna in cell = 1/cell;
  species ILK in cell = 1/cell;
  species ILK_g in cell = 1/cell;
  species ILK_p in cell = 1/cell;
  species ILK_rna in cell = 1/cell;
  species INSR in cell = 1/cell;
  species INSR_g in cell = 1/cell;
  species INSR_p in cell = 1/cell;
  species INSR_rna in cell = 1/cell;
  species IRF1 in cell = 1/cell;
  species IRF1_g in cell = 1/cell;
  species IRF1_rna in cell = 1/cell;
  species IRF3 in cell = 1/cell;
  species IRF3_g in cell = 1/cell;
  species IRF3_p in cell = 1/cell;
  species IRF3_rna in cell = 1/cell;
  species JAK1 in cell = 1/cell;
  species JAK1_g in cell = 1/cell;
  species JAK1_rna in cell = 1/cell;
  species JUN in cell = 1/cell;
  species JUN_g in cell = 1/cell;
  species JUN_p in cell = 1/cell;
  species JUN_rna in cell = 1/cell;
  species KDM6B in cell = 1/cell;
  species KDM6B_g in cell = 1/cell;
  species KDM6B_rna in cell = 1/cell;
  species KLF9 in cell = 1/cell;
  species KLF9_g in cell = 1/cell;
  species KLF9_rna in cell = 1/cell;
  species MAPK1 in cell = 1/cell;
  species MAPK1_g in cell = 1/cell;
  species MAPK1_p in cell = 1/cell;
  species MAPK1_rna in cell = 1/cell;
  species MDM2 in cell = 1/cell;
  species MDM2_g in cell = 1/cell;
  species MDM2_p in cell = 1/cell;
  species MDM2_rna in cell = 1/cell;
  species MECP2 in cell = 1/cell;
  species MECP2_g in cell = 1/cell;
  species MECP2_p in cell = 1/cell;
  species MECP2_rna in cell = 1/cell;
  species MFF in cell = 1/cell;
  species MFF_g in cell = 1/cell;
  species MFF_p in cell = 1/cell;
  species MFF_rna in cell = 1/cell;
  species MYLIP in cell = 1/cell;
  species MYLIP_g in cell = 1/cell;
  species MYLIP_rna in cell = 1/cell;
  species NFE2L2 in cell = 1/cell;
  species NFE2L2_g in cell = 1/cell;
  species NFE2L2_p in cell = 1/cell;
  species NFE2L2_rna in cell = 1/cell;
  species NOTCH2 in cell = 1/cell;
  species NOTCH2_g in cell = 1/cell;
  species NOTCH2_rna in cell = 1/cell;
  species NR3C1 in cell = 1/cell;
  species NR3C1_g in cell = 1/cell;
  species NR3C1_p in cell = 1/cell;
  species NR3C1_rna in cell = 1/cell;
  species NR4A1 in cell = 1/cell;
  species NR4A1_g in cell = 1/cell;
  species NR4A1_p in cell = 1/cell;
  species NR4A1_rna in cell = 1/cell;
  species NUMB in cell = 1/cell;
  species NUMB_g in cell = 1/cell;
  species NUMB_rna in cell = 1/cell;
  species PARK7 in cell = 1/cell;
  species PARK7_g in cell = 1/cell;
  species PARK7_p in cell = 1/cell;
  species PARK7_rna in cell = 1/cell;
  species PIK3CA in cell = 1/cell;
  species PIK3CA_g in cell = 1/cell;
  species PIK3CA_rna in cell = 1/cell;
  species PIK3R1 in cell = 1/cell;
  species PIK3R1_g in cell = 1/cell;
  species PIK3R1_p in cell = 1/cell;
  species PIK3R1_rna in cell = 1/cell;
  species PKM in cell = 1/cell;
  species PKM_g in cell = 1/cell;
  species PKM_p in cell = 1/cell;
  species PKM_rna in cell = 1/cell;
  species PKN1 in cell = 1/cell;
  species PKN1_g in cell = 1/cell;
  species PKN1_p in cell = 1/cell;
  species PKN1_rna in cell = 1/cell;
  species PRDX6 in cell = 1/cell;
  species PRDX6_g in cell = 1/cell;
  species PRDX6_p in cell = 1/cell;
  species PRDX6_rna in cell = 1/cell;
  species PRKAA1 in cell = 1/cell;
  species PRKAA1_g in cell = 1/cell;
  species PRKAA1_p in cell = 1/cell;
  species PRKAA1_rna in cell = 1/cell;
  species PRKCA in cell = 1/cell;
  species PRKCA_g in cell = 1/cell;
  species PRKCA_p in cell = 1/cell;
  species PRKCA_rna in cell = 1/cell;
  species PTEN in cell = 1/cell;
  species PTEN_g in cell = 1/cell;
  species PTEN_p in cell = 1/cell;
  species PTEN_rna in cell = 1/cell;
  species PTPN11 in cell = 1/cell;
  species PTPN11_g in cell = 1/cell;
  species PTPN11_p in cell = 1/cell;
  species PTPN11_rna in cell = 1/cell;
  species RAC1 in cell = 1/cell;
  species RAC1_g in cell = 1/cell;
  species RAC1_p in cell = 1/cell;
  species RAC1_rna in cell = 1/cell;
  species RCAN1 in cell = 1/cell;
  species RCAN1_g in cell = 1/cell;
  species RCAN1_p in cell = 1/cell;
  species RCAN1_rna in cell = 1/cell;
  species RHOA in cell = 1/cell;
  species RHOA_g in cell = 1/cell;
  species RHOA_p in cell = 1/cell;
  species RHOA_rna in cell = 1/cell;
  species RNF7 in cell = 1/cell;
  species RNF7_g in cell = 1/cell;
  species RNF7_rna in cell = 1/cell;
  species ROCK1 in cell = 1/cell;
  species ROCK1_g in cell = 1/cell;
  species ROCK1_rna in cell = 1/cell;
  species ROCK2 in cell = 1/cell;
  species ROCK2_g in cell = 1/cell;
  species ROCK2_rna in cell = 1/cell;
  species RORA in cell = 1/cell;
  species RORA_g in cell = 1/cell;
  species RORA_p in cell = 1/cell;
  species RORA_rna in cell = 1/cell;
  species RPS6KA3 in cell = 1/cell;
  species RPS6KA3_g in cell = 1/cell;
  species RPS6KA3_p in cell = 1/cell;
  species RPS6KA3_rna in cell = 1/cell;
  species SGK1 in cell = 1/cell;
  species SGK1_g in cell = 1/cell;
  species SGK1_rna in cell = 1/cell;
  species SMAD4 in cell = 1/cell;
  species SMAD4_g in cell = 1/cell;
  species SMAD4_p in cell = 1/cell;
  species SMAD4_rna in cell = 1/cell;
  species SOCS3 in cell = 1/cell;
  species SOCS3_g in cell = 1/cell;
  species SOCS3_rna in cell = 1/cell;
  species SOD1 in cell = 1/cell;
  species SOD1_g in cell = 1/cell;
  species SOD1_rna in cell = 1/cell;
  species SOD2 in cell = 1/cell;
  species SOD2_g in cell = 1/cell;
  species SOD2_rna in cell = 1/cell;
  species SP1 in cell = 1/cell;
  species SP1_g in cell = 1/cell;
  species SP1_p in cell = 1/cell;
  species SP1_rna in cell = 1/cell;
  species STAT1 in cell = 1/cell;
  species STAT1_g in cell = 1/cell;
  species STAT1_p in cell = 1/cell;
  species STAT1_rna in cell = 1/cell;
  species STAT3 in cell = 1/cell;
  species STAT3_g in cell = 1/cell;
  species STAT3_p in cell = 1/cell;
  species STAT3_rna in cell = 1/cell;
  species STAT6 in cell = 1/cell;
  species STAT6_g in cell = 1/cell;
  species STAT6_p in cell = 1/cell;
  species STAT6_rna in cell = 1/cell;
  species STK11 in cell = 1/cell;
  species STK11_g in cell = 1/cell;
  species STK11_p in cell = 1/cell;
  species STK11_rna in cell = 1/cell;
  species TNC in cell = 1/cell;
  species TNC_g in cell = 1/cell;
  species TNC_rna in cell = 1/cell;
  species TSC2 in cell = 1/cell;
  species TSC2_g in cell = 1/cell;
  species TSC2_p in cell = 1/cell;
  species TSC2_rna in cell = 1/cell;
  species TXNIP in cell = 1/cell;
  species TXNIP_g in cell = 1/cell;
  species TXNIP_p in cell = 1/cell;
  species TXNIP_rna in cell = 1/cell;
  species VEGFA in cell = 1/cell;
  species VEGFA_g in cell = 1/cell;
  species VEGFA_rna in cell = 1/cell;
  species VIM in cell = 1/cell;
  species VIM_g in cell = 1/cell;
  species VIM_p in cell = 1/cell;
  species VIM_rna in cell = 1/cell;
  species XBP1 in cell = 1/cell;
  species XBP1_g in cell = 1/cell;
  species XBP1_p in cell = 1/cell;
  species XBP1_rna in cell = 1/cell;
  species YAP1 in cell = 1/cell;
  species YAP1_g in cell = 1/cell;
  species YAP1_p in cell = 1/cell;
  species YAP1_rna in cell = 1/cell;
  species ZFP36 in cell = 1/cell;
  species ZFP36_g in cell = 1/cell;
  species ZFP36_p in cell = 1/cell;
  species ZFP36_rna in cell = 1/cell;

  // Reactions:
  // V(1) = K(1,1) * [SMAD4_p] * [JUN_p] -K(1,2) * [SIGNOR-C10];
  R1: JUN_p => SMAD4_p; 1;
  // V(2) = K(2,1) * [STAT3_p] * [SP1_p] -K(2,2) * [SIGNOR-C74];
  R2: STAT3_p => SP1_p; 1;
  // V(3) = K(3,1) * [STAT1_p] * [STAT3_p] -K(3,2) * [SIGNOR-C118];
  R3: STAT3_p => STAT1_p; 1;
  // V(4) = K(4,1) * [SIGNOR-C118] * [JAK1] -K(4,2) * [SIGNOR-C120];
  R4: JAK1 => ; 1;
  // V(5) = K(5,1) * [FOS_p] * [JUN_p] * [JUN_p] * [FOS_p] * [JUN_p] * [FOS_p] * [FOS_p] * [JUN_p] -K(5,2) * [SIGNOR-C154];
  R5: JUN_p => FOS_p; 1;
  // V(6) = K(6,1) * [PIK3R1_p] * [PIK3CA] -K(6,2) * [SIGNOR-C156];
  R6: PIK3CA => PIK3R1_p; 1;
  // V(7) = K(7,1) * [MAPK1_p] * [EP300] -K(7,2) * [MAPK1_p |EP300];
  R7: EP300 => MAPK1_p; 1;
  // V(8) = K(8,1) * [MAPK1_p |EP300];
  R8: EP300 => MAPK1_p; 1;
  // V(9) = K(9,1) * [MAPK1_p] * [HIF1A] -K(9,2) * [MAPK1_p |HIF1A];
  R9: HIF1A => MAPK1_p; 1;
  // V(10) = K(10,1) * [MAPK1_p |HIF1A];
  R10: HIF1A => MAPK1_p; 1;
  // V(11) = K(11,1) * [MAPK1_p] * [NR3C1] -K(11,2) * [MAPK1_p |NR3C1];
  R11: NR3C1 => MAPK1_p; 1;
  // V(12) = K(12,1) * [MAPK1_p |NR3C1];
  R12: NR3C1 => MAPK1_p; 1;
  // V(13) = K(13,1) * [MAPK1_p] * [RPS6KA3] -K(13,2) * [MAPK1_p |RPS6KA3];
  R13: RPS6KA3 => MAPK1_p; 1;
  // V(14) = K(14,1) * [MAPK1_p |RPS6KA3];
  R14: RPS6KA3 => MAPK1_p; 1;
  // V(15) = K(15,1) * [MAPK1_p] * [PRDX6] -K(15,2) * [MAPK1_p |PRDX6];
  R15: PRDX6 => MAPK1_p; 1;
  // V(16) = K(16,1) * [MAPK1_p |PRDX6];
  R16: PRDX6 => MAPK1_p; 1;
  // V(17) = K(17,1) * [PRKCA_p] * [CTNNB1] -K(17,2) * [PRKCA_p |CTNNB1];
  R17: CTNNB1 => PRKCA_p; 1;
  // V(18) = K(18,1) * [PRKCA_p |CTNNB1];
  R18: CTNNB1 => PRKCA_p; 1;
  // V(19) = K(19,1) * [AKT1_p] * [MDM2] -K(19,2) * [AKT1_p |MDM2];
  R19: AKT1_p => MDM2; 1;
  // V(20) = K(20,1) * [AKT1_p |MDM2];
  R20: AKT1_p => MDM2; 1;
  // V(21) = K(21,1) * [AKT1_p] * [PRKAA1] -K(21,2) * [AKT1_p |PRKAA1];
  R21: PRKAA1 => AKT1_p; 1;
  // V(22) = K(22,1) * [AKT1_p |PRKAA1];
  R22: PRKAA1 => AKT1_p; 1;
  // V(23) = K(23,1) * [EGFR_p] * [EGFR] -K(23,2) * [EGFR_p |EGFR];
  R23: EGFR_p => EGFR; 1;
  // V(24) = K(24,1) * [EGFR_p |EGFR];
  R24: EGFR_p => EGFR; 1;
  // V(25) = K(25,1) * [PRKCA_p] * [VIM] -K(25,2) * [PRKCA_p |VIM];
  R25: PRKCA_p => VIM; 1;
  // V(26) = K(26,1) * [PRKCA_p |VIM];
  R26: PRKCA_p => VIM; 1;
  // V(27) = K(27,1) * [MAPK1_p] * [CDKN1B] -K(27,2) * [MAPK1_p |CDKN1B];
  R27: CDKN1B => MAPK1_p; 1;
  // V(28) = K(28,1) * [MAPK1_p |CDKN1B];
  R28: CDKN1B => MAPK1_p; 1;
  // V(29) = K(29,1) * [MAPK1_p] * [SMAD4] -K(29,2) * [MAPK1_p |SMAD4];
  R29: SMAD4 => MAPK1_p; 1;
  // V(30) = K(30,1) * [MAPK1_p |SMAD4];
  R30: SMAD4 => MAPK1_p; 1;
  // V(31) = K(31,1) * [MAPK1_p] * [ESR1] -K(31,2) * [MAPK1_p |ESR1];
  R31: ESR1 => MAPK1_p; 1;
  // V(32) = K(32,1) * [MAPK1_p |ESR1];
  R32: ESR1 => MAPK1_p; 1;
  // V(33) = K(33,1) * [ROCK1] * [DNM1L] -K(33,2) * [ROCK1 |DNM1L];
  R33: ROCK1 => DNM1L; 1;
  // V(34) = K(34,1) * [ROCK1 |DNM1L];
  R34: ROCK1 => DNM1L; 1;
  // V(35) = K(35,1) * [MAPK1_p] * [STK11] -K(35,2) * [MAPK1_p |STK11];
  R35: STK11 => MAPK1_p; 1;
  // V(36) = K(36,1) * [MAPK1_p |STK11];
  R36: STK11 => MAPK1_p; 1;
  // V(37) = K(37,1) * [MAPK1_p] * [JUN] -K(37,2) * [MAPK1_p |JUN];
  R37: JUN => MAPK1_p; 1;
  // V(38) = K(38,1) * [MAPK1_p |JUN];
  R38: JUN => MAPK1_p; 1;
  // V(39) = K(39,1) * [AKT1_p] * [NR4A1] -K(39,2) * [AKT1_p |NR4A1];
  R39: NR4A1 => AKT1_p; 1;
  // V(40) = K(40,1) * [AKT1_p |NR4A1];
  R40: NR4A1 => AKT1_p; 1;
  // V(41) = K(41,1) * [MAPK1_p] * [FOS] -K(41,2) * [MAPK1_p |FOS];
  R41: FOS => MAPK1_p; 1;
  // V(42) = K(42,1) * [MAPK1_p |FOS];
  R42: FOS => MAPK1_p; 1;
  // V(43) = K(43,1) * [PRKCA_p] * [EGFR] -K(43,2) * [PRKCA_p |EGFR];
  R43: EGFR => PRKCA_p; 1;
  // V(44) = K(44,1) * [PRKCA_p |EGFR];
  R44: EGFR => PRKCA_p; 1;
  // V(45) = K(45,1) * [STK11_p] * [STK11] -K(45,2) * [STK11_p |STK11];
  R45: STK11_p => STK11; 1;
  // V(46) = K(46,1) * [STK11_p |STK11];
  R46: STK11_p => STK11; 1;
  // V(47) = K(47,1) * [AKT1_p] * [AR] -K(47,2) * [AKT1_p |AR];
  R47: AR => AKT1_p; 1;
  // V(48) = K(48,1) * [AKT1_p |AR];
  R48: AR => AKT1_p; 1;
  // V(49) = K(49,1) * [PRKCA_p] * [F3] -K(49,2) * [PRKCA_p |F3];
  R49: PRKCA_p => F3; 1;
  // V(50) = K(50,1) * [PRKCA_p |F3];
  R50: PRKCA_p => F3; 1;
  // V(51) = K(51,1) * [MAPK1_p] * [RORA] -K(51,2) * [MAPK1_p |RORA];
  R51: RORA => MAPK1_p; 1;
  // V(52) = K(52,1) * [MAPK1_p |RORA];
  R52: RORA => MAPK1_p; 1;
  // V(53) = K(53,1) * [MAPK1_p] * [BCL2] -K(53,2) * [MAPK1_p |BCL2];
  R53: BCL2 => MAPK1_p; 1;
  // V(54) = K(54,1) * [MAPK1_p |BCL2];
  R54: BCL2 => MAPK1_p; 1;
  // V(55) = K(55,1) * [INSR_p] * [INSR] -K(55,2) * [INSR_p |INSR];
  R55: INSR_p => INSR; 1;
  // V(56) = K(56,1) * [INSR_p |INSR];
  R56: INSR_p => INSR; 1;
  // V(57) = K(57,1) * [AKT1_p] * [BAD] -K(57,2) * [AKT1_p |BAD];
  R57: BAD => AKT1_p; 1;
  // V(58) = K(58,1) * [AKT1_p |BAD];
  R58: BAD => AKT1_p; 1;
  // V(59) = K(59,1) * [JAK1] * [STAT1] -K(59,2) * [JAK1 |STAT1];
  R59: JAK1 => STAT1; 1;
  // V(60) = K(60,1) * [JAK1 |STAT1];
  R60: JAK1 => STAT1; 1;
  // V(61) = K(61,1) * [MAPK1_p] * [DUSP1] -K(61,2) * [MAPK1_p |DUSP1];
  R61: DUSP1 => MAPK1_p; 1;
  // V(62) = K(62,1) * [MAPK1_p |DUSP1];
  R62: DUSP1 => MAPK1_p; 1;
  // V(63) = K(63,1) * [AKT1_p] * [HSPB1] -K(63,2) * [AKT1_p |HSPB1];
  R63: HSPB1 => AKT1_p; 1;
  // V(64) = K(64,1) * [AKT1_p |HSPB1];
  R64: HSPB1 => AKT1_p; 1;
  // V(65) = K(65,1) * [RPS6KA3_p] * [HMGN1] -K(65,2) * [RPS6KA3_p |HMGN1];
  R65: HMGN1 => RPS6KA3_p; 1;
  // V(66) = K(66,1) * [RPS6KA3_p |HMGN1];
  R66: HMGN1 => RPS6KA3_p; 1;
  // V(67) = K(67,1) * [PKN1_p] * [PKN1] -K(67,2) * [PKN1_p |PKN1];
  R67: PKN1 => PKN1_p; 1;
  // V(68) = K(68,1) * [PKN1_p |PKN1];
  R68: PKN1 => PKN1_p; 1;
  // V(69) = K(69,1) * [AKT1_p] * [CDKN1A] -K(69,2) * [AKT1_p |CDKN1A];
  R69: AKT1_p => CDKN1A; 1;
  // V(70) = K(70,1) * [AKT1_p |CDKN1A];
  R70: AKT1_p => CDKN1A; 1;
  // V(71) = K(71,1) * [PRKCA_p] * [AQP1] -K(71,2) * [PRKCA_p |AQP1];
  R71: PRKCA_p => AQP1; 1;
  // V(72) = K(72,1) * [PRKCA_p |AQP1];
  R72: PRKCA_p => AQP1; 1;
  // V(73) = K(73,1) * [AKT1_p] * [ESR1] -K(73,2) * [AKT1_p |ESR1];
  R73: ESR1 => AKT1_p; 1;
  // V(74) = K(74,1) * [AKT1_p |ESR1];
  R74: ESR1 => AKT1_p; 1;
  // V(75) = K(75,1) * [MAPK1_p] * [TSC2] -K(75,2) * [MAPK1_p |TSC2];
  R75: TSC2 => MAPK1_p; 1;
  // V(76) = K(76,1) * [MAPK1_p |TSC2];
  R76: TSC2 => MAPK1_p; 1;
  // V(77) = K(77,1) * [INSR_p] * [SIGNOR-C156] -K(77,2) * [INSR_p |SIGNOR-C156];
  R77: INSR_p => ; 1;
  // V(78) = K(78,1) * [INSR_p |SIGNOR-C156];
  R78: INSR_p => ; 1;
  // V(79) = K(79,1) * [MAPK1_p] * [RHOA] -K(79,2) * [MAPK1_p |RHOA];
  R79: RHOA => MAPK1_p; 1;
  // V(80) = K(80,1) * [MAPK1_p |RHOA];
  R80: RHOA => MAPK1_p; 1;
  // V(81) = K(81,1) * [EGFR_p] * [CALM1] -K(81,2) * [EGFR_p |CALM1];
  R81: EGFR_p => CALM1; 1;
  // V(82) = K(82,1) * [EGFR_p |CALM1];
  R82: EGFR_p => CALM1; 1;
  // V(83) = K(83,1) * [PRKCA_p] * [PRKCA] -K(83,2) * [PRKCA_p |PRKCA];
  R83: PRKCA => PRKCA_p; 1;
  // V(84) = K(84,1) * [PRKCA_p |PRKCA];
  R84: PRKCA => PRKCA_p; 1;
  // V(85) = K(85,1) * [PRKCA_p] * [HMGN1] -K(85,2) * [PRKCA_p |HMGN1];
  R85: HMGN1 => PRKCA_p; 1;
  // V(86) = K(86,1) * [PRKCA_p |HMGN1];
  R86: HMGN1 => PRKCA_p; 1;
  // V(87) = K(87,1) * [INSR_p] * [CALM1] -K(87,2) * [INSR_p |CALM1];
  R87: INSR_p => CALM1; 1;
  // V(88) = K(88,1) * [INSR_p |CALM1];
  R88: INSR_p => CALM1; 1;
  // V(89) = K(89,1) * [PRKCA_p] * [CDKN1A] -K(89,2) * [PRKCA_p |CDKN1A];
  R89: PRKCA_p => CDKN1A; 1;
  // V(90) = K(90,1) * [PRKCA_p |CDKN1A];
  R90: PRKCA_p => CDKN1A; 1;
  // V(91) = K(91,1) * [ERN1_p] * [ERN1] -K(91,2) * [ERN1_p |ERN1];
  R91: ERN1_p => ERN1; 1;
  // V(92) = K(92,1) * [ERN1_p |ERN1];
  R92: ERN1_p => ERN1; 1;
  // V(93) = K(93,1) * [RPS6KA3_p] * [DEPTOR] -K(93,2) * [RPS6KA3_p |DEPTOR];
  R93: DEPTOR => RPS6KA3_p; 1;
  // V(94) = K(94,1) * [RPS6KA3_p |DEPTOR];
  R94: DEPTOR => RPS6KA3_p; 1;
  // V(95) = K(95,1) * [AKT1_p] * [CDKN1B] -K(95,2) * [AKT1_p |CDKN1B];
  R95: CDKN1B => AKT1_p; 1;
  // V(96) = K(96,1) * [AKT1_p |CDKN1B];
  R96: CDKN1B => AKT1_p; 1;
  // V(97) = K(97,1) * [ATR] * [MDM2] -K(97,2) * [ATR |MDM2];
  R97: ATR => MDM2; 1;
  // V(98) = K(98,1) * [ATR |MDM2];
  R98: ATR => MDM2; 1;
  // V(99) = K(99,1) * [MAPK1_p] * [SIGNOR-C154] -K(99,2) * [MAPK1_p |SIGNOR-C154];
  R99: MAPK1_p => ; 1;
  // V(100) = K(100,1) * [MAPK1_p |SIGNOR-C154];
  R100: MAPK1_p => ; 1;
  // V(101) = K(101,1) * [RPS6KA3_p] * [BAD] -K(101,2) * [RPS6KA3_p |BAD];
  R101: RPS6KA3_p => BAD; 1;
  // V(102) = K(102,1) * [RPS6KA3_p |BAD];
  R102: RPS6KA3_p => BAD; 1;
  // V(103) = K(103,1) * [AKT1_p] * [RAC1] -K(103,2) * [AKT1_p |RAC1];
  R103: RAC1 => AKT1_p; 1;
  // V(104) = K(104,1) * [AKT1_p |RAC1];
  R104: RAC1 => AKT1_p; 1;
  // V(105) = K(105,1) * [STK11_p] * [PTEN] -K(105,2) * [STK11_p |PTEN];
  R105: PTEN => STK11_p; 1;
  // V(106) = K(106,1) * [STK11_p |PTEN];
  R106: PTEN => STK11_p; 1;
  // V(107) = K(107,1) * [HIPK2_p] * [HIPK2] -K(107,2) * [HIPK2_p |HIPK2];
  R107: HIPK2_p => HIPK2; 1;
  // V(108) = K(108,1) * [HIPK2_p |HIPK2];
  R108: HIPK2_p => HIPK2; 1;
  // V(109) = K(109,1) * [SGK1] * [CDKN1B] -K(109,2) * [SGK1 |CDKN1B];
  R109: CDKN1B => SGK1; 1;
  // V(110) = K(110,1) * [SGK1 |CDKN1B];
  R110: CDKN1B => SGK1; 1;
  // V(111) = K(111,1) * [RPS6KA3_p] * [CREB1] -K(111,2) * [RPS6KA3_p |CREB1];
  R111: RPS6KA3_p => CREB1; 1;
  // V(112) = K(112,1) * [RPS6KA3_p |CREB1];
  R112: RPS6KA3_p => CREB1; 1;
  // V(113) = K(113,1) * [AKT1_p] * [TSC2] -K(113,2) * [AKT1_p |TSC2];
  R113: TSC2 => AKT1_p; 1;
  // V(114) = K(114,1) * [AKT1_p |TSC2];
  R114: TSC2 => AKT1_p; 1;
  // V(115) = K(115,1) * [PRKCA_p] * [PRKAA1] -K(115,2) * [PRKCA_p |PRKAA1];
  R115: PRKAA1 => PRKCA_p; 1;
  // V(116) = K(116,1) * [PRKCA_p |PRKAA1];
  R116: PRKAA1 => PRKCA_p; 1;
  // V(117) = K(117,1) * [AKT1_p] * [EP300] -K(117,2) * [AKT1_p |EP300];
  R117: EP300 => AKT1_p; 1;
  // V(118) = K(118,1) * [AKT1_p |EP300];
  R118: EP300 => AKT1_p; 1;
  // V(119) = K(119,1) * [MAPK1_p] * [EGFR] -K(119,2) * [MAPK1_p |EGFR];
  R119: EGFR => MAPK1_p; 1;
  // V(120) = K(120,1) * [MAPK1_p |EGFR];
  R120: EGFR => MAPK1_p; 1;
  // V(121) = K(121,1) * [PRKCA_p] * [INSR] -K(121,2) * [PRKCA_p |INSR];
  R121: PRKCA_p => INSR; 1;
  // V(122) = K(122,1) * [PRKCA_p |INSR];
  R122: PRKCA_p => INSR; 1;
  // V(123) = K(123,1) * [SIGNOR-C156_p] * [BAD] -K(123,2) * [SIGNOR-C156_p |BAD];
  R123: BAD => ; 1;
  // V(124) = K(124,1) * [SIGNOR-C156_p |BAD];
  R124: BAD => ; 1;
  // V(125) = K(125,1) * [AKT1_p] * [VIM] -K(125,2) * [AKT1_p |VIM];
  R125: VIM => AKT1_p; 1;
  // V(126) = K(126,1) * [AKT1_p |VIM];
  R126: VIM => AKT1_p; 1;
  // V(127) = K(127,1) * [AXL_p] * [AXL] -K(127,2) * [AXL_p |AXL];
  R127: AXL => AXL_p; 1;
  // V(128) = K(128,1) * [AXL_p |AXL];
  R128: AXL => AXL_p; 1;
  // V(129) = K(129,1) * [PRKAA1_p] * [DNMT1] -K(129,2) * [PRKAA1_p |DNMT1];
  R129: DNMT1 => PRKAA1_p; 1;
  // V(130) = K(130,1) * [PRKAA1_p |DNMT1];
  R130: DNMT1 => PRKAA1_p; 1;
  // V(131) = K(131,1) * [ILK_p] * [AKT1] -K(131,2) * [ILK_p |AKT1];
  R131: ILK_p => AKT1; 1;
  // V(132) = K(132,1) * [ILK_p |AKT1];
  R132: ILK_p => AKT1; 1;
  // V(133) = K(133,1) * [MAPK1_p] * [SP1] -K(133,2) * [MAPK1_p |SP1];
  R133: SP1 => MAPK1_p; 1;
  // V(134) = K(134,1) * [MAPK1_p |SP1];
  R134: SP1 => MAPK1_p; 1;
  // V(135) = K(135,1) * [ROCK1] * [PTEN] -K(135,2) * [ROCK1 |PTEN];
  R135: PTEN => ROCK1; 1;
  // V(136) = K(136,1) * [ROCK1 |PTEN];
  R136: PTEN => ROCK1; 1;
  // V(137) = K(137,1) * [MAPK1_p] * [BAD] -K(137,2) * [MAPK1_p |BAD];
  R137: BAD => MAPK1_p; 1;
  // V(138) = K(138,1) * [MAPK1_p |BAD];
  R138: BAD => MAPK1_p; 1;
  // V(139) = K(139,1) * [MAPK1_p] * [CDKN1A] -K(139,2) * [MAPK1_p |CDKN1A];
  R139: CDKN1A => MAPK1_p; 1;
  // V(140) = K(140,1) * [MAPK1_p |CDKN1A];
  R140: CDKN1A => MAPK1_p; 1;
  // V(141) = K(141,1) * [JAK1] * [STAT3] -K(141,2) * [JAK1 |STAT3];
  R141: JAK1 => STAT3; 1;
  // V(142) = K(142,1) * [JAK1 |STAT3];
  R142: JAK1 => STAT3; 1;
  // V(143) = K(143,1) * [AKT1_p] * [NR3C1] -K(143,2) * [AKT1_p |NR3C1];
  R143: AKT1_p => NR3C1; 1;
  // V(144) = K(144,1) * [AKT1_p |NR3C1];
  R144: AKT1_p => NR3C1; 1;
  // V(145) = K(145,1) * [PRKCA_p] * [HES1] -K(145,2) * [PRKCA_p |HES1];
  R145: PRKCA_p => HES1; 1;
  // V(146) = K(146,1) * [PRKCA_p |HES1];
  R146: PRKCA_p => HES1; 1;
  // V(147) = K(147,1) * [EGFR_p] * [SIGNOR-C120] -K(147,2) * [EGFR_p |SIGNOR-C120];
  R147: EGFR_p => ; 1;
  // V(148) = K(148,1) * [EGFR_p |SIGNOR-C120];
  R148: EGFR_p => ; 1;
  // V(149) = K(149,1) * [STK11_p] * [SMAD4] -K(149,2) * [STK11_p |SMAD4];
  R149: SMAD4 => STK11_p; 1;
  // V(150) = K(150,1) * [STK11_p |SMAD4];
  R150: SMAD4 => STK11_p; 1;
  // V(151) = K(151,1) * [PRKCA_p] * [ANXA1] -K(151,2) * [PRKCA_p |ANXA1];
  R151: PRKCA_p => ANXA1; 1;
  // V(152) = K(152,1) * [PRKCA_p |ANXA1];
  R152: PRKCA_p => ANXA1; 1;
  // V(153) = K(153,1) * [AXL_p] * [EGFR] -K(153,2) * [AXL_p |EGFR];
  R153: EGFR => AXL_p; 1;
  // V(154) = K(154,1) * [AXL_p |EGFR];
  R154: EGFR => AXL_p; 1;
  // V(155) = K(155,1) * [JAK1] * [STAT6] -K(155,2) * [JAK1 |STAT6];
  R155: STAT6 => JAK1; 1;
  // V(156) = K(156,1) * [JAK1 |STAT6];
  R156: STAT6 => JAK1; 1;
  // V(157) = K(157,1) * [SGK1] * [TSC2] -K(157,2) * [SGK1 |TSC2];
  R157: TSC2 => SGK1; 1;
  // V(158) = K(158,1) * [SGK1 |TSC2];
  R158: TSC2 => SGK1; 1;
  // V(159) = K(159,1) * [AKT1_p] * [YAP1] -K(159,2) * [AKT1_p |YAP1];
  R159: YAP1 => AKT1_p; 1;
  // V(160) = K(160,1) * [AKT1_p |YAP1];
  R160: YAP1 => AKT1_p; 1;
  // V(161) = K(161,1) * [SIGNOR-C156_p] * [AKT1] -K(161,2) * [SIGNOR-C156_p |AKT1];
  R161: AKT1 => ; 1;
  // V(162) = K(162,1) * [SIGNOR-C156_p |AKT1];
  R162: AKT1 => ; 1;
  // V(163) = K(163,1) * [RPS6KA3_p] * [FOS] -K(163,2) * [RPS6KA3_p |FOS];
  R163: RPS6KA3_p => FOS; 1;
  // V(164) = K(164,1) * [RPS6KA3_p |FOS];
  R164: RPS6KA3_p => FOS; 1;
  // V(165) = K(165,1) * [AKT1_p] * [RPS6KA3] -K(165,2) * [AKT1_p |RPS6KA3];
  R165: RPS6KA3 => AKT1_p; 1;
  // V(166) = K(166,1) * [AKT1_p |RPS6KA3];
  R166: RPS6KA3 => AKT1_p; 1;
  // V(167) = K(167,1) * [AKT1_p] * [DNMT1] -K(167,2) * [AKT1_p |DNMT1];
  R167: DNMT1 => AKT1_p; 1;
  // V(168) = K(168,1) * [AKT1_p |DNMT1];
  R168: DNMT1 => AKT1_p; 1;
  // V(169) = K(169,1) * [RPS6KA3_p] * [RPS6KA3] -K(169,2) * [RPS6KA3_p |RPS6KA3];
  R169: RPS6KA3_p => RPS6KA3; 1;
  // V(170) = K(170,1) * [RPS6KA3_p |RPS6KA3];
  R170: RPS6KA3_p => RPS6KA3; 1;
  // V(171) = K(171,1) * [PRKAA1_p] * [EP300] -K(171,2) * [PRKAA1_p |EP300];
  R171: PRKAA1_p => EP300; 1;
  // V(172) = K(172,1) * [PRKAA1_p |EP300];
  R172: PRKAA1_p => EP300; 1;
  // V(173) = K(173,1) * [HIPK2_p] * [MECP2] -K(173,2) * [HIPK2_p |MECP2];
  R173: MECP2 => HIPK2_p; 1;
  // V(174) = K(174,1) * [HIPK2_p |MECP2];
  R174: MECP2 => HIPK2_p; 1;
  // V(175) = K(175,1) * [AKT1_p] * [CTNNB1] -K(175,2) * [AKT1_p |CTNNB1];
  R175: CTNNB1 => AKT1_p; 1;
  // V(176) = K(176,1) * [AKT1_p |CTNNB1];
  R176: CTNNB1 => AKT1_p; 1;
  // V(177) = K(177,1) * [PRKCA_p] * [CYBA] -K(177,2) * [PRKCA_p |CYBA];
  R177: PRKCA_p => CYBA; 1;
  // V(178) = K(178,1) * [PRKCA_p |CYBA];
  R178: PRKCA_p => CYBA; 1;
  // V(179) = K(179,1) * [RPS6KA3_p] * [ESR1] -K(179,2) * [RPS6KA3_p |ESR1];
  R179: RPS6KA3_p => ESR1; 1;
  // V(180) = K(180,1) * [RPS6KA3_p |ESR1];
  R180: RPS6KA3_p => ESR1; 1;
  // V(181) = K(181,1) * [RPS6KA3_p] * [NR4A1] -K(181,2) * [RPS6KA3_p |NR4A1];
  R181: NR4A1 => RPS6KA3_p; 1;
  // V(182) = K(182,1) * [RPS6KA3_p |NR4A1];
  R182: NR4A1 => RPS6KA3_p; 1;
  // V(183) = K(183,1) * [PRKCA_p] * [BAD] -K(183,2) * [PRKCA_p |BAD];
  R183: PRKCA_p => BAD; 1;
  // V(184) = K(184,1) * [PRKCA_p |BAD];
  R184: PRKCA_p => BAD; 1;
  // V(185) = K(185,1) * [STK11_p] * [YAP1] -K(185,2) * [STK11_p |YAP1];
  R185: YAP1 => STK11_p; 1;
  // V(186) = K(186,1) * [STK11_p |YAP1];
  R186: YAP1 => STK11_p; 1;
  // V(187) = K(187,1) * [MAPK1_p] * [MAPK1] -K(187,2) * [MAPK1_p |MAPK1];
  R187: MAPK1 => MAPK1_p; 1;
  // V(188) = K(188,1) * [MAPK1_p |MAPK1];
  R188: MAPK1 => MAPK1_p; 1;
  // V(189) = K(189,1) * [PRKAA1_p] * [TSC2] -K(189,2) * [PRKAA1_p |TSC2];
  R189: PRKAA1_p => TSC2; 1;
  // V(190) = K(190,1) * [PRKAA1_p |TSC2];
  R190: PRKAA1_p => TSC2; 1;
  // V(191) = K(191,1) * [MAPK1_p] * [ZFP36] -K(191,2) * [MAPK1_p |ZFP36];
  R191: ZFP36 => MAPK1_p; 1;
  // V(192) = K(192,1) * [MAPK1_p |ZFP36];
  R192: ZFP36 => MAPK1_p; 1;
  // V(193) = K(193,1) * [MAPK1_p] * [RCAN1] -K(193,2) * [MAPK1_p |RCAN1];
  R193: RCAN1 => MAPK1_p; 1;
  // V(194) = K(194,1) * [MAPK1_p |RCAN1];
  R194: RCAN1 => MAPK1_p; 1;
  // V(195) = K(195,1) * [PKN1_p] * [EGFR] -K(195,2) * [PKN1_p |EGFR];
  R195: EGFR => PKN1_p; 1;
  // V(196) = K(196,1) * [PKN1_p |EGFR];
  R196: EGFR => PKN1_p; 1;
  // V(197) = K(197,1) * [MAPK1_p] * [AEBP1] -K(197,2) * [MAPK1_p |AEBP1];
  R197: AEBP1 => MAPK1_p; 1;
  // V(198) = K(198,1) * [MAPK1_p |AEBP1];
  R198: AEBP1 => MAPK1_p; 1;
  // V(199) = K(199,1) * [EGFR_p] * [ESR1] -K(199,2) * [EGFR_p |ESR1];
  R199: EGFR_p => ESR1; 1;
  // V(200) = K(200,1) * [EGFR_p |ESR1];
  R200: EGFR_p => ESR1; 1;
  // V(201) = K(201,1) * [PKN1_p] * [AR] -K(201,2) * [PKN1_p |AR];
  R201: AR => PKN1_p; 1;
  // V(202) = K(202,1) * [PKN1_p |AR];
  R202: AR => PKN1_p; 1;
  // V(203) = K(203,1) * [AKT1_p] * [PARK7] -K(203,2) * [AKT1_p |PARK7];
  R203: AKT1_p => PARK7; 1;
  // V(204) = K(204,1) * [AKT1_p |PARK7];
  R204: AKT1_p => PARK7; 1;
  // V(205) = K(205,1) * [SGK1] * [SP1] -K(205,2) * [SGK1 |SP1];
  R205: SP1 => SGK1; 1;
  // V(206) = K(206,1) * [SGK1 |SP1];
  R206: SP1 => SGK1; 1;
  // V(207) = K(207,1) * [PRKAA1_p] * [HIPK2] -K(207,2) * [PRKAA1_p |HIPK2];
  R207: PRKAA1_p => HIPK2; 1;
  // V(208) = K(208,1) * [PRKAA1_p |HIPK2];
  R208: PRKAA1_p => HIPK2; 1;
  // V(209) = K(209,1) * [MAPK1_p] * [DNM1L] -K(209,2) * [MAPK1_p |DNM1L];
  R209: DNM1L => MAPK1_p; 1;
  // V(210) = K(210,1) * [MAPK1_p |DNM1L];
  R210: DNM1L => MAPK1_p; 1;
  // V(211) = K(211,1) * [SGK1] * [MAPK1] -K(211,2) * [SGK1 |MAPK1];
  R211: MAPK1 => SGK1; 1;
  // V(212) = K(212,1) * [SGK1 |MAPK1];
  R212: MAPK1 => SGK1; 1;
  // V(213) = K(213,1) * [PRKAA1_p] * [DDIT3] -K(213,2) * [PRKAA1_p |DDIT3];
  R213: DDIT3 => PRKAA1_p; 1;
  // V(214) = K(214,1) * [PRKAA1_p |DDIT3];
  R214: DDIT3 => PRKAA1_p; 1;
  // V(215) = K(215,1) * [ROCK1] * [BECN1] -K(215,2) * [ROCK1 |BECN1];
  R215: ROCK1 => BECN1; 1;
  // V(216) = K(216,1) * [ROCK1 |BECN1];
  R216: ROCK1 => BECN1; 1;
  // V(217) = K(217,1) * [MAPK1_p] * [XBP1] -K(217,2) * [MAPK1_p |XBP1];
  R217: XBP1 => MAPK1_p; 1;
  // V(218) = K(218,1) * [MAPK1_p |XBP1];
  R218: XBP1 => MAPK1_p; 1;
  // V(219) = K(219,1) * [HIPK2_p] * [EP300] -K(219,2) * [HIPK2_p |EP300];
  R219: EP300 => HIPK2_p; 1;
  // V(220) = K(220,1) * [HIPK2_p |EP300];
  R220: EP300 => HIPK2_p; 1;
  // V(221) = K(221,1) * [SGK1] * [NR3C1] -K(221,2) * [SGK1 |NR3C1];
  R221: SGK1 => NR3C1; 1;
  // V(222) = K(222,1) * [SGK1 |NR3C1];
  R222: SGK1 => NR3C1; 1;
  // V(223) = K(223,1) * [INSR_p] * [FABP4] -K(223,2) * [INSR_p |FABP4];
  R223: INSR_p => FABP4; 1;
  // V(224) = K(224,1) * [INSR_p |FABP4];
  R224: INSR_p => FABP4; 1;
  // V(225) = K(225,1) * [MAPK1_p] * [AR] -K(225,2) * [MAPK1_p |AR];
  R225: AR => MAPK1_p; 1;
  // V(226) = K(226,1) * [MAPK1_p |AR];
  R226: AR => MAPK1_p; 1;
  // V(227) = K(227,1) * [PKM] * [STAT3] -K(227,2) * [PKM |STAT3];
  R227: PKM => STAT3; 1;
  // V(228) = K(228,1) * [PKM |STAT3];
  R228: PKM => STAT3; 1;
  // V(229) = K(229,1) * [AKT1_p] * [AKT1] -K(229,2) * [AKT1_p |AKT1];
  R229: AKT1 => AKT1_p; 1;
  // V(230) = K(230,1) * [AKT1_p |AKT1];
  R230: AKT1 => AKT1_p; 1;
  // V(231) = K(231,1) * [JAK1] * [PTPN11] -K(231,2) * [JAK1 |PTPN11];
  R231: JAK1 => PTPN11; 1;
  // V(232) = K(232,1) * [JAK1 |PTPN11];
  R232: JAK1 => PTPN11; 1;
  // V(233) = K(233,1) * [EGFR_p] * [STAT1] -K(233,2) * [EGFR_p |STAT1];
  R233: EGFR_p => STAT1; 1;
  // V(234) = K(234,1) * [EGFR_p |STAT1];
  R234: EGFR_p => STAT1; 1;
  // V(235) = K(235,1) * [INSR_p] * [PTEN] -K(235,2) * [INSR_p |PTEN];
  R235: PTEN => INSR_p; 1;
  // V(236) = K(236,1) * [INSR_p |PTEN];
  R236: PTEN => INSR_p; 1;
  // V(237) = K(237,1) * [INSR_p] * [PIK3R1] -K(237,2) * [INSR_p |PIK3R1];
  R237: PIK3R1 => INSR_p; 1;
  // V(238) = K(238,1) * [INSR_p |PIK3R1];
  R238: PIK3R1 => INSR_p; 1;
  // V(239) = K(239,1) * [PRKAA1_p] * [MFF] -K(239,2) * [PRKAA1_p |MFF];
  R239: PRKAA1_p => MFF; 1;
  // V(240) = K(240,1) * [PRKAA1_p |MFF];
  R240: PRKAA1_p => MFF; 1;
  // V(241) = K(241,1) * [PRKCA_p] * [ADD3] -K(241,2) * [PRKCA_p |ADD3];
  R241: ADD3 => PRKCA_p; 1;
  // V(242) = K(242,1) * [PRKCA_p |ADD3];
  R242: ADD3 => PRKCA_p; 1;
  // V(243) = K(243,1) * [PIK3CA] * [AKT1] -K(243,2) * [PIK3CA |AKT1];
  R243: PIK3CA => AKT1; 1;
  // V(244) = K(244,1) * [PIK3CA |AKT1];
  R244: PIK3CA => AKT1; 1;
  // V(245) = K(245,1) * [AKT1_p] * [CREB1] -K(245,2) * [AKT1_p |CREB1];
  R245: CREB1 => AKT1_p; 1;
  // V(246) = K(246,1) * [AKT1_p |CREB1];
  R246: CREB1 => AKT1_p; 1;
  // V(247) = K(247,1) * [AKT1_p] * [MAPK1] -K(247,2) * [AKT1_p |MAPK1];
  R247: MAPK1 => AKT1_p; 1;
  // V(248) = K(248,1) * [AKT1_p |MAPK1];
  R248: MAPK1 => AKT1_p; 1;
  // V(249) = K(249,1) * [ROCK1] * [VIM] -K(249,2) * [ROCK1 |VIM];
  R249: ROCK1 => VIM; 1;
  // V(250) = K(250,1) * [ROCK1 |VIM];
  R250: ROCK1 => VIM; 1;
  // V(251) = K(251,1) * [PRKCA_p] * [NFE2L2] -K(251,2) * [PRKCA_p |NFE2L2];
  R251: PRKCA_p => NFE2L2; 1;
  // V(252) = K(252,1) * [PRKCA_p |NFE2L2];
  R252: PRKCA_p => NFE2L2; 1;
  // V(253) = K(253,1) * [STK11_p] * [F2R] -K(253,2) * [STK11_p |F2R];
  R253: F2R => STK11_p; 1;
  // V(254) = K(254,1) * [STK11_p |F2R];
  R254: F2R => STK11_p; 1;
  // V(255) = K(255,1) * [ATR] * [CREB1] -K(255,2) * [ATR |CREB1];
  R255: ATR => CREB1; 1;
  // V(256) = K(256,1) * [ATR |CREB1];
  R256: ATR => CREB1; 1;
  // V(257) = K(257,1) * [EGFR_p] * [AGO2] -K(257,2) * [EGFR_p |AGO2];
  R257: EGFR_p => AGO2; 1;
  // V(258) = K(258,1) * [EGFR_p |AGO2];
  R258: EGFR_p => AGO2; 1;
  // V(259) = K(259,1) * [STK11_p] * [PRKAA1] -K(259,2) * [STK11_p |PRKAA1];
  R259: PRKAA1 => STK11_p; 1;
  // V(260) = K(260,1) * [STK11_p |PRKAA1];
  R260: PRKAA1 => STK11_p; 1;
  // V(261) = K(261,1) * [RPS6KA3_p] * [TSC2] -K(261,2) * [RPS6KA3_p |TSC2];
  R261: RPS6KA3_p => TSC2; 1;
  // V(262) = K(262,1) * [RPS6KA3_p |TSC2];
  R262: RPS6KA3_p => TSC2; 1;
  // V(263) = K(263,1) * [EGFR_p] * [ANXA1] -K(263,2) * [EGFR_p |ANXA1];
  R263: EGFR_p => ANXA1; 1;
  // V(264) = K(264,1) * [EGFR_p |ANXA1];
  R264: EGFR_p => ANXA1; 1;
  // V(265) = K(265,1) * [PRKCA_p] * [BCL2] -K(265,2) * [PRKCA_p |BCL2];
  R265: PRKCA_p => BCL2; 1;
  // V(266) = K(266,1) * [PRKCA_p |BCL2];
  R266: PRKCA_p => BCL2; 1;
  // V(267) = K(267,1) * [EGFR_p] * [STAT3] -K(267,2) * [EGFR_p |STAT3];
  R267: EGFR_p => STAT3; 1;
  // V(268) = K(268,1) * [EGFR_p |STAT3];
  R268: EGFR_p => STAT3; 1;
  // V(269) = K(269,1) * [PRKCA_p] * [PTPN11] -K(269,2) * [PRKCA_p |PTPN11];
  R269: PTPN11 => PRKCA_p; 1;
  // V(270) = K(270,1) * [PRKCA_p |PTPN11];
  R270: PTPN11 => PRKCA_p; 1;
  // V(271) = K(271,1) * [EGFR_p] * [BECN1] -K(271,2) * [EGFR_p |BECN1];
  R271: EGFR_p => BECN1; 1;
  // V(272) = K(272,1) * [EGFR_p |BECN1];
  R272: EGFR_p => BECN1; 1;
  // V(273) = K(273,1) * [PRKAA1_p] * [NFE2L2] -K(273,2) * [PRKAA1_p |NFE2L2];
  R273: PRKAA1_p => NFE2L2; 1;
  // V(274) = K(274,1) * [PRKAA1_p |NFE2L2];
  R274: PRKAA1_p => NFE2L2; 1;
  // V(275) = K(275,1) * [HIPK2_p] * [CDKN1B] -K(275,2) * [HIPK2_p |CDKN1B];
  R275: CDKN1B => HIPK2_p; 1;
  // V(276) = K(276,1) * [HIPK2_p |CDKN1B];
  R276: CDKN1B => HIPK2_p; 1;
  // V(277) = K(277,1) * [PRKAA1_p] * [PRKAA1] -K(277,2) * [PRKAA1_p |PRKAA1];
  R277: PRKAA1 => PRKAA1_p; 1;
  // V(278) = K(278,1) * [PRKAA1_p |PRKAA1];
  R278: PRKAA1 => PRKAA1_p; 1;
  // V(279) = K(279,1) * [RPS6KA3_p] * [STK11] -K(279,2) * [RPS6KA3_p |STK11];
  R279: RPS6KA3_p => STK11; 1;
  // V(280) = K(280,1) * [RPS6KA3_p |STK11];
  R280: RPS6KA3_p => STK11; 1;
  // V(281) = K(281,1) * [SGK1] * [STAT1] -K(281,2) * [SGK1 |STAT1];
  R281: STAT1 => SGK1; 1;
  // V(282) = K(282,1) * [SGK1 |STAT1];
  R282: STAT1 => SGK1; 1;
  // V(283) = K(283,1) * [ERN1_p] * [XBP1] -K(283,2) * [ERN1_p |XBP1];
  R283: ERN1_p => XBP1; 1;
  // V(284) = K(284,1) * [ERN1_p |XBP1];
  R284: ERN1_p => XBP1; 1;
  // V(285) = K(285,1) * [ILK_p] * [ILK] -K(285,2) * [ILK_p |ILK];
  R285: ILK_p => ILK; 1;
  // V(286) = K(286,1) * [ILK_p |ILK];
  R286: ILK_p => ILK; 1;
  // V(287) = K(287,1) * [PRKCA_p] * [RORA] -K(287,2) * [PRKCA_p |RORA];
  R287: PRKCA_p => RORA; 1;
  // V(288) = K(288,1) * [PRKCA_p |RORA];
  R288: PRKCA_p => RORA; 1;
  // V(289) = K(289,1) * [EGFR_p] * [CTNNB1] -K(289,2) * [EGFR_p |CTNNB1];
  R289: EGFR_p => CTNNB1; 1;
  // V(290) = K(290,1) * [EGFR_p |CTNNB1];
  R290: EGFR_p => CTNNB1; 1;
  // V(291) = K(291,1) * [EGFR_p] * [PTPN11] -K(291,2) * [EGFR_p |PTPN11];
  R291: EGFR_p => PTPN11; 1;
  // V(292) = K(292,1) * [EGFR_p |PTPN11];
  R292: EGFR_p => PTPN11; 1;
  // V(293) = K(293,1) * [HIPK2_p] * [MDM2] -K(293,2) * [HIPK2_p |MDM2];
  R293: HIPK2_p => MDM2; 1;
  // V(294) = K(294,1) * [HIPK2_p |MDM2];
  R294: HIPK2_p => MDM2; 1;
  // V(295) = K(295,1) * [ROCK2] * [EP300] -K(295,2) * [ROCK2 |EP300];
  R295: EP300 => ROCK2; 1;
  // V(296) = K(296,1) * [ROCK2 |EP300];
  R296: EP300 => ROCK2; 1;
  // V(297) = K(297,1) * [MAPK1_p] * [STAT3] -K(297,2) * [MAPK1_p |STAT3];
  R297: STAT3 => MAPK1_p; 1;
  // V(298) = K(298,1) * [MAPK1_p |STAT3];
  R298: STAT3 => MAPK1_p; 1;
  // V(299) = K(299,1) * [AKT1_p] * [BECN1] -K(299,2) * [AKT1_p |BECN1];
  R299: BECN1 => AKT1_p; 1;
  // V(300) = K(300,1) * [AKT1_p |BECN1];
  R300: BECN1 => AKT1_p; 1;
  // V(301) = K(301,1) * [EGFR_p] * [AXL] -K(301,2) * [EGFR_p |AXL];
  R301: EGFR_p => AXL; 1;
  // V(302) = K(302,1) * [EGFR_p |AXL];
  R302: EGFR_p => AXL; 1;
  // V(303) = K(303,1) * [MAPK1_p] * [NR4A1] -K(303,2) * [MAPK1_p |NR4A1];
  R303: NR4A1 => MAPK1_p; 1;
  // V(304) = K(304,1) * [MAPK1_p |NR4A1];
  R304: NR4A1 => MAPK1_p; 1;
  // V(305) = K(305,1) * [EGFR_p] * [ABCA1] -K(305,2) * [EGFR_p |ABCA1];
  R305: EGFR_p => ABCA1; 1;
  // V(306) = K(306,1) * [EGFR_p |ABCA1];
  R306: EGFR_p => ABCA1; 1;
  // V(307) = K(307,1) * [MAPK1_p] * [TXNIP] -K(307,2) * [MAPK1_p |TXNIP];
  R307: TXNIP => MAPK1_p; 1;
  // V(308) = K(308,1) * [MAPK1_p |TXNIP];
  R308: TXNIP => MAPK1_p; 1;
  // V(309) = K(309,1) * [STK11_p] * [CDKN1A] -K(309,2) * [STK11_p |CDKN1A];
  R309: STK11_p => CDKN1A; 1;
  // V(310) = K(310,1) * [STK11_p |CDKN1A];
  R310: STK11_p => CDKN1A; 1;
  // V(311) = K(311,1) * [EGFR_p] * [PKM] -K(311,2) * [EGFR_p |PKM];
  R311: EGFR_p => PKM; 1;
  // V(312) = K(312,1) * [EGFR_p |PKM];
  R312: EGFR_p => PKM; 1;
  // V(313) = K(313,1) * [PIK3CA] * [PIK3R1] -K(313,2) * [PIK3CA |PIK3R1];
  R313: PIK3CA => PIK3R1; 1;
  // V(314) = K(314,1) * [PIK3CA |PIK3R1];
  R314: PIK3CA => PIK3R1; 1;
  // V(315) = K(315,1) * [AKT1_p] * [BAX] -K(315,2) * [AKT1_p |BAX];
  R315: AKT1_p => BAX; 1;
  // V(316) = K(316,1) * [AKT1_p |BAX];
  R316: AKT1_p => BAX; 1;
  // V(317) = K(317,1) * [PRKAA1_p] * [CDKN1B] -K(317,2) * [PRKAA1_p |CDKN1B];
  R317: CDKN1B => PRKAA1_p; 1;
  // V(318) = K(318,1) * [PRKAA1_p |CDKN1B];
  R318: CDKN1B => PRKAA1_p; 1;
  // V(319) = K(319,1) * [HIPK2_p] * [CREB1] -K(319,2) * [HIPK2_p |CREB1];
  R319: CREB1 => HIPK2_p; 1;
  // V(320) = K(320,1) * [HIPK2_p |CREB1];
  R320: CREB1 => HIPK2_p; 1;
  // V(321) = K(321,1) * [PTEN_p] * [AR_p] -K(321,2) * [PTEN_p |AR_p];
  R321: PTEN_p => AR_p; 1;
  // V(322) = K(322,1) * [PTEN_p |AR_p];
  R322: PTEN_p => AR_p; 1;
  // V(323) = K(323,1) * [PTPN11_p] * [EGFR_p] -K(323,2) * [PTPN11_p |EGFR_p];
  R323: EGFR_p => PTPN11_p; 1;
  // V(324) = K(324,1) * [PTPN11_p |EGFR_p];
  R324: EGFR_p => PTPN11_p; 1;
  // V(325) = K(325,1) * [DUSP1_p] * [MAPK1_p] -K(325,2) * [DUSP1_p |MAPK1_p];
  R325: DUSP1_p => MAPK1_p; 1;
  // V(326) = K(326,1) * [DUSP1_p |MAPK1_p];
  R326: DUSP1_p => MAPK1_p; 1;
  // V(327) = K(327,1) * [PTEN_p] * [SP1_p] -K(327,2) * [PTEN_p |SP1_p];
  R327: PTEN_p => SP1_p; 1;
  // V(328) = K(328,1) * [PTEN_p |SP1_p];
  R328: PTEN_p => SP1_p; 1;
  // V(329) = K(329,1) * [PTEN_p] * [PTEN_p] -K(329,2) * [PTEN_p |PTEN_p];
  R329: PTEN_p => ; 1;
  // V(330) = K(330,1) * [PTEN_p |PTEN_p];
  R330: PTEN_p => ; 1;
  // V(331) = K(331,1) * [PTPN11_p] * [CDKN1B_p] -K(331,2) * [PTPN11_p |CDKN1B_p];
  R331: PTPN11_p => CDKN1B_p; 1;
  // V(332) = K(332,1) * [PTPN11_p |CDKN1B_p];
  R332: PTPN11_p => CDKN1B_p; 1;
  // V(333) = K(333,1) * [PTEN_p] * [IRF3_p] -K(333,2) * [PTEN_p |IRF3_p];
  R333: PTEN_p => IRF3_p; 1;
  // V(334) = K(334,1) * [PTEN_p |IRF3_p];
  R334: PTEN_p => IRF3_p; 1;
  // V(335) = K(335,1) * [PTPN11_p] * [STAT1_p] -K(335,2) * [PTPN11_p |STAT1_p];
  R335: STAT1_p => PTPN11_p; 1;
  // V(336) = K(336,1) * [PTPN11_p |STAT1_p];
  R336: STAT1_p => PTPN11_p; 1;
  // V(337) = K(337,1) * [PTEN_p] * [CREB1_p] -K(337,2) * [PTEN_p |CREB1_p];
  R337: PTEN_p => CREB1_p; 1;
  // V(338) = K(338,1) * [PTEN_p |CREB1_p];
  R338: PTEN_p => CREB1_p; 1;
  // V(339) = K(339,1) * [DUSP1_p] * [JUN_p] -K(339,2) * [DUSP1_p |JUN_p];
  R339: JUN_p => DUSP1_p; 1;
  // V(340) = K(340,1) * [DUSP1_p |JUN_p];
  R340: JUN_p => DUSP1_p; 1;
  // V(341) = K(341,1) * [PTPN11_p] * [STAT3_p] -K(341,2) * [PTPN11_p |STAT3_p];
  R341: STAT3_p => PTPN11_p; 1;
  // V(342) = K(342,1) * [PTPN11_p |STAT3_p];
  R342: STAT3_p => PTPN11_p; 1;
  // V(343) = K(343,1) * [MDM2_p] * [IRF1] -K(343,2) * [MDM2_p |IRF1];
  R343: IRF1 => MDM2_p; 1;
  // V(344) = K(344,1) * [MDM2_p |IRF1];
  R344: IRF1 => MDM2_p; 1;
  // V(345) = K(345,1) * [MDM2_p] * [HIF1A] -K(345,2) * [MDM2_p |HIF1A];
  R345: HIF1A => MDM2_p; 1;
  // V(346) = K(346,1) * [MDM2_p |HIF1A];
  R346: HIF1A => MDM2_p; 1;
  // V(347) = K(347,1) * [RNF7] * [HIF1A] -K(347,2) * [RNF7 |HIF1A];
  R347: HIF1A => RNF7; 1;
  // V(348) = K(348,1) * [RNF7 |HIF1A];
  R348: HIF1A => RNF7; 1;
  // V(349) = K(349,1) * [MDM2_p] * [NUMB] -K(349,2) * [MDM2_p |NUMB];
  R349: MDM2_p => NUMB; 1;
  // V(350) = K(350,1) * [MDM2_p |NUMB];
  R350: MDM2_p => NUMB; 1;
  // V(351) = K(351,1) * [RNF7] * [DEPTOR] -K(351,2) * [RNF7 |DEPTOR];
  R351: DEPTOR => RNF7; 1;
  // V(352) = K(352,1) * [RNF7 |DEPTOR];
  R352: DEPTOR => RNF7; 1;
  // V(353) = K(353,1) * [RNF7] * [CDKN1B] -K(353,2) * [RNF7 |CDKN1B];
  R353: CDKN1B => RNF7; 1;
  // V(354) = K(354,1) * [RNF7 |CDKN1B];
  R354: CDKN1B => RNF7; 1;
  // V(355) = K(355,1) * [MDM2_p] * [HDAC1] -K(355,2) * [MDM2_p |HDAC1];
  R355: MDM2_p => HDAC1; 1;
  // V(356) = K(356,1) * [MDM2_p |HDAC1];
  R356: MDM2_p => HDAC1; 1;
  // V(357) = K(357,1) * [MYLIP] * [MYLIP] -K(357,2) * [MYLIP |MYLIP];
  R357: MYLIP => ; 1;
  // V(358) = K(358,1) * [MYLIP |MYLIP];
  R358: MYLIP => ; 1;
  // V(359) = K(359,1) * [CUL3] * [RHOA] -K(359,2) * [CUL3 |RHOA];
  R359: RHOA => CUL3; 1;
  // V(360) = K(360,1) * [CUL3 |RHOA];
  R360: RHOA => CUL3; 1;
  // V(361) = K(361,1) * [RNF7] * [JUN] -K(361,2) * [RNF7 |JUN];
  R361: JUN => RNF7; 1;
  // V(362) = K(362,1) * [RNF7 |JUN];
  R362: JUN => RNF7; 1;
  // V(363) = K(363,1) * [MYLIP] * [AR] -K(363,2) * [MYLIP |AR];
  R363: MYLIP => AR; 1;
  // V(364) = K(364,1) * [MYLIP |AR];
  R364: MYLIP => AR; 1;
  // V(365) = K(365,1) * [RNF7] * [CASP3] -K(365,2) * [RNF7 |CASP3];
  R365: RNF7 => CASP3; 1;
  // V(366) = K(366,1) * [RNF7 |CASP3];
  R366: RNF7 => CASP3; 1;
  // V(367) = K(367,1) * [NFE2L2_p] * [SOD1_g] -K(367,2) * [NFE2L2_p |SOD1_g];
  R367: SOD1_g => NFE2L2_p; 1;
  // V(368) = K(368,1) * [NFE2L2_p |SOD1_g];
  R368: SOD1_g => NFE2L2_p; 1;
  // V(369) = K(369,1) * [SOD1_rna];
  R369: SOD1_rna => ; 1;
  // V(370) = K(370,1) * [HIF1A_p] * [SIGNOR-C154_p] * [CCL2_g] -K(370,2) * [HIF1A_p |SIGNOR-C154_p |CCL2_g];
  R370: CCL2_g => HIF1A_p; 1;
  // V(371) = K(371,1) * [HIF1A_p |SIGNOR-C154_p |CCL2_g];
  R371: CCL2_g => HIF1A_p; 1;
  // V(372) = K(372,1) * [CCL2_rna];
  R372: CCL2_rna => ; 1;
  // V(373) = K(373,1) * [STAT3_p] * [STAT1_p] * [SOCS3_g] -K(373,2) * [STAT3_p |STAT1_p |SOCS3_g];
  R373: STAT3_p => STAT1_p; 1;
  // V(374) = K(374,1) * [STAT3_p |STAT1_p |SOCS3_g];
  R374: STAT3_p => STAT1_p; 1;
  // V(375) = K(375,1) * [SOCS3_rna];
  R375: SOCS3_rna => ; 1;
  // V(376) = K(376,1) * [CTNNB1_p] * [ESR1_p] * [CCND1_g] -K(376,2) * [CTNNB1_p |ESR1_p |CCND1_g];
  R376: CTNNB1_p => CCND1_g; 1;
  // V(377) = K(377,1) * [CTNNB1_p |ESR1_p |CCND1_g];
  R377: CTNNB1_p => CCND1_g; 1;
  // V(378) = K(378,1) * [CCND1_rna];
  R378: CCND1_rna => ; 1;
  // V(379) = K(379,1) * [NFE2L2_p] * [CAT_g] -K(379,2) * [NFE2L2_p |CAT_g];
  R379: CAT_g => NFE2L2_p; 1;
  // V(380) = K(380,1) * [NFE2L2_p |CAT_g];
  R380: CAT_g => NFE2L2_p; 1;
  // V(381) = K(381,1) * [CAT_rna];
  R381: CAT_rna => ; 1;
  // V(382) = K(382,1) * [HIF1A_p] * [STAT3_p] * [VEGFA_g] -K(382,2) * [HIF1A_p |STAT3_p |VEGFA_g];
  R382: STAT3_p => HIF1A_p; 1;
  // V(383) = K(383,1) * [HIF1A_p |STAT3_p |VEGFA_g];
  R383: STAT3_p => HIF1A_p; 1;
  // V(384) = K(384,1) * [VEGFA_rna];
  R384: VEGFA_rna => ; 1;
  // V(385) = K(385,1) * [STAT3_p] * [SP1_p] * [HGF_g] -K(385,2) * [STAT3_p |SP1_p |HGF_g];
  R385: STAT3_p => HGF_g; 1;
  // V(386) = K(386,1) * [STAT3_p |SP1_p |HGF_g];
  R386: STAT3_p => HGF_g; 1;
  // V(387) = K(387,1) * [HGF_rna];
  R387: HGF_rna => ; 1;
  // V(388) = K(388,1) * [HIF1A_p] * [KDM6B_g] -K(388,2) * [HIF1A_p |KDM6B_g];
  R388: KDM6B_g => HIF1A_p; 1;
  // V(389) = K(389,1) * [HIF1A_p |KDM6B_g];
  R389: KDM6B_g => HIF1A_p; 1;
  // V(390) = K(390,1) * [KDM6B_rna];
  R390: KDM6B_rna => ; 1;
  // V(391) = K(391,1) * [NR3C1_p] * [KLF9_g] -K(391,2) * [NR3C1_p |KLF9_g];
  R391: KLF9_g => NR3C1_p; 1;
  // V(392) = K(392,1) * [NR3C1_p |KLF9_g];
  R392: KLF9_g => NR3C1_p; 1;
  // V(393) = K(393,1) * [KLF9_rna];
  R393: KLF9_rna => ; 1;
  // V(394) = K(394,1) * [SP1_p] * [CD34_g] -K(394,2) * [SP1_p |CD34_g];
  R394: SP1_p => CD34_g; 1;
  // V(395) = K(395,1) * [SP1_p |CD34_g];
  R395: SP1_p => CD34_g; 1;
  // V(396) = K(396,1) * [CD34_rna];
  R396: CD34_rna => ; 1;
  // V(397) = K(397,1) * [NFE2L2_p] * [GPX4_g] -K(397,2) * [NFE2L2_p |GPX4_g];
  R397: GPX4_g => NFE2L2_p; 1;
  // V(398) = K(398,1) * [NFE2L2_p |GPX4_g];
  R398: GPX4_g => NFE2L2_p; 1;
  // V(399) = K(399,1) * [GPX4_rna];
  R399: GPX4_rna => ; 1;
  // V(400) = K(400,1) * [ETS1] * [SP1_p] * [TNC_g] -K(400,2) * [ETS1 |SP1_p |TNC_g];
  R400: TNC_g => ETS1; 1;
  // V(401) = K(401,1) * [ETS1 |SP1_p |TNC_g];
  R401: TNC_g => ETS1; 1;
  // V(402) = K(402,1) * [TNC_rna];
  R402: TNC_rna => ; 1;
  // V(403) = K(403,1) * [ERG] * [CLDN5_g] -K(403,2) * [ERG |CLDN5_g];
  R403: CLDN5_g => ERG; 1;
  // V(404) = K(404,1) * [ERG |CLDN5_g];
  R404: CLDN5_g => ERG; 1;
  // V(405) = K(405,1) * [CLDN5_rna];
  R405: CLDN5_rna => ; 1;
  // V(406) = K(406,1) * [NFE2L2_p] * [SOD2_g] -K(406,2) * [NFE2L2_p |SOD2_g];
  R406: SOD2_g => NFE2L2_p; 1;
  // V(407) = K(407,1) * [NFE2L2_p |SOD2_g];
  R407: SOD2_g => NFE2L2_p; 1;
  // V(408) = K(408,1) * [SOD2_rna];
  R408: SOD2_rna => ; 1;
  // V(409) = K(409,1) * [STAT3_p] * [STAT1_g] -K(409,2) * [STAT3_p |STAT1_g];
  R409: STAT3_p => STAT1_g; 1;
  // V(410) = K(410,1) * [STAT3_p |STAT1_g];
  R410: STAT3_p => STAT1_g; 1;
  // V(411) = K(411,1) * [STAT1_rna];
  R411: STAT1_rna => ; 1;
  // V(412) = K(412,1) * [ETS1] * [FOS_g] -K(412,2) * [ETS1 |FOS_g];
  R412: FOS_g => ETS1; 1;
  // V(413) = K(413,1) * [ETS1 |FOS_g];
  R413: FOS_g => ETS1; 1;
  // V(414) = K(414,1) * [FOS_rna];
  R414: FOS_rna => ; 1;
  // V(415) = K(415,1) * [HES1] * [NR3C1_g] -K(415,2) * [HES1 |NR3C1_g];
  R415: HES1 => NR3C1_g; 1;
  // V(416) = K(416,1) * [NR3C1_g];
  R416: NR3C1_g => ; 1;
  // V(417) = K(417,1) * [NR3C1_rna];
  R417: NR3C1_rna => ; 1;
  // V(418) = K(418,1) * [NR3C1_p] * [JUN_g] -K(418,2) * [NR3C1_p |JUN_g];
  R418: JUN_g => NR3C1_p; 1;
  // V(419) = K(419,1) * [JUN_g];
  R419: JUN_g => ; 1;
  // V(420) = K(420,1) * [JUN_rna];
  R420: JUN_rna => ; 1;
  // V(421) = K(421,1) * [MECP2_p] * [SGK1_g] -K(421,2) * [MECP2_p |SGK1_g];
  R421: MECP2_p => SGK1_g; 1;
  // V(422) = K(422,1) * [SGK1_g];
  R422: SGK1_g => ; 1;
  // V(423) = K(423,1) * [SGK1_rna];
  R423: SGK1_rna => ; 1;
  // V(424) = K(424,1) * [HES1] * [RCAN1_g] -K(424,2) * [HES1 |RCAN1_g];
  R424: HES1 => RCAN1_g; 1;
  // V(425) = K(425,1) * [RCAN1_g];
  R425: RCAN1_g => ; 1;
  // V(426) = K(426,1) * [RCAN1_rna];
  R426: RCAN1_rna => ; 1;
  // V(427) = K(427,1) * [SGK1];
  R427: SGK1 => ; 1;
  // V(428) = K(428,1) * [DNM1L];
  R428: DNM1L => ; 1;
  // V(429) = K(429,1) * [CLDN5];
  R429: CLDN5 => ; 1;
  // V(430) = K(430,1) * [SOCS3];
  R430: SOCS3 => ; 1;
  // V(431) = K(431,1) * [KDM6B];
  R431: KDM6B => ; 1;
  // V(432) = K(432,1) * [ROCK2];
  R432: ROCK2 => ; 1;
  // V(433) = K(433,1) * [ERN1];
  R433: ERN1 => ; 1;
  // V(434) = K(434,1) * [ABCA1];
  R434: ABCA1 => ; 1;
  // V(435) = K(435,1) * [SOD1];
  R435: SOD1 => ; 1;
  // V(436) = K(436,1) * [EGFR];
  R436: EGFR => ; 1;
  // V(437) = K(437,1) * [FOS];
  R437: FOS => ; 1;
  // V(438) = K(438,1) * [EGF];
  R438: EGF => ; 1;
  // V(439) = K(439,1) * [ESR1];
  R439: ESR1 => ; 1;
  // V(440) = K(440,1) * [CAT];
  R440: CAT => ; 1;
  // V(441) = K(441,1) * [ANXA1];
  R441: ANXA1 => ; 1;
  // V(442) = K(442,1) * [NR3C1];
  R442: NR3C1 => ; 1;
  // V(443) = K(443,1) * [SOD2];
  R443: SOD2 => ; 1;
  // V(444) = K(444,1) * [HSPB1];
  R444: HSPB1 => ; 1;
  // V(445) = K(445,1) * [HMGN1];
  R445: HMGN1 => ; 1;
  // V(446) = K(446,1) * [JUN];
  R446: JUN => ; 1;
  // V(447) = K(447,1) * [INSR];
  R447: INSR => ; 1;
  // V(448) = K(448,1) * [SP1];
  R448: SP1 => ; 1;
  // V(449) = K(449,1) * [VIM];
  R449: VIM => ; 1;
  // V(450) = K(450,1) * [CALM1];
  R450: CALM1 => ; 1;
  // V(451) = K(451,1) * [AR];
  R451: AR => ; 1;
  // V(452) = K(452,1) * [BCL2];
  R452: BCL2 => ; 1;
  // V(453) = K(453,1) * [IRF1];
  R453: IRF1 => ; 1;
  // V(454) = K(454,1) * [ERG];
  R454: ERG => ; 1;
  // V(455) = K(455,1) * [CYBA];
  R455: CYBA => ; 1;
  // V(456) = K(456,1) * [CCL2];
  R456: CCL2 => ; 1;
  // V(457) = K(457,1) * [F3];
  R457: F3 => ; 1;
  // V(458) = K(458,1) * [HGF];
  R458: HGF => ; 1;
  // V(459) = K(459,1) * [PKM];
  R459: PKM => ; 1;
  // V(460) = K(460,1) * [ETS1];
  R460: ETS1 => ; 1;
  // V(461) = K(461,1) * [FABP4];
  R461: FABP4 => ; 1;
  // V(462) = K(462,1) * [VEGFA];
  R462: VEGFA => ; 1;
  // V(463) = K(463,1) * [CREB1];
  R463: CREB1 => ; 1;
  // V(464) = K(464,1) * [PRKCA];
  R464: PRKCA => ; 1;
  // V(465) = K(465,1) * [XBP1];
  R465: XBP1 => ; 1;
  // V(466) = K(466,1) * [NR4A1];
  R466: NR4A1 => ; 1;
  // V(467) = K(467,1) * [JAK1];
  R467: JAK1 => ; 1;
  // V(468) = K(468,1) * [CCND1];
  R468: CCND1 => ; 1;
  // V(469) = K(469,1) * [TNC];
  R469: TNC => ; 1;
  // V(470) = K(470,1) * [F2R];
  R470: F2R => ; 1;
  // V(471) = K(471,1) * [DNMT1];
  R471: DNMT1 => ; 1;
  // V(472) = K(472,1) * [ZFP36];
  R472: ZFP36 => ; 1;
  // V(473) = K(473,1) * [PIK3R1];
  R473: PIK3R1 => ; 1;
  // V(474) = K(474,1) * [MAPK1];
  R474: MAPK1 => ; 1;
  // V(475) = K(475,1) * [DUSP1];
  R475: DUSP1 => ; 1;
  // V(476) = K(476,1) * [CD34];
  R476: CD34 => ; 1;
  // V(477) = K(477,1) * [AQP1];
  R477: AQP1 => ; 1;
  // V(478) = K(478,1) * [PRDX6];
  R478: PRDX6 => ; 1;
  // V(479) = K(479,1) * [AXL];
  R479: AXL => ; 1;
  // V(480) = K(480,1) * [AKT1];
  R480: AKT1 => ; 1;
  // V(481) = K(481,1) * [CTNNB1];
  R481: CTNNB1 => ; 1;
  // V(482) = K(482,1) * [RORA];
  R482: RORA => ; 1;
  // V(483) = K(483,1) * [DDIT3];
  R483: DDIT3 => ; 1;
  // V(484) = K(484,1) * [GPX4];
  R484: GPX4 => ; 1;
  // V(485) = K(485,1) * [CDKN1A];
  R485: CDKN1A => ; 1;
  // V(486) = K(486,1) * [STAT3];
  R486: STAT3 => ; 1;
  // V(487) = K(487,1) * [STAT1];
  R487: STAT1 => ; 1;
  // V(488) = K(488,1) * [STAT6];
  R488: STAT6 => ; 1;
  // V(489) = K(489,1) * [PIK3CA];
  R489: PIK3CA => ; 1;
  // V(490) = K(490,1) * [CASP3];
  R490: CASP3 => ; 1;
  // V(491) = K(491,1) * [CDKN1B];
  R491: CDKN1B => ; 1;
  // V(492) = K(492,1) * [YAP1];
  R492: YAP1 => ; 1;
  // V(493) = K(493,1) * [NUMB];
  R493: NUMB => ; 1;
  // V(494) = K(494,1) * [TSC2];
  R494: TSC2 => ; 1;
  // V(495) = K(495,1) * [MECP2];
  R495: MECP2 => ; 1;
  // V(496) = K(496,1) * [RPS6KA3];
  R496: RPS6KA3 => ; 1;
  // V(497) = K(497,1) * [RCAN1];
  R497: RCAN1 => ; 1;
  // V(498) = K(498,1) * [PTEN];
  R498: PTEN => ; 1;
  // V(499) = K(499,1) * [RHOA];
  R499: RHOA => ; 1;
  // V(500) = K(500,1) * [RAC1];
  R500: RAC1 => ; 1;
  // V(501) = K(501,1) * [MDM2];
  R501: MDM2 => ; 1;
  // V(502) = K(502,1) * [NOTCH2];
  R502: NOTCH2 => ; 1;
  // V(503) = K(503,1) * [PTPN11];
  R503: PTPN11 => ; 1;
  // V(504) = K(504,1) * [BAX];
  R504: BAX => ; 1;
  // V(505) = K(505,1) * [EP300];
  R505: EP300 => ; 1;
  // V(506) = K(506,1) * [PRKAA1];
  R506: PRKAA1 => ; 1;
  // V(507) = K(507,1) * [ILK];
  R507: ILK => ; 1;
  // V(508) = K(508,1) * [ROCK1];
  R508: ROCK1 => ; 1;
  // V(509) = K(509,1) * [SMAD4];
  R509: SMAD4 => ; 1;
  // V(510) = K(510,1) * [ATR];
  R510: ATR => ; 1;
  // V(511) = K(511,1) * [HDAC1];
  R511: HDAC1 => ; 1;
  // V(512) = K(512,1) * [CUL3];
  R512: CUL3 => ; 1;
  // V(513) = K(513,1) * [KLF9];
  R513: KLF9 => ; 1;
  // V(514) = K(514,1) * [BECN1];
  R514: BECN1 => ; 1;
  // V(515) = K(515,1) * [HES1];
  R515: HES1 => ; 1;
  // V(516) = K(516,1) * [IRF3];
  R516: IRF3 => ; 1;
  // V(517) = K(517,1) * [STK11];
  R517: STK11 => ; 1;
  // V(518) = K(518,1) * [NFE2L2];
  R518: NFE2L2 => ; 1;
  // V(519) = K(519,1) * [PKN1];
  R519: PKN1 => ; 1;
  // V(520) = K(520,1) * [HIF1A];
  R520: HIF1A => ; 1;
  // V(521) = K(521,1) * [AEBP1];
  R521: AEBP1 => ; 1;
  // V(522) = K(522,1) * [DEPTOR];
  R522: DEPTOR => ; 1;
  // V(523) = K(523,1) * [MYLIP];
  R523: MYLIP => ; 1;
  // V(524) = K(524,1) * [BAD];
  R524: BAD => ; 1;
  // V(525) = K(525,1) * [PARK7];
  R525: PARK7 => ; 1;
  // V(526) = K(526,1) * [MFF];
  R526: MFF => ; 1;
  // V(527) = K(527,1) * [HIPK2];
  R527: HIPK2 => ; 1;
  // V(528) = K(528,1) * [TXNIP];
  R528: TXNIP => ; 1;
  // V(529) = K(529,1) * [RNF7];
  R529: RNF7 => ; 1;
  // V(530) = K(530,1) * [ADD3];
  R530: ADD3 => ; 1;
  // V(531) = K(531,1) * [AGO2];
  R531: AGO2 => ; 1;
  // V(532) = K(532,1) * [SGK1_rna];
  R532: SGK1_rna => ; 1;
  // V(533) = K(533,1) * [CLDN5_rna];
  R533: CLDN5_rna => ; 1;
  // V(534) = K(534,1) * [SOCS3_rna];
  R534: SOCS3_rna => ; 1;
  // V(535) = K(535,1) * [KDM6B_rna];
  R535: KDM6B_rna => ; 1;
  // V(536) = K(536,1) * [SOD1_rna];
  R536: SOD1_rna => ; 1;
  // V(537) = K(537,1) * [FOS_rna];
  R537: FOS_rna => ; 1;
  // V(538) = K(538,1) * [CAT_rna];
  R538: CAT_rna => ; 1;
  // V(539) = K(539,1) * [NR3C1_rna];
  R539: NR3C1_rna => ; 1;
  // V(540) = K(540,1) * [SOD2_rna];
  R540: SOD2_rna => ; 1;
  // V(541) = K(541,1) * [JUN_rna];
  R541: JUN_rna => ; 1;
  // V(542) = K(542,1) * [CCL2_rna];
  R542: CCL2_rna => ; 1;
  // V(543) = K(543,1) * [HGF_rna];
  R543: HGF_rna => ; 1;
  // V(544) = K(544,1) * [VEGFA_rna];
  R544: VEGFA_rna => ; 1;
  // V(545) = K(545,1) * [CCND1_rna];
  R545: CCND1_rna => ; 1;
  // V(546) = K(546,1) * [TNC_rna];
  R546: TNC_rna => ; 1;
  // V(547) = K(547,1) * [CD34_rna];
  R547: CD34_rna => ; 1;
  // V(548) = K(548,1) * [GPX4_rna];
  R548: GPX4_rna => ; 1;
  // V(549) = K(549,1) * [STAT1_rna];
  R549: STAT1_rna => ; 1;
  // V(550) = K(550,1) * [RCAN1_rna];
  R550: RCAN1_rna => ; 1;
  // V(551) = K(551,1) * [KLF9_rna];
  R551: KLF9_rna => ; 1;
  // V(552) = K(552,1) * [DNM1L_g];
  R552: DNM1L_g => ; 1;
  // V(553) = K(553,1) * [DNM1L_rna];
  R553: DNM1L_rna => ; 1;
  // V(554) = K(554,1) * [ROCK2_g];
  R554: ROCK2_g => ; 1;
  // V(555) = K(555,1) * [ROCK2_rna];
  R555: ROCK2_rna => ; 1;
  // V(556) = K(556,1) * [ERN1_g];
  R556: ERN1_g => ; 1;
  // V(557) = K(557,1) * [ERN1_rna];
  R557: ERN1_rna => ; 1;
  // V(558) = K(558,1) * [ABCA1_g];
  R558: ABCA1_g => ; 1;
  // V(559) = K(559,1) * [ABCA1_rna];
  R559: ABCA1_rna => ; 1;
  // V(560) = K(560,1) * [EGFR_g];
  R560: EGFR_g => ; 1;
  // V(561) = K(561,1) * [EGFR_rna];
  R561: EGFR_rna => ; 1;
  // V(562) = K(562,1) * [EGF_g];
  R562: EGF_g => ; 1;
  // V(563) = K(563,1) * [EGF_rna];
  R563: EGF_rna => ; 1;
  // V(564) = K(564,1) * [ESR1_g];
  R564: ESR1_g => ; 1;
  // V(565) = K(565,1) * [ESR1_rna];
  R565: ESR1_rna => ; 1;
  // V(566) = K(566,1) * [ANXA1_g];
  R566: ANXA1_g => ; 1;
  // V(567) = K(567,1) * [ANXA1_rna];
  R567: ANXA1_rna => ; 1;
  // V(568) = K(568,1) * [HSPB1_g];
  R568: HSPB1_g => ; 1;
  // V(569) = K(569,1) * [HSPB1_rna];
  R569: HSPB1_rna => ; 1;
  // V(570) = K(570,1) * [HMGN1_g];
  R570: HMGN1_g => ; 1;
  // V(571) = K(571,1) * [HMGN1_rna];
  R571: HMGN1_rna => ; 1;
  // V(572) = K(572,1) * [INSR_g];
  R572: INSR_g => ; 1;
  // V(573) = K(573,1) * [INSR_rna];
  R573: INSR_rna => ; 1;
  // V(574) = K(574,1) * [SP1_g];
  R574: SP1_g => ; 1;
  // V(575) = K(575,1) * [SP1_rna];
  R575: SP1_rna => ; 1;
  // V(576) = K(576,1) * [VIM_g];
  R576: VIM_g => ; 1;
  // V(577) = K(577,1) * [VIM_rna];
  R577: VIM_rna => ; 1;
  // V(578) = K(578,1) * [CALM1_g];
  R578: CALM1_g => ; 1;
  // V(579) = K(579,1) * [CALM1_rna];
  R579: CALM1_rna => ; 1;
  // V(580) = K(580,1) * [AR_g];
  R580: AR_g => ; 1;
  // V(581) = K(581,1) * [AR_rna];
  R581: AR_rna => ; 1;
  // V(582) = K(582,1) * [BCL2_g];
  R582: BCL2_g => ; 1;
  // V(583) = K(583,1) * [BCL2_rna];
  R583: BCL2_rna => ; 1;
  // V(584) = K(584,1) * [IRF1_g];
  R584: IRF1_g => ; 1;
  // V(585) = K(585,1) * [IRF1_rna];
  R585: IRF1_rna => ; 1;
  // V(586) = K(586,1) * [ERG_g];
  R586: ERG_g => ; 1;
  // V(587) = K(587,1) * [ERG_rna];
  R587: ERG_rna => ; 1;
  // V(588) = K(588,1) * [CYBA_g];
  R588: CYBA_g => ; 1;
  // V(589) = K(589,1) * [CYBA_rna];
  R589: CYBA_rna => ; 1;
  // V(590) = K(590,1) * [F3_g];
  R590: F3_g => ; 1;
  // V(591) = K(591,1) * [F3_rna];
  R591: F3_rna => ; 1;
  // V(592) = K(592,1) * [PKM_g];
  R592: PKM_g => ; 1;
  // V(593) = K(593,1) * [PKM_rna];
  R593: PKM_rna => ; 1;
  // V(594) = K(594,1) * [ETS1_g];
  R594: ETS1_g => ; 1;
  // V(595) = K(595,1) * [ETS1_rna];
  R595: ETS1_rna => ; 1;
  // V(596) = K(596,1) * [FABP4_g];
  R596: FABP4_g => ; 1;
  // V(597) = K(597,1) * [FABP4_rna];
  R597: FABP4_rna => ; 1;
  // V(598) = K(598,1) * [CREB1_g];
  R598: CREB1_g => ; 1;
  // V(599) = K(599,1) * [CREB1_rna];
  R599: CREB1_rna => ; 1;
  // V(600) = K(600,1) * [PRKCA_g];
  R600: PRKCA_g => ; 1;
  // V(601) = K(601,1) * [PRKCA_rna];
  R601: PRKCA_rna => ; 1;
  // V(602) = K(602,1) * [XBP1_g];
  R602: XBP1_g => ; 1;
  // V(603) = K(603,1) * [XBP1_rna];
  R603: XBP1_rna => ; 1;
  // V(604) = K(604,1) * [NR4A1_g];
  R604: NR4A1_g => ; 1;
  // V(605) = K(605,1) * [NR4A1_rna];
  R605: NR4A1_rna => ; 1;
  // V(606) = K(606,1) * [JAK1_g];
  R606: JAK1_g => ; 1;
  // V(607) = K(607,1) * [JAK1_rna];
  R607: JAK1_rna => ; 1;
  // V(608) = K(608,1) * [F2R_g];
  R608: F2R_g => ; 1;
  // V(609) = K(609,1) * [F2R_rna];
  R609: F2R_rna => ; 1;
  // V(610) = K(610,1) * [DNMT1_g];
  R610: DNMT1_g => ; 1;
  // V(611) = K(611,1) * [DNMT1_rna];
  R611: DNMT1_rna => ; 1;
  // V(612) = K(612,1) * [ZFP36_g];
  R612: ZFP36_g => ; 1;
  // V(613) = K(613,1) * [ZFP36_rna];
  R613: ZFP36_rna => ; 1;
  // V(614) = K(614,1) * [PIK3R1_g];
  R614: PIK3R1_g => ; 1;
  // V(615) = K(615,1) * [PIK3R1_rna];
  R615: PIK3R1_rna => ; 1;
  // V(616) = K(616,1) * [MAPK1_g];
  R616: MAPK1_g => ; 1;
  // V(617) = K(617,1) * [MAPK1_rna];
  R617: MAPK1_rna => ; 1;
  // V(618) = K(618,1) * [DUSP1_g];
  R618: DUSP1_g => ; 1;
  // V(619) = K(619,1) * [DUSP1_rna];
  R619: DUSP1_rna => ; 1;
  // V(620) = K(620,1) * [AQP1_g];
  R620: AQP1_g => ; 1;
  // V(621) = K(621,1) * [AQP1_rna];
  R621: AQP1_rna => ; 1;
  // V(622) = K(622,1) * [PRDX6_g];
  R622: PRDX6_g => ; 1;
  // V(623) = K(623,1) * [PRDX6_rna];
  R623: PRDX6_rna => ; 1;
  // V(624) = K(624,1) * [AXL_g];
  R624: AXL_g => ; 1;
  // V(625) = K(625,1) * [AXL_rna];
  R625: AXL_rna => ; 1;
  // V(626) = K(626,1) * [AKT1_g];
  R626: AKT1_g => ; 1;
  // V(627) = K(627,1) * [AKT1_rna];
  R627: AKT1_rna => ; 1;
  // V(628) = K(628,1) * [CTNNB1_g];
  R628: CTNNB1_g => ; 1;
  // V(629) = K(629,1) * [CTNNB1_rna];
  R629: CTNNB1_rna => ; 1;
  // V(630) = K(630,1) * [RORA_g];
  R630: RORA_g => ; 1;
  // V(631) = K(631,1) * [RORA_rna];
  R631: RORA_rna => ; 1;
  // V(632) = K(632,1) * [DDIT3_g];
  R632: DDIT3_g => ; 1;
  // V(633) = K(633,1) * [DDIT3_rna];
  R633: DDIT3_rna => ; 1;
  // V(634) = K(634,1) * [CDKN1A_g];
  R634: CDKN1A_g => ; 1;
  // V(635) = K(635,1) * [CDKN1A_rna];
  R635: CDKN1A_rna => ; 1;
  // V(636) = K(636,1) * [STAT3_g];
  R636: STAT3_g => ; 1;
  // V(637) = K(637,1) * [STAT3_rna];
  R637: STAT3_rna => ; 1;
  // V(638) = K(638,1) * [STAT6_g];
  R638: STAT6_g => ; 1;
  // V(639) = K(639,1) * [STAT6_rna];
  R639: STAT6_rna => ; 1;
  // V(640) = K(640,1) * [PIK3CA_g];
  R640: PIK3CA_g => ; 1;
  // V(641) = K(641,1) * [PIK3CA_rna];
  R641: PIK3CA_rna => ; 1;
  // V(642) = K(642,1) * [CASP3_g];
  R642: CASP3_g => ; 1;
  // V(643) = K(643,1) * [CASP3_rna];
  R643: CASP3_rna => ; 1;
  // V(644) = K(644,1) * [CDKN1B_g];
  R644: CDKN1B_g => ; 1;
  // V(645) = K(645,1) * [CDKN1B_rna];
  R645: CDKN1B_rna => ; 1;
  // V(646) = K(646,1) * [YAP1_g];
  R646: YAP1_g => ; 1;
  // V(647) = K(647,1) * [YAP1_rna];
  R647: YAP1_rna => ; 1;
  // V(648) = K(648,1) * [NUMB_g];
  R648: NUMB_g => ; 1;
  // V(649) = K(649,1) * [NUMB_rna];
  R649: NUMB_rna => ; 1;
  // V(650) = K(650,1) * [TSC2_g];
  R650: TSC2_g => ; 1;
  // V(651) = K(651,1) * [TSC2_rna];
  R651: TSC2_rna => ; 1;
  // V(652) = K(652,1) * [MECP2_g];
  R652: MECP2_g => ; 1;
  // V(653) = K(653,1) * [MECP2_rna];
  R653: MECP2_rna => ; 1;
  // V(654) = K(654,1) * [RPS6KA3_g];
  R654: RPS6KA3_g => ; 1;
  // V(655) = K(655,1) * [RPS6KA3_rna];
  R655: RPS6KA3_rna => ; 1;
  // V(656) = K(656,1) * [PTEN_g];
  R656: PTEN_g => ; 1;
  // V(657) = K(657,1) * [PTEN_rna];
  R657: PTEN_rna => ; 1;
  // V(658) = K(658,1) * [RHOA_g];
  R658: RHOA_g => ; 1;
  // V(659) = K(659,1) * [RHOA_rna];
  R659: RHOA_rna => ; 1;
  // V(660) = K(660,1) * [RAC1_g];
  R660: RAC1_g => ; 1;
  // V(661) = K(661,1) * [RAC1_rna];
  R661: RAC1_rna => ; 1;
  // V(662) = K(662,1) * [MDM2_g];
  R662: MDM2_g => ; 1;
  // V(663) = K(663,1) * [MDM2_rna];
  R663: MDM2_rna => ; 1;
  // V(664) = K(664,1) * [NOTCH2_g];
  R664: NOTCH2_g => ; 1;
  // V(665) = K(665,1) * [NOTCH2_rna];
  R665: NOTCH2_rna => ; 1;
  // V(666) = K(666,1) * [PTPN11_g];
  R666: PTPN11_g => ; 1;
  // V(667) = K(667,1) * [PTPN11_rna];
  R667: PTPN11_rna => ; 1;
  // V(668) = K(668,1) * [BAX_g];
  R668: BAX_g => ; 1;
  // V(669) = K(669,1) * [BAX_rna];
  R669: BAX_rna => ; 1;
  // V(670) = K(670,1) * [EP300_g];
  R670: EP300_g => ; 1;
  // V(671) = K(671,1) * [EP300_rna];
  R671: EP300_rna => ; 1;
  // V(672) = K(672,1) * [PRKAA1_g];
  R672: PRKAA1_g => ; 1;
  // V(673) = K(673,1) * [PRKAA1_rna];
  R673: PRKAA1_rna => ; 1;
  // V(674) = K(674,1) * [ILK_g];
  R674: ILK_g => ; 1;
  // V(675) = K(675,1) * [ILK_rna];
  R675: ILK_rna => ; 1;
  // V(676) = K(676,1) * [ROCK1_g];
  R676: ROCK1_g => ; 1;
  // V(677) = K(677,1) * [ROCK1_rna];
  R677: ROCK1_rna => ; 1;
  // V(678) = K(678,1) * [SMAD4_g];
  R678: SMAD4_g => ; 1;
  // V(679) = K(679,1) * [SMAD4_rna];
  R679: SMAD4_rna => ; 1;
  // V(680) = K(680,1) * [ATR_g];
  R680: ATR_g => ; 1;
  // V(681) = K(681,1) * [ATR_rna];
  R681: ATR_rna => ; 1;
  // V(682) = K(682,1) * [HDAC1_g];
  R682: HDAC1_g => ; 1;
  // V(683) = K(683,1) * [HDAC1_rna];
  R683: HDAC1_rna => ; 1;
  // V(684) = K(684,1) * [CUL3_g];
  R684: CUL3_g => ; 1;
  // V(685) = K(685,1) * [CUL3_rna];
  R685: CUL3_rna => ; 1;
  // V(686) = K(686,1) * [BECN1_g];
  R686: BECN1_g => ; 1;
  // V(687) = K(687,1) * [BECN1_rna];
  R687: BECN1_rna => ; 1;
  // V(688) = K(688,1) * [HES1_g];
  R688: HES1_g => ; 1;
  // V(689) = K(689,1) * [HES1_rna];
  R689: HES1_rna => ; 1;
  // V(690) = K(690,1) * [IRF3_g];
  R690: IRF3_g => ; 1;
  // V(691) = K(691,1) * [IRF3_rna];
  R691: IRF3_rna => ; 1;
  // V(692) = K(692,1) * [STK11_g];
  R692: STK11_g => ; 1;
  // V(693) = K(693,1) * [STK11_rna];
  R693: STK11_rna => ; 1;
  // V(694) = K(694,1) * [NFE2L2_g];
  R694: NFE2L2_g => ; 1;
  // V(695) = K(695,1) * [NFE2L2_rna];
  R695: NFE2L2_rna => ; 1;
  // V(696) = K(696,1) * [PKN1_g];
  R696: PKN1_g => ; 1;
  // V(697) = K(697,1) * [PKN1_rna];
  R697: PKN1_rna => ; 1;
  // V(698) = K(698,1) * [HIF1A_g];
  R698: HIF1A_g => ; 1;
  // V(699) = K(699,1) * [HIF1A_rna];
  R699: HIF1A_rna => ; 1;
  // V(700) = K(700,1) * [AEBP1_g];
  R700: AEBP1_g => ; 1;
  // V(701) = K(701,1) * [AEBP1_rna];
  R701: AEBP1_rna => ; 1;
  // V(702) = K(702,1) * [DEPTOR_g];
  R702: DEPTOR_g => ; 1;
  // V(703) = K(703,1) * [DEPTOR_rna];
  R703: DEPTOR_rna => ; 1;
  // V(704) = K(704,1) * [MYLIP_g];
  R704: MYLIP_g => ; 1;
  // V(705) = K(705,1) * [MYLIP_rna];
  R705: MYLIP_rna => ; 1;
  // V(706) = K(706,1) * [BAD_g];
  R706: BAD_g => ; 1;
  // V(707) = K(707,1) * [BAD_rna];
  R707: BAD_rna => ; 1;
  // V(708) = K(708,1) * [PARK7_g];
  R708: PARK7_g => ; 1;
  // V(709) = K(709,1) * [PARK7_rna];
  R709: PARK7_rna => ; 1;
  // V(710) = K(710,1) * [MFF_g];
  R710: MFF_g => ; 1;
  // V(711) = K(711,1) * [MFF_rna];
  R711: MFF_rna => ; 1;
  // V(712) = K(712,1) * [HIPK2_g];
  R712: HIPK2_g => ; 1;
  // V(713) = K(713,1) * [HIPK2_rna];
  R713: HIPK2_rna => ; 1;
  // V(714) = K(714,1) * [TXNIP_g];
  R714: TXNIP_g => ; 1;
  // V(715) = K(715,1) * [TXNIP_rna];
  R715: TXNIP_rna => ; 1;
  // V(716) = K(716,1) * [RNF7_g];
  R716: RNF7_g => ; 1;
  // V(717) = K(717,1) * [RNF7_rna];
  R717: RNF7_rna => ; 1;
  // V(718) = K(718,1) * [ADD3_g];
  R718: ADD3_g => ; 1;
  // V(719) = K(719,1) * [ADD3_rna];
  R719: ADD3_rna => ; 1;
  // V(720) = K(720,1) * [AGO2_g];
  R720: AGO2_g => ; 1;
  // V(721) = K(721,1) * [AGO2_rna];
  R721: AGO2_rna => ; 1;
  // V(722) = K(722,1) * [DNM1L_p];
  R722: DNM1L_p => ; 1;
  // V(723) = K(723,1) * [ERN1_p];
  R723: ERN1_p => ; 1;
  // V(724) = K(724,1) * [ABCA1_p];
  R724: ABCA1_p => ; 1;
  // V(725) = K(725,1) * [EGFR_p];
  R725: EGFR_p => ; 1;
  // V(726) = K(726,1) * [FOS_p];
  R726: FOS_p => ; 1;
  // V(727) = K(727,1) * [ESR1_p];
  R727: ESR1_p => ; 1;
  // V(728) = K(728,1) * [ANXA1_p];
  R728: ANXA1_p => ; 1;
  // V(729) = K(729,1) * [NR3C1_p];
  R729: NR3C1_p => ; 1;
  // V(730) = K(730,1) * [HSPB1_p];
  R730: HSPB1_p => ; 1;
  // V(731) = K(731,1) * [HMGN1_p];
  R731: HMGN1_p => ; 1;
  // V(732) = K(732,1) * [JUN_p];
  R732: JUN_p => ; 1;
  // V(733) = K(733,1) * [INSR_p];
  R733: INSR_p => ; 1;
  // V(734) = K(734,1) * [SP1_p];
  R734: SP1_p => ; 1;
  // V(735) = K(735,1) * [VIM_p];
  R735: VIM_p => ; 1;
  // V(736) = K(736,1) * [CALM1_p];
  R736: CALM1_p => ; 1;
  // V(737) = K(737,1) * [AR_p];
  R737: AR_p => ; 1;
  // V(738) = K(738,1) * [BCL2_p];
  R738: BCL2_p => ; 1;
  // V(739) = K(739,1) * [CYBA_p];
  R739: CYBA_p => ; 1;
  // V(740) = K(740,1) * [F3_p];
  R740: F3_p => ; 1;
  // V(741) = K(741,1) * [PKM_p];
  R741: PKM_p => ; 1;
  // V(742) = K(742,1) * [FABP4_p];
  R742: FABP4_p => ; 1;
  // V(743) = K(743,1) * [CREB1_p];
  R743: CREB1_p => ; 1;
  // V(744) = K(744,1) * [PRKCA_p];
  R744: PRKCA_p => ; 1;
  // V(745) = K(745,1) * [XBP1_p];
  R745: XBP1_p => ; 1;
  // V(746) = K(746,1) * [NR4A1_p];
  R746: NR4A1_p => ; 1;
  // V(747) = K(747,1) * [F2R_p];
  R747: F2R_p => ; 1;
  // V(748) = K(748,1) * [DNMT1_p];
  R748: DNMT1_p => ; 1;
  // V(749) = K(749,1) * [ZFP36_p];
  R749: ZFP36_p => ; 1;
  // V(750) = K(750,1) * [PIK3R1_p];
  R750: PIK3R1_p => ; 1;
  // V(751) = K(751,1) * [MAPK1_p];
  R751: MAPK1_p => ; 1;
  // V(752) = K(752,1) * [DUSP1_p];
  R752: DUSP1_p => ; 1;
  // V(753) = K(753,1) * [AQP1_p];
  R753: AQP1_p => ; 1;
  // V(754) = K(754,1) * [PRDX6_p];
  R754: PRDX6_p => ; 1;
  // V(755) = K(755,1) * [AXL_p];
  R755: AXL_p => ; 1;
  // V(756) = K(756,1) * [AKT1_p];
  R756: AKT1_p => ; 1;
  // V(757) = K(757,1) * [CTNNB1_p];
  R757: CTNNB1_p => ; 1;
  // V(758) = K(758,1) * [RORA_p];
  R758: RORA_p => ; 1;
  // V(759) = K(759,1) * [DDIT3_p];
  R759: DDIT3_p => ; 1;
  // V(760) = K(760,1) * [CDKN1A_p];
  R760: CDKN1A_p => ; 1;
  // V(761) = K(761,1) * [STAT3_p];
  R761: STAT3_p => ; 1;
  // V(762) = K(762,1) * [STAT1_p];
  R762: STAT1_p => ; 1;
  // V(763) = K(763,1) * [STAT6_p];
  R763: STAT6_p => ; 1;
  // V(764) = K(764,1) * [CDKN1B_p];
  R764: CDKN1B_p => ; 1;
  // V(765) = K(765,1) * [YAP1_p];
  R765: YAP1_p => ; 1;
  // V(766) = K(766,1) * [TSC2_p];
  R766: TSC2_p => ; 1;
  // V(767) = K(767,1) * [MECP2_p];
  R767: MECP2_p => ; 1;
  // V(768) = K(768,1) * [RPS6KA3_p];
  R768: RPS6KA3_p => ; 1;
  // V(769) = K(769,1) * [RCAN1_p];
  R769: RCAN1_p => ; 1;
  // V(770) = K(770,1) * [PTEN_p];
  R770: PTEN_p => ; 1;
  // V(771) = K(771,1) * [RHOA_p];
  R771: RHOA_p => ; 1;
  // V(772) = K(772,1) * [RAC1_p];
  R772: RAC1_p => ; 1;
  // V(773) = K(773,1) * [MDM2_p];
  R773: MDM2_p => ; 1;
  // V(774) = K(774,1) * [PTPN11_p];
  R774: PTPN11_p => ; 1;
  // V(775) = K(775,1) * [BAX_p];
  R775: BAX_p => ; 1;
  // V(776) = K(776,1) * [EP300_p];
  R776: EP300_p => ; 1;
  // V(777) = K(777,1) * [PRKAA1_p];
  R777: PRKAA1_p => ; 1;
  // V(778) = K(778,1) * [ILK_p];
  R778: ILK_p => ; 1;
  // V(779) = K(779,1) * [SMAD4_p];
  R779: SMAD4_p => ; 1;
  // V(780) = K(780,1) * [BECN1_p];
  R780: BECN1_p => ; 1;
  // V(781) = K(781,1) * [HES1_p];
  R781: HES1_p => ; 1;
  // V(782) = K(782,1) * [IRF3_p];
  R782: IRF3_p => ; 1;
  // V(783) = K(783,1) * [STK11_p];
  R783: STK11_p => ; 1;
  // V(784) = K(784,1) * [NFE2L2_p];
  R784: NFE2L2_p => ; 1;
  // V(785) = K(785,1) * [PKN1_p];
  R785: PKN1_p => ; 1;
  // V(786) = K(786,1) * [HIF1A_p];
  R786: HIF1A_p => ; 1;
  // V(787) = K(787,1) * [AEBP1_p];
  R787: AEBP1_p => ; 1;
  // V(788) = K(788,1) * [DEPTOR_p];
  R788: DEPTOR_p => ; 1;
  // V(789) = K(789,1) * [BAD_p];
  R789: BAD_p => ; 1;
  // V(790) = K(790,1) * [PARK7_p];
  R790: PARK7_p => ; 1;
  // V(791) = K(791,1) * [MFF_p];
  R791: MFF_p => ; 1;
  // V(792) = K(792,1) * [HIPK2_p];
  R792: HIPK2_p => ; 1;
  // V(793) = K(793,1) * [TXNIP_p];
  R793: TXNIP_p => ; 1;
  // V(794) = K(794,1) * [ADD3_p];
  R794: ADD3_p => ; 1;
  // V(795) = K(795,1) * [AGO2_p];
  R795: AGO2_p => ; 1;
  // V(796) = K(796,1) * [SIGNOR-C120_p];
  R796: => ; 1;
  // V(797) = K(797,1) * [SIGNOR-C154_p];
  R797: => ; 1;
  // V(798) = K(798,1) * [SIGNOR-C156_p];
  R798: => ; 1;
  // V(799) = K(799,1) * [DNM1L_rna];
  R799: DNM1L_rna => ; 1;
  // V(800) = K(800,1) * [ROCK2_rna];
  R800: ROCK2_rna => ; 1;
  // V(801) = K(801,1) * [ERN1_rna];
  R801: ERN1_rna => ; 1;
  // V(802) = K(802,1) * [ABCA1_rna];
  R802: ABCA1_rna => ; 1;
  // V(803) = K(803,1) * [EGFR_rna];
  R803: EGFR_rna => ; 1;
  // V(804) = K(804,1) * [EGF_rna];
  R804: EGF_rna => ; 1;
  // V(805) = K(805,1) * [ESR1_rna];
  R805: ESR1_rna => ; 1;
  // V(806) = K(806,1) * [ANXA1_rna];
  R806: ANXA1_rna => ; 1;
  // V(807) = K(807,1) * [HSPB1_rna];
  R807: HSPB1_rna => ; 1;
  // V(808) = K(808,1) * [HMGN1_rna];
  R808: HMGN1_rna => ; 1;
  // V(809) = K(809,1) * [INSR_rna];
  R809: INSR_rna => ; 1;
  // V(810) = K(810,1) * [SP1_rna];
  R810: SP1_rna => ; 1;
  // V(811) = K(811,1) * [VIM_rna];
  R811: VIM_rna => ; 1;
  // V(812) = K(812,1) * [CALM1_rna];
  R812: CALM1_rna => ; 1;
  // V(813) = K(813,1) * [AR_rna];
  R813: AR_rna => ; 1;
  // V(814) = K(814,1) * [BCL2_rna];
  R814: BCL2_rna => ; 1;
  // V(815) = K(815,1) * [IRF1_rna];
  R815: IRF1_rna => ; 1;
  // V(816) = K(816,1) * [ERG_rna];
  R816: ERG_rna => ; 1;
  // V(817) = K(817,1) * [CYBA_rna];
  R817: CYBA_rna => ; 1;
  // V(818) = K(818,1) * [F3_rna];
  R818: F3_rna => ; 1;
  // V(819) = K(819,1) * [PKM_rna];
  R819: PKM_rna => ; 1;
  // V(820) = K(820,1) * [ETS1_rna];
  R820: ETS1_rna => ; 1;
  // V(821) = K(821,1) * [FABP4_rna];
  R821: FABP4_rna => ; 1;
  // V(822) = K(822,1) * [CREB1_rna];
  R822: CREB1_rna => ; 1;
  // V(823) = K(823,1) * [PRKCA_rna];
  R823: PRKCA_rna => ; 1;
  // V(824) = K(824,1) * [XBP1_rna];
  R824: XBP1_rna => ; 1;
  // V(825) = K(825,1) * [NR4A1_rna];
  R825: NR4A1_rna => ; 1;
  // V(826) = K(826,1) * [JAK1_rna];
  R826: JAK1_rna => ; 1;
  // V(827) = K(827,1) * [F2R_rna];
  R827: F2R_rna => ; 1;
  // V(828) = K(828,1) * [DNMT1_rna];
  R828: DNMT1_rna => ; 1;
  // V(829) = K(829,1) * [ZFP36_rna];
  R829: ZFP36_rna => ; 1;
  // V(830) = K(830,1) * [PIK3R1_rna];
  R830: PIK3R1_rna => ; 1;
  // V(831) = K(831,1) * [MAPK1_rna];
  R831: MAPK1_rna => ; 1;
  // V(832) = K(832,1) * [DUSP1_rna];
  R832: DUSP1_rna => ; 1;
  // V(833) = K(833,1) * [AQP1_rna];
  R833: AQP1_rna => ; 1;
  // V(834) = K(834,1) * [PRDX6_rna];
  R834: PRDX6_rna => ; 1;
  // V(835) = K(835,1) * [AXL_rna];
  R835: AXL_rna => ; 1;
  // V(836) = K(836,1) * [AKT1_rna];
  R836: AKT1_rna => ; 1;
  // V(837) = K(837,1) * [CTNNB1_rna];
  R837: CTNNB1_rna => ; 1;
  // V(838) = K(838,1) * [RORA_rna];
  R838: RORA_rna => ; 1;
  // V(839) = K(839,1) * [DDIT3_rna];
  R839: DDIT3_rna => ; 1;
  // V(840) = K(840,1) * [CDKN1A_rna];
  R840: CDKN1A_rna => ; 1;
  // V(841) = K(841,1) * [STAT3_rna];
  R841: STAT3_rna => ; 1;
  // V(842) = K(842,1) * [STAT6_rna];
  R842: STAT6_rna => ; 1;
  // V(843) = K(843,1) * [PIK3CA_rna];
  R843: PIK3CA_rna => ; 1;
  // V(844) = K(844,1) * [CASP3_rna];
  R844: CASP3_rna => ; 1;
  // V(845) = K(845,1) * [CDKN1B_rna];
  R845: CDKN1B_rna => ; 1;
  // V(846) = K(846,1) * [YAP1_rna];
  R846: YAP1_rna => ; 1;
  // V(847) = K(847,1) * [NUMB_rna];
  R847: NUMB_rna => ; 1;
  // V(848) = K(848,1) * [TSC2_rna];
  R848: TSC2_rna => ; 1;
  // V(849) = K(849,1) * [MECP2_rna];
  R849: MECP2_rna => ; 1;
  // V(850) = K(850,1) * [RPS6KA3_rna];
  R850: RPS6KA3_rna => ; 1;
  // V(851) = K(851,1) * [PTEN_rna];
  R851: PTEN_rna => ; 1;
  // V(852) = K(852,1) * [RHOA_rna];
  R852: RHOA_rna => ; 1;
  // V(853) = K(853,1) * [RAC1_rna];
  R853: RAC1_rna => ; 1;
  // V(854) = K(854,1) * [MDM2_rna];
  R854: MDM2_rna => ; 1;
  // V(855) = K(855,1) * [NOTCH2_rna];
  R855: NOTCH2_rna => ; 1;
  // V(856) = K(856,1) * [PTPN11_rna];
  R856: PTPN11_rna => ; 1;
  // V(857) = K(857,1) * [BAX_rna];
  R857: BAX_rna => ; 1;
  // V(858) = K(858,1) * [EP300_rna];
  R858: EP300_rna => ; 1;
  // V(859) = K(859,1) * [PRKAA1_rna];
  R859: PRKAA1_rna => ; 1;
  // V(860) = K(860,1) * [ILK_rna];
  R860: ILK_rna => ; 1;
  // V(861) = K(861,1) * [ROCK1_rna];
  R861: ROCK1_rna => ; 1;
  // V(862) = K(862,1) * [SMAD4_rna];
  R862: SMAD4_rna => ; 1;
  // V(863) = K(863,1) * [ATR_rna];
  R863: ATR_rna => ; 1;
  // V(864) = K(864,1) * [HDAC1_rna];
  R864: HDAC1_rna => ; 1;
  // V(865) = K(865,1) * [CUL3_rna];
  R865: CUL3_rna => ; 1;
  // V(866) = K(866,1) * [BECN1_rna];
  R866: BECN1_rna => ; 1;
  // V(867) = K(867,1) * [HES1_rna];
  R867: HES1_rna => ; 1;
  // V(868) = K(868,1) * [IRF3_rna];
  R868: IRF3_rna => ; 1;
  // V(869) = K(869,1) * [STK11_rna];
  R869: STK11_rna => ; 1;
  // V(870) = K(870,1) * [NFE2L2_rna];
  R870: NFE2L2_rna => ; 1;
  // V(871) = K(871,1) * [PKN1_rna];
  R871: PKN1_rna => ; 1;
  // V(872) = K(872,1) * [HIF1A_rna];
  R872: HIF1A_rna => ; 1;
  // V(873) = K(873,1) * [AEBP1_rna];
  R873: AEBP1_rna => ; 1;
  // V(874) = K(874,1) * [DEPTOR_rna];
  R874: DEPTOR_rna => ; 1;
  // V(875) = K(875,1) * [MYLIP_rna];
  R875: MYLIP_rna => ; 1;
  // V(876) = K(876,1) * [BAD_rna];
  R876: BAD_rna => ; 1;
  // V(877) = K(877,1) * [PARK7_rna];
  R877: PARK7_rna => ; 1;
  // V(878) = K(878,1) * [MFF_rna];
  R878: MFF_rna => ; 1;
  // V(879) = K(879,1) * [HIPK2_rna];
  R879: HIPK2_rna => ; 1;
  // V(880) = K(880,1) * [TXNIP_rna];
  R880: TXNIP_rna => ; 1;
  // V(881) = K(881,1) * [RNF7_rna];
  R881: RNF7_rna => ; 1;
  // V(882) = K(882,1) * [ADD3_rna];
  R882: ADD3_rna => ; 1;
  // V(883) = K(883,1) * [AGO2_rna];
  R883: AGO2_rna => ; 1;
end
