// SBML level 3 version 2

model InterCellA()

  // Compartments:
  compartment cell = 1;

  // Species:
  species ABCA1 in cell = 1/cell;
  species ABCA1_g in cell = 1/cell;
  species ABCA1_p in cell = 1/cell;
  species ABCA1_rna in cell = 1/cell;
  species AIFM1 in cell = 1/cell;
  species AIFM1_g in cell = 1/cell;
  species AIFM1_rna in cell = 1/cell;
  species ANXA1 in cell = 1/cell;
  species ANXA1_g in cell = 1/cell;
  species ANXA1_p in cell = 1/cell;
  species ANXA1_rna in cell = 1/cell;
  species ATF3 in cell = 1/cell;
  species ATF3_g in cell = 1/cell;
  species ATF3_rna in cell = 1/cell;
  species ATR in cell = 1/cell;
  species ATR_g in cell = 1/cell;
  species ATR_rna in cell = 1/cell;
  species BAX in cell = 1/cell;
  species BAX_g in cell = 1/cell;
  species BAX_rna in cell = 1/cell;
  species BCL2 in cell = 1/cell;
  species BCL2_g in cell = 1/cell;
  species BCL2_p in cell = 1/cell;
  species BCL2_rna in cell = 1/cell;
  species BMP4 in cell = 1/cell;
  species BMP4_g in cell = 1/cell;
  species BMP4_rna in cell = 1/cell;
  species CASP3 in cell = 1/cell;
  species CASP3_g in cell = 1/cell;
  species CASP3_rna in cell = 1/cell;
  species CASP9 in cell = 1/cell;
  species CASP9_g in cell = 1/cell;
  species CASP9_p in cell = 1/cell;
  species CASP9_rna in cell = 1/cell;
  species CAT in cell = 1/cell;
  species CAT_g in cell = 1/cell;
  species CAT_rna in cell = 1/cell;
  species CCL2 in cell = 1/cell;
  species CCL2_g in cell = 1/cell;
  species CCL2_rna in cell = 1/cell;
  species CDH1 in cell = 1/cell;
  species CDH1_g in cell = 1/cell;
  species CDH1_p in cell = 1/cell;
  species CDH1_rna in cell = 1/cell;
  species CDKN1A in cell = 1/cell;
  species CDKN1A_g in cell = 1/cell;
  species CDKN1A_p in cell = 1/cell;
  species CDKN1A_rna in cell = 1/cell;
  species CDKN1B in cell = 1/cell;
  species CDKN1B_g in cell = 1/cell;
  species CDKN1B_p in cell = 1/cell;
  species CDKN1B_rna in cell = 1/cell;
  species CLTC in cell = 1/cell;
  species CLTC_g in cell = 1/cell;
  species CLTC_p in cell = 1/cell;
  species CLTC_rna in cell = 1/cell;
  species CREB1 in cell = 1/cell;
  species CREB1_g in cell = 1/cell;
  species CREB1_p in cell = 1/cell;
  species CREB1_rna in cell = 1/cell;
  species CTNNB1 in cell = 1/cell;
  species CTNNB1_g in cell = 1/cell;
  species CTNNB1_p in cell = 1/cell;
  species CTNNB1_rna in cell = 1/cell;
  species DDIT3 in cell = 1/cell;
  species DDIT3_g in cell = 1/cell;
  species DDIT3_p in cell = 1/cell;
  species DDIT3_rna in cell = 1/cell;
  species DNMT1 in cell = 1/cell;
  species DNMT1_g in cell = 1/cell;
  species DNMT1_p in cell = 1/cell;
  species DNMT1_rna in cell = 1/cell;
  species DUSP1 in cell = 1/cell;
  species DUSP1_g in cell = 1/cell;
  species DUSP1_p in cell = 1/cell;
  species DUSP1_rna in cell = 1/cell;
  species EGFR in cell = 1/cell;
  species EGFR_g in cell = 1/cell;
  species EGFR_p in cell = 1/cell;
  species EGFR_rna in cell = 1/cell;
  species ENG in cell = 1/cell;
  species ENG_g in cell = 1/cell;
  species ENG_p in cell = 1/cell;
  species ENG_rna in cell = 1/cell;
  species ERN1 in cell = 1/cell;
  species ERN1_g in cell = 1/cell;
  species ERN1_p in cell = 1/cell;
  species ERN1_rna in cell = 1/cell;
  species FAS in cell = 1/cell;
  species FAS_g in cell = 1/cell;
  species FAS_rna in cell = 1/cell;
  species FOS in cell = 1/cell;
  species FOS_g in cell = 1/cell;
  species FOS_p in cell = 1/cell;
  species FOS_rna in cell = 1/cell;
  species FOXO1 in cell = 1/cell;
  species FOXO1_g in cell = 1/cell;
  species FOXO1_p in cell = 1/cell;
  species FOXO1_rna in cell = 1/cell;
  species GCLM in cell = 1/cell;
  species GCLM_g in cell = 1/cell;
  species GCLM_rna in cell = 1/cell;
  species GDF15 in cell = 1/cell;
  species GDF15_g in cell = 1/cell;
  species GDF15_rna in cell = 1/cell;
  species HDAC4 in cell = 1/cell;
  species HDAC4_g in cell = 1/cell;
  species HDAC4_p in cell = 1/cell;
  species HDAC4_rna in cell = 1/cell;
  species HIF1A in cell = 1/cell;
  species HIF1A_g in cell = 1/cell;
  species HIF1A_p in cell = 1/cell;
  species HIF1A_rna in cell = 1/cell;
  species HIPK2 in cell = 1/cell;
  species HIPK2_g in cell = 1/cell;
  species HIPK2_p in cell = 1/cell;
  species HIPK2_rna in cell = 1/cell;
  species HSPB1 in cell = 1/cell;
  species HSPB1_g in cell = 1/cell;
  species HSPB1_p in cell = 1/cell;
  species HSPB1_rna in cell = 1/cell;
  species IGF1R in cell = 1/cell;
  species IGF1R_g in cell = 1/cell;
  species IGF1R_p in cell = 1/cell;
  species IGF1R_rna in cell = 1/cell;
  species INSR in cell = 1/cell;
  species INSR_g in cell = 1/cell;
  species INSR_p in cell = 1/cell;
  species INSR_rna in cell = 1/cell;
  species IRS1 in cell = 1/cell;
  species IRS1_g in cell = 1/cell;
  species IRS1_p in cell = 1/cell;
  species IRS1_rna in cell = 1/cell;
  species IRS2 in cell = 1/cell;
  species IRS2_g in cell = 1/cell;
  species IRS2_p in cell = 1/cell;
  species IRS2_rna in cell = 1/cell;
  species JAK2 in cell = 1/cell;
  species JAK2_g in cell = 1/cell;
  species JAK2_p in cell = 1/cell;
  species JAK2_rna in cell = 1/cell;
  species JUN in cell = 1/cell;
  species JUN_g in cell = 1/cell;
  species JUN_p in cell = 1/cell;
  species JUN_rna in cell = 1/cell;
  species KDM6B in cell = 1/cell;
  species KDM6B_g in cell = 1/cell;
  species KDM6B_rna in cell = 1/cell;
  species KIT in cell = 1/cell;
  species KIT_g in cell = 1/cell;
  species KIT_p in cell = 1/cell;
  species KIT_rna in cell = 1/cell;
  species KLF9 in cell = 1/cell;
  species KLF9_g in cell = 1/cell;
  species KLF9_rna in cell = 1/cell;
  species LDLR in cell = 1/cell;
  species LDLR_g in cell = 1/cell;
  species LDLR_rna in cell = 1/cell;
  species MAP3K14 in cell = 1/cell;
  species MAP3K14_g in cell = 1/cell;
  species MAP3K14_p in cell = 1/cell;
  species MAP3K14_rna in cell = 1/cell;
  species MAP3K5 in cell = 1/cell;
  species MAP3K5_g in cell = 1/cell;
  species MAP3K5_p in cell = 1/cell;
  species MAP3K5_rna in cell = 1/cell;
  species MAPK1 in cell = 1/cell;
  species MAPK1_g in cell = 1/cell;
  species MAPK1_p in cell = 1/cell;
  species MAPK1_rna in cell = 1/cell;
  species MAPK7 in cell = 1/cell;
  species MAPK7_g in cell = 1/cell;
  species MAPK7_p in cell = 1/cell;
  species MAPK7_rna in cell = 1/cell;
  species MFN1 in cell = 1/cell;
  species MFN1_g in cell = 1/cell;
  species MFN1_p in cell = 1/cell;
  species MFN1_rna in cell = 1/cell;
  species MYLIP in cell = 1/cell;
  species MYLIP_g in cell = 1/cell;
  species MYLIP_rna in cell = 1/cell;
  species NFE2L2 in cell = 1/cell;
  species NFE2L2_g in cell = 1/cell;
  species NFE2L2_p in cell = 1/cell;
  species NFE2L2_rna in cell = 1/cell;
  species NFKB2 in cell = 1/cell;
  species NFKB2_g in cell = 1/cell;
  species NFKB2_p in cell = 1/cell;
  species NFKB2_rna in cell = 1/cell;
  species NOTCH1 in cell = 1/cell;
  species NOTCH1_g in cell = 1/cell;
  species NOTCH1_rna in cell = 1/cell;
  species NR3C1 in cell = 1/cell;
  species NR3C1_g in cell = 1/cell;
  species NR3C1_p in cell = 1/cell;
  species NR3C1_rna in cell = 1/cell;
  species NR3C2 in cell = 1/cell;
  species NR3C2_g in cell = 1/cell;
  species NR3C2_p in cell = 1/cell;
  species NR3C2_rna in cell = 1/cell;
  species NR4A1 in cell = 1/cell;
  species NR4A1_g in cell = 1/cell;
  species NR4A1_p in cell = 1/cell;
  species NR4A1_rna in cell = 1/cell;
  species NRG4 in cell = 1/cell;
  species NRG4_g in cell = 1/cell;
  species NRG4_rna in cell = 1/cell;
  species NUMB in cell = 1/cell;
  species NUMB_g in cell = 1/cell;
  species NUMB_rna in cell = 1/cell;
  species PARP1 in cell = 1/cell;
  species PARP1_g in cell = 1/cell;
  species PARP1_p in cell = 1/cell;
  species PARP1_rna in cell = 1/cell;
  species PCK1 in cell = 1/cell;
  species PCK1_g in cell = 1/cell;
  species PCK1_rna in cell = 1/cell;
  species PCNA in cell = 1/cell;
  species PCNA_g in cell = 1/cell;
  species PCNA_p in cell = 1/cell;
  species PCNA_rna in cell = 1/cell;
  species PDPK1 in cell = 1/cell;
  species PDPK1_g in cell = 1/cell;
  species PDPK1_p in cell = 1/cell;
  species PDPK1_rna in cell = 1/cell;
  species PIK3C3 in cell = 1/cell;
  species PIK3C3_g in cell = 1/cell;
  species PIK3C3_p in cell = 1/cell;
  species PIK3C3_rna in cell = 1/cell;
  species PIK3R1 in cell = 1/cell;
  species PIK3R1_g in cell = 1/cell;
  species PIK3R1_p in cell = 1/cell;
  species PIK3R1_rna in cell = 1/cell;
  species PINK1 in cell = 1/cell;
  species PINK1_g in cell = 1/cell;
  species PINK1_rna in cell = 1/cell;
  species PKM in cell = 1/cell;
  species PKM_g in cell = 1/cell;
  species PKM_p in cell = 1/cell;
  species PKM_rna in cell = 1/cell;
  species PKN1 in cell = 1/cell;
  species PKN1_g in cell = 1/cell;
  species PKN1_p in cell = 1/cell;
  species PKN1_rna in cell = 1/cell;
  species PRKAA1 in cell = 1/cell;
  species PRKAA1_g in cell = 1/cell;
  species PRKAA1_p in cell = 1/cell;
  species PRKAA1_rna in cell = 1/cell;
  species PROM1 in cell = 1/cell;
  species PROM1_g in cell = 1/cell;
  species PROM1_p in cell = 1/cell;
  species PROM1_rna in cell = 1/cell;
  species PTEN in cell = 1/cell;
  species PTEN_g in cell = 1/cell;
  species PTEN_p in cell = 1/cell;
  species PTEN_rna in cell = 1/cell;
  species PTPN11 in cell = 1/cell;
  species PTPN11_g in cell = 1/cell;
  species PTPN11_p in cell = 1/cell;
  species PTPN11_rna in cell = 1/cell;
  species PTPN6 in cell = 1/cell;
  species PTPN6_g in cell = 1/cell;
  species PTPN6_p in cell = 1/cell;
  species PTPN6_rna in cell = 1/cell;
  species PTPRJ in cell = 1/cell;
  species PTPRJ_g in cell = 1/cell;
  species PTPRJ_p in cell = 1/cell;
  species PTPRJ_rna in cell = 1/cell;
  species RAC1 in cell = 1/cell;
  species RAC1_g in cell = 1/cell;
  species RAC1_p in cell = 1/cell;
  species RAC1_rna in cell = 1/cell;
  species RCAN1 in cell = 1/cell;
  species RCAN1_g in cell = 1/cell;
  species RCAN1_p in cell = 1/cell;
  species RCAN1_rna in cell = 1/cell;
  species RELA in cell = 1/cell;
  species RELA_g in cell = 1/cell;
  species RELA_rna in cell = 1/cell;
  species RICTOR in cell = 1/cell;
  species RICTOR_g in cell = 1/cell;
  species RICTOR_p in cell = 1/cell;
  species RICTOR_rna in cell = 1/cell;
  species RNF7 in cell = 1/cell;
  species RNF7_g in cell = 1/cell;
  species RNF7_rna in cell = 1/cell;
  species ROCK1 in cell = 1/cell;
  species ROCK1_g in cell = 1/cell;
  species ROCK1_rna in cell = 1/cell;
  species RORA in cell = 1/cell;
  species RORA_g in cell = 1/cell;
  species RORA_p in cell = 1/cell;
  species RORA_rna in cell = 1/cell;
  species RPS6KA3 in cell = 1/cell;
  species RPS6KA3_g in cell = 1/cell;
  species RPS6KA3_p in cell = 1/cell;
  species RPS6KA3_rna in cell = 1/cell;
  species RPS6KB1 in cell = 1/cell;
  species RPS6KB1_g in cell = 1/cell;
  species RPS6KB1_p in cell = 1/cell;
  species RPS6KB1_rna in cell = 1/cell;
  species RRAS in cell = 1/cell;
  species RRAS_g in cell = 1/cell;
  species RRAS_p in cell = 1/cell;
  species RRAS_rna in cell = 1/cell;
  species SGK1 in cell = 1/cell;
  species SGK1_g in cell = 1/cell;
  species SGK1_p in cell = 1/cell;
  species SGK1_rna in cell = 1/cell;
  species SMAD1 in cell = 1/cell;
  species SMAD1_g in cell = 1/cell;
  species SMAD1_p in cell = 1/cell;
  species SMAD1_rna in cell = 1/cell;
  species SMAD2 in cell = 1/cell;
  species SMAD2_g in cell = 1/cell;
  species SMAD2_p in cell = 1/cell;
  species SMAD2_rna in cell = 1/cell;
  species SMAD4 in cell = 1/cell;
  species SMAD4_g in cell = 1/cell;
  species SMAD4_p in cell = 1/cell;
  species SMAD4_rna in cell = 1/cell;
  species SOCS1 in cell = 1/cell;
  species SOCS1_g in cell = 1/cell;
  species SOCS1_p in cell = 1/cell;
  species SOCS1_rna in cell = 1/cell;
  species SOD2 in cell = 1/cell;
  species SOD2_g in cell = 1/cell;
  species SOD2_rna in cell = 1/cell;
  species SP1 in cell = 1/cell;
  species SP1_g in cell = 1/cell;
  species SP1_p in cell = 1/cell;
  species SP1_rna in cell = 1/cell;
  species SRC in cell = 1/cell;
  species SRC_g in cell = 1/cell;
  species SRC_p in cell = 1/cell;
  species SRC_rna in cell = 1/cell;
  species STAT1 in cell = 1/cell;
  species STAT1_g in cell = 1/cell;
  species STAT1_p in cell = 1/cell;
  species STAT1_rna in cell = 1/cell;
  species STAT5A in cell = 1/cell;
  species STAT5A_g in cell = 1/cell;
  species STAT5A_p in cell = 1/cell;
  species STAT5A_rna in cell = 1/cell;
  species STAT6 in cell = 1/cell;
  species STAT6_g in cell = 1/cell;
  species STAT6_p in cell = 1/cell;
  species STAT6_rna in cell = 1/cell;
  species STIM1 in cell = 1/cell;
  species STIM1_g in cell = 1/cell;
  species STIM1_p in cell = 1/cell;
  species STIM1_rna in cell = 1/cell;
  species TGFA in cell = 1/cell;
  species TGFA_g in cell = 1/cell;
  species TGFA_rna in cell = 1/cell;
  species TGFB1 in cell = 1/cell;
  species TGFB1_g in cell = 1/cell;
  species TGFB1_rna in cell = 1/cell;
  species TLR3 in cell = 1/cell;
  species TLR3_g in cell = 1/cell;
  species TLR3_p in cell = 1/cell;
  species TLR3_rna in cell = 1/cell;
  species TLR4 in cell = 1/cell;
  species TLR4_g in cell = 1/cell;
  species TLR4_p in cell = 1/cell;
  species TLR4_rna in cell = 1/cell;
  species TP53 in cell = 1/cell;
  species TP53_g in cell = 1/cell;
  species TP53_p in cell = 1/cell;
  species TP53_rna in cell = 1/cell;
  species TRAF6 in cell = 1/cell;
  species TRAF6_g in cell = 1/cell;
  species TRAF6_p in cell = 1/cell;
  species TRAF6_rna in cell = 1/cell;
  species UBC in cell = 1/cell;
  species UBC_g in cell = 1/cell;
  species UBC_p in cell = 1/cell;
  species UBC_rna in cell = 1/cell;
  species VIM in cell = 1/cell;
  species VIM_g in cell = 1/cell;
  species VIM_p in cell = 1/cell;
  species VIM_rna in cell = 1/cell;
  species XBP1 in cell = 1/cell;
  species XBP1_g in cell = 1/cell;
  species XBP1_p in cell = 1/cell;
  species XBP1_rna in cell = 1/cell;
  species ZFP36 in cell = 1/cell;
  species ZFP36_g in cell = 1/cell;
  species ZFP36_p in cell = 1/cell;
  species ZFP36_rna in cell = 1/cell;

  // Reactions:
  // V(1) = K(1,1) * [SMAD2_p] * [SMAD4_p] -K(1,2) * [SIGNOR-C8];
  R1: SMAD2_p => SMAD4_p; 1;
  // V(2) = K(2,1) * [SMAD4_p] * [JUN_p] -K(2,2) * [SIGNOR-C10];
  R2: JUN_p => SMAD4_p; 1;
  // V(3) = K(3,1) * [NR3C1_p] * [STAT5A_p] -K(3,2) * [SIGNOR-C84];
  R3: NR3C1_p => STAT5A_p; 1;
  // V(4) = K(4,1) * [SMAD4_p] * [SMAD1] * [SMAD1] -K(4,2) * [SIGNOR-C85];
  R4: SMAD1 => SMAD4_p; 1;
  // V(5) = K(5,1) * [FOS_p] * [JUN_p] * [JUN_p] * [FOS_p] * [JUN_p] * [FOS_p] * [FOS_p] * [JUN_p] -K(5,2) * [SIGNOR-C154];
  R5: JUN_p => FOS_p; 1;
  // V(6) = K(6,1) * [MAPK1_p] * [HIF1A] -K(6,2) * [MAPK1_p |HIF1A];
  R6: HIF1A => MAPK1_p; 1;
  // V(7) = K(7,1) * [MAPK1_p |HIF1A];
  R7: HIF1A => MAPK1_p; 1;
  // V(8) = K(8,1) * [MAPK1_p] * [NR3C1] -K(8,2) * [MAPK1_p |NR3C1];
  R8: NR3C1 => MAPK1_p; 1;
  // V(9) = K(9,1) * [MAPK1_p |NR3C1];
  R9: NR3C1 => MAPK1_p; 1;
  // V(10) = K(10,1) * [MAPK1_p] * [RPS6KA3] -K(10,2) * [MAPK1_p |RPS6KA3];
  R10: RPS6KA3 => MAPK1_p; 1;
  // V(11) = K(11,1) * [MAPK1_p |RPS6KA3];
  R11: RPS6KA3 => MAPK1_p; 1;
  // V(12) = K(12,1) * [SRC_p] * [RPS6KA3] -K(12,2) * [SRC_p |RPS6KA3];
  R12: SRC_p => RPS6KA3; 1;
  // V(13) = K(13,1) * [SRC_p |RPS6KA3];
  R13: SRC_p => RPS6KA3; 1;
  // V(14) = K(14,1) * [MAPK1_p] * [SMAD1] -K(14,2) * [MAPK1_p |SMAD1];
  R14: SMAD1 => MAPK1_p; 1;
  // V(15) = K(15,1) * [MAPK1_p |SMAD1];
  R15: SMAD1 => MAPK1_p; 1;
  // V(16) = K(16,1) * [KIT_p] * [PTPN11] -K(16,2) * [KIT_p |PTPN11];
  R16: PTPN11 => KIT_p; 1;
  // V(17) = K(17,1) * [KIT_p |PTPN11];
  R17: PTPN11 => KIT_p; 1;
  // V(18) = K(18,1) * [JAK2_p] * [STAT5A] -K(18,2) * [JAK2_p |STAT5A];
  R18: JAK2_p => STAT5A; 1;
  // V(19) = K(19,1) * [JAK2_p |STAT5A];
  R19: JAK2_p => STAT5A; 1;
  // V(20) = K(20,1) * [MAPK1_p] * [RPS6KB1] -K(20,2) * [MAPK1_p |RPS6KB1];
  R20: RPS6KB1 => MAPK1_p; 1;
  // V(21) = K(21,1) * [MAPK1_p |RPS6KB1];
  R21: RPS6KB1 => MAPK1_p; 1;
  // V(22) = K(22,1) * [IGF1R_p] * [IRS1] -K(22,2) * [IGF1R_p |IRS1];
  R22: IRS1 => IGF1R_p; 1;
  // V(23) = K(23,1) * [IGF1R_p |IRS1];
  R23: IRS1 => IGF1R_p; 1;
  // V(24) = K(24,1) * [SRC_p] * [TP53] -K(24,2) * [SRC_p |TP53];
  R24: TP53 => SRC_p; 1;
  // V(25) = K(25,1) * [SRC_p |TP53];
  R25: TP53 => SRC_p; 1;
  // V(26) = K(26,1) * [EGFR_p] * [EGFR] -K(26,2) * [EGFR_p |EGFR];
  R26: EGFR_p => EGFR; 1;
  // V(27) = K(27,1) * [EGFR_p |EGFR];
  R27: EGFR_p => EGFR; 1;
  // V(28) = K(28,1) * [JAK2_p] * [JAK2] -K(28,2) * [JAK2_p |JAK2];
  R28: JAK2_p => JAK2; 1;
  // V(29) = K(29,1) * [JAK2_p |JAK2];
  R29: JAK2_p => JAK2; 1;
  // V(30) = K(30,1) * [MAPK1_p] * [CDKN1B] -K(30,2) * [MAPK1_p |CDKN1B];
  R30: CDKN1B => MAPK1_p; 1;
  // V(31) = K(31,1) * [MAPK1_p |CDKN1B];
  R31: CDKN1B => MAPK1_p; 1;
  // V(32) = K(32,1) * [MAPK1_p] * [SMAD4] -K(32,2) * [MAPK1_p |SMAD4];
  R32: SMAD4 => MAPK1_p; 1;
  // V(33) = K(33,1) * [MAPK1_p |SMAD4];
  R33: SMAD4 => MAPK1_p; 1;
  // V(34) = K(34,1) * [RPS6KB1_p] * [IRS1] -K(34,2) * [RPS6KB1_p |IRS1];
  R34: IRS1 => RPS6KB1_p; 1;
  // V(35) = K(35,1) * [RPS6KB1_p |IRS1];
  R35: IRS1 => RPS6KB1_p; 1;
  // V(36) = K(36,1) * [PDPK1_p] * [RPS6KB1] -K(36,2) * [PDPK1_p |RPS6KB1];
  R36: PDPK1_p => RPS6KB1; 1;
  // V(37) = K(37,1) * [PDPK1_p |RPS6KB1];
  R37: PDPK1_p => RPS6KB1; 1;
  // V(38) = K(38,1) * [MAPK1_p] * [JUN] -K(38,2) * [MAPK1_p |JUN];
  R38: JUN => MAPK1_p; 1;
  // V(39) = K(39,1) * [MAPK1_p |JUN];
  R39: JUN => MAPK1_p; 1;
  // V(40) = K(40,1) * [JAK2_p] * [MAP3K5] -K(40,2) * [JAK2_p |MAP3K5];
  R40: JAK2_p => MAP3K5; 1;
  // V(41) = K(41,1) * [JAK2_p |MAP3K5];
  R41: JAK2_p => MAP3K5; 1;
  // V(42) = K(42,1) * [MAPK1_p] * [FOS] -K(42,2) * [MAPK1_p |FOS];
  R42: FOS => MAPK1_p; 1;
  // V(43) = K(43,1) * [MAPK1_p |FOS];
  R43: FOS => MAPK1_p; 1;
  // V(44) = K(44,1) * [SRC_p] * [SRC] -K(44,2) * [SRC_p |SRC];
  R44: SRC => SRC_p; 1;
  // V(45) = K(45,1) * [SRC_p |SRC];
  R45: SRC => SRC_p; 1;
  // V(46) = K(46,1) * [SRC_p] * [TLR3] -K(46,2) * [SRC_p |TLR3];
  R46: TLR3 => SRC_p; 1;
  // V(47) = K(47,1) * [SRC_p |TLR3];
  R47: TLR3 => SRC_p; 1;
  // V(48) = K(48,1) * [MAPK1_p] * [SMAD2] -K(48,2) * [MAPK1_p |SMAD2];
  R48: SMAD2 => MAPK1_p; 1;
  // V(49) = K(49,1) * [MAPK1_p |SMAD2];
  R49: SMAD2 => MAPK1_p; 1;
  // V(50) = K(50,1) * [KIT_p] * [CTNNB1] -K(50,2) * [KIT_p |CTNNB1];
  R50: CTNNB1 => KIT_p; 1;
  // V(51) = K(51,1) * [KIT_p |CTNNB1];
  R51: CTNNB1 => KIT_p; 1;
  // V(52) = K(52,1) * [MAPK1_p] * [RORA] -K(52,2) * [MAPK1_p |RORA];
  R52: RORA => MAPK1_p; 1;
  // V(53) = K(53,1) * [MAPK1_p |RORA];
  R53: RORA => MAPK1_p; 1;
  // V(54) = K(54,1) * [MAPK1_p] * [BCL2] -K(54,2) * [MAPK1_p |BCL2];
  R54: BCL2 => MAPK1_p; 1;
  // V(55) = K(55,1) * [MAPK1_p |BCL2];
  R55: BCL2 => MAPK1_p; 1;
  // V(56) = K(56,1) * [INSR_p] * [INSR] -K(56,2) * [INSR_p |INSR];
  R56: INSR_p => INSR; 1;
  // V(57) = K(57,1) * [INSR_p |INSR];
  R57: INSR_p => INSR; 1;
  // V(58) = K(58,1) * [INSR_p] * [IRS1] -K(58,2) * [INSR_p |IRS1];
  R58: IRS1 => INSR_p; 1;
  // V(59) = K(59,1) * [INSR_p |IRS1];
  R59: IRS1 => INSR_p; 1;
  // V(60) = K(60,1) * [MAPK1_p] * [DUSP1] -K(60,2) * [MAPK1_p |DUSP1];
  R60: DUSP1 => MAPK1_p; 1;
  // V(61) = K(61,1) * [MAPK1_p |DUSP1];
  R61: DUSP1 => MAPK1_p; 1;
  // V(62) = K(62,1) * [MAPK1_p] * [NR3C2] -K(62,2) * [MAPK1_p |NR3C2];
  R62: NR3C2 => MAPK1_p; 1;
  // V(63) = K(63,1) * [MAPK1_p |NR3C2];
  R63: NR3C2 => MAPK1_p; 1;
  // V(64) = K(64,1) * [PKN1_p] * [PKN1] -K(64,2) * [PKN1_p |PKN1];
  R64: PKN1 => PKN1_p; 1;
  // V(65) = K(65,1) * [PKN1_p |PKN1];
  R65: PKN1 => PKN1_p; 1;
  // V(66) = K(66,1) * [RPS6KB1_p] * [HSPB1] -K(66,2) * [RPS6KB1_p |HSPB1];
  R66: HSPB1 => RPS6KB1_p; 1;
  // V(67) = K(67,1) * [RPS6KB1_p |HSPB1];
  R67: HSPB1 => RPS6KB1_p; 1;
  // V(68) = K(68,1) * [MAPK7_p] * [MAPK7] -K(68,2) * [MAPK7_p |MAPK7];
  R68: MAPK7 => MAPK7_p; 1;
  // V(69) = K(69,1) * [MAPK7_p |MAPK7];
  R69: MAPK7 => MAPK7_p; 1;
  // V(70) = K(70,1) * [KIT_p] * [KIT] -K(70,2) * [KIT_p |KIT];
  R70: KIT => KIT_p; 1;
  // V(71) = K(71,1) * [KIT_p |KIT];
  R71: KIT => KIT_p; 1;
  // V(72) = K(72,1) * [MAPK1_p] * [FOXO1] -K(72,2) * [MAPK1_p |FOXO1];
  R72: FOXO1 => MAPK1_p; 1;
  // V(73) = K(73,1) * [MAPK1_p |FOXO1];
  R73: FOXO1 => MAPK1_p; 1;
  // V(74) = K(74,1) * [ATR] * [PARP1] -K(74,2) * [ATR |PARP1];
  R74: PARP1 => ATR; 1;
  // V(75) = K(75,1) * [ATR |PARP1];
  R75: PARP1 => ATR; 1;
  // V(76) = K(76,1) * [JAK2_p] * [STAT1] -K(76,2) * [JAK2_p |STAT1];
  R76: JAK2_p => STAT1; 1;
  // V(77) = K(77,1) * [JAK2_p |STAT1];
  R77: JAK2_p => STAT1; 1;
  // V(78) = K(78,1) * [SRC_p] * [EGFR] -K(78,2) * [SRC_p |EGFR];
  R78: EGFR => SRC_p; 1;
  // V(79) = K(79,1) * [SRC_p |EGFR];
  R79: EGFR => SRC_p; 1;
  // V(80) = K(80,1) * [SRC_p] * [STAT1] -K(80,2) * [SRC_p |STAT1];
  R80: STAT1 => SRC_p; 1;
  // V(81) = K(81,1) * [SRC_p |STAT1];
  R81: STAT1 => SRC_p; 1;
  // V(82) = K(82,1) * [PDPK1_p] * [SGK1] -K(82,2) * [PDPK1_p |SGK1];
  R82: PDPK1_p => SGK1; 1;
  // V(83) = K(83,1) * [PDPK1_p |SGK1];
  R83: PDPK1_p => SGK1; 1;
  // V(84) = K(84,1) * [ERN1_p] * [ERN1] -K(84,2) * [ERN1_p |ERN1];
  R84: ERN1_p => ERN1; 1;
  // V(85) = K(85,1) * [ERN1_p |ERN1];
  R85: ERN1_p => ERN1; 1;
  // V(86) = K(86,1) * [SRC_p] * [TRAF6] -K(86,2) * [SRC_p |TRAF6];
  R86: SRC_p => TRAF6; 1;
  // V(87) = K(87,1) * [SRC_p |TRAF6];
  R87: SRC_p => TRAF6; 1;
  // V(88) = K(88,1) * [RPS6KA3_p] * [MAP3K5] -K(88,2) * [RPS6KA3_p |MAP3K5];
  R88: RPS6KA3_p => MAP3K5; 1;
  // V(89) = K(89,1) * [RPS6KA3_p |MAP3K5];
  R89: RPS6KA3_p => MAP3K5; 1;
  // V(90) = K(90,1) * [SRC_p] * [IGF1R] -K(90,2) * [SRC_p |IGF1R];
  R90: SRC_p => IGF1R; 1;
  // V(91) = K(91,1) * [SRC_p |IGF1R];
  R91: SRC_p => IGF1R; 1;
  // V(92) = K(92,1) * [MAPK1_p] * [SIGNOR-C154] -K(92,2) * [MAPK1_p |SIGNOR-C154];
  R92: MAPK1_p => ; 1;
  // V(93) = K(93,1) * [MAPK1_p |SIGNOR-C154];
  R93: MAPK1_p => ; 1;
  // V(94) = K(94,1) * [PINK1] * [UBC] -K(94,2) * [PINK1 |UBC];
  R94: PINK1 => UBC; 1;
  // V(95) = K(95,1) * [PINK1 |UBC];
  R95: PINK1 => UBC; 1;
  // V(96) = K(96,1) * [IGF1R_p] * [IGF1R] -K(96,2) * [IGF1R_p |IGF1R];
  R96: IGF1R_p => IGF1R; 1;
  // V(97) = K(97,1) * [IGF1R_p |IGF1R];
  R97: IGF1R_p => IGF1R; 1;
  // V(98) = K(98,1) * [SGK1_p] * [FOXO1] -K(98,2) * [SGK1_p |FOXO1];
  R98: SGK1_p => FOXO1; 1;
  // V(99) = K(99,1) * [SGK1_p |FOXO1];
  R99: SGK1_p => FOXO1; 1;
  // V(100) = K(100,1) * [HIPK2_p] * [HIPK2] -K(100,2) * [HIPK2_p |HIPK2];
  R100: HIPK2_p => HIPK2; 1;
  // V(101) = K(101,1) * [HIPK2_p |HIPK2];
  R101: HIPK2_p => HIPK2; 1;
  // V(102) = K(102,1) * [PDPK1_p] * [PDPK1] -K(102,2) * [PDPK1_p |PDPK1];
  R102: PDPK1_p => PDPK1; 1;
  // V(103) = K(103,1) * [PDPK1_p |PDPK1];
  R103: PDPK1_p => PDPK1; 1;
  // V(104) = K(104,1) * [SGK1_p] * [CDKN1B] -K(104,2) * [SGK1_p |CDKN1B];
  R104: CDKN1B => SGK1_p; 1;
  // V(105) = K(105,1) * [SGK1_p |CDKN1B];
  R105: CDKN1B => SGK1_p; 1;
  // V(106) = K(106,1) * [RPS6KA3_p] * [CREB1] -K(106,2) * [RPS6KA3_p |CREB1];
  R106: RPS6KA3_p => CREB1; 1;
  // V(107) = K(107,1) * [RPS6KA3_p |CREB1];
  R107: RPS6KA3_p => CREB1; 1;
  // V(108) = K(108,1) * [SRC_p] * [PDPK1] -K(108,2) * [SRC_p |PDPK1];
  R108: PDPK1 => SRC_p; 1;
  // V(109) = K(109,1) * [SRC_p |PDPK1];
  R109: PDPK1 => SRC_p; 1;
  // V(110) = K(110,1) * [MAPK1_p] * [EGFR] -K(110,2) * [MAPK1_p |EGFR];
  R110: EGFR => MAPK1_p; 1;
  // V(111) = K(111,1) * [MAPK1_p |EGFR];
  R111: EGFR => MAPK1_p; 1;
  // V(112) = K(112,1) * [SRC_p] * [PTEN] -K(112,2) * [SRC_p |PTEN];
  R112: PTEN => SRC_p; 1;
  // V(113) = K(113,1) * [SRC_p |PTEN];
  R113: PTEN => SRC_p; 1;
  // V(114) = K(114,1) * [MAP3K5_p] * [MAP3K5] -K(114,2) * [MAP3K5_p |MAP3K5];
  R114: MAP3K5 => MAP3K5_p; 1;
  // V(115) = K(115,1) * [MAP3K5_p |MAP3K5];
  R115: MAP3K5 => MAP3K5_p; 1;
  // V(116) = K(116,1) * [PRKAA1] * [DNMT1] -K(116,2) * [PRKAA1 |DNMT1];
  R116: PRKAA1 => DNMT1; 1;
  // V(117) = K(117,1) * [PRKAA1 |DNMT1];
  R117: PRKAA1 => DNMT1; 1;
  // V(118) = K(118,1) * [MAPK1_p] * [SP1] -K(118,2) * [MAPK1_p |SP1];
  R118: SP1 => MAPK1_p; 1;
  // V(119) = K(119,1) * [MAPK1_p |SP1];
  R119: SP1 => MAPK1_p; 1;
  // V(120) = K(120,1) * [ROCK1] * [PTEN] -K(120,2) * [ROCK1 |PTEN];
  R120: PTEN => ROCK1; 1;
  // V(121) = K(121,1) * [ROCK1 |PTEN];
  R121: PTEN => ROCK1; 1;
  // V(122) = K(122,1) * [MAPK1_p] * [STAT5A] -K(122,2) * [MAPK1_p |STAT5A];
  R122: STAT5A => MAPK1_p; 1;
  // V(123) = K(123,1) * [MAPK1_p |STAT5A];
  R123: STAT5A => MAPK1_p; 1;
  // V(124) = K(124,1) * [SRC_p] * [ANXA1] -K(124,2) * [SRC_p |ANXA1];
  R124: SRC_p => ANXA1; 1;
  // V(125) = K(125,1) * [SRC_p |ANXA1];
  R125: SRC_p => ANXA1; 1;
  // V(126) = K(126,1) * [PDPK1_p] * [RPS6KA3] -K(126,2) * [PDPK1_p |RPS6KA3];
  R126: PDPK1_p => RPS6KA3; 1;
  // V(127) = K(127,1) * [PDPK1_p |RPS6KA3];
  R127: PDPK1_p => RPS6KA3; 1;
  // V(128) = K(128,1) * [SRC_p] * [PTPRJ] -K(128,2) * [SRC_p |PTPRJ];
  R128: PTPRJ => SRC_p; 1;
  // V(129) = K(129,1) * [SRC_p |PTPRJ];
  R129: PTPRJ => SRC_p; 1;
  // V(130) = K(130,1) * [MAPK1_p] * [CDKN1A] -K(130,2) * [MAPK1_p |CDKN1A];
  R130: CDKN1A => MAPK1_p; 1;
  // V(131) = K(131,1) * [MAPK1_p |CDKN1A];
  R131: CDKN1A => MAPK1_p; 1;
  // V(132) = K(132,1) * [PRKAA1] * [FOXO1] -K(132,2) * [PRKAA1 |FOXO1];
  R132: PRKAA1 => FOXO1; 1;
  // V(133) = K(133,1) * [PRKAA1 |FOXO1];
  R133: PRKAA1 => FOXO1; 1;
  // V(134) = K(134,1) * [MAPK1_p] * [JAK2] -K(134,2) * [MAPK1_p |JAK2];
  R134: JAK2 => MAPK1_p; 1;
  // V(135) = K(135,1) * [MAPK1_p |JAK2];
  R135: JAK2 => MAPK1_p; 1;
  // V(136) = K(136,1) * [MAPK1_p] * [STIM1] -K(136,2) * [MAPK1_p |STIM1];
  R136: STIM1 => MAPK1_p; 1;
  // V(137) = K(137,1) * [MAPK1_p |STIM1];
  R137: STIM1 => MAPK1_p; 1;
  // V(138) = K(138,1) * [IGF1R_p] * [PCNA] -K(138,2) * [IGF1R_p |PCNA];
  R138: PCNA => IGF1R_p; 1;
  // V(139) = K(139,1) * [IGF1R_p |PCNA];
  R139: PCNA => IGF1R_p; 1;
  // V(140) = K(140,1) * [IGF1R_p] * [PDPK1] -K(140,2) * [IGF1R_p |PDPK1];
  R140: IGF1R_p => PDPK1; 1;
  // V(141) = K(141,1) * [IGF1R_p |PDPK1];
  R141: IGF1R_p => PDPK1; 1;
  // V(142) = K(142,1) * [MAPK1_p] * [PARP1] -K(142,2) * [MAPK1_p |PARP1];
  R142: PARP1 => MAPK1_p; 1;
  // V(143) = K(143,1) * [MAPK1_p |PARP1];
  R143: PARP1 => MAPK1_p; 1;
  // V(144) = K(144,1) * [SRC_p] * [CLTC] -K(144,2) * [SRC_p |CLTC];
  R144: SRC_p => CLTC; 1;
  // V(145) = K(145,1) * [SRC_p |CLTC];
  R145: SRC_p => CLTC; 1;
  // V(146) = K(146,1) * [JAK2_p] * [STAT6] -K(146,2) * [JAK2_p |STAT6];
  R146: STAT6 => JAK2_p; 1;
  // V(147) = K(147,1) * [JAK2_p |STAT6];
  R147: STAT6 => JAK2_p; 1;
  // V(148) = K(148,1) * [MAP3K14_p] * [NFKB2] -K(148,2) * [MAP3K14_p |NFKB2];
  R148: NFKB2 => MAP3K14_p; 1;
  // V(149) = K(149,1) * [MAP3K14_p |NFKB2];
  R149: NFKB2 => MAP3K14_p; 1;
  // V(150) = K(150,1) * [PKN1_p] * [FOXO1] -K(150,2) * [PKN1_p |FOXO1];
  R150: FOXO1 => PKN1_p; 1;
  // V(151) = K(151,1) * [PKN1_p |FOXO1];
  R151: FOXO1 => PKN1_p; 1;
  // V(152) = K(152,1) * [MAPK1_p] * [CASP9] -K(152,2) * [MAPK1_p |CASP9];
  R152: CASP9 => MAPK1_p; 1;
  // V(153) = K(153,1) * [MAPK1_p |CASP9];
  R153: CASP9 => MAPK1_p; 1;
  // V(154) = K(154,1) * [RPS6KB1_p] * [RICTOR] -K(154,2) * [RPS6KB1_p |RICTOR];
  R154: RICTOR => RPS6KB1_p; 1;
  // V(155) = K(155,1) * [RPS6KB1_p |RICTOR];
  R155: RICTOR => RPS6KB1_p; 1;
  // V(156) = K(156,1) * [MAP3K14_p] * [MAP3K14] -K(156,2) * [MAP3K14_p |MAP3K14];
  R156: MAP3K14 => MAP3K14_p; 1;
  // V(157) = K(157,1) * [MAP3K14_p |MAP3K14];
  R157: MAP3K14 => MAP3K14_p; 1;
  // V(158) = K(158,1) * [IGF1R_p] * [IRS2] -K(158,2) * [IGF1R_p |IRS2];
  R158: IGF1R_p => IRS2; 1;
  // V(159) = K(159,1) * [IGF1R_p |IRS2];
  R159: IGF1R_p => IRS2; 1;
  // V(160) = K(160,1) * [JAK2_p] * [CDKN1B] -K(160,2) * [JAK2_p |CDKN1B];
  R160: JAK2_p => CDKN1B; 1;
  // V(161) = K(161,1) * [JAK2_p |CDKN1B];
  R161: JAK2_p => CDKN1B; 1;
  // V(162) = K(162,1) * [SMAD1] * [SMAD4] -K(162,2) * [SMAD1 |SMAD4];
  R162: SMAD4 => SMAD1; 1;
  // V(163) = K(163,1) * [SMAD1 |SMAD4];
  R163: SMAD4 => SMAD1; 1;
  // V(164) = K(164,1) * [RPS6KA3_p] * [FOS] -K(164,2) * [RPS6KA3_p |FOS];
  R164: RPS6KA3_p => FOS; 1;
  // V(165) = K(165,1) * [RPS6KA3_p |FOS];
  R165: RPS6KA3_p => FOS; 1;
  // V(166) = K(166,1) * [KIT_p] * [STAT1] -K(166,2) * [KIT_p |STAT1];
  R166: STAT1 => KIT_p; 1;
  // V(167) = K(167,1) * [KIT_p |STAT1];
  R167: STAT1 => KIT_p; 1;
  // V(168) = K(168,1) * [RPS6KA3_p] * [RPS6KA3] -K(168,2) * [RPS6KA3_p |RPS6KA3];
  R168: RPS6KA3_p => RPS6KA3; 1;
  // V(169) = K(169,1) * [RPS6KA3_p |RPS6KA3];
  R169: RPS6KA3_p => RPS6KA3; 1;
  // V(170) = K(170,1) * [PRKAA1] * [HDAC4] -K(170,2) * [PRKAA1 |HDAC4];
  R170: PRKAA1 => HDAC4; 1;
  // V(171) = K(171,1) * [PRKAA1 |HDAC4];
  R171: PRKAA1 => HDAC4; 1;
  // V(172) = K(172,1) * [MAPK1_p] * [IRS1] -K(172,2) * [MAPK1_p |IRS1];
  R172: IRS1 => MAPK1_p; 1;
  // V(173) = K(173,1) * [MAPK1_p |IRS1];
  R173: IRS1 => MAPK1_p; 1;
  // V(174) = K(174,1) * [RPS6KA3_p] * [NR4A1] -K(174,2) * [RPS6KA3_p |NR4A1];
  R174: NR4A1 => RPS6KA3_p; 1;
  // V(175) = K(175,1) * [RPS6KA3_p |NR4A1];
  R175: NR4A1 => RPS6KA3_p; 1;
  // V(176) = K(176,1) * [ROCK1] * [TP53] -K(176,2) * [ROCK1 |TP53];
  R176: TP53 => ROCK1; 1;
  // V(177) = K(177,1) * [ROCK1 |TP53];
  R177: TP53 => ROCK1; 1;
  // V(178) = K(178,1) * [SRC_p] * [RAC1] -K(178,2) * [SRC_p |RAC1];
  R178: SRC_p => RAC1; 1;
  // V(179) = K(179,1) * [SRC_p |RAC1];
  R179: SRC_p => RAC1; 1;
  // V(180) = K(180,1) * [MAPK1_p] * [MAPK1] -K(180,2) * [MAPK1_p |MAPK1];
  R180: MAPK1 => MAPK1_p; 1;
  // V(181) = K(181,1) * [MAPK1_p |MAPK1];
  R181: MAPK1 => MAPK1_p; 1;
  // V(182) = K(182,1) * [MAPK1_p] * [RRAS] -K(182,2) * [MAPK1_p |RRAS];
  R182: RRAS => MAPK1_p; 1;
  // V(183) = K(183,1) * [MAPK1_p |RRAS];
  R183: RRAS => MAPK1_p; 1;
  // V(184) = K(184,1) * [SRC_p] * [CDH1] -K(184,2) * [SRC_p |CDH1];
  R184: CDH1 => SRC_p; 1;
  // V(185) = K(185,1) * [SRC_p |CDH1];
  R185: CDH1 => SRC_p; 1;
  // V(186) = K(186,1) * [MAPK1_p] * [ZFP36] -K(186,2) * [MAPK1_p |ZFP36];
  R186: ZFP36 => MAPK1_p; 1;
  // V(187) = K(187,1) * [MAPK1_p |ZFP36];
  R187: ZFP36 => MAPK1_p; 1;
  // V(188) = K(188,1) * [MAPK1_p] * [RCAN1] -K(188,2) * [MAPK1_p |RCAN1];
  R188: RCAN1 => MAPK1_p; 1;
  // V(189) = K(189,1) * [MAPK1_p |RCAN1];
  R189: RCAN1 => MAPK1_p; 1;
  // V(190) = K(190,1) * [JAK2_p] * [EGFR] -K(190,2) * [JAK2_p |EGFR];
  R190: EGFR => JAK2_p; 1;
  // V(191) = K(191,1) * [JAK2_p |EGFR];
  R191: EGFR => JAK2_p; 1;
  // V(192) = K(192,1) * [PKN1_p] * [EGFR] -K(192,2) * [PKN1_p |EGFR];
  R192: EGFR => PKN1_p; 1;
  // V(193) = K(193,1) * [PKN1_p |EGFR];
  R193: EGFR => PKN1_p; 1;
  // V(194) = K(194,1) * [SRC_p] * [KIT] -K(194,2) * [SRC_p |KIT];
  R194: SRC_p => KIT; 1;
  // V(195) = K(195,1) * [SRC_p |KIT];
  R195: SRC_p => KIT; 1;
  // V(196) = K(196,1) * [SGK1_p] * [SP1] -K(196,2) * [SGK1_p |SP1];
  R196: SP1 => SGK1_p; 1;
  // V(197) = K(197,1) * [SGK1_p |SP1];
  R197: SP1 => SGK1_p; 1;
  // V(198) = K(198,1) * [PRKAA1] * [HIPK2] -K(198,2) * [PRKAA1 |HIPK2];
  R198: PRKAA1 => HIPK2; 1;
  // V(199) = K(199,1) * [PRKAA1 |HIPK2];
  R199: PRKAA1 => HIPK2; 1;
  // V(200) = K(200,1) * [SRC_p] * [PROM1] -K(200,2) * [SRC_p |PROM1];
  R200: PROM1 => SRC_p; 1;
  // V(201) = K(201,1) * [SRC_p |PROM1];
  R201: PROM1 => SRC_p; 1;
  // V(202) = K(202,1) * [SRC_p] * [CTNNB1] -K(202,2) * [SRC_p |CTNNB1];
  R202: CTNNB1 => SRC_p; 1;
  // V(203) = K(203,1) * [SRC_p |CTNNB1];
  R203: CTNNB1 => SRC_p; 1;
  // V(204) = K(204,1) * [PDPK1_p] * [PKN1] -K(204,2) * [PDPK1_p |PKN1];
  R204: PDPK1_p => PKN1; 1;
  // V(205) = K(205,1) * [PDPK1_p |PKN1];
  R205: PDPK1_p => PKN1; 1;
  // V(206) = K(206,1) * [INSR_p] * [IRS2] -K(206,2) * [INSR_p |IRS2];
  R206: INSR_p => IRS2; 1;
  // V(207) = K(207,1) * [INSR_p |IRS2];
  R207: INSR_p => IRS2; 1;
  // V(208) = K(208,1) * [SGK1_p] * [MAPK1] -K(208,2) * [SGK1_p |MAPK1];
  R208: SGK1_p => MAPK1; 1;
  // V(209) = K(209,1) * [SGK1_p |MAPK1];
  R209: SGK1_p => MAPK1; 1;
  // V(210) = K(210,1) * [PRKAA1] * [DDIT3] -K(210,2) * [PRKAA1 |DDIT3];
  R210: PRKAA1 => DDIT3; 1;
  // V(211) = K(211,1) * [PRKAA1 |DDIT3];
  R211: PRKAA1 => DDIT3; 1;
  // V(212) = K(212,1) * [RPS6KA3_p] * [TP53] -K(212,2) * [RPS6KA3_p |TP53];
  R212: TP53 => RPS6KA3_p; 1;
  // V(213) = K(213,1) * [RPS6KA3_p |TP53];
  R213: TP53 => RPS6KA3_p; 1;
  // V(214) = K(214,1) * [MAPK1_p] * [XBP1] -K(214,2) * [MAPK1_p |XBP1];
  R214: XBP1 => MAPK1_p; 1;
  // V(215) = K(215,1) * [MAPK1_p |XBP1];
  R215: XBP1 => MAPK1_p; 1;
  // V(216) = K(216,1) * [SGK1_p] * [NR3C1] -K(216,2) * [SGK1_p |NR3C1];
  R216: SGK1_p => NR3C1; 1;
  // V(217) = K(217,1) * [SGK1_p |NR3C1];
  R217: SGK1_p => NR3C1; 1;
  // V(218) = K(218,1) * [INSR_p] * [PTPN6] -K(218,2) * [INSR_p |PTPN6];
  R218: PTPN6 => INSR_p; 1;
  // V(219) = K(219,1) * [INSR_p |PTPN6];
  R219: PTPN6 => INSR_p; 1;
  // V(220) = K(220,1) * [PINK1] * [TP53] -K(220,2) * [PINK1 |TP53];
  R220: TP53 => PINK1; 1;
  // V(221) = K(221,1) * [PINK1 |TP53];
  R221: TP53 => PINK1; 1;
  // V(222) = K(222,1) * [EGFR_p] * [STAT1] -K(222,2) * [EGFR_p |STAT1];
  R222: EGFR_p => STAT1; 1;
  // V(223) = K(223,1) * [EGFR_p |STAT1];
  R223: EGFR_p => STAT1; 1;
  // V(224) = K(224,1) * [INSR_p] * [PTEN] -K(224,2) * [INSR_p |PTEN];
  R224: PTEN => INSR_p; 1;
  // V(225) = K(225,1) * [INSR_p |PTEN];
  R225: PTEN => INSR_p; 1;
  // V(226) = K(226,1) * [INSR_p] * [PIK3R1] -K(226,2) * [INSR_p |PIK3R1];
  R226: PIK3R1 => INSR_p; 1;
  // V(227) = K(227,1) * [INSR_p |PIK3R1];
  R227: PIK3R1 => INSR_p; 1;
  // V(228) = K(228,1) * [EGFR_p] * [PCNA] -K(228,2) * [EGFR_p |PCNA];
  R228: EGFR_p => PCNA; 1;
  // V(229) = K(229,1) * [EGFR_p |PCNA];
  R229: EGFR_p => PCNA; 1;
  // V(230) = K(230,1) * [SRC_p] * [STAT5A] -K(230,2) * [SRC_p |STAT5A];
  R230: SRC_p => STAT5A; 1;
  // V(231) = K(231,1) * [SRC_p |STAT5A];
  R231: SRC_p => STAT5A; 1;
  // V(232) = K(232,1) * [SRC_p] * [CDKN1B] -K(232,2) * [SRC_p |CDKN1B];
  R232: CDKN1B => SRC_p; 1;
  // V(233) = K(233,1) * [SRC_p |CDKN1B];
  R233: CDKN1B => SRC_p; 1;
  // V(234) = K(234,1) * [EGFR_p] * [PARP1] -K(234,2) * [EGFR_p |PARP1];
  R234: EGFR_p => PARP1; 1;
  // V(235) = K(235,1) * [EGFR_p |PARP1];
  R235: EGFR_p => PARP1; 1;
  // V(236) = K(236,1) * [RPS6KA3_p] * [TRAF6] -K(236,2) * [RPS6KA3_p |TRAF6];
  R236: RPS6KA3_p => TRAF6; 1;
  // V(237) = K(237,1) * [RPS6KA3_p |TRAF6];
  R237: RPS6KA3_p => TRAF6; 1;
  // V(238) = K(238,1) * [ROCK1] * [VIM] -K(238,2) * [ROCK1 |VIM];
  R238: ROCK1 => VIM; 1;
  // V(239) = K(239,1) * [ROCK1 |VIM];
  R239: ROCK1 => VIM; 1;
  // V(240) = K(240,1) * [SRC_p] * [HIPK2] -K(240,2) * [SRC_p |HIPK2];
  R240: SRC_p => HIPK2; 1;
  // V(241) = K(241,1) * [SRC_p |HIPK2];
  R241: SRC_p => HIPK2; 1;
  // V(242) = K(242,1) * [SRC_p] * [TLR4] -K(242,2) * [SRC_p |TLR4];
  R242: TLR4 => SRC_p; 1;
  // V(243) = K(243,1) * [SRC_p |TLR4];
  R243: TLR4 => SRC_p; 1;
  // V(244) = K(244,1) * [JAK2_p] * [PTPN11] -K(244,2) * [JAK2_p |PTPN11];
  R244: JAK2_p => PTPN11; 1;
  // V(245) = K(245,1) * [JAK2_p |PTPN11];
  R245: JAK2_p => PTPN11; 1;
  // V(246) = K(246,1) * [ATR] * [TP53] -K(246,2) * [ATR |TP53];
  R246: TP53 => ATR; 1;
  // V(247) = K(247,1) * [ATR |TP53];
  R247: TP53 => ATR; 1;
  // V(248) = K(248,1) * [SRC_p] * [SOCS1] -K(248,2) * [SRC_p |SOCS1];
  R248: SRC_p => SOCS1; 1;
  // V(249) = K(249,1) * [SRC_p |SOCS1];
  R249: SRC_p => SOCS1; 1;
  // V(250) = K(250,1) * [ATR] * [CREB1] -K(250,2) * [ATR |CREB1];
  R250: ATR => CREB1; 1;
  // V(251) = K(251,1) * [ATR |CREB1];
  R251: ATR => CREB1; 1;
  // V(252) = K(252,1) * [EGFR_p] * [TLR3] -K(252,2) * [EGFR_p |TLR3];
  R252: EGFR_p => TLR3; 1;
  // V(253) = K(253,1) * [EGFR_p |TLR3];
  R253: EGFR_p => TLR3; 1;
  // V(254) = K(254,1) * [SRC_p] * [RRAS] -K(254,2) * [SRC_p |RRAS];
  R254: RRAS => SRC_p; 1;
  // V(255) = K(255,1) * [SRC_p |RRAS];
  R255: RRAS => SRC_p; 1;
  // V(256) = K(256,1) * [EGFR_p] * [ANXA1] -K(256,2) * [EGFR_p |ANXA1];
  R256: EGFR_p => ANXA1; 1;
  // V(257) = K(257,1) * [EGFR_p |ANXA1];
  R257: EGFR_p => ANXA1; 1;
  // V(258) = K(258,1) * [MAPK1_p] * [MFN1] -K(258,2) * [MAPK1_p |MFN1];
  R258: MFN1 => MAPK1_p; 1;
  // V(259) = K(259,1) * [MAPK1_p |MFN1];
  R259: MFN1 => MAPK1_p; 1;
  // V(260) = K(260,1) * [MAP3K5_p] * [ERN1] -K(260,2) * [MAP3K5_p |ERN1];
  R260: ERN1 => MAP3K5_p; 1;
  // V(261) = K(261,1) * [MAP3K5_p |ERN1];
  R261: ERN1 => MAP3K5_p; 1;
  // V(262) = K(262,1) * [MAPK1_p] * [TP53] -K(262,2) * [MAPK1_p |TP53];
  R262: TP53 => MAPK1_p; 1;
  // V(263) = K(263,1) * [MAPK1_p |TP53];
  R263: TP53 => MAPK1_p; 1;
  // V(264) = K(264,1) * [PRKAA1] * [NFE2L2] -K(264,2) * [PRKAA1 |NFE2L2];
  R264: PRKAA1 => NFE2L2; 1;
  // V(265) = K(265,1) * [PRKAA1 |NFE2L2];
  R265: PRKAA1 => NFE2L2; 1;
  // V(266) = K(266,1) * [HIPK2_p] * [CDKN1B] -K(266,2) * [HIPK2_p |CDKN1B];
  R266: CDKN1B => HIPK2_p; 1;
  // V(267) = K(267,1) * [HIPK2_p |CDKN1B];
  R267: CDKN1B => HIPK2_p; 1;
  // V(268) = K(268,1) * [HIPK2_p] * [TP53] -K(268,2) * [HIPK2_p |TP53];
  R268: TP53 => HIPK2_p; 1;
  // V(269) = K(269,1) * [HIPK2_p |TP53];
  R269: TP53 => HIPK2_p; 1;
  // V(270) = K(270,1) * [PRKAA1] * [PRKAA1] -K(270,2) * [PRKAA1 |PRKAA1];
  R270: PRKAA1 => ; 1;
  // V(271) = K(271,1) * [PRKAA1 |PRKAA1];
  R271: PRKAA1 => ; 1;
  // V(272) = K(272,1) * [SGK1_p] * [STAT1] -K(272,2) * [SGK1_p |STAT1];
  R272: SGK1_p => STAT1; 1;
  // V(273) = K(273,1) * [SGK1_p |STAT1];
  R273: SGK1_p => STAT1; 1;
  // V(274) = K(274,1) * [ERN1_p] * [XBP1] -K(274,2) * [ERN1_p |XBP1];
  R274: ERN1_p => XBP1; 1;
  // V(275) = K(275,1) * [ERN1_p |XBP1];
  R275: ERN1_p => XBP1; 1;
  // V(276) = K(276,1) * [TLR4_p] * [MAPK1] -K(276,2) * [TLR4_p |MAPK1];
  R276: TLR4_p => MAPK1; 1;
  // V(277) = K(277,1) * [TLR4_p |MAPK1];
  R277: TLR4_p => MAPK1; 1;
  // V(278) = K(278,1) * [PRKAA1] * [STIM1] -K(278,2) * [PRKAA1 |STIM1];
  R278: PRKAA1 => STIM1; 1;
  // V(279) = K(279,1) * [PRKAA1 |STIM1];
  R279: PRKAA1 => STIM1; 1;
  // V(280) = K(280,1) * [MAPK7_p] * [SGK1] -K(280,2) * [MAPK7_p |SGK1];
  R280: SGK1 => MAPK7_p; 1;
  // V(281) = K(281,1) * [MAPK7_p |SGK1];
  R281: SGK1 => MAPK7_p; 1;
  // V(282) = K(282,1) * [SRC_p] * [ENG] -K(282,2) * [SRC_p |ENG];
  R282: ENG => SRC_p; 1;
  // V(283) = K(283,1) * [SRC_p |ENG];
  R283: ENG => SRC_p; 1;
  // V(284) = K(284,1) * [MAP3K5_p] * [CDKN1A] -K(284,2) * [MAP3K5_p |CDKN1A];
  R284: MAP3K5_p => CDKN1A; 1;
  // V(285) = K(285,1) * [MAP3K5_p |CDKN1A];
  R285: MAP3K5_p => CDKN1A; 1;
  // V(286) = K(286,1) * [MAPK7_p] * [RPS6KA3] -K(286,2) * [MAPK7_p |RPS6KA3];
  R286: RPS6KA3 => MAPK7_p; 1;
  // V(287) = K(287,1) * [MAPK7_p |RPS6KA3];
  R287: RPS6KA3 => MAPK7_p; 1;
  // V(288) = K(288,1) * [EGFR_p] * [CTNNB1] -K(288,2) * [EGFR_p |CTNNB1];
  R288: EGFR_p => CTNNB1; 1;
  // V(289) = K(289,1) * [EGFR_p |CTNNB1];
  R289: EGFR_p => CTNNB1; 1;
  // V(290) = K(290,1) * [SRC_p] * [PIK3C3] -K(290,2) * [SRC_p |PIK3C3];
  R290: PIK3C3 => SRC_p; 1;
  // V(291) = K(291,1) * [SRC_p |PIK3C3];
  R291: PIK3C3 => SRC_p; 1;
  // V(292) = K(292,1) * [EGFR_p] * [PTPN11] -K(292,2) * [EGFR_p |PTPN11];
  R292: EGFR_p => PTPN11; 1;
  // V(293) = K(293,1) * [EGFR_p |PTPN11];
  R293: EGFR_p => PTPN11; 1;
  // V(294) = K(294,1) * [SRC_p] * [CASP9] -K(294,2) * [SRC_p |CASP9];
  R294: SRC_p => CASP9; 1;
  // V(295) = K(295,1) * [SRC_p |CASP9];
  R295: SRC_p => CASP9; 1;
  // V(296) = K(296,1) * [ROCK1] * [PDPK1] -K(296,2) * [ROCK1 |PDPK1];
  R296: ROCK1 => PDPK1; 1;
  // V(297) = K(297,1) * [ROCK1 |PDPK1];
  R297: ROCK1 => PDPK1; 1;
  // V(298) = K(298,1) * [RPS6KB1_p] * [PDPK1] -K(298,2) * [RPS6KB1_p |PDPK1];
  R298: PDPK1 => RPS6KB1_p; 1;
  // V(299) = K(299,1) * [RPS6KB1_p |PDPK1];
  R299: PDPK1 => RPS6KB1_p; 1;
  // V(300) = K(300,1) * [MAPK1_p] * [NR4A1] -K(300,2) * [MAPK1_p |NR4A1];
  R300: NR4A1 => MAPK1_p; 1;
  // V(301) = K(301,1) * [MAPK1_p |NR4A1];
  R301: NR4A1 => MAPK1_p; 1;
  // V(302) = K(302,1) * [SRC_p] * [PTPN6] -K(302,2) * [SRC_p |PTPN6];
  R302: PTPN6 => SRC_p; 1;
  // V(303) = K(303,1) * [SRC_p |PTPN6];
  R303: PTPN6 => SRC_p; 1;
  // V(304) = K(304,1) * [PINK1] * [PTEN] -K(304,2) * [PINK1 |PTEN];
  R304: PTEN => PINK1; 1;
  // V(305) = K(305,1) * [PINK1 |PTEN];
  R305: PTEN => PINK1; 1;
  // V(306) = K(306,1) * [EGFR_p] * [ABCA1] -K(306,2) * [EGFR_p |ABCA1];
  R306: EGFR_p => ABCA1; 1;
  // V(307) = K(307,1) * [EGFR_p |ABCA1];
  R307: EGFR_p => ABCA1; 1;
  // V(308) = K(308,1) * [PTPRJ_p] * [SRC] -K(308,2) * [PTPRJ_p |SRC];
  R308: PTPRJ_p => SRC; 1;
  // V(309) = K(309,1) * [PTPRJ_p |SRC];
  R309: PTPRJ_p => SRC; 1;
  // V(310) = K(310,1) * [EGFR_p] * [PKM] -K(310,2) * [EGFR_p |PKM];
  R310: EGFR_p => PKM; 1;
  // V(311) = K(311,1) * [EGFR_p |PKM];
  R311: EGFR_p => PKM; 1;
  // V(312) = K(312,1) * [PRKAA1] * [CDKN1B] -K(312,2) * [PRKAA1 |CDKN1B];
  R312: PRKAA1 => CDKN1B; 1;
  // V(313) = K(313,1) * [PRKAA1 |CDKN1B];
  R313: PRKAA1 => CDKN1B; 1;
  // V(314) = K(314,1) * [HIPK2_p] * [CREB1] -K(314,2) * [HIPK2_p |CREB1];
  R314: CREB1 => HIPK2_p; 1;
  // V(315) = K(315,1) * [HIPK2_p |CREB1];
  R315: CREB1 => HIPK2_p; 1;
  // V(316) = K(316,1) * [PRKAA1] * [TP53] -K(316,2) * [PRKAA1 |TP53];
  R316: TP53 => PRKAA1; 1;
  // V(317) = K(317,1) * [PRKAA1 |TP53];
  R317: TP53 => PRKAA1; 1;
  // V(318) = K(318,1) * [RPS6KA3_p] * [IRS1] -K(318,2) * [RPS6KA3_p |IRS1];
  R318: IRS1 => RPS6KA3_p; 1;
  // V(319) = K(319,1) * [RPS6KA3_p |IRS1];
  R319: IRS1 => RPS6KA3_p; 1;
  // V(320) = K(320,1) * [PTPRJ_p] * [INSR_p] -K(320,2) * [PTPRJ_p |INSR_p];
  R320: PTPRJ_p => INSR_p; 1;
  // V(321) = K(321,1) * [PTPRJ_p |INSR_p];
  R321: PTPRJ_p => INSR_p; 1;
  // V(322) = K(322,1) * [PTPRJ_p] * [MAPK1_p] -K(322,2) * [PTPRJ_p |MAPK1_p];
  R322: PTPRJ_p => MAPK1_p; 1;
  // V(323) = K(323,1) * [PTPRJ_p |MAPK1_p];
  R323: PTPRJ_p => MAPK1_p; 1;
  // V(324) = K(324,1) * [PTPN6_p] * [JAK2_p] -K(324,2) * [PTPN6_p |JAK2_p];
  R324: PTPN6_p => JAK2_p; 1;
  // V(325) = K(325,1) * [PTPN6_p |JAK2_p];
  R325: PTPN6_p => JAK2_p; 1;
  // V(326) = K(326,1) * [PTPN6_p] * [EGFR_p] -K(326,2) * [PTPN6_p |EGFR_p];
  R326: PTPN6_p => EGFR_p; 1;
  // V(327) = K(327,1) * [PTPN6_p |EGFR_p];
  R327: PTPN6_p => EGFR_p; 1;
  // V(328) = K(328,1) * [PTPRJ_p] * [CTNNB1_p] -K(328,2) * [PTPRJ_p |CTNNB1_p];
  R328: PTPRJ_p => CTNNB1_p; 1;
  // V(329) = K(329,1) * [PTPRJ_p |CTNNB1_p];
  R329: PTPRJ_p => CTNNB1_p; 1;
  // V(330) = K(330,1) * [PTEN_p] * [RPS6KB1_p] -K(330,2) * [PTEN_p |RPS6KB1_p];
  R330: PTEN_p => RPS6KB1_p; 1;
  // V(331) = K(331,1) * [PTEN_p |RPS6KB1_p];
  R331: PTEN_p => RPS6KB1_p; 1;
  // V(332) = K(332,1) * [PTPN11_p] * [SRC_p] -K(332,2) * [PTPN11_p |SRC_p];
  R332: PTPN11_p => SRC_p; 1;
  // V(333) = K(333,1) * [PTPN11_p |SRC_p];
  R333: PTPN11_p => SRC_p; 1;
  // V(334) = K(334,1) * [PTPN11_p] * [IRS1_p] -K(334,2) * [PTPN11_p |IRS1_p];
  R334: PTPN11_p => IRS1_p; 1;
  // V(335) = K(335,1) * [PTPN11_p |IRS1_p];
  R335: PTPN11_p => IRS1_p; 1;
  // V(336) = K(336,1) * [PTEN_p] * [SRC_p] -K(336,2) * [PTEN_p |SRC_p];
  R336: PTEN_p => SRC_p; 1;
  // V(337) = K(337,1) * [PTEN_p |SRC_p];
  R337: PTEN_p => SRC_p; 1;
  // V(338) = K(338,1) * [PTPN6_p] * [PKM_p] -K(338,2) * [PTPN6_p |PKM_p];
  R338: PTPN6_p => PKM_p; 1;
  // V(339) = K(339,1) * [PTPN6_p |PKM_p];
  R339: PTPN6_p => PKM_p; 1;
  // V(340) = K(340,1) * [PTPN6_p] * [INSR_p] -K(340,2) * [PTPN6_p |INSR_p];
  R340: PTPN6_p => INSR_p; 1;
  // V(341) = K(341,1) * [PTPN6_p |INSR_p];
  R341: PTPN6_p => INSR_p; 1;
  // V(342) = K(342,1) * [PTPN11_p] * [EGFR_p] -K(342,2) * [PTPN11_p |EGFR_p];
  R342: EGFR_p => PTPN11_p; 1;
  // V(343) = K(343,1) * [PTPN11_p |EGFR_p];
  R343: EGFR_p => PTPN11_p; 1;
  // V(344) = K(344,1) * [DUSP1_p] * [MAPK1_p] -K(344,2) * [DUSP1_p |MAPK1_p];
  R344: DUSP1_p => MAPK1_p; 1;
  // V(345) = K(345,1) * [DUSP1_p |MAPK1_p];
  R345: DUSP1_p => MAPK1_p; 1;
  // V(346) = K(346,1) * [PTPN6_p] * [SRC_p] -K(346,2) * [PTPN6_p |SRC_p];
  R346: PTPN6_p => SRC_p; 1;
  // V(347) = K(347,1) * [PTPN6_p |SRC_p];
  R347: PTPN6_p => SRC_p; 1;
  // V(348) = K(348,1) * [PTPN11_p] * [MAP3K5_p] -K(348,2) * [PTPN11_p |MAP3K5_p];
  R348: PTPN11_p => MAP3K5_p; 1;
  // V(349) = K(349,1) * [PTPN11_p |MAP3K5_p];
  R349: PTPN11_p => MAP3K5_p; 1;
  // V(350) = K(350,1) * [PTEN_p] * [SP1_p] -K(350,2) * [PTEN_p |SP1_p];
  R350: PTEN_p => SP1_p; 1;
  // V(351) = K(351,1) * [PTEN_p |SP1_p];
  R351: PTEN_p => SP1_p; 1;
  // V(352) = K(352,1) * [PTPN11_p] * [JAK2_p] -K(352,2) * [PTPN11_p |JAK2_p];
  R352: JAK2_p => PTPN11_p; 1;
  // V(353) = K(353,1) * [PTPN11_p |JAK2_p];
  R353: JAK2_p => PTPN11_p; 1;
  // V(354) = K(354,1) * [PTEN_p] * [PTEN_p] -K(354,2) * [PTEN_p |PTEN_p];
  R354: PTEN_p => ; 1;
  // V(355) = K(355,1) * [PTEN_p |PTEN_p];
  R355: PTEN_p => ; 1;
  // V(356) = K(356,1) * [PTPRJ_p] * [PIK3R1_p] -K(356,2) * [PTPRJ_p |PIK3R1_p];
  R356: PTPRJ_p => PIK3R1_p; 1;
  // V(357) = K(357,1) * [PTPRJ_p |PIK3R1_p];
  R357: PTPRJ_p => PIK3R1_p; 1;
  // V(358) = K(358,1) * [PTPRJ_p] * [JAK2_p] -K(358,2) * [PTPRJ_p |JAK2_p];
  R358: PTPRJ_p => JAK2_p; 1;
  // V(359) = K(359,1) * [PTPRJ_p |JAK2_p];
  R359: PTPRJ_p => JAK2_p; 1;
  // V(360) = K(360,1) * [PTPRJ_p] * [SRC_p] -K(360,2) * [PTPRJ_p |SRC_p];
  R360: PTPRJ_p => SRC_p; 1;
  // V(361) = K(361,1) * [PTPRJ_p |SRC_p];
  R361: PTPRJ_p => SRC_p; 1;
  // V(362) = K(362,1) * [PTPN11_p] * [CDKN1B_p] -K(362,2) * [PTPN11_p |CDKN1B_p];
  R362: PTPN11_p => CDKN1B_p; 1;
  // V(363) = K(363,1) * [PTPN11_p |CDKN1B_p];
  R363: PTPN11_p => CDKN1B_p; 1;
  // V(364) = K(364,1) * [PTPRJ_p] * [EGFR_p] -K(364,2) * [PTPRJ_p |EGFR_p];
  R364: PTPRJ_p => EGFR_p; 1;
  // V(365) = K(365,1) * [PTPRJ_p |EGFR_p];
  R365: PTPRJ_p => EGFR_p; 1;
  // V(366) = K(366,1) * [PTEN_p] * [STAT5A_p] -K(366,2) * [PTEN_p |STAT5A_p];
  R366: PTEN_p => STAT5A_p; 1;
  // V(367) = K(367,1) * [PTEN_p |STAT5A_p];
  R367: PTEN_p => STAT5A_p; 1;
  // V(368) = K(368,1) * [PTEN_p] * [IRS1_p] -K(368,2) * [PTEN_p |IRS1_p];
  R368: PTEN_p => IRS1_p; 1;
  // V(369) = K(369,1) * [PTEN_p |IRS1_p];
  R369: PTEN_p => IRS1_p; 1;
  // V(370) = K(370,1) * [PTPN11_p] * [STAT1_p] -K(370,2) * [PTPN11_p |STAT1_p];
  R370: STAT1_p => PTPN11_p; 1;
  // V(371) = K(371,1) * [PTPN11_p |STAT1_p];
  R371: STAT1_p => PTPN11_p; 1;
  // V(372) = K(372,1) * [PTEN_p] * [CREB1_p] -K(372,2) * [PTEN_p |CREB1_p];
  R372: PTEN_p => CREB1_p; 1;
  // V(373) = K(373,1) * [PTEN_p |CREB1_p];
  R373: PTEN_p => CREB1_p; 1;
  // V(374) = K(374,1) * [DUSP1_p] * [JUN_p] -K(374,2) * [DUSP1_p |JUN_p];
  R374: JUN_p => DUSP1_p; 1;
  // V(375) = K(375,1) * [DUSP1_p |JUN_p];
  R375: JUN_p => DUSP1_p; 1;
  // V(376) = K(376,1) * [PTPN6_p] * [CTNNB1_p] -K(376,2) * [PTPN6_p |CTNNB1_p];
  R376: PTPN6_p => CTNNB1_p; 1;
  // V(377) = K(377,1) * [PTPN6_p |CTNNB1_p];
  R377: PTPN6_p => CTNNB1_p; 1;
  // V(378) = K(378,1) * [MYLIP] * [LDLR] -K(378,2) * [MYLIP |LDLR];
  R378: MYLIP => LDLR; 1;
  // V(379) = K(379,1) * [MYLIP |LDLR];
  R379: MYLIP => LDLR; 1;
  // V(380) = K(380,1) * [TRAF6_p] * [TRAF6] -K(380,2) * [TRAF6_p |TRAF6];
  R380: TRAF6_p => TRAF6; 1;
  // V(381) = K(381,1) * [TRAF6_p |TRAF6];
  R381: TRAF6_p => TRAF6; 1;
  // V(382) = K(382,1) * [RNF7] * [HIF1A] -K(382,2) * [RNF7 |HIF1A];
  R382: HIF1A => RNF7; 1;
  // V(383) = K(383,1) * [RNF7 |HIF1A];
  R383: HIF1A => RNF7; 1;
  // V(384) = K(384,1) * [SOCS1] * [JAK2] -K(384,2) * [SOCS1 |JAK2];
  R384: JAK2 => SOCS1; 1;
  // V(385) = K(385,1) * [SOCS1 |JAK2];
  R385: JAK2 => SOCS1; 1;
  // V(386) = K(386,1) * [RNF7] * [CDKN1B] -K(386,2) * [RNF7 |CDKN1B];
  R386: CDKN1B => RNF7; 1;
  // V(387) = K(387,1) * [RNF7 |CDKN1B];
  R387: CDKN1B => RNF7; 1;
  // V(388) = K(388,1) * [MYLIP] * [MYLIP] -K(388,2) * [MYLIP |MYLIP];
  R388: MYLIP => ; 1;
  // V(389) = K(389,1) * [MYLIP |MYLIP];
  R389: MYLIP => ; 1;
  // V(390) = K(390,1) * [PINK1] * [MFN1] -K(390,2) * [PINK1 |MFN1];
  R390: PINK1 => MFN1; 1;
  // V(391) = K(391,1) * [PINK1 |MFN1];
  R391: PINK1 => MFN1; 1;
  // V(392) = K(392,1) * [RNF7] * [JUN] -K(392,2) * [RNF7 |JUN];
  R392: JUN => RNF7; 1;
  // V(393) = K(393,1) * [RNF7 |JUN];
  R393: JUN => RNF7; 1;
  // V(394) = K(394,1) * [TRAF6_p] * [TP53] -K(394,2) * [TRAF6_p |TP53];
  R394: TP53 => TRAF6_p; 1;
  // V(395) = K(395,1) * [TRAF6_p |TP53];
  R395: TP53 => TRAF6_p; 1;
  // V(396) = K(396,1) * [NUMB] * [NOTCH1] -K(396,2) * [NUMB |NOTCH1];
  R396: NOTCH1 => NUMB; 1;
  // V(397) = K(397,1) * [NUMB |NOTCH1];
  R397: NOTCH1 => NUMB; 1;
  // V(398) = K(398,1) * [RNF7] * [CASP3] -K(398,2) * [RNF7 |CASP3];
  R398: RNF7 => CASP3; 1;
  // V(399) = K(399,1) * [RNF7 |CASP3];
  R399: RNF7 => CASP3; 1;
  // V(400) = K(400,1) * [JUN_p] * [SP1_p] * [TGFB1_g] -K(400,2) * [JUN_p |SP1_p |TGFB1_g];
  R400: SP1_p => TGFB1_g; 1;
  // V(401) = K(401,1) * [JUN_p |SP1_p |TGFB1_g];
  R401: SP1_p => TGFB1_g; 1;
  // V(402) = K(402,1) * [TGFB1_rna];
  R402: TGFB1_rna => ; 1;
  // V(403) = K(403,1) * [TP53_p] * [CDKN1A_g] -K(403,2) * [TP53_p |CDKN1A_g];
  R403: CDKN1A_g => TP53_p; 1;
  // V(404) = K(404,1) * [TP53_p |CDKN1A_g];
  R404: CDKN1A_g => TP53_p; 1;
  // V(405) = K(405,1) * [CDKN1A_rna];
  R405: CDKN1A_rna => ; 1;
  // V(406) = K(406,1) * [HIF1A_p] * [SIGNOR-C154_p] * [CCL2_g] -K(406,2) * [HIF1A_p |SIGNOR-C154_p |CCL2_g];
  R406: CCL2_g => HIF1A_p; 1;
  // V(407) = K(407,1) * [HIF1A_p |SIGNOR-C154_p |CCL2_g];
  R407: CCL2_g => HIF1A_p; 1;
  // V(408) = K(408,1) * [CCL2_rna];
  R408: CCL2_rna => ; 1;
  // V(409) = K(409,1) * [ATF3] * [GDF15_g] -K(409,2) * [ATF3 |GDF15_g];
  R409: GDF15_g => ATF3; 1;
  // V(410) = K(410,1) * [ATF3 |GDF15_g];
  R410: GDF15_g => ATF3; 1;
  // V(411) = K(411,1) * [GDF15_rna];
  R411: GDF15_rna => ; 1;
  // V(412) = K(412,1) * [TP53_p] * [BAX_g] -K(412,2) * [TP53_p |BAX_g];
  R412: BAX_g => TP53_p; 1;
  // V(413) = K(413,1) * [TP53_p |BAX_g];
  R413: BAX_g => TP53_p; 1;
  // V(414) = K(414,1) * [BAX_rna];
  R414: BAX_rna => ; 1;
  // V(415) = K(415,1) * [FOXO1_p] * [CDKN1B_g] -K(415,2) * [FOXO1_p |CDKN1B_g];
  R415: FOXO1_p => CDKN1B_g; 1;
  // V(416) = K(416,1) * [FOXO1_p |CDKN1B_g];
  R416: FOXO1_p => CDKN1B_g; 1;
  // V(417) = K(417,1) * [CDKN1B_rna];
  R417: CDKN1B_rna => ; 1;
  // V(418) = K(418,1) * [NFE2L2_p] * [CAT_g] -K(418,2) * [NFE2L2_p |CAT_g];
  R418: CAT_g => NFE2L2_p; 1;
  // V(419) = K(419,1) * [NFE2L2_p |CAT_g];
  R419: CAT_g => NFE2L2_p; 1;
  // V(420) = K(420,1) * [CAT_rna];
  R420: CAT_rna => ; 1;
  // V(421) = K(421,1) * [TP53_p] * [FAS_g] -K(421,2) * [TP53_p |FAS_g];
  R421: FAS_g => TP53_p; 1;
  // V(422) = K(422,1) * [TP53_p |FAS_g];
  R422: FAS_g => TP53_p; 1;
  // V(423) = K(423,1) * [FAS_rna];
  R423: FAS_rna => ; 1;
  // V(424) = K(424,1) * [FOXO1_p] * [PCK1_g] -K(424,2) * [FOXO1_p |PCK1_g];
  R424: FOXO1_p => PCK1_g; 1;
  // V(425) = K(425,1) * [FOXO1_p |PCK1_g];
  R425: FOXO1_p => PCK1_g; 1;
  // V(426) = K(426,1) * [PCK1_rna];
  R426: PCK1_rna => ; 1;
  // V(427) = K(427,1) * [HIF1A_p] * [KDM6B_g] -K(427,2) * [HIF1A_p |KDM6B_g];
  R427: KDM6B_g => HIF1A_p; 1;
  // V(428) = K(428,1) * [HIF1A_p |KDM6B_g];
  R428: KDM6B_g => HIF1A_p; 1;
  // V(429) = K(429,1) * [KDM6B_rna];
  R429: KDM6B_rna => ; 1;
  // V(430) = K(430,1) * [NR3C1_p] * [KLF9_g] -K(430,2) * [NR3C1_p |KLF9_g];
  R430: KLF9_g => NR3C1_p; 1;
  // V(431) = K(431,1) * [NR3C1_p |KLF9_g];
  R431: KLF9_g => NR3C1_p; 1;
  // V(432) = K(432,1) * [KLF9_rna];
  R432: KLF9_rna => ; 1;
  // V(433) = K(433,1) * [CREB1_p] * [IRS2_g] -K(433,2) * [CREB1_p |IRS2_g];
  R433: CREB1_p => IRS2_g; 1;
  // V(434) = K(434,1) * [CREB1_p |IRS2_g];
  R434: CREB1_p => IRS2_g; 1;
  // V(435) = K(435,1) * [IRS2_rna];
  R435: IRS2_rna => ; 1;
  // V(436) = K(436,1) * [STAT6_p] * [SOCS1_g] -K(436,2) * [STAT6_p |SOCS1_g];
  R436: STAT6_p => SOCS1_g; 1;
  // V(437) = K(437,1) * [STAT6_p |SOCS1_g];
  R437: STAT6_p => SOCS1_g; 1;
  // V(438) = K(438,1) * [SOCS1_rna];
  R438: SOCS1_rna => ; 1;
  // V(439) = K(439,1) * [NFE2L2_p] * [GCLM_g] -K(439,2) * [NFE2L2_p |GCLM_g];
  R439: GCLM_g => NFE2L2_p; 1;
  // V(440) = K(440,1) * [NFE2L2_p |GCLM_g];
  R440: GCLM_g => NFE2L2_p; 1;
  // V(441) = K(441,1) * [GCLM_rna];
  R441: GCLM_rna => ; 1;
  // V(442) = K(442,1) * [TP53_p] * [AIFM1_g] -K(442,2) * [TP53_p |AIFM1_g];
  R442: AIFM1_g => TP53_p; 1;
  // V(443) = K(443,1) * [TP53_p |AIFM1_g];
  R443: AIFM1_g => TP53_p; 1;
  // V(444) = K(444,1) * [AIFM1_rna];
  R444: AIFM1_rna => ; 1;
  // V(445) = K(445,1) * [NFE2L2_p] * [SOD2_g] -K(445,2) * [NFE2L2_p |SOD2_g];
  R445: SOD2_g => NFE2L2_p; 1;
  // V(446) = K(446,1) * [NFE2L2_p |SOD2_g];
  R446: SOD2_g => NFE2L2_p; 1;
  // V(447) = K(447,1) * [SOD2_rna];
  R447: SOD2_rna => ; 1;
  // V(448) = K(448,1) * [NR3C1_p] * [JUN_g] -K(448,2) * [NR3C1_p |JUN_g];
  R448: JUN_g => NR3C1_p; 1;
  // V(449) = K(449,1) * [JUN_g];
  R449: JUN_g => ; 1;
  // V(450) = K(450,1) * [JUN_rna];
  R450: JUN_rna => ; 1;
  // V(451) = K(451,1) * [RELA] * [BMP4_g] -K(451,2) * [RELA |BMP4_g];
  R451: BMP4_g => RELA; 1;
  // V(452) = K(452,1) * [BMP4_g];
  R452: BMP4_g => ; 1;
  // V(453) = K(453,1) * [BMP4_rna];
  R453: BMP4_rna => ; 1;
  // V(454) = K(454,1) * [HDAC4] * [CDH1_g] -K(454,2) * [HDAC4 |CDH1_g];
  R454: CDH1_g => HDAC4; 1;
  // V(455) = K(455,1) * [CDH1_g];
  R455: CDH1_g => ; 1;
  // V(456) = K(456,1) * [CDH1_rna];
  R456: CDH1_rna => ; 1;
  // V(457) = K(457,1) * [SGK1];
  R457: SGK1 => ; 1;
  // V(458) = K(458,1) * [TLR4];
  R458: TLR4 => ; 1;
  // V(459) = K(459,1) * [KDM6B];
  R459: KDM6B => ; 1;
  // V(460) = K(460,1) * [TLR3];
  R460: TLR3 => ; 1;
  // V(461) = K(461,1) * [SOCS1];
  R461: SOCS1 => ; 1;
  // V(462) = K(462,1) * [PDPK1];
  R462: PDPK1 => ; 1;
  // V(463) = K(463,1) * [PROM1];
  R463: PROM1 => ; 1;
  // V(464) = K(464,1) * [JAK2];
  R464: JAK2 => ; 1;
  // V(465) = K(465,1) * [ERN1];
  R465: ERN1 => ; 1;
  // V(466) = K(466,1) * [ABCA1];
  R466: ABCA1 => ; 1;
  // V(467) = K(467,1) * [AIFM1];
  R467: AIFM1 => ; 1;
  // V(468) = K(468,1) * [EGFR];
  R468: EGFR => ; 1;
  // V(469) = K(469,1) * [FOS];
  R469: FOS => ; 1;
  // V(470) = K(470,1) * [LDLR];
  R470: LDLR => ; 1;
  // V(471) = K(471,1) * [TGFA];
  R471: TGFA => ; 1;
  // V(472) = K(472,1) * [TGFB1];
  R472: TGFB1 => ; 1;
  // V(473) = K(473,1) * [CAT];
  R473: CAT => ; 1;
  // V(474) = K(474,1) * [ANXA1];
  R474: ANXA1 => ; 1;
  // V(475) = K(475,1) * [NR3C1];
  R475: NR3C1 => ; 1;
  // V(476) = K(476,1) * [SOD2];
  R476: SOD2 => ; 1;
  // V(477) = K(477,1) * [TP53];
  R477: TP53 => ; 1;
  // V(478) = K(478,1) * [HSPB1];
  R478: HSPB1 => ; 1;
  // V(479) = K(479,1) * [JUN];
  R479: JUN => ; 1;
  // V(480) = K(480,1) * [INSR];
  R480: INSR => ; 1;
  // V(481) = K(481,1) * [SP1];
  R481: SP1 => ; 1;
  // V(482) = K(482,1) * [IGF1R];
  R482: IGF1R => ; 1;
  // V(483) = K(483,1) * [NR3C2];
  R483: NR3C2 => ; 1;
  // V(484) = K(484,1) * [VIM];
  R484: VIM => ; 1;
  // V(485) = K(485,1) * [PARP1];
  R485: PARP1 => ; 1;
  // V(486) = K(486,1) * [UBC];
  R486: UBC => ; 1;
  // V(487) = K(487,1) * [RRAS];
  R487: RRAS => ; 1;
  // V(488) = K(488,1) * [BCL2];
  R488: BCL2 => ; 1;
  // V(489) = K(489,1) * [KIT];
  R489: KIT => ; 1;
  // V(490) = K(490,1) * [PCNA];
  R490: PCNA => ; 1;
  // V(491) = K(491,1) * [BMP4];
  R491: BMP4 => ; 1;
  // V(492) = K(492,1) * [CDH1];
  R492: CDH1 => ; 1;
  // V(493) = K(493,1) * [SRC];
  R493: SRC => ; 1;
  // V(494) = K(494,1) * [CCL2];
  R494: CCL2 => ; 1;
  // V(495) = K(495,1) * [PKM];
  R495: PKM => ; 1;
  // V(496) = K(496,1) * [CREB1];
  R496: CREB1 => ; 1;
  // V(497) = K(497,1) * [ENG];
  R497: ENG => ; 1;
  // V(498) = K(498,1) * [XBP1];
  R498: XBP1 => ; 1;
  // V(499) = K(499,1) * [ATF3];
  R499: ATF3 => ; 1;
  // V(500) = K(500,1) * [NR4A1];
  R500: NR4A1 => ; 1;
  // V(501) = K(501,1) * [RPS6KB1];
  R501: RPS6KB1 => ; 1;
  // V(502) = K(502,1) * [FAS];
  R502: FAS => ; 1;
  // V(503) = K(503,1) * [DNMT1];
  R503: DNMT1 => ; 1;
  // V(504) = K(504,1) * [ZFP36];
  R504: ZFP36 => ; 1;
  // V(505) = K(505,1) * [PIK3R1];
  R505: PIK3R1 => ; 1;
  // V(506) = K(506,1) * [MAPK1];
  R506: MAPK1 => ; 1;
  // V(507) = K(507,1) * [DUSP1];
  R507: DUSP1 => ; 1;
  // V(508) = K(508,1) * [PTPN6];
  R508: PTPN6 => ; 1;
  // V(509) = K(509,1) * [CTNNB1];
  R509: CTNNB1 => ; 1;
  // V(510) = K(510,1) * [RORA];
  R510: RORA => ; 1;
  // V(511) = K(511,1) * [PCK1];
  R511: PCK1 => ; 1;
  // V(512) = K(512,1) * [IRS1];
  R512: IRS1 => ; 1;
  // V(513) = K(513,1) * [DDIT3];
  R513: DDIT3 => ; 1;
  // V(514) = K(514,1) * [CDKN1A];
  R514: CDKN1A => ; 1;
  // V(515) = K(515,1) * [STAT1];
  R515: STAT1 => ; 1;
  // V(516) = K(516,1) * [STAT6];
  R516: STAT6 => ; 1;
  // V(517) = K(517,1) * [STAT5A];
  R517: STAT5A => ; 1;
  // V(518) = K(518,1) * [CASP3];
  R518: CASP3 => ; 1;
  // V(519) = K(519,1) * [CDKN1B];
  R519: CDKN1B => ; 1;
  // V(520) = K(520,1) * [NOTCH1];
  R520: NOTCH1 => ; 1;
  // V(521) = K(521,1) * [GCLM];
  R521: GCLM => ; 1;
  // V(522) = K(522,1) * [NUMB];
  R522: NUMB => ; 1;
  // V(523) = K(523,1) * [RPS6KA3];
  R523: RPS6KA3 => ; 1;
  // V(524) = K(524,1) * [RCAN1];
  R524: RCAN1 => ; 1;
  // V(525) = K(525,1) * [CASP9];
  R525: CASP9 => ; 1;
  // V(526) = K(526,1) * [HDAC4];
  R526: HDAC4 => ; 1;
  // V(527) = K(527,1) * [PTEN];
  R527: PTEN => ; 1;
  // V(528) = K(528,1) * [RAC1];
  R528: RAC1 => ; 1;
  // V(529) = K(529,1) * [CLTC];
  R529: CLTC => ; 1;
  // V(530) = K(530,1) * [NFKB2];
  R530: NFKB2 => ; 1;
  // V(531) = K(531,1) * [RELA];
  R531: RELA => ; 1;
  // V(532) = K(532,1) * [PTPN11];
  R532: PTPN11 => ; 1;
  // V(533) = K(533,1) * [BAX];
  R533: BAX => ; 1;
  // V(534) = K(534,1) * [FOXO1];
  R534: FOXO1 => ; 1;
  // V(535) = K(535,1) * [PTPRJ];
  R535: PTPRJ => ; 1;
  // V(536) = K(536,1) * [PRKAA1];
  R536: PRKAA1 => ; 1;
  // V(537) = K(537,1) * [MAPK7];
  R537: MAPK7 => ; 1;
  // V(538) = K(538,1) * [ROCK1];
  R538: ROCK1 => ; 1;
  // V(539) = K(539,1) * [SMAD4];
  R539: SMAD4 => ; 1;
  // V(540) = K(540,1) * [ATR];
  R540: ATR => ; 1;
  // V(541) = K(541,1) * [STIM1];
  R541: STIM1 => ; 1;
  // V(542) = K(542,1) * [KLF9];
  R542: KLF9 => ; 1;
  // V(543) = K(543,1) * [SMAD2];
  R543: SMAD2 => ; 1;
  // V(544) = K(544,1) * [SMAD1];
  R544: SMAD1 => ; 1;
  // V(545) = K(545,1) * [NFE2L2];
  R545: NFE2L2 => ; 1;
  // V(546) = K(546,1) * [PKN1];
  R546: PKN1 => ; 1;
  // V(547) = K(547,1) * [HIF1A];
  R547: HIF1A => ; 1;
  // V(548) = K(548,1) * [RICTOR];
  R548: RICTOR => ; 1;
  // V(549) = K(549,1) * [MFN1];
  R549: MFN1 => ; 1;
  // V(550) = K(550,1) * [PIK3C3];
  R550: PIK3C3 => ; 1;
  // V(551) = K(551,1) * [NRG4];
  R551: NRG4 => ; 1;
  // V(552) = K(552,1) * [MYLIP];
  R552: MYLIP => ; 1;
  // V(553) = K(553,1) * [MAP3K14];
  R553: MAP3K14 => ; 1;
  // V(554) = K(554,1) * [MAP3K5];
  R554: MAP3K5 => ; 1;
  // V(555) = K(555,1) * [GDF15];
  R555: GDF15 => ; 1;
  // V(556) = K(556,1) * [PINK1];
  R556: PINK1 => ; 1;
  // V(557) = K(557,1) * [HIPK2];
  R557: HIPK2 => ; 1;
  // V(558) = K(558,1) * [RNF7];
  R558: RNF7 => ; 1;
  // V(559) = K(559,1) * [IRS2];
  R559: IRS2 => ; 1;
  // V(560) = K(560,1) * [TRAF6];
  R560: TRAF6 => ; 1;
  // V(561) = K(561,1) * [KDM6B_rna];
  R561: KDM6B_rna => ; 1;
  // V(562) = K(562,1) * [SOCS1_rna];
  R562: SOCS1_rna => ; 1;
  // V(563) = K(563,1) * [AIFM1_rna];
  R563: AIFM1_rna => ; 1;
  // V(564) = K(564,1) * [TGFB1_rna];
  R564: TGFB1_rna => ; 1;
  // V(565) = K(565,1) * [CAT_rna];
  R565: CAT_rna => ; 1;
  // V(566) = K(566,1) * [SOD2_rna];
  R566: SOD2_rna => ; 1;
  // V(567) = K(567,1) * [JUN_rna];
  R567: JUN_rna => ; 1;
  // V(568) = K(568,1) * [BMP4_rna];
  R568: BMP4_rna => ; 1;
  // V(569) = K(569,1) * [CDH1_rna];
  R569: CDH1_rna => ; 1;
  // V(570) = K(570,1) * [CCL2_rna];
  R570: CCL2_rna => ; 1;
  // V(571) = K(571,1) * [FAS_rna];
  R571: FAS_rna => ; 1;
  // V(572) = K(572,1) * [PCK1_rna];
  R572: PCK1_rna => ; 1;
  // V(573) = K(573,1) * [CDKN1A_rna];
  R573: CDKN1A_rna => ; 1;
  // V(574) = K(574,1) * [CDKN1B_rna];
  R574: CDKN1B_rna => ; 1;
  // V(575) = K(575,1) * [GCLM_rna];
  R575: GCLM_rna => ; 1;
  // V(576) = K(576,1) * [BAX_rna];
  R576: BAX_rna => ; 1;
  // V(577) = K(577,1) * [KLF9_rna];
  R577: KLF9_rna => ; 1;
  // V(578) = K(578,1) * [GDF15_rna];
  R578: GDF15_rna => ; 1;
  // V(579) = K(579,1) * [IRS2_rna];
  R579: IRS2_rna => ; 1;
  // V(580) = K(580,1) * [SGK1_g];
  R580: SGK1_g => ; 1;
  // V(581) = K(581,1) * [SGK1_rna];
  R581: SGK1_rna => ; 1;
  // V(582) = K(582,1) * [TLR4_g];
  R582: TLR4_g => ; 1;
  // V(583) = K(583,1) * [TLR4_rna];
  R583: TLR4_rna => ; 1;
  // V(584) = K(584,1) * [TLR3_g];
  R584: TLR3_g => ; 1;
  // V(585) = K(585,1) * [TLR3_rna];
  R585: TLR3_rna => ; 1;
  // V(586) = K(586,1) * [PDPK1_g];
  R586: PDPK1_g => ; 1;
  // V(587) = K(587,1) * [PDPK1_rna];
  R587: PDPK1_rna => ; 1;
  // V(588) = K(588,1) * [PROM1_g];
  R588: PROM1_g => ; 1;
  // V(589) = K(589,1) * [PROM1_rna];
  R589: PROM1_rna => ; 1;
  // V(590) = K(590,1) * [JAK2_g];
  R590: JAK2_g => ; 1;
  // V(591) = K(591,1) * [JAK2_rna];
  R591: JAK2_rna => ; 1;
  // V(592) = K(592,1) * [ERN1_g];
  R592: ERN1_g => ; 1;
  // V(593) = K(593,1) * [ERN1_rna];
  R593: ERN1_rna => ; 1;
  // V(594) = K(594,1) * [ABCA1_g];
  R594: ABCA1_g => ; 1;
  // V(595) = K(595,1) * [ABCA1_rna];
  R595: ABCA1_rna => ; 1;
  // V(596) = K(596,1) * [EGFR_g];
  R596: EGFR_g => ; 1;
  // V(597) = K(597,1) * [EGFR_rna];
  R597: EGFR_rna => ; 1;
  // V(598) = K(598,1) * [FOS_g];
  R598: FOS_g => ; 1;
  // V(599) = K(599,1) * [FOS_rna];
  R599: FOS_rna => ; 1;
  // V(600) = K(600,1) * [LDLR_g];
  R600: LDLR_g => ; 1;
  // V(601) = K(601,1) * [LDLR_rna];
  R601: LDLR_rna => ; 1;
  // V(602) = K(602,1) * [TGFA_g];
  R602: TGFA_g => ; 1;
  // V(603) = K(603,1) * [TGFA_rna];
  R603: TGFA_rna => ; 1;
  // V(604) = K(604,1) * [ANXA1_g];
  R604: ANXA1_g => ; 1;
  // V(605) = K(605,1) * [ANXA1_rna];
  R605: ANXA1_rna => ; 1;
  // V(606) = K(606,1) * [NR3C1_g];
  R606: NR3C1_g => ; 1;
  // V(607) = K(607,1) * [NR3C1_rna];
  R607: NR3C1_rna => ; 1;
  // V(608) = K(608,1) * [TP53_g];
  R608: TP53_g => ; 1;
  // V(609) = K(609,1) * [TP53_rna];
  R609: TP53_rna => ; 1;
  // V(610) = K(610,1) * [HSPB1_g];
  R610: HSPB1_g => ; 1;
  // V(611) = K(611,1) * [HSPB1_rna];
  R611: HSPB1_rna => ; 1;
  // V(612) = K(612,1) * [INSR_g];
  R612: INSR_g => ; 1;
  // V(613) = K(613,1) * [INSR_rna];
  R613: INSR_rna => ; 1;
  // V(614) = K(614,1) * [SP1_g];
  R614: SP1_g => ; 1;
  // V(615) = K(615,1) * [SP1_rna];
  R615: SP1_rna => ; 1;
  // V(616) = K(616,1) * [IGF1R_g];
  R616: IGF1R_g => ; 1;
  // V(617) = K(617,1) * [IGF1R_rna];
  R617: IGF1R_rna => ; 1;
  // V(618) = K(618,1) * [NR3C2_g];
  R618: NR3C2_g => ; 1;
  // V(619) = K(619,1) * [NR3C2_rna];
  R619: NR3C2_rna => ; 1;
  // V(620) = K(620,1) * [VIM_g];
  R620: VIM_g => ; 1;
  // V(621) = K(621,1) * [VIM_rna];
  R621: VIM_rna => ; 1;
  // V(622) = K(622,1) * [PARP1_g];
  R622: PARP1_g => ; 1;
  // V(623) = K(623,1) * [PARP1_rna];
  R623: PARP1_rna => ; 1;
  // V(624) = K(624,1) * [UBC_g];
  R624: UBC_g => ; 1;
  // V(625) = K(625,1) * [UBC_rna];
  R625: UBC_rna => ; 1;
  // V(626) = K(626,1) * [RRAS_g];
  R626: RRAS_g => ; 1;
  // V(627) = K(627,1) * [RRAS_rna];
  R627: RRAS_rna => ; 1;
  // V(628) = K(628,1) * [BCL2_g];
  R628: BCL2_g => ; 1;
  // V(629) = K(629,1) * [BCL2_rna];
  R629: BCL2_rna => ; 1;
  // V(630) = K(630,1) * [KIT_g];
  R630: KIT_g => ; 1;
  // V(631) = K(631,1) * [KIT_rna];
  R631: KIT_rna => ; 1;
  // V(632) = K(632,1) * [PCNA_g];
  R632: PCNA_g => ; 1;
  // V(633) = K(633,1) * [PCNA_rna];
  R633: PCNA_rna => ; 1;
  // V(634) = K(634,1) * [SRC_g];
  R634: SRC_g => ; 1;
  // V(635) = K(635,1) * [SRC_rna];
  R635: SRC_rna => ; 1;
  // V(636) = K(636,1) * [PKM_g];
  R636: PKM_g => ; 1;
  // V(637) = K(637,1) * [PKM_rna];
  R637: PKM_rna => ; 1;
  // V(638) = K(638,1) * [CREB1_g];
  R638: CREB1_g => ; 1;
  // V(639) = K(639,1) * [CREB1_rna];
  R639: CREB1_rna => ; 1;
  // V(640) = K(640,1) * [ENG_g];
  R640: ENG_g => ; 1;
  // V(641) = K(641,1) * [ENG_rna];
  R641: ENG_rna => ; 1;
  // V(642) = K(642,1) * [XBP1_g];
  R642: XBP1_g => ; 1;
  // V(643) = K(643,1) * [XBP1_rna];
  R643: XBP1_rna => ; 1;
  // V(644) = K(644,1) * [ATF3_g];
  R644: ATF3_g => ; 1;
  // V(645) = K(645,1) * [ATF3_rna];
  R645: ATF3_rna => ; 1;
  // V(646) = K(646,1) * [NR4A1_g];
  R646: NR4A1_g => ; 1;
  // V(647) = K(647,1) * [NR4A1_rna];
  R647: NR4A1_rna => ; 1;
  // V(648) = K(648,1) * [RPS6KB1_g];
  R648: RPS6KB1_g => ; 1;
  // V(649) = K(649,1) * [RPS6KB1_rna];
  R649: RPS6KB1_rna => ; 1;
  // V(650) = K(650,1) * [DNMT1_g];
  R650: DNMT1_g => ; 1;
  // V(651) = K(651,1) * [DNMT1_rna];
  R651: DNMT1_rna => ; 1;
  // V(652) = K(652,1) * [ZFP36_g];
  R652: ZFP36_g => ; 1;
  // V(653) = K(653,1) * [ZFP36_rna];
  R653: ZFP36_rna => ; 1;
  // V(654) = K(654,1) * [PIK3R1_g];
  R654: PIK3R1_g => ; 1;
  // V(655) = K(655,1) * [PIK3R1_rna];
  R655: PIK3R1_rna => ; 1;
  // V(656) = K(656,1) * [MAPK1_g];
  R656: MAPK1_g => ; 1;
  // V(657) = K(657,1) * [MAPK1_rna];
  R657: MAPK1_rna => ; 1;
  // V(658) = K(658,1) * [DUSP1_g];
  R658: DUSP1_g => ; 1;
  // V(659) = K(659,1) * [DUSP1_rna];
  R659: DUSP1_rna => ; 1;
  // V(660) = K(660,1) * [PTPN6_g];
  R660: PTPN6_g => ; 1;
  // V(661) = K(661,1) * [PTPN6_rna];
  R661: PTPN6_rna => ; 1;
  // V(662) = K(662,1) * [CTNNB1_g];
  R662: CTNNB1_g => ; 1;
  // V(663) = K(663,1) * [CTNNB1_rna];
  R663: CTNNB1_rna => ; 1;
  // V(664) = K(664,1) * [RORA_g];
  R664: RORA_g => ; 1;
  // V(665) = K(665,1) * [RORA_rna];
  R665: RORA_rna => ; 1;
  // V(666) = K(666,1) * [IRS1_g];
  R666: IRS1_g => ; 1;
  // V(667) = K(667,1) * [IRS1_rna];
  R667: IRS1_rna => ; 1;
  // V(668) = K(668,1) * [DDIT3_g];
  R668: DDIT3_g => ; 1;
  // V(669) = K(669,1) * [DDIT3_rna];
  R669: DDIT3_rna => ; 1;
  // V(670) = K(670,1) * [STAT1_g];
  R670: STAT1_g => ; 1;
  // V(671) = K(671,1) * [STAT1_rna];
  R671: STAT1_rna => ; 1;
  // V(672) = K(672,1) * [STAT6_g];
  R672: STAT6_g => ; 1;
  // V(673) = K(673,1) * [STAT6_rna];
  R673: STAT6_rna => ; 1;
  // V(674) = K(674,1) * [STAT5A_g];
  R674: STAT5A_g => ; 1;
  // V(675) = K(675,1) * [STAT5A_rna];
  R675: STAT5A_rna => ; 1;
  // V(676) = K(676,1) * [CASP3_g];
  R676: CASP3_g => ; 1;
  // V(677) = K(677,1) * [CASP3_rna];
  R677: CASP3_rna => ; 1;
  // V(678) = K(678,1) * [NOTCH1_g];
  R678: NOTCH1_g => ; 1;
  // V(679) = K(679,1) * [NOTCH1_rna];
  R679: NOTCH1_rna => ; 1;
  // V(680) = K(680,1) * [NUMB_g];
  R680: NUMB_g => ; 1;
  // V(681) = K(681,1) * [NUMB_rna];
  R681: NUMB_rna => ; 1;
  // V(682) = K(682,1) * [RPS6KA3_g];
  R682: RPS6KA3_g => ; 1;
  // V(683) = K(683,1) * [RPS6KA3_rna];
  R683: RPS6KA3_rna => ; 1;
  // V(684) = K(684,1) * [RCAN1_g];
  R684: RCAN1_g => ; 1;
  // V(685) = K(685,1) * [RCAN1_rna];
  R685: RCAN1_rna => ; 1;
  // V(686) = K(686,1) * [CASP9_g];
  R686: CASP9_g => ; 1;
  // V(687) = K(687,1) * [CASP9_rna];
  R687: CASP9_rna => ; 1;
  // V(688) = K(688,1) * [HDAC4_g];
  R688: HDAC4_g => ; 1;
  // V(689) = K(689,1) * [HDAC4_rna];
  R689: HDAC4_rna => ; 1;
  // V(690) = K(690,1) * [PTEN_g];
  R690: PTEN_g => ; 1;
  // V(691) = K(691,1) * [PTEN_rna];
  R691: PTEN_rna => ; 1;
  // V(692) = K(692,1) * [RAC1_g];
  R692: RAC1_g => ; 1;
  // V(693) = K(693,1) * [RAC1_rna];
  R693: RAC1_rna => ; 1;
  // V(694) = K(694,1) * [CLTC_g];
  R694: CLTC_g => ; 1;
  // V(695) = K(695,1) * [CLTC_rna];
  R695: CLTC_rna => ; 1;
  // V(696) = K(696,1) * [NFKB2_g];
  R696: NFKB2_g => ; 1;
  // V(697) = K(697,1) * [NFKB2_rna];
  R697: NFKB2_rna => ; 1;
  // V(698) = K(698,1) * [RELA_g];
  R698: RELA_g => ; 1;
  // V(699) = K(699,1) * [RELA_rna];
  R699: RELA_rna => ; 1;
  // V(700) = K(700,1) * [PTPN11_g];
  R700: PTPN11_g => ; 1;
  // V(701) = K(701,1) * [PTPN11_rna];
  R701: PTPN11_rna => ; 1;
  // V(702) = K(702,1) * [FOXO1_g];
  R702: FOXO1_g => ; 1;
  // V(703) = K(703,1) * [FOXO1_rna];
  R703: FOXO1_rna => ; 1;
  // V(704) = K(704,1) * [PTPRJ_g];
  R704: PTPRJ_g => ; 1;
  // V(705) = K(705,1) * [PTPRJ_rna];
  R705: PTPRJ_rna => ; 1;
  // V(706) = K(706,1) * [PRKAA1_g];
  R706: PRKAA1_g => ; 1;
  // V(707) = K(707,1) * [PRKAA1_rna];
  R707: PRKAA1_rna => ; 1;
  // V(708) = K(708,1) * [MAPK7_g];
  R708: MAPK7_g => ; 1;
  // V(709) = K(709,1) * [MAPK7_rna];
  R709: MAPK7_rna => ; 1;
  // V(710) = K(710,1) * [ROCK1_g];
  R710: ROCK1_g => ; 1;
  // V(711) = K(711,1) * [ROCK1_rna];
  R711: ROCK1_rna => ; 1;
  // V(712) = K(712,1) * [SMAD4_g];
  R712: SMAD4_g => ; 1;
  // V(713) = K(713,1) * [SMAD4_rna];
  R713: SMAD4_rna => ; 1;
  // V(714) = K(714,1) * [ATR_g];
  R714: ATR_g => ; 1;
  // V(715) = K(715,1) * [ATR_rna];
  R715: ATR_rna => ; 1;
  // V(716) = K(716,1) * [STIM1_g];
  R716: STIM1_g => ; 1;
  // V(717) = K(717,1) * [STIM1_rna];
  R717: STIM1_rna => ; 1;
  // V(718) = K(718,1) * [SMAD2_g];
  R718: SMAD2_g => ; 1;
  // V(719) = K(719,1) * [SMAD2_rna];
  R719: SMAD2_rna => ; 1;
  // V(720) = K(720,1) * [SMAD1_g];
  R720: SMAD1_g => ; 1;
  // V(721) = K(721,1) * [SMAD1_rna];
  R721: SMAD1_rna => ; 1;
  // V(722) = K(722,1) * [NFE2L2_g];
  R722: NFE2L2_g => ; 1;
  // V(723) = K(723,1) * [NFE2L2_rna];
  R723: NFE2L2_rna => ; 1;
  // V(724) = K(724,1) * [PKN1_g];
  R724: PKN1_g => ; 1;
  // V(725) = K(725,1) * [PKN1_rna];
  R725: PKN1_rna => ; 1;
  // V(726) = K(726,1) * [HIF1A_g];
  R726: HIF1A_g => ; 1;
  // V(727) = K(727,1) * [HIF1A_rna];
  R727: HIF1A_rna => ; 1;
  // V(728) = K(728,1) * [RICTOR_g];
  R728: RICTOR_g => ; 1;
  // V(729) = K(729,1) * [RICTOR_rna];
  R729: RICTOR_rna => ; 1;
  // V(730) = K(730,1) * [MFN1_g];
  R730: MFN1_g => ; 1;
  // V(731) = K(731,1) * [MFN1_rna];
  R731: MFN1_rna => ; 1;
  // V(732) = K(732,1) * [PIK3C3_g];
  R732: PIK3C3_g => ; 1;
  // V(733) = K(733,1) * [PIK3C3_rna];
  R733: PIK3C3_rna => ; 1;
  // V(734) = K(734,1) * [NRG4_g];
  R734: NRG4_g => ; 1;
  // V(735) = K(735,1) * [NRG4_rna];
  R735: NRG4_rna => ; 1;
  // V(736) = K(736,1) * [MYLIP_g];
  R736: MYLIP_g => ; 1;
  // V(737) = K(737,1) * [MYLIP_rna];
  R737: MYLIP_rna => ; 1;
  // V(738) = K(738,1) * [MAP3K14_g];
  R738: MAP3K14_g => ; 1;
  // V(739) = K(739,1) * [MAP3K14_rna];
  R739: MAP3K14_rna => ; 1;
  // V(740) = K(740,1) * [MAP3K5_g];
  R740: MAP3K5_g => ; 1;
  // V(741) = K(741,1) * [MAP3K5_rna];
  R741: MAP3K5_rna => ; 1;
  // V(742) = K(742,1) * [PINK1_g];
  R742: PINK1_g => ; 1;
  // V(743) = K(743,1) * [PINK1_rna];
  R743: PINK1_rna => ; 1;
  // V(744) = K(744,1) * [HIPK2_g];
  R744: HIPK2_g => ; 1;
  // V(745) = K(745,1) * [HIPK2_rna];
  R745: HIPK2_rna => ; 1;
  // V(746) = K(746,1) * [RNF7_g];
  R746: RNF7_g => ; 1;
  // V(747) = K(747,1) * [RNF7_rna];
  R747: RNF7_rna => ; 1;
  // V(748) = K(748,1) * [TRAF6_g];
  R748: TRAF6_g => ; 1;
  // V(749) = K(749,1) * [TRAF6_rna];
  R749: TRAF6_rna => ; 1;
  // V(750) = K(750,1) * [SGK1_p];
  R750: SGK1_p => ; 1;
  // V(751) = K(751,1) * [TLR4_p];
  R751: TLR4_p => ; 1;
  // V(752) = K(752,1) * [TLR3_p];
  R752: TLR3_p => ; 1;
  // V(753) = K(753,1) * [SOCS1_p];
  R753: SOCS1_p => ; 1;
  // V(754) = K(754,1) * [PDPK1_p];
  R754: PDPK1_p => ; 1;
  // V(755) = K(755,1) * [PROM1_p];
  R755: PROM1_p => ; 1;
  // V(756) = K(756,1) * [JAK2_p];
  R756: JAK2_p => ; 1;
  // V(757) = K(757,1) * [ERN1_p];
  R757: ERN1_p => ; 1;
  // V(758) = K(758,1) * [ABCA1_p];
  R758: ABCA1_p => ; 1;
  // V(759) = K(759,1) * [EGFR_p];
  R759: EGFR_p => ; 1;
  // V(760) = K(760,1) * [FOS_p];
  R760: FOS_p => ; 1;
  // V(761) = K(761,1) * [ANXA1_p];
  R761: ANXA1_p => ; 1;
  // V(762) = K(762,1) * [NR3C1_p];
  R762: NR3C1_p => ; 1;
  // V(763) = K(763,1) * [TP53_p];
  R763: TP53_p => ; 1;
  // V(764) = K(764,1) * [HSPB1_p];
  R764: HSPB1_p => ; 1;
  // V(765) = K(765,1) * [JUN_p];
  R765: JUN_p => ; 1;
  // V(766) = K(766,1) * [INSR_p];
  R766: INSR_p => ; 1;
  // V(767) = K(767,1) * [SP1_p];
  R767: SP1_p => ; 1;
  // V(768) = K(768,1) * [IGF1R_p];
  R768: IGF1R_p => ; 1;
  // V(769) = K(769,1) * [NR3C2_p];
  R769: NR3C2_p => ; 1;
  // V(770) = K(770,1) * [VIM_p];
  R770: VIM_p => ; 1;
  // V(771) = K(771,1) * [PARP1_p];
  R771: PARP1_p => ; 1;
  // V(772) = K(772,1) * [UBC_p];
  R772: UBC_p => ; 1;
  // V(773) = K(773,1) * [RRAS_p];
  R773: RRAS_p => ; 1;
  // V(774) = K(774,1) * [BCL2_p];
  R774: BCL2_p => ; 1;
  // V(775) = K(775,1) * [KIT_p];
  R775: KIT_p => ; 1;
  // V(776) = K(776,1) * [PCNA_p];
  R776: PCNA_p => ; 1;
  // V(777) = K(777,1) * [CDH1_p];
  R777: CDH1_p => ; 1;
  // V(778) = K(778,1) * [SRC_p];
  R778: SRC_p => ; 1;
  // V(779) = K(779,1) * [PKM_p];
  R779: PKM_p => ; 1;
  // V(780) = K(780,1) * [CREB1_p];
  R780: CREB1_p => ; 1;
  // V(781) = K(781,1) * [ENG_p];
  R781: ENG_p => ; 1;
  // V(782) = K(782,1) * [XBP1_p];
  R782: XBP1_p => ; 1;
  // V(783) = K(783,1) * [NR4A1_p];
  R783: NR4A1_p => ; 1;
  // V(784) = K(784,1) * [RPS6KB1_p];
  R784: RPS6KB1_p => ; 1;
  // V(785) = K(785,1) * [DNMT1_p];
  R785: DNMT1_p => ; 1;
  // V(786) = K(786,1) * [ZFP36_p];
  R786: ZFP36_p => ; 1;
  // V(787) = K(787,1) * [PIK3R1_p];
  R787: PIK3R1_p => ; 1;
  // V(788) = K(788,1) * [MAPK1_p];
  R788: MAPK1_p => ; 1;
  // V(789) = K(789,1) * [DUSP1_p];
  R789: DUSP1_p => ; 1;
  // V(790) = K(790,1) * [PTPN6_p];
  R790: PTPN6_p => ; 1;
  // V(791) = K(791,1) * [CTNNB1_p];
  R791: CTNNB1_p => ; 1;
  // V(792) = K(792,1) * [RORA_p];
  R792: RORA_p => ; 1;
  // V(793) = K(793,1) * [IRS1_p];
  R793: IRS1_p => ; 1;
  // V(794) = K(794,1) * [DDIT3_p];
  R794: DDIT3_p => ; 1;
  // V(795) = K(795,1) * [CDKN1A_p];
  R795: CDKN1A_p => ; 1;
  // V(796) = K(796,1) * [STAT1_p];
  R796: STAT1_p => ; 1;
  // V(797) = K(797,1) * [STAT6_p];
  R797: STAT6_p => ; 1;
  // V(798) = K(798,1) * [STAT5A_p];
  R798: STAT5A_p => ; 1;
  // V(799) = K(799,1) * [CDKN1B_p];
  R799: CDKN1B_p => ; 1;
  // V(800) = K(800,1) * [RPS6KA3_p];
  R800: RPS6KA3_p => ; 1;
  // V(801) = K(801,1) * [RCAN1_p];
  R801: RCAN1_p => ; 1;
  // V(802) = K(802,1) * [CASP9_p];
  R802: CASP9_p => ; 1;
  // V(803) = K(803,1) * [HDAC4_p];
  R803: HDAC4_p => ; 1;
  // V(804) = K(804,1) * [PTEN_p];
  R804: PTEN_p => ; 1;
  // V(805) = K(805,1) * [RAC1_p];
  R805: RAC1_p => ; 1;
  // V(806) = K(806,1) * [CLTC_p];
  R806: CLTC_p => ; 1;
  // V(807) = K(807,1) * [NFKB2_p];
  R807: NFKB2_p => ; 1;
  // V(808) = K(808,1) * [PTPN11_p];
  R808: PTPN11_p => ; 1;
  // V(809) = K(809,1) * [FOXO1_p];
  R809: FOXO1_p => ; 1;
  // V(810) = K(810,1) * [PTPRJ_p];
  R810: PTPRJ_p => ; 1;
  // V(811) = K(811,1) * [PRKAA1_p];
  R811: PRKAA1_p => ; 1;
  // V(812) = K(812,1) * [MAPK7_p];
  R812: MAPK7_p => ; 1;
  // V(813) = K(813,1) * [SMAD4_p];
  R813: SMAD4_p => ; 1;
  // V(814) = K(814,1) * [STIM1_p];
  R814: STIM1_p => ; 1;
  // V(815) = K(815,1) * [SMAD2_p];
  R815: SMAD2_p => ; 1;
  // V(816) = K(816,1) * [SMAD1_p];
  R816: SMAD1_p => ; 1;
  // V(817) = K(817,1) * [NFE2L2_p];
  R817: NFE2L2_p => ; 1;
  // V(818) = K(818,1) * [PKN1_p];
  R818: PKN1_p => ; 1;
  // V(819) = K(819,1) * [HIF1A_p];
  R819: HIF1A_p => ; 1;
  // V(820) = K(820,1) * [RICTOR_p];
  R820: RICTOR_p => ; 1;
  // V(821) = K(821,1) * [MFN1_p];
  R821: MFN1_p => ; 1;
  // V(822) = K(822,1) * [PIK3C3_p];
  R822: PIK3C3_p => ; 1;
  // V(823) = K(823,1) * [MAP3K14_p];
  R823: MAP3K14_p => ; 1;
  // V(824) = K(824,1) * [MAP3K5_p];
  R824: MAP3K5_p => ; 1;
  // V(825) = K(825,1) * [HIPK2_p];
  R825: HIPK2_p => ; 1;
  // V(826) = K(826,1) * [IRS2_p];
  R826: IRS2_p => ; 1;
  // V(827) = K(827,1) * [TRAF6_p];
  R827: TRAF6_p => ; 1;
  // V(828) = K(828,1) * [SIGNOR-C154_p];
  R828: => ; 1;
  // V(829) = K(829,1) * [SGK1_rna];
  R829: SGK1_rna => ; 1;
  // V(830) = K(830,1) * [TLR4_rna];
  R830: TLR4_rna => ; 1;
  // V(831) = K(831,1) * [TLR3_rna];
  R831: TLR3_rna => ; 1;
  // V(832) = K(832,1) * [PDPK1_rna];
  R832: PDPK1_rna => ; 1;
  // V(833) = K(833,1) * [PROM1_rna];
  R833: PROM1_rna => ; 1;
  // V(834) = K(834,1) * [JAK2_rna];
  R834: JAK2_rna => ; 1;
  // V(835) = K(835,1) * [ERN1_rna];
  R835: ERN1_rna => ; 1;
  // V(836) = K(836,1) * [ABCA1_rna];
  R836: ABCA1_rna => ; 1;
  // V(837) = K(837,1) * [EGFR_rna];
  R837: EGFR_rna => ; 1;
  // V(838) = K(838,1) * [FOS_rna];
  R838: FOS_rna => ; 1;
  // V(839) = K(839,1) * [LDLR_rna];
  R839: LDLR_rna => ; 1;
  // V(840) = K(840,1) * [TGFA_rna];
  R840: TGFA_rna => ; 1;
  // V(841) = K(841,1) * [ANXA1_rna];
  R841: ANXA1_rna => ; 1;
  // V(842) = K(842,1) * [NR3C1_rna];
  R842: NR3C1_rna => ; 1;
  // V(843) = K(843,1) * [TP53_rna];
  R843: TP53_rna => ; 1;
  // V(844) = K(844,1) * [HSPB1_rna];
  R844: HSPB1_rna => ; 1;
  // V(845) = K(845,1) * [INSR_rna];
  R845: INSR_rna => ; 1;
  // V(846) = K(846,1) * [SP1_rna];
  R846: SP1_rna => ; 1;
  // V(847) = K(847,1) * [IGF1R_rna];
  R847: IGF1R_rna => ; 1;
  // V(848) = K(848,1) * [NR3C2_rna];
  R848: NR3C2_rna => ; 1;
  // V(849) = K(849,1) * [VIM_rna];
  R849: VIM_rna => ; 1;
  // V(850) = K(850,1) * [PARP1_rna];
  R850: PARP1_rna => ; 1;
  // V(851) = K(851,1) * [UBC_rna];
  R851: UBC_rna => ; 1;
  // V(852) = K(852,1) * [RRAS_rna];
  R852: RRAS_rna => ; 1;
  // V(853) = K(853,1) * [BCL2_rna];
  R853: BCL2_rna => ; 1;
  // V(854) = K(854,1) * [KIT_rna];
  R854: KIT_rna => ; 1;
  // V(855) = K(855,1) * [PCNA_rna];
  R855: PCNA_rna => ; 1;
  // V(856) = K(856,1) * [SRC_rna];
  R856: SRC_rna => ; 1;
  // V(857) = K(857,1) * [PKM_rna];
  R857: PKM_rna => ; 1;
  // V(858) = K(858,1) * [CREB1_rna];
  R858: CREB1_rna => ; 1;
  // V(859) = K(859,1) * [ENG_rna];
  R859: ENG_rna => ; 1;
  // V(860) = K(860,1) * [XBP1_rna];
  R860: XBP1_rna => ; 1;
  // V(861) = K(861,1) * [ATF3_rna];
  R861: ATF3_rna => ; 1;
  // V(862) = K(862,1) * [NR4A1_rna];
  R862: NR4A1_rna => ; 1;
  // V(863) = K(863,1) * [RPS6KB1_rna];
  R863: RPS6KB1_rna => ; 1;
  // V(864) = K(864,1) * [DNMT1_rna];
  R864: DNMT1_rna => ; 1;
  // V(865) = K(865,1) * [ZFP36_rna];
  R865: ZFP36_rna => ; 1;
  // V(866) = K(866,1) * [PIK3R1_rna];
  R866: PIK3R1_rna => ; 1;
  // V(867) = K(867,1) * [MAPK1_rna];
  R867: MAPK1_rna => ; 1;
  // V(868) = K(868,1) * [DUSP1_rna];
  R868: DUSP1_rna => ; 1;
  // V(869) = K(869,1) * [PTPN6_rna];
  R869: PTPN6_rna => ; 1;
  // V(870) = K(870,1) * [CTNNB1_rna];
  R870: CTNNB1_rna => ; 1;
  // V(871) = K(871,1) * [RORA_rna];
  R871: RORA_rna => ; 1;
  // V(872) = K(872,1) * [IRS1_rna];
  R872: IRS1_rna => ; 1;
  // V(873) = K(873,1) * [DDIT3_rna];
  R873: DDIT3_rna => ; 1;
  // V(874) = K(874,1) * [STAT1_rna];
  R874: STAT1_rna => ; 1;
  // V(875) = K(875,1) * [STAT6_rna];
  R875: STAT6_rna => ; 1;
  // V(876) = K(876,1) * [STAT5A_rna];
  R876: STAT5A_rna => ; 1;
  // V(877) = K(877,1) * [CASP3_rna];
  R877: CASP3_rna => ; 1;
  // V(878) = K(878,1) * [NOTCH1_rna];
  R878: NOTCH1_rna => ; 1;
  // V(879) = K(879,1) * [NUMB_rna];
  R879: NUMB_rna => ; 1;
  // V(880) = K(880,1) * [RPS6KA3_rna];
  R880: RPS6KA3_rna => ; 1;
  // V(881) = K(881,1) * [RCAN1_rna];
  R881: RCAN1_rna => ; 1;
  // V(882) = K(882,1) * [CASP9_rna];
  R882: CASP9_rna => ; 1;
  // V(883) = K(883,1) * [HDAC4_rna];
  R883: HDAC4_rna => ; 1;
  // V(884) = K(884,1) * [PTEN_rna];
  R884: PTEN_rna => ; 1;
  // V(885) = K(885,1) * [RAC1_rna];
  R885: RAC1_rna => ; 1;
  // V(886) = K(886,1) * [CLTC_rna];
  R886: CLTC_rna => ; 1;
  // V(887) = K(887,1) * [NFKB2_rna];
  R887: NFKB2_rna => ; 1;
  // V(888) = K(888,1) * [RELA_rna];
  R888: RELA_rna => ; 1;
  // V(889) = K(889,1) * [PTPN11_rna];
  R889: PTPN11_rna => ; 1;
  // V(890) = K(890,1) * [FOXO1_rna];
  R890: FOXO1_rna => ; 1;
  // V(891) = K(891,1) * [PTPRJ_rna];
  R891: PTPRJ_rna => ; 1;
  // V(892) = K(892,1) * [PRKAA1_rna];
  R892: PRKAA1_rna => ; 1;
  // V(893) = K(893,1) * [MAPK7_rna];
  R893: MAPK7_rna => ; 1;
  // V(894) = K(894,1) * [ROCK1_rna];
  R894: ROCK1_rna => ; 1;
  // V(895) = K(895,1) * [SMAD4_rna];
  R895: SMAD4_rna => ; 1;
  // V(896) = K(896,1) * [ATR_rna];
  R896: ATR_rna => ; 1;
  // V(897) = K(897,1) * [STIM1_rna];
  R897: STIM1_rna => ; 1;
  // V(898) = K(898,1) * [SMAD2_rna];
  R898: SMAD2_rna => ; 1;
  // V(899) = K(899,1) * [SMAD1_rna];
  R899: SMAD1_rna => ; 1;
  // V(900) = K(900,1) * [NFE2L2_rna];
  R900: NFE2L2_rna => ; 1;
  // V(901) = K(901,1) * [PKN1_rna];
  R901: PKN1_rna => ; 1;
  // V(902) = K(902,1) * [HIF1A_rna];
  R902: HIF1A_rna => ; 1;
  // V(903) = K(903,1) * [RICTOR_rna];
  R903: RICTOR_rna => ; 1;
  // V(904) = K(904,1) * [MFN1_rna];
  R904: MFN1_rna => ; 1;
  // V(905) = K(905,1) * [PIK3C3_rna];
  R905: PIK3C3_rna => ; 1;
  // V(906) = K(906,1) * [NRG4_rna];
  R906: NRG4_rna => ; 1;
  // V(907) = K(907,1) * [MYLIP_rna];
  R907: MYLIP_rna => ; 1;
  // V(908) = K(908,1) * [MAP3K14_rna];
  R908: MAP3K14_rna => ; 1;
  // V(909) = K(909,1) * [MAP3K5_rna];
  R909: MAP3K5_rna => ; 1;
  // V(910) = K(910,1) * [PINK1_rna];
  R910: PINK1_rna => ; 1;
  // V(911) = K(911,1) * [HIPK2_rna];
  R911: HIPK2_rna => ; 1;
  // V(912) = K(912,1) * [RNF7_rna];
  R912: RNF7_rna => ; 1;
  // V(913) = K(913,1) * [TRAF6_rna];
  R913: TRAF6_rna => ; 1;
end
