// SBML level 3 version 2

model M2machrophage()

  // Compartments:
  compartment cell = 1;

  // Species:
  species AIFM1 in cell = 1/cell;
  species AIFM1_g in cell = 1/cell;
  species AIFM1_rna in cell = 1/cell;
  species AKT1 in cell = 1/cell;
  species AKT1_g in cell = 1/cell;
  species AKT1_p in cell = 1/cell;
  species AKT1_rna in cell = 1/cell;
  species AXL in cell = 1/cell;
  species AXL_g in cell = 1/cell;
  species AXL_p in cell = 1/cell;
  species AXL_rna in cell = 1/cell;
  species BAX in cell = 1/cell;
  species BAX_g in cell = 1/cell;
  species BAX_p in cell = 1/cell;
  species BAX_rna in cell = 1/cell;
  species BCL2 in cell = 1/cell;
  species BCL2_g in cell = 1/cell;
  species BCL2_p in cell = 1/cell;
  species BCL2_rna in cell = 1/cell;
  species BECN1 in cell = 1/cell;
  species BECN1_g in cell = 1/cell;
  species BECN1_p in cell = 1/cell;
  species BECN1_rna in cell = 1/cell;
  species BTK in cell = 1/cell;
  species BTK_g in cell = 1/cell;
  species BTK_p in cell = 1/cell;
  species BTK_rna in cell = 1/cell;
  species CALM1 in cell = 1/cell;
  species CALM1_g in cell = 1/cell;
  species CALM1_p in cell = 1/cell;
  species CALM1_rna in cell = 1/cell;
  species CASP3 in cell = 1/cell;
  species CASP3_g in cell = 1/cell;
  species CASP3_rna in cell = 1/cell;
  species CAT in cell = 1/cell;
  species CAT_g in cell = 1/cell;
  species CAT_rna in cell = 1/cell;
  species CCL2 in cell = 1/cell;
  species CCL2_g in cell = 1/cell;
  species CCL2_rna in cell = 1/cell;
  species CCND1 in cell = 1/cell;
  species CCND1_g in cell = 1/cell;
  species CCND1_rna in cell = 1/cell;
  species CDKN1A in cell = 1/cell;
  species CDKN1A_g in cell = 1/cell;
  species CDKN1A_p in cell = 1/cell;
  species CDKN1A_rna in cell = 1/cell;
  species CDKN1B in cell = 1/cell;
  species CDKN1B_g in cell = 1/cell;
  species CDKN1B_p in cell = 1/cell;
  species CDKN1B_rna in cell = 1/cell;
  species CREB1 in cell = 1/cell;
  species CREB1_g in cell = 1/cell;
  species CREB1_p in cell = 1/cell;
  species CREB1_rna in cell = 1/cell;
  species CTNNB1 in cell = 1/cell;
  species CTNNB1_g in cell = 1/cell;
  species CTNNB1_p in cell = 1/cell;
  species CTNNB1_rna in cell = 1/cell;
  species CUL3 in cell = 1/cell;
  species CUL3_g in cell = 1/cell;
  species CUL3_rna in cell = 1/cell;
  species DNM1L in cell = 1/cell;
  species DNM1L_g in cell = 1/cell;
  species DNM1L_p in cell = 1/cell;
  species DNM1L_rna in cell = 1/cell;
  species DNMT1 in cell = 1/cell;
  species DNMT1_g in cell = 1/cell;
  species DNMT1_p in cell = 1/cell;
  species DNMT1_rna in cell = 1/cell;
  species DUSP1 in cell = 1/cell;
  species DUSP1_g in cell = 1/cell;
  species DUSP1_p in cell = 1/cell;
  species DUSP1_rna in cell = 1/cell;
  species EP300 in cell = 1/cell;
  species EP300_g in cell = 1/cell;
  species EP300_p in cell = 1/cell;
  species EP300_rna in cell = 1/cell;
  species FOS in cell = 1/cell;
  species FOS_g in cell = 1/cell;
  species FOS_p in cell = 1/cell;
  species FOS_rna in cell = 1/cell;
  species GCLC in cell = 1/cell;
  species GCLC_g in cell = 1/cell;
  species GCLC_rna in cell = 1/cell;
  species GLO1 in cell = 1/cell;
  species GLO1_g in cell = 1/cell;
  species GLO1_p in cell = 1/cell;
  species GLO1_rna in cell = 1/cell;
  species GPX4 in cell = 1/cell;
  species GPX4_g in cell = 1/cell;
  species GPX4_rna in cell = 1/cell;
  species HDAC1 in cell = 1/cell;
  species HDAC1_g in cell = 1/cell;
  species HDAC1_rna in cell = 1/cell;
  species HES1 in cell = 1/cell;
  species HES1_g in cell = 1/cell;
  species HES1_rna in cell = 1/cell;
  species HGF in cell = 1/cell;
  species HGF_g in cell = 1/cell;
  species HGF_rna in cell = 1/cell;
  species HIF1A in cell = 1/cell;
  species HIF1A_g in cell = 1/cell;
  species HIF1A_p in cell = 1/cell;
  species HIF1A_rna in cell = 1/cell;
  species HIPK2 in cell = 1/cell;
  species HIPK2_g in cell = 1/cell;
  species HIPK2_p in cell = 1/cell;
  species HIPK2_rna in cell = 1/cell;
  species HMGN1 in cell = 1/cell;
  species HMGN1_g in cell = 1/cell;
  species HMGN1_p in cell = 1/cell;
  species HMGN1_rna in cell = 1/cell;
  species HMOX1 in cell = 1/cell;
  species HMOX1_g in cell = 1/cell;
  species HMOX1_p in cell = 1/cell;
  species HMOX1_rna in cell = 1/cell;
  species HSPB1 in cell = 1/cell;
  species HSPB1_g in cell = 1/cell;
  species HSPB1_p in cell = 1/cell;
  species HSPB1_rna in cell = 1/cell;
  species IGF1 in cell = 1/cell;
  species IGF1_g in cell = 1/cell;
  species IGF1_rna in cell = 1/cell;
  species IKBKB in cell = 1/cell;
  species IKBKB_g in cell = 1/cell;
  species IKBKB_p in cell = 1/cell;
  species IKBKB_rna in cell = 1/cell;
  species IL1B in cell = 1/cell;
  species IL1B_g in cell = 1/cell;
  species IL1B_rna in cell = 1/cell;
  species IL6R in cell = 1/cell;
  species IL6R_g in cell = 1/cell;
  species IL6R_rna in cell = 1/cell;
  species ILK in cell = 1/cell;
  species ILK_g in cell = 1/cell;
  species ILK_p in cell = 1/cell;
  species ILK_rna in cell = 1/cell;
  species INSR in cell = 1/cell;
  species INSR_g in cell = 1/cell;
  species INSR_p in cell = 1/cell;
  species INSR_rna in cell = 1/cell;
  species IRAK1 in cell = 1/cell;
  species IRAK1_g in cell = 1/cell;
  species IRAK1_p in cell = 1/cell;
  species IRAK1_rna in cell = 1/cell;
  species IRF1 in cell = 1/cell;
  species IRF1_g in cell = 1/cell;
  species IRF1_rna in cell = 1/cell;
  species IRF3 in cell = 1/cell;
  species IRF3_g in cell = 1/cell;
  species IRF3_p in cell = 1/cell;
  species IRF3_rna in cell = 1/cell;
  species IRF8 in cell = 1/cell;
  species IRF8_g in cell = 1/cell;
  species IRF8_p in cell = 1/cell;
  species IRF8_rna in cell = 1/cell;
  species IRS2 in cell = 1/cell;
  species IRS2_g in cell = 1/cell;
  species IRS2_p in cell = 1/cell;
  species IRS2_rna in cell = 1/cell;
  species JAK1 in cell = 1/cell;
  species JAK1_g in cell = 1/cell;
  species JAK1_p in cell = 1/cell;
  species JAK1_rna in cell = 1/cell;
  species JAK2 in cell = 1/cell;
  species JAK2_g in cell = 1/cell;
  species JAK2_p in cell = 1/cell;
  species JAK2_rna in cell = 1/cell;
  species JUN in cell = 1/cell;
  species JUNB in cell = 1/cell;
  species JUNB_g in cell = 1/cell;
  species JUNB_p in cell = 1/cell;
  species JUNB_rna in cell = 1/cell;
  species JUN_g in cell = 1/cell;
  species JUN_p in cell = 1/cell;
  species JUN_rna in cell = 1/cell;
  species KDM6B in cell = 1/cell;
  species KDM6B_g in cell = 1/cell;
  species KDM6B_rna in cell = 1/cell;
  species KLF9 in cell = 1/cell;
  species KLF9_g in cell = 1/cell;
  species KLF9_rna in cell = 1/cell;
  species LYN in cell = 1/cell;
  species LYN_g in cell = 1/cell;
  species LYN_p in cell = 1/cell;
  species LYN_rna in cell = 1/cell;
  species MAP3K5 in cell = 1/cell;
  species MAP3K5_g in cell = 1/cell;
  species MAP3K5_p in cell = 1/cell;
  species MAP3K5_rna in cell = 1/cell;
  species MAPK1 in cell = 1/cell;
  species MAPK1_g in cell = 1/cell;
  species MAPK1_p in cell = 1/cell;
  species MAPK1_rna in cell = 1/cell;
  species MAPK8 in cell = 1/cell;
  species MAPK8_g in cell = 1/cell;
  species MAPK8_p in cell = 1/cell;
  species MAPK8_rna in cell = 1/cell;
  species MAPKAP1 in cell = 1/cell;
  species MAPKAP1_g in cell = 1/cell;
  species MAPKAP1_p in cell = 1/cell;
  species MAPKAP1_rna in cell = 1/cell;
  species MDM2 in cell = 1/cell;
  species MDM2_g in cell = 1/cell;
  species MDM2_p in cell = 1/cell;
  species MDM2_rna in cell = 1/cell;
  species MECP2 in cell = 1/cell;
  species MECP2_g in cell = 1/cell;
  species MECP2_p in cell = 1/cell;
  species MECP2_rna in cell = 1/cell;
  species NCF1 in cell = 1/cell;
  species NCF1_g in cell = 1/cell;
  species NCF1_p in cell = 1/cell;
  species NCF1_rna in cell = 1/cell;
  species NFE2L2 in cell = 1/cell;
  species NFE2L2_g in cell = 1/cell;
  species NFE2L2_rna in cell = 1/cell;
  species NFKB1 in cell = 1/cell;
  species NFKB1_g in cell = 1/cell;
  species NFKB1_p in cell = 1/cell;
  species NFKB1_rna in cell = 1/cell;
  species NLRP3 in cell = 1/cell;
  species NLRP3_g in cell = 1/cell;
  species NLRP3_p in cell = 1/cell;
  species NLRP3_rna in cell = 1/cell;
  species NOTCH2 in cell = 1/cell;
  species NOTCH2_g in cell = 1/cell;
  species NOTCH2_rna in cell = 1/cell;
  species NR3C1 in cell = 1/cell;
  species NR3C1_g in cell = 1/cell;
  species NR3C1_p in cell = 1/cell;
  species NR3C1_rna in cell = 1/cell;
  species NR4A1 in cell = 1/cell;
  species NR4A1_g in cell = 1/cell;
  species NR4A1_p in cell = 1/cell;
  species NR4A1_rna in cell = 1/cell;
  species NUMB in cell = 1/cell;
  species NUMB_g in cell = 1/cell;
  species NUMB_rna in cell = 1/cell;
  species PARK7 in cell = 1/cell;
  species PARK7_g in cell = 1/cell;
  species PARK7_p in cell = 1/cell;
  species PARK7_rna in cell = 1/cell;
  species PARP1 in cell = 1/cell;
  species PARP1_g in cell = 1/cell;
  species PARP1_p in cell = 1/cell;
  species PARP1_rna in cell = 1/cell;
  species PIK3CA in cell = 1/cell;
  species PIK3CA_g in cell = 1/cell;
  species PIK3CA_p in cell = 1/cell;
  species PIK3CA_rna in cell = 1/cell;
  species PIK3R1 in cell = 1/cell;
  species PIK3R1_g in cell = 1/cell;
  species PIK3R1_p in cell = 1/cell;
  species PIK3R1_rna in cell = 1/cell;
  species PINK1 in cell = 1/cell;
  species PINK1_g in cell = 1/cell;
  species PINK1_rna in cell = 1/cell;
  species PKM in cell = 1/cell;
  species PKM_g in cell = 1/cell;
  species PKM_p in cell = 1/cell;
  species PKM_rna in cell = 1/cell;
  species PKN1 in cell = 1/cell;
  species PKN1_g in cell = 1/cell;
  species PKN1_p in cell = 1/cell;
  species PKN1_rna in cell = 1/cell;
  species PRDX1 in cell = 1/cell;
  species PRDX1_g in cell = 1/cell;
  species PRDX1_p in cell = 1/cell;
  species PRDX1_rna in cell = 1/cell;
  species PRDX6 in cell = 1/cell;
  species PRDX6_g in cell = 1/cell;
  species PRDX6_p in cell = 1/cell;
  species PRDX6_rna in cell = 1/cell;
  species PTEN in cell = 1/cell;
  species PTEN_g in cell = 1/cell;
  species PTEN_p in cell = 1/cell;
  species PTEN_rna in cell = 1/cell;
  species PTGS2 in cell = 1/cell;
  species PTGS2_g in cell = 1/cell;
  species PTGS2_p in cell = 1/cell;
  species PTGS2_rna in cell = 1/cell;
  species PTPN11 in cell = 1/cell;
  species PTPN11_g in cell = 1/cell;
  species PTPN11_p in cell = 1/cell;
  species PTPN11_rna in cell = 1/cell;
  species PTPN2 in cell = 1/cell;
  species PTPN2_g in cell = 1/cell;
  species PTPN2_rna in cell = 1/cell;
  species PTPN6 in cell = 1/cell;
  species PTPN6_g in cell = 1/cell;
  species PTPN6_p in cell = 1/cell;
  species PTPN6_rna in cell = 1/cell;
  species PTPRJ in cell = 1/cell;
  species PTPRJ_g in cell = 1/cell;
  species PTPRJ_rna in cell = 1/cell;
  species RAC1 in cell = 1/cell;
  species RAC1_g in cell = 1/cell;
  species RAC1_p in cell = 1/cell;
  species RAC1_rna in cell = 1/cell;
  species RELA in cell = 1/cell;
  species RELA_g in cell = 1/cell;
  species RELA_p in cell = 1/cell;
  species RELA_rna in cell = 1/cell;
  species RHOA in cell = 1/cell;
  species RHOA_g in cell = 1/cell;
  species RHOA_p in cell = 1/cell;
  species RHOA_rna in cell = 1/cell;
  species RNF7 in cell = 1/cell;
  species RNF7_g in cell = 1/cell;
  species RNF7_rna in cell = 1/cell;
  species ROCK1 in cell = 1/cell;
  species ROCK1_g in cell = 1/cell;
  species ROCK1_rna in cell = 1/cell;
  species ROCK2 in cell = 1/cell;
  species ROCK2_g in cell = 1/cell;
  species ROCK2_rna in cell = 1/cell;
  species RPS6KA3 in cell = 1/cell;
  species RPS6KA3_g in cell = 1/cell;
  species RPS6KA3_p in cell = 1/cell;
  species RPS6KA3_rna in cell = 1/cell;
  species SGK1 in cell = 1/cell;
  species SGK1_g in cell = 1/cell;
  species SGK1_rna in cell = 1/cell;
  species SIRT1 in cell = 1/cell;
  species SIRT1_g in cell = 1/cell;
  species SIRT1_p in cell = 1/cell;
  species SIRT1_rna in cell = 1/cell;
  species SMAD2 in cell = 1/cell;
  species SMAD2_g in cell = 1/cell;
  species SMAD2_p in cell = 1/cell;
  species SMAD2_rna in cell = 1/cell;
  species SMAD4 in cell = 1/cell;
  species SMAD4_g in cell = 1/cell;
  species SMAD4_p in cell = 1/cell;
  species SMAD4_rna in cell = 1/cell;
  species SOCS1 in cell = 1/cell;
  species SOCS1_g in cell = 1/cell;
  species SOCS1_p in cell = 1/cell;
  species SOCS1_rna in cell = 1/cell;
  species SOCS3 in cell = 1/cell;
  species SOCS3_g in cell = 1/cell;
  species SOCS3_rna in cell = 1/cell;
  species SOD1 in cell = 1/cell;
  species SOD1_g in cell = 1/cell;
  species SOD1_rna in cell = 1/cell;
  species SOD2 in cell = 1/cell;
  species SOD2_g in cell = 1/cell;
  species SOD2_rna in cell = 1/cell;
  species SREBF1 in cell = 1/cell;
  species SREBF1_g in cell = 1/cell;
  species SREBF1_p in cell = 1/cell;
  species SREBF1_rna in cell = 1/cell;
  species STAT1 in cell = 1/cell;
  species STAT1_g in cell = 1/cell;
  species STAT1_p in cell = 1/cell;
  species STAT1_rna in cell = 1/cell;
  species STAT3 in cell = 1/cell;
  species STAT3_g in cell = 1/cell;
  species STAT3_p in cell = 1/cell;
  species STAT3_rna in cell = 1/cell;
  species STAT5A in cell = 1/cell;
  species STAT5A_g in cell = 1/cell;
  species STAT5A_p in cell = 1/cell;
  species STAT5A_rna in cell = 1/cell;
  species STAT6 in cell = 1/cell;
  species STAT6_g in cell = 1/cell;
  species STAT6_p in cell = 1/cell;
  species STAT6_rna in cell = 1/cell;
  species STK11 in cell = 1/cell;
  species STK11_g in cell = 1/cell;
  species STK11_p in cell = 1/cell;
  species STK11_rna in cell = 1/cell;
  species STK4 in cell = 1/cell;
  species STK4_g in cell = 1/cell;
  species STK4_p in cell = 1/cell;
  species STK4_rna in cell = 1/cell;
  species TGFB1 in cell = 1/cell;
  species TGFB1_g in cell = 1/cell;
  species TGFB1_rna in cell = 1/cell;
  species TGFBR1 in cell = 1/cell;
  species TGFBR1_g in cell = 1/cell;
  species TGFBR1_rna in cell = 1/cell;
  species TLR2 in cell = 1/cell;
  species TLR2_g in cell = 1/cell;
  species TLR2_rna in cell = 1/cell;
  species TLR4 in cell = 1/cell;
  species TLR4_g in cell = 1/cell;
  species TLR4_rna in cell = 1/cell;
  species TLR7 in cell = 1/cell;
  species TLR7_g in cell = 1/cell;
  species TLR7_rna in cell = 1/cell;
  species TP53 in cell = 1/cell;
  species TP53_g in cell = 1/cell;
  species TP53_p in cell = 1/cell;
  species TP53_rna in cell = 1/cell;
  species TXNIP in cell = 1/cell;
  species TXNIP_g in cell = 1/cell;
  species TXNIP_p in cell = 1/cell;
  species TXNIP_rna in cell = 1/cell;
  species UBC in cell = 1/cell;
  species UBC_g in cell = 1/cell;
  species UBC_p in cell = 1/cell;
  species UBC_rna in cell = 1/cell;
  species VCAN in cell = 1/cell;
  species VCAN_g in cell = 1/cell;
  species VCAN_rna in cell = 1/cell;
  species VEGFA in cell = 1/cell;
  species VEGFA_g in cell = 1/cell;
  species VEGFA_rna in cell = 1/cell;
  species VIM in cell = 1/cell;
  species VIM_g in cell = 1/cell;
  species VIM_p in cell = 1/cell;
  species VIM_rna in cell = 1/cell;
  species ZFP36 in cell = 1/cell;
  species ZFP36_g in cell = 1/cell;
  species ZFP36_p in cell = 1/cell;
  species ZFP36_rna in cell = 1/cell;

  // Reactions:
  // V(1) = K(1,1) * [SMAD2_p] * [SMAD4_p] -K(1,2) * [SIGNOR-C8];
  R1: SMAD2_p => SMAD4_p; 1;
  // V(2) = K(2,1) * [SMAD4_p] * [JUN_p] -K(2,2) * [SIGNOR-C10];
  R2: JUN_p => SMAD4_p; 1;
  // V(3) = K(3,1) * [NFKB1] * [RELA_p] -K(3,2) * [SIGNOR-C13];
  R3: NFKB1 => RELA_p; 1;
  // V(4) = K(4,1) * [NR3C1_p] * [STAT5A_p] -K(4,2) * [SIGNOR-C84];
  R4: NR3C1_p => STAT5A_p; 1;
  // V(5) = K(5,1) * [STAT1_p] * [STAT3_p] -K(5,2) * [SIGNOR-C118];
  R5: STAT3_p => STAT1_p; 1;
  // V(6) = K(6,1) * [SIGNOR-C118_p] * [JAK1_p] -K(6,2) * [SIGNOR-C120];
  R6: JAK1_p => ; 1;
  // V(7) = K(7,1) * [FOS_p] * [JUN_p] * [JUN_p] * [FOS_p] * [JUN_p] * [FOS_p] * [FOS_p] * [JUN_p] -K(7,2) * [SIGNOR-C154];
  R7: JUN_p => FOS_p; 1;
  // V(8) = K(8,1) * [PIK3R1_p] * [PIK3CA] -K(8,2) * [SIGNOR-C156];
  R8: PIK3CA => PIK3R1_p; 1;
  // V(9) = K(9,1) * [TGFBR1] * [SMAD2] -K(9,2) * [TGFBR1 |SMAD2];
  R9: TGFBR1 => SMAD2; 1;
  // V(10) = K(10,1) * [TGFBR1 |SMAD2];
  R10: TGFBR1 => SMAD2; 1;
  // V(11) = K(11,1) * [MAPK1_p] * [EP300] -K(11,2) * [MAPK1_p |EP300];
  R11: EP300 => MAPK1_p; 1;
  // V(12) = K(12,1) * [MAPK1_p |EP300];
  R12: EP300 => MAPK1_p; 1;
  // V(13) = K(13,1) * [MAPK1_p] * [HIF1A] -K(13,2) * [MAPK1_p |HIF1A];
  R13: HIF1A => MAPK1_p; 1;
  // V(14) = K(14,1) * [MAPK1_p |HIF1A];
  R14: HIF1A => MAPK1_p; 1;
  // V(15) = K(15,1) * [MAPK1_p] * [NR3C1] -K(15,2) * [MAPK1_p |NR3C1];
  R15: NR3C1 => MAPK1_p; 1;
  // V(16) = K(16,1) * [MAPK1_p |NR3C1];
  R16: NR3C1 => MAPK1_p; 1;
  // V(17) = K(17,1) * [MAPK1_p] * [RPS6KA3] -K(17,2) * [MAPK1_p |RPS6KA3];
  R17: RPS6KA3 => MAPK1_p; 1;
  // V(18) = K(18,1) * [MAPK1_p |RPS6KA3];
  R18: RPS6KA3 => MAPK1_p; 1;
  // V(19) = K(19,1) * [MAPK1_p] * [PRDX6] -K(19,2) * [MAPK1_p |PRDX6];
  R19: PRDX6 => MAPK1_p; 1;
  // V(20) = K(20,1) * [MAPK1_p |PRDX6];
  R20: PRDX6 => MAPK1_p; 1;
  // V(21) = K(21,1) * [JAK2_p] * [STAT5A] -K(21,2) * [JAK2_p |STAT5A];
  R21: JAK2_p => STAT5A; 1;
  // V(22) = K(22,1) * [JAK2_p |STAT5A];
  R22: JAK2_p => STAT5A; 1;
  // V(23) = K(23,1) * [AKT1_p] * [MDM2] -K(23,2) * [AKT1_p |MDM2];
  R23: AKT1_p => MDM2; 1;
  // V(24) = K(24,1) * [AKT1_p |MDM2];
  R24: AKT1_p => MDM2; 1;
  // V(25) = K(25,1) * [IKBKB] * [IKBKB] -K(25,2) * [IKBKB |IKBKB];
  R25: IKBKB => ; 1;
  // V(26) = K(26,1) * [IKBKB |IKBKB];
  R26: IKBKB => ; 1;
  // V(27) = K(27,1) * [JAK2_p] * [JAK2] -K(27,2) * [JAK2_p |JAK2];
  R27: JAK2_p => JAK2; 1;
  // V(28) = K(28,1) * [JAK2_p |JAK2];
  R28: JAK2_p => JAK2; 1;
  // V(29) = K(29,1) * [MAPK1_p] * [CDKN1B] -K(29,2) * [MAPK1_p |CDKN1B];
  R29: CDKN1B => MAPK1_p; 1;
  // V(30) = K(30,1) * [MAPK1_p |CDKN1B];
  R30: CDKN1B => MAPK1_p; 1;
  // V(31) = K(31,1) * [MAPK1_p] * [SMAD4] -K(31,2) * [MAPK1_p |SMAD4];
  R31: SMAD4 => MAPK1_p; 1;
  // V(32) = K(32,1) * [MAPK1_p |SMAD4];
  R32: SMAD4 => MAPK1_p; 1;
  // V(33) = K(33,1) * [ROCK1] * [DNM1L] -K(33,2) * [ROCK1 |DNM1L];
  R33: ROCK1 => DNM1L; 1;
  // V(34) = K(34,1) * [ROCK1 |DNM1L];
  R34: ROCK1 => DNM1L; 1;
  // V(35) = K(35,1) * [MAPK1_p] * [STK11] -K(35,2) * [MAPK1_p |STK11];
  R35: STK11 => MAPK1_p; 1;
  // V(36) = K(36,1) * [MAPK1_p |STK11];
  R36: STK11 => MAPK1_p; 1;
  // V(37) = K(37,1) * [MAPK1_p] * [JUN] -K(37,2) * [MAPK1_p |JUN];
  R37: JUN => MAPK1_p; 1;
  // V(38) = K(38,1) * [MAPK1_p |JUN];
  R38: JUN => MAPK1_p; 1;
  // V(39) = K(39,1) * [SIGNOR-C156_p] * [BTK] -K(39,2) * [SIGNOR-C156_p |BTK];
  R39: BTK => ; 1;
  // V(40) = K(40,1) * [SIGNOR-C156_p |BTK];
  R40: BTK => ; 1;
  // V(41) = K(41,1) * [AKT1_p] * [NR4A1] -K(41,2) * [AKT1_p |NR4A1];
  R41: NR4A1 => AKT1_p; 1;
  // V(42) = K(42,1) * [AKT1_p |NR4A1];
  R42: NR4A1 => AKT1_p; 1;
  // V(43) = K(43,1) * [JAK2_p] * [MAP3K5] -K(43,2) * [JAK2_p |MAP3K5];
  R43: JAK2_p => MAP3K5; 1;
  // V(44) = K(44,1) * [JAK2_p |MAP3K5];
  R44: JAK2_p => MAP3K5; 1;
  // V(45) = K(45,1) * [MAPK1_p] * [FOS] -K(45,2) * [MAPK1_p |FOS];
  R45: FOS => MAPK1_p; 1;
  // V(46) = K(46,1) * [MAPK1_p |FOS];
  R46: FOS => MAPK1_p; 1;
  // V(47) = K(47,1) * [STK11_p] * [STK11] -K(47,2) * [STK11_p |STK11];
  R47: STK11_p => STK11; 1;
  // V(48) = K(48,1) * [STK11_p |STK11];
  R48: STK11_p => STK11; 1;
  // V(49) = K(49,1) * [MAPK8_p] * [BCL2] -K(49,2) * [MAPK8_p |BCL2];
  R49: MAPK8_p => BCL2; 1;
  // V(50) = K(50,1) * [MAPK8_p |BCL2];
  R50: MAPK8_p => BCL2; 1;
  // V(51) = K(51,1) * [MAPK1_p] * [SMAD2] -K(51,2) * [MAPK1_p |SMAD2];
  R51: SMAD2 => MAPK1_p; 1;
  // V(52) = K(52,1) * [MAPK1_p |SMAD2];
  R52: SMAD2 => MAPK1_p; 1;
  // V(53) = K(53,1) * [MAPK1_p] * [BCL2] -K(53,2) * [MAPK1_p |BCL2];
  R53: BCL2 => MAPK1_p; 1;
  // V(54) = K(54,1) * [MAPK1_p |BCL2];
  R54: BCL2 => MAPK1_p; 1;
  // V(55) = K(55,1) * [INSR_p] * [INSR] -K(55,2) * [INSR_p |INSR];
  R55: INSR_p => INSR; 1;
  // V(56) = K(56,1) * [INSR_p |INSR];
  R56: INSR_p => INSR; 1;
  // V(57) = K(57,1) * [MAPK1_p] * [NCF1] -K(57,2) * [MAPK1_p |NCF1];
  R57: NCF1 => MAPK1_p; 1;
  // V(58) = K(58,1) * [MAPK1_p |NCF1];
  R58: NCF1 => MAPK1_p; 1;
  // V(59) = K(59,1) * [IKBKB] * [SIGNOR-C13] -K(59,2) * [IKBKB |SIGNOR-C13];
  R59: IKBKB => ; 1;
  // V(60) = K(60,1) * [IKBKB |SIGNOR-C13];
  R60: IKBKB => ; 1;
  // V(61) = K(61,1) * [MAPK1_p] * [SREBF1] -K(61,2) * [MAPK1_p |SREBF1];
  R61: SREBF1 => MAPK1_p; 1;
  // V(62) = K(62,1) * [MAPK1_p |SREBF1];
  R62: SREBF1 => MAPK1_p; 1;
  // V(63) = K(63,1) * [JAK1_p] * [STAT1] -K(63,2) * [JAK1_p |STAT1];
  R63: STAT1 => JAK1_p; 1;
  // V(64) = K(64,1) * [JAK1_p |STAT1];
  R64: STAT1 => JAK1_p; 1;
  // V(65) = K(65,1) * [MAPK1_p] * [DUSP1] -K(65,2) * [MAPK1_p |DUSP1];
  R65: DUSP1 => MAPK1_p; 1;
  // V(66) = K(66,1) * [MAPK1_p |DUSP1];
  R66: DUSP1 => MAPK1_p; 1;
  // V(67) = K(67,1) * [AKT1_p] * [HSPB1] -K(67,2) * [AKT1_p |HSPB1];
  R67: HSPB1 => AKT1_p; 1;
  // V(68) = K(68,1) * [AKT1_p |HSPB1];
  R68: HSPB1 => AKT1_p; 1;
  // V(69) = K(69,1) * [AKT1_p] * [NCF1] -K(69,2) * [AKT1_p |NCF1];
  R69: NCF1 => AKT1_p; 1;
  // V(70) = K(70,1) * [AKT1_p |NCF1];
  R70: NCF1 => AKT1_p; 1;
  // V(71) = K(71,1) * [RPS6KA3_p] * [HMGN1] -K(71,2) * [RPS6KA3_p |HMGN1];
  R71: HMGN1 => RPS6KA3_p; 1;
  // V(72) = K(72,1) * [RPS6KA3_p |HMGN1];
  R72: HMGN1 => RPS6KA3_p; 1;
  // V(73) = K(73,1) * [PKN1_p] * [PKN1] -K(73,2) * [PKN1_p |PKN1];
  R73: PKN1 => PKN1_p; 1;
  // V(74) = K(74,1) * [PKN1_p |PKN1];
  R74: PKN1 => PKN1_p; 1;
  // V(75) = K(75,1) * [AKT1_p] * [CDKN1A] -K(75,2) * [AKT1_p |CDKN1A];
  R75: AKT1_p => CDKN1A; 1;
  // V(76) = K(76,1) * [AKT1_p |CDKN1A];
  R76: AKT1_p => CDKN1A; 1;
  // V(77) = K(77,1) * [MAPK8_p] * [TP53] -K(77,2) * [MAPK8_p |TP53];
  R77: TP53 => MAPK8_p; 1;
  // V(78) = K(78,1) * [MAPK8_p |TP53];
  R78: TP53 => MAPK8_p; 1;
  // V(79) = K(79,1) * [INSR_p] * [SIGNOR-C156] -K(79,2) * [INSR_p |SIGNOR-C156];
  R79: INSR_p => ; 1;
  // V(80) = K(80,1) * [INSR_p |SIGNOR-C156];
  R80: INSR_p => ; 1;
  // V(81) = K(81,1) * [MAPK1_p] * [RHOA] -K(81,2) * [MAPK1_p |RHOA];
  R81: RHOA => MAPK1_p; 1;
  // V(82) = K(82,1) * [MAPK1_p |RHOA];
  R82: RHOA => MAPK1_p; 1;
  // V(83) = K(83,1) * [MAPK8_p] * [NR3C1] -K(83,2) * [MAPK8_p |NR3C1];
  R83: MAPK8_p => NR3C1; 1;
  // V(84) = K(84,1) * [MAPK8_p |NR3C1];
  R84: MAPK8_p => NR3C1; 1;
  // V(85) = K(85,1) * [JAK2_p] * [STAT1] -K(85,2) * [JAK2_p |STAT1];
  R85: JAK2_p => STAT1; 1;
  // V(86) = K(86,1) * [JAK2_p |STAT1];
  R86: JAK2_p => STAT1; 1;
  // V(87) = K(87,1) * [INSR_p] * [CALM1] -K(87,2) * [INSR_p |CALM1];
  R87: INSR_p => CALM1; 1;
  // V(88) = K(88,1) * [INSR_p |CALM1];
  R88: INSR_p => CALM1; 1;
  // V(89) = K(89,1) * [RPS6KA3_p] * [MAP3K5] -K(89,2) * [RPS6KA3_p |MAP3K5];
  R89: RPS6KA3_p => MAP3K5; 1;
  // V(90) = K(90,1) * [RPS6KA3_p |MAP3K5];
  R90: RPS6KA3_p => MAP3K5; 1;
  // V(91) = K(91,1) * [MAPK8_p] * [AKT1] -K(91,2) * [MAPK8_p |AKT1];
  R91: MAPK8_p => AKT1; 1;
  // V(92) = K(92,1) * [MAPK8_p |AKT1];
  R92: MAPK8_p => AKT1; 1;
  // V(93) = K(93,1) * [AKT1_p] * [CDKN1B] -K(93,2) * [AKT1_p |CDKN1B];
  R93: CDKN1B => AKT1_p; 1;
  // V(94) = K(94,1) * [AKT1_p |CDKN1B];
  R94: CDKN1B => AKT1_p; 1;
  // V(95) = K(95,1) * [MAPK8_p] * [NLRP3] -K(95,2) * [MAPK8_p |NLRP3];
  R95: MAPK8_p => NLRP3; 1;
  // V(96) = K(96,1) * [MAPK8_p |NLRP3];
  R96: MAPK8_p => NLRP3; 1;
  // V(97) = K(97,1) * [MAPK1_p] * [SIGNOR-C154] -K(97,2) * [MAPK1_p |SIGNOR-C154];
  R97: MAPK1_p => ; 1;
  // V(98) = K(98,1) * [MAPK1_p |SIGNOR-C154];
  R98: MAPK1_p => ; 1;
  // V(99) = K(99,1) * [MAPK8_p] * [CTNNB1] -K(99,2) * [MAPK8_p |CTNNB1];
  R99: MAPK8_p => CTNNB1; 1;
  // V(100) = K(100,1) * [MAPK8_p |CTNNB1];
  R100: MAPK8_p => CTNNB1; 1;
  // V(101) = K(101,1) * [PINK1] * [UBC] -K(101,2) * [PINK1 |UBC];
  R101: PINK1 => UBC; 1;
  // V(102) = K(102,1) * [PINK1 |UBC];
  R102: PINK1 => UBC; 1;
  // V(103) = K(103,1) * [AKT1_p] * [RAC1] -K(103,2) * [AKT1_p |RAC1];
  R103: RAC1 => AKT1_p; 1;
  // V(104) = K(104,1) * [AKT1_p |RAC1];
  R104: RAC1 => AKT1_p; 1;
  // V(105) = K(105,1) * [STK4_p] * [STK4] -K(105,2) * [STK4_p |STK4];
  R105: STK4_p => STK4; 1;
  // V(106) = K(106,1) * [STK4_p |STK4];
  R106: STK4_p => STK4; 1;
  // V(107) = K(107,1) * [STK11_p] * [PTEN] -K(107,2) * [STK11_p |PTEN];
  R107: PTEN => STK11_p; 1;
  // V(108) = K(108,1) * [STK11_p |PTEN];
  R108: PTEN => STK11_p; 1;
  // V(109) = K(109,1) * [HIPK2_p] * [HIPK2] -K(109,2) * [HIPK2_p |HIPK2];
  R109: HIPK2_p => HIPK2; 1;
  // V(110) = K(110,1) * [HIPK2_p |HIPK2];
  R110: HIPK2_p => HIPK2; 1;
  // V(111) = K(111,1) * [JAK2_p] * [BECN1] -K(111,2) * [JAK2_p |BECN1];
  R111: JAK2_p => BECN1; 1;
  // V(112) = K(112,1) * [JAK2_p |BECN1];
  R112: JAK2_p => BECN1; 1;
  // V(113) = K(113,1) * [SGK1] * [CDKN1B] -K(113,2) * [SGK1 |CDKN1B];
  R113: CDKN1B => SGK1; 1;
  // V(114) = K(114,1) * [SGK1 |CDKN1B];
  R114: CDKN1B => SGK1; 1;
  // V(115) = K(115,1) * [RPS6KA3_p] * [CREB1] -K(115,2) * [RPS6KA3_p |CREB1];
  R115: RPS6KA3_p => CREB1; 1;
  // V(116) = K(116,1) * [RPS6KA3_p |CREB1];
  R116: RPS6KA3_p => CREB1; 1;
  // V(117) = K(117,1) * [MAPK8_p] * [PKM] -K(117,2) * [MAPK8_p |PKM];
  R117: PKM => MAPK8_p; 1;
  // V(118) = K(118,1) * [MAPK8_p |PKM];
  R118: PKM => MAPK8_p; 1;
  // V(119) = K(119,1) * [AKT1_p] * [EP300] -K(119,2) * [AKT1_p |EP300];
  R119: EP300 => AKT1_p; 1;
  // V(120) = K(120,1) * [AKT1_p |EP300];
  R120: EP300 => AKT1_p; 1;
  // V(121) = K(121,1) * [IRAK1_p] * [IRAK1] -K(121,2) * [IRAK1_p |IRAK1];
  R121: IRAK1_p => IRAK1; 1;
  // V(122) = K(122,1) * [IRAK1_p |IRAK1];
  R122: IRAK1_p => IRAK1; 1;
  // V(123) = K(123,1) * [MAPK8_p] * [STAT6] -K(123,2) * [MAPK8_p |STAT6];
  R123: STAT6 => MAPK8_p; 1;
  // V(124) = K(124,1) * [MAPK8_p |STAT6];
  R124: STAT6 => MAPK8_p; 1;
  // V(125) = K(125,1) * [MAP3K5_p] * [MAP3K5] -K(125,2) * [MAP3K5_p |MAP3K5];
  R125: MAP3K5 => MAP3K5_p; 1;
  // V(126) = K(126,1) * [MAP3K5_p |MAP3K5];
  R126: MAP3K5 => MAP3K5_p; 1;
  // V(127) = K(127,1) * [AKT1_p] * [VIM] -K(127,2) * [AKT1_p |VIM];
  R127: VIM => AKT1_p; 1;
  // V(128) = K(128,1) * [AKT1_p |VIM];
  R128: VIM => AKT1_p; 1;
  // V(129) = K(129,1) * [AXL_p] * [AXL] -K(129,2) * [AXL_p |AXL];
  R129: AXL => AXL_p; 1;
  // V(130) = K(130,1) * [AXL_p |AXL];
  R130: AXL => AXL_p; 1;
  // V(131) = K(131,1) * [IKBKB] * [NFKB1] -K(131,2) * [IKBKB |NFKB1];
  R131: NFKB1 => IKBKB; 1;
  // V(132) = K(132,1) * [IKBKB |NFKB1];
  R132: NFKB1 => IKBKB; 1;
  // V(133) = K(133,1) * [ILK_p] * [AKT1] -K(133,2) * [ILK_p |AKT1];
  R133: ILK_p => AKT1; 1;
  // V(134) = K(134,1) * [ILK_p |AKT1];
  R134: ILK_p => AKT1; 1;
  // V(135) = K(135,1) * [AKT1_p] * [BTK] -K(135,2) * [AKT1_p |BTK];
  R135: BTK => AKT1_p; 1;
  // V(136) = K(136,1) * [AKT1_p |BTK];
  R136: BTK => AKT1_p; 1;
  // V(137) = K(137,1) * [ROCK1] * [PTEN] -K(137,2) * [ROCK1 |PTEN];
  R137: PTEN => ROCK1; 1;
  // V(138) = K(138,1) * [ROCK1 |PTEN];
  R138: PTEN => ROCK1; 1;
  // V(139) = K(139,1) * [MAPK8_p] * [CDKN1A] -K(139,2) * [MAPK8_p |CDKN1A];
  R139: MAPK8_p => CDKN1A; 1;
  // V(140) = K(140,1) * [MAPK8_p |CDKN1A];
  R140: MAPK8_p => CDKN1A; 1;
  // V(141) = K(141,1) * [MAPK1_p] * [STAT5A] -K(141,2) * [MAPK1_p |STAT5A];
  R141: STAT5A => MAPK1_p; 1;
  // V(142) = K(142,1) * [MAPK1_p |STAT5A];
  R142: STAT5A => MAPK1_p; 1;
  // V(143) = K(143,1) * [MAPK1_p] * [CDKN1A] -K(143,2) * [MAPK1_p |CDKN1A];
  R143: CDKN1A => MAPK1_p; 1;
  // V(144) = K(144,1) * [MAPK1_p |CDKN1A];
  R144: CDKN1A => MAPK1_p; 1;
  // V(145) = K(145,1) * [IL6R] * [JAK2] -K(145,2) * [IL6R |JAK2];
  R145: IL6R => JAK2; 1;
  // V(146) = K(146,1) * [IL6R |JAK2];
  R146: IL6R => JAK2; 1;
  // V(147) = K(147,1) * [MAPK1_p] * [JAK2] -K(147,2) * [MAPK1_p |JAK2];
  R147: JAK2 => MAPK1_p; 1;
  // V(148) = K(148,1) * [MAPK1_p |JAK2];
  R148: JAK2 => MAPK1_p; 1;
  // V(149) = K(149,1) * [MAPK8_p] * [JUN] -K(149,2) * [MAPK8_p |JUN];
  R149: MAPK8_p => JUN; 1;
  // V(150) = K(150,1) * [MAPK8_p |JUN];
  R150: MAPK8_p => JUN; 1;
  // V(151) = K(151,1) * [JAK1_p] * [STAT3] -K(151,2) * [JAK1_p |STAT3];
  R151: STAT3 => JAK1_p; 1;
  // V(152) = K(152,1) * [JAK1_p |STAT3];
  R152: STAT3 => JAK1_p; 1;
  // V(153) = K(153,1) * [MAPK1_p] * [PARP1] -K(153,2) * [MAPK1_p |PARP1];
  R153: PARP1 => MAPK1_p; 1;
  // V(154) = K(154,1) * [MAPK1_p |PARP1];
  R154: PARP1 => MAPK1_p; 1;
  // V(155) = K(155,1) * [AKT1_p] * [NR3C1] -K(155,2) * [AKT1_p |NR3C1];
  R155: AKT1_p => NR3C1; 1;
  // V(156) = K(156,1) * [AKT1_p |NR3C1];
  R156: AKT1_p => NR3C1; 1;
  // V(157) = K(157,1) * [STK11_p] * [SMAD4] -K(157,2) * [STK11_p |SMAD4];
  R157: SMAD4 => STK11_p; 1;
  // V(158) = K(158,1) * [STK11_p |SMAD4];
  R158: SMAD4 => STK11_p; 1;
  // V(159) = K(159,1) * [JAK2_p] * [STAT6] -K(159,2) * [JAK2_p |STAT6];
  R159: STAT6 => JAK2_p; 1;
  // V(160) = K(160,1) * [JAK2_p |STAT6];
  R160: STAT6 => JAK2_p; 1;
  // V(161) = K(161,1) * [STK4_p] * [PIK3CA] -K(161,2) * [STK4_p |PIK3CA];
  R161: STK4_p => PIK3CA; 1;
  // V(162) = K(162,1) * [STK4_p |PIK3CA];
  R162: STK4_p => PIK3CA; 1;
  // V(163) = K(163,1) * [JAK1_p] * [STAT6] -K(163,2) * [JAK1_p |STAT6];
  R163: STAT6 => JAK1_p; 1;
  // V(164) = K(164,1) * [JAK1_p |STAT6];
  R164: STAT6 => JAK1_p; 1;
  // V(165) = K(165,1) * [SIGNOR-C156_p] * [AKT1] -K(165,2) * [SIGNOR-C156_p |AKT1];
  R165: AKT1 => ; 1;
  // V(166) = K(166,1) * [SIGNOR-C156_p |AKT1];
  R166: AKT1 => ; 1;
  // V(167) = K(167,1) * [BTK_p] * [STAT3] -K(167,2) * [BTK_p |STAT3];
  R167: BTK_p => STAT3; 1;
  // V(168) = K(168,1) * [BTK_p |STAT3];
  R168: BTK_p => STAT3; 1;
  // V(169) = K(169,1) * [STK4_p] * [IRF3] -K(169,2) * [STK4_p |IRF3];
  R169: STK4_p => IRF3; 1;
  // V(170) = K(170,1) * [STK4_p |IRF3];
  R170: STK4_p => IRF3; 1;
  // V(171) = K(171,1) * [JAK2_p] * [CDKN1B] -K(171,2) * [JAK2_p |CDKN1B];
  R171: JAK2_p => CDKN1B; 1;
  // V(172) = K(172,1) * [JAK2_p |CDKN1B];
  R172: JAK2_p => CDKN1B; 1;
  // V(173) = K(173,1) * [RPS6KA3_p] * [FOS] -K(173,2) * [RPS6KA3_p |FOS];
  R173: RPS6KA3_p => FOS; 1;
  // V(174) = K(174,1) * [RPS6KA3_p |FOS];
  R174: RPS6KA3_p => FOS; 1;
  // V(175) = K(175,1) * [AKT1_p] * [RPS6KA3] -K(175,2) * [AKT1_p |RPS6KA3];
  R175: RPS6KA3 => AKT1_p; 1;
  // V(176) = K(176,1) * [AKT1_p |RPS6KA3];
  R176: RPS6KA3 => AKT1_p; 1;
  // V(177) = K(177,1) * [AKT1_p] * [DNMT1] -K(177,2) * [AKT1_p |DNMT1];
  R177: DNMT1 => AKT1_p; 1;
  // V(178) = K(178,1) * [AKT1_p |DNMT1];
  R178: DNMT1 => AKT1_p; 1;
  // V(179) = K(179,1) * [STK11_p] * [SIRT1] -K(179,2) * [STK11_p |SIRT1];
  R179: STK11_p => SIRT1; 1;
  // V(180) = K(180,1) * [STK11_p |SIRT1];
  R180: STK11_p => SIRT1; 1;
  // V(181) = K(181,1) * [RPS6KA3_p] * [RPS6KA3] -K(181,2) * [RPS6KA3_p |RPS6KA3];
  R181: RPS6KA3_p => RPS6KA3; 1;
  // V(182) = K(182,1) * [RPS6KA3_p |RPS6KA3];
  R182: RPS6KA3_p => RPS6KA3; 1;
  // V(183) = K(183,1) * [HIPK2_p] * [MECP2] -K(183,2) * [HIPK2_p |MECP2];
  R183: MECP2 => HIPK2_p; 1;
  // V(184) = K(184,1) * [HIPK2_p |MECP2];
  R184: MECP2 => HIPK2_p; 1;
  // V(185) = K(185,1) * [AKT1_p] * [CTNNB1] -K(185,2) * [AKT1_p |CTNNB1];
  R185: CTNNB1 => AKT1_p; 1;
  // V(186) = K(186,1) * [AKT1_p |CTNNB1];
  R186: CTNNB1 => AKT1_p; 1;
  // V(187) = K(187,1) * [AKT1_p] * [STK4] -K(187,2) * [AKT1_p |STK4];
  R187: STK4 => AKT1_p; 1;
  // V(188) = K(188,1) * [AKT1_p |STK4];
  R188: STK4 => AKT1_p; 1;
  // V(189) = K(189,1) * [MAPK8_p] * [JUNB] -K(189,2) * [MAPK8_p |JUNB];
  R189: MAPK8_p => JUNB; 1;
  // V(190) = K(190,1) * [MAPK8_p |JUNB];
  R190: MAPK8_p => JUNB; 1;
  // V(191) = K(191,1) * [RPS6KA3_p] * [NR4A1] -K(191,2) * [RPS6KA3_p |NR4A1];
  R191: NR4A1 => RPS6KA3_p; 1;
  // V(192) = K(192,1) * [RPS6KA3_p |NR4A1];
  R192: NR4A1 => RPS6KA3_p; 1;
  // V(193) = K(193,1) * [AKT1_p] * [IRAK1] -K(193,2) * [AKT1_p |IRAK1];
  R193: IRAK1 => AKT1_p; 1;
  // V(194) = K(194,1) * [AKT1_p |IRAK1];
  R194: IRAK1 => AKT1_p; 1;
  // V(195) = K(195,1) * [ROCK1] * [TP53] -K(195,2) * [ROCK1 |TP53];
  R195: TP53 => ROCK1; 1;
  // V(196) = K(196,1) * [ROCK1 |TP53];
  R196: TP53 => ROCK1; 1;
  // V(197) = K(197,1) * [BTK_p] * [RELA] -K(197,2) * [BTK_p |RELA];
  R197: BTK_p => RELA; 1;
  // V(198) = K(198,1) * [BTK_p |RELA];
  R198: BTK_p => RELA; 1;
  // V(199) = K(199,1) * [MAPK1_p] * [MAPK1] -K(199,2) * [MAPK1_p |MAPK1];
  R199: MAPK1 => MAPK1_p; 1;
  // V(200) = K(200,1) * [MAPK1_p |MAPK1];
  R200: MAPK1 => MAPK1_p; 1;
  // V(201) = K(201,1) * [BTK_p] * [BTK] -K(201,2) * [BTK_p |BTK];
  R201: BTK_p => BTK; 1;
  // V(202) = K(202,1) * [BTK_p |BTK];
  R202: BTK_p => BTK; 1;
  // V(203) = K(203,1) * [LYN_p] * [LYN] -K(203,2) * [LYN_p |LYN];
  R203: LYN => LYN_p; 1;
  // V(204) = K(204,1) * [LYN_p |LYN];
  R204: LYN => LYN_p; 1;
  // V(205) = K(205,1) * [MAPK1_p] * [ZFP36] -K(205,2) * [MAPK1_p |ZFP36];
  R205: ZFP36 => MAPK1_p; 1;
  // V(206) = K(206,1) * [MAPK1_p |ZFP36];
  R206: ZFP36 => MAPK1_p; 1;
  // V(207) = K(207,1) * [AKT1_p] * [MAPKAP1] -K(207,2) * [AKT1_p |MAPKAP1];
  R207: MAPKAP1 => AKT1_p; 1;
  // V(208) = K(208,1) * [AKT1_p |MAPKAP1];
  R208: MAPKAP1 => AKT1_p; 1;
  // V(209) = K(209,1) * [AKT1_p] * [MAP3K5] -K(209,2) * [AKT1_p |MAP3K5];
  R209: MAP3K5 => AKT1_p; 1;
  // V(210) = K(210,1) * [AKT1_p |MAP3K5];
  R210: MAP3K5 => AKT1_p; 1;
  // V(211) = K(211,1) * [MAPK8_p] * [SIRT1] -K(211,2) * [MAPK8_p |SIRT1];
  R211: MAPK8_p => SIRT1; 1;
  // V(212) = K(212,1) * [MAPK8_p |SIRT1];
  R212: MAPK8_p => SIRT1; 1;
  // V(213) = K(213,1) * [AKT1_p] * [PARK7] -K(213,2) * [AKT1_p |PARK7];
  R213: AKT1_p => PARK7; 1;
  // V(214) = K(214,1) * [AKT1_p |PARK7];
  R214: AKT1_p => PARK7; 1;
  // V(215) = K(215,1) * [MAPK8_p] * [IRF3] -K(215,2) * [MAPK8_p |IRF3];
  R215: MAPK8_p => IRF3; 1;
  // V(216) = K(216,1) * [MAPK8_p |IRF3];
  R216: MAPK8_p => IRF3; 1;
  // V(217) = K(217,1) * [AKT1_p] * [HMOX1] -K(217,2) * [AKT1_p |HMOX1];
  R217: HMOX1 => AKT1_p; 1;
  // V(218) = K(218,1) * [AKT1_p |HMOX1];
  R218: HMOX1 => AKT1_p; 1;
  // V(219) = K(219,1) * [MAPK1_p] * [DNM1L] -K(219,2) * [MAPK1_p |DNM1L];
  R219: DNM1L => MAPK1_p; 1;
  // V(220) = K(220,1) * [MAPK1_p |DNM1L];
  R220: DNM1L => MAPK1_p; 1;
  // V(221) = K(221,1) * [INSR_p] * [IRS2] -K(221,2) * [INSR_p |IRS2];
  R221: INSR_p => IRS2; 1;
  // V(222) = K(222,1) * [INSR_p |IRS2];
  R222: INSR_p => IRS2; 1;
  // V(223) = K(223,1) * [SGK1] * [MAPK1] -K(223,2) * [SGK1 |MAPK1];
  R223: MAPK1 => SGK1; 1;
  // V(224) = K(224,1) * [SGK1 |MAPK1];
  R224: MAPK1 => SGK1; 1;
  // V(225) = K(225,1) * [RPS6KA3_p] * [TP53] -K(225,2) * [RPS6KA3_p |TP53];
  R225: TP53 => RPS6KA3_p; 1;
  // V(226) = K(226,1) * [RPS6KA3_p |TP53];
  R226: TP53 => RPS6KA3_p; 1;
  // V(227) = K(227,1) * [ROCK1] * [BECN1] -K(227,2) * [ROCK1 |BECN1];
  R227: ROCK1 => BECN1; 1;
  // V(228) = K(228,1) * [ROCK1 |BECN1];
  R228: ROCK1 => BECN1; 1;
  // V(229) = K(229,1) * [PIK3CA] * [BTK] -K(229,2) * [PIK3CA |BTK];
  R229: PIK3CA => BTK; 1;
  // V(230) = K(230,1) * [PIK3CA |BTK];
  R230: PIK3CA => BTK; 1;
  // V(231) = K(231,1) * [MAPK8_p] * [SIGNOR-C154] -K(231,2) * [MAPK8_p |SIGNOR-C154];
  R231: MAPK8_p => ; 1;
  // V(232) = K(232,1) * [MAPK8_p |SIGNOR-C154];
  R232: MAPK8_p => ; 1;
  // V(233) = K(233,1) * [HIPK2_p] * [EP300] -K(233,2) * [HIPK2_p |EP300];
  R233: EP300 => HIPK2_p; 1;
  // V(234) = K(234,1) * [HIPK2_p |EP300];
  R234: EP300 => HIPK2_p; 1;
  // V(235) = K(235,1) * [SGK1] * [NR3C1] -K(235,2) * [SGK1 |NR3C1];
  R235: SGK1 => NR3C1; 1;
  // V(236) = K(236,1) * [SGK1 |NR3C1];
  R236: SGK1 => NR3C1; 1;
  // V(237) = K(237,1) * [PKM_p] * [STAT3] -K(237,2) * [PKM_p |STAT3];
  R237: PKM_p => STAT3; 1;
  // V(238) = K(238,1) * [PKM_p |STAT3];
  R238: PKM_p => STAT3; 1;
  // V(239) = K(239,1) * [AKT1_p] * [AKT1] -K(239,2) * [AKT1_p |AKT1];
  R239: AKT1 => AKT1_p; 1;
  // V(240) = K(240,1) * [AKT1_p |AKT1];
  R240: AKT1 => AKT1_p; 1;
  // V(241) = K(241,1) * [INSR_p] * [PTPN6] -K(241,2) * [INSR_p |PTPN6];
  R241: PTPN6 => INSR_p; 1;
  // V(242) = K(242,1) * [INSR_p |PTPN6];
  R242: PTPN6 => INSR_p; 1;
  // V(243) = K(243,1) * [JAK1_p] * [PTPN11] -K(243,2) * [JAK1_p |PTPN11];
  R243: PTPN11 => JAK1_p; 1;
  // V(244) = K(244,1) * [JAK1_p |PTPN11];
  R244: PTPN11 => JAK1_p; 1;
  // V(245) = K(245,1) * [PINK1] * [TP53] -K(245,2) * [PINK1 |TP53];
  R245: TP53 => PINK1; 1;
  // V(246) = K(246,1) * [PINK1 |TP53];
  R246: TP53 => PINK1; 1;
  // V(247) = K(247,1) * [JAK2_p] * [STAT3] -K(247,2) * [JAK2_p |STAT3];
  R247: JAK2_p => STAT3; 1;
  // V(248) = K(248,1) * [JAK2_p |STAT3];
  R248: JAK2_p => STAT3; 1;
  // V(249) = K(249,1) * [INSR_p] * [PTEN] -K(249,2) * [INSR_p |PTEN];
  R249: PTEN => INSR_p; 1;
  // V(250) = K(250,1) * [INSR_p |PTEN];
  R250: PTEN => INSR_p; 1;
  // V(251) = K(251,1) * [STK11_p] * [TP53] -K(251,2) * [STK11_p |TP53];
  R251: TP53 => STK11_p; 1;
  // V(252) = K(252,1) * [STK11_p |TP53];
  R252: TP53 => STK11_p; 1;
  // V(253) = K(253,1) * [STK4_p] * [BECN1] -K(253,2) * [STK4_p |BECN1];
  R253: STK4_p => BECN1; 1;
  // V(254) = K(254,1) * [STK4_p |BECN1];
  R254: STK4_p => BECN1; 1;
  // V(255) = K(255,1) * [INSR_p] * [PIK3R1] -K(255,2) * [INSR_p |PIK3R1];
  R255: PIK3R1 => INSR_p; 1;
  // V(256) = K(256,1) * [INSR_p |PIK3R1];
  R256: PIK3R1 => INSR_p; 1;
  // V(257) = K(257,1) * [STK4_p] * [PRDX1] -K(257,2) * [STK4_p |PRDX1];
  R257: STK4_p => PRDX1; 1;
  // V(258) = K(258,1) * [STK4_p |PRDX1];
  R258: STK4_p => PRDX1; 1;
  // V(259) = K(259,1) * [MAPK8_p] * [STAT3] -K(259,2) * [MAPK8_p |STAT3];
  R259: MAPK8_p => STAT3; 1;
  // V(260) = K(260,1) * [MAPK8_p |STAT3];
  R260: MAPK8_p => STAT3; 1;
  // V(261) = K(261,1) * [LYN_p] * [GLO1] -K(261,2) * [LYN_p |GLO1];
  R261: GLO1 => LYN_p; 1;
  // V(262) = K(262,1) * [LYN_p |GLO1];
  R262: GLO1 => LYN_p; 1;
  // V(263) = K(263,1) * [PIK3CA] * [AKT1] -K(263,2) * [PIK3CA |AKT1];
  R263: PIK3CA => AKT1; 1;
  // V(264) = K(264,1) * [PIK3CA |AKT1];
  R264: PIK3CA => AKT1; 1;
  // V(265) = K(265,1) * [AKT1_p] * [CREB1] -K(265,2) * [AKT1_p |CREB1];
  R265: CREB1 => AKT1_p; 1;
  // V(266) = K(266,1) * [AKT1_p |CREB1];
  R266: CREB1 => AKT1_p; 1;
  // V(267) = K(267,1) * [MAPK8_p] * [STK4] -K(267,2) * [MAPK8_p |STK4];
  R267: MAPK8_p => STK4; 1;
  // V(268) = K(268,1) * [MAPK8_p |STK4];
  R268: MAPK8_p => STK4; 1;
  // V(269) = K(269,1) * [AKT1_p] * [MAPK1] -K(269,2) * [AKT1_p |MAPK1];
  R269: MAPK1 => AKT1_p; 1;
  // V(270) = K(270,1) * [AKT1_p |MAPK1];
  R270: MAPK1 => AKT1_p; 1;
  // V(271) = K(271,1) * [IKBKB] * [RELA] -K(271,2) * [IKBKB |RELA];
  R271: RELA => IKBKB; 1;
  // V(272) = K(272,1) * [IKBKB |RELA];
  R272: RELA => IKBKB; 1;
  // V(273) = K(273,1) * [ROCK1] * [VIM] -K(273,2) * [ROCK1 |VIM];
  R273: ROCK1 => VIM; 1;
  // V(274) = K(274,1) * [ROCK1 |VIM];
  R274: ROCK1 => VIM; 1;
  // V(275) = K(275,1) * [MAPK8_p] * [STAT1] -K(275,2) * [MAPK8_p |STAT1];
  R275: MAPK8_p => STAT1; 1;
  // V(276) = K(276,1) * [MAPK8_p |STAT1];
  R276: MAPK8_p => STAT1; 1;
  // V(277) = K(277,1) * [STK4_p] * [SIRT1] -K(277,2) * [STK4_p |SIRT1];
  R277: STK4_p => SIRT1; 1;
  // V(278) = K(278,1) * [STK4_p |SIRT1];
  R278: STK4_p => SIRT1; 1;
  // V(279) = K(279,1) * [LYN_p] * [CDKN1B] -K(279,2) * [LYN_p |CDKN1B];
  R279: CDKN1B => LYN_p; 1;
  // V(280) = K(280,1) * [LYN_p |CDKN1B];
  R280: CDKN1B => LYN_p; 1;
  // V(281) = K(281,1) * [IKBKB] * [TP53] -K(281,2) * [IKBKB |TP53];
  R281: TP53 => IKBKB; 1;
  // V(282) = K(282,1) * [IKBKB |TP53];
  R282: TP53 => IKBKB; 1;
  // V(283) = K(283,1) * [MAPK8_p] * [NR4A1] -K(283,2) * [MAPK8_p |NR4A1];
  R283: NR4A1 => MAPK8_p; 1;
  // V(284) = K(284,1) * [MAPK8_p |NR4A1];
  R284: NR4A1 => MAPK8_p; 1;
  // V(285) = K(285,1) * [JAK2_p] * [PTPN11] -K(285,2) * [JAK2_p |PTPN11];
  R285: JAK2_p => PTPN11; 1;
  // V(286) = K(286,1) * [JAK2_p |PTPN11];
  R286: JAK2_p => PTPN11; 1;
  // V(287) = K(287,1) * [LYN_p] * [PTGS2] -K(287,2) * [LYN_p |PTGS2];
  R287: PTGS2 => LYN_p; 1;
  // V(288) = K(288,1) * [LYN_p |PTGS2];
  R288: PTGS2 => LYN_p; 1;
  // V(289) = K(289,1) * [LYN_p] * [BTK] -K(289,2) * [LYN_p |BTK];
  R289: BTK => LYN_p; 1;
  // V(290) = K(290,1) * [LYN_p |BTK];
  R290: BTK => LYN_p; 1;
  // V(291) = K(291,1) * [MAPK1_p] * [TP53] -K(291,2) * [MAPK1_p |TP53];
  R291: TP53 => MAPK1_p; 1;
  // V(292) = K(292,1) * [MAPK1_p |TP53];
  R292: TP53 => MAPK1_p; 1;
  // V(293) = K(293,1) * [LYN_p] * [STAT3] -K(293,2) * [LYN_p |STAT3];
  R293: STAT3 => LYN_p; 1;
  // V(294) = K(294,1) * [LYN_p |STAT3];
  R294: STAT3 => LYN_p; 1;
  // V(295) = K(295,1) * [HIPK2_p] * [CDKN1B] -K(295,2) * [HIPK2_p |CDKN1B];
  R295: CDKN1B => HIPK2_p; 1;
  // V(296) = K(296,1) * [HIPK2_p |CDKN1B];
  R296: CDKN1B => HIPK2_p; 1;
  // V(297) = K(297,1) * [HIPK2_p] * [TP53] -K(297,2) * [HIPK2_p |TP53];
  R297: TP53 => HIPK2_p; 1;
  // V(298) = K(298,1) * [HIPK2_p |TP53];
  R298: TP53 => HIPK2_p; 1;
  // V(299) = K(299,1) * [ROCK1] * [MAPK8] -K(299,2) * [ROCK1 |MAPK8];
  R299: ROCK1 => MAPK8; 1;
  // V(300) = K(300,1) * [ROCK1 |MAPK8];
  R300: ROCK1 => MAPK8; 1;
  // V(301) = K(301,1) * [RPS6KA3_p] * [STK11] -K(301,2) * [RPS6KA3_p |STK11];
  R301: RPS6KA3_p => STK11; 1;
  // V(302) = K(302,1) * [RPS6KA3_p |STK11];
  R302: RPS6KA3_p => STK11; 1;
  // V(303) = K(303,1) * [SGK1] * [STAT1] -K(303,2) * [SGK1 |STAT1];
  R303: STAT1 => SGK1; 1;
  // V(304) = K(304,1) * [SGK1 |STAT1];
  R304: STAT1 => SGK1; 1;
  // V(305) = K(305,1) * [PINK1] * [DNM1L] -K(305,2) * [PINK1 |DNM1L];
  R305: DNM1L => PINK1; 1;
  // V(306) = K(306,1) * [PINK1 |DNM1L];
  R306: DNM1L => PINK1; 1;
  // V(307) = K(307,1) * [TLR4] * [MAPK1] -K(307,2) * [TLR4 |MAPK1];
  R307: MAPK1 => TLR4; 1;
  // V(308) = K(308,1) * [TLR4 |MAPK1];
  R308: MAPK1 => TLR4; 1;
  // V(309) = K(309,1) * [ILK_p] * [ILK] -K(309,2) * [ILK_p |ILK];
  R309: ILK_p => ILK; 1;
  // V(310) = K(310,1) * [ILK_p |ILK];
  R310: ILK_p => ILK; 1;
  // V(311) = K(311,1) * [LYN_p] * [SOCS1] -K(311,2) * [LYN_p |SOCS1];
  R311: SOCS1 => LYN_p; 1;
  // V(312) = K(312,1) * [LYN_p |SOCS1];
  R312: SOCS1 => LYN_p; 1;
  // V(313) = K(313,1) * [JAK2_p] * [BTK] -K(313,2) * [JAK2_p |BTK];
  R313: JAK2_p => BTK; 1;
  // V(314) = K(314,1) * [JAK2_p |BTK];
  R314: JAK2_p => BTK; 1;
  // V(315) = K(315,1) * [MAP3K5_p] * [CDKN1A] -K(315,2) * [MAP3K5_p |CDKN1A];
  R315: MAP3K5_p => CDKN1A; 1;
  // V(316) = K(316,1) * [MAP3K5_p |CDKN1A];
  R316: MAP3K5_p => CDKN1A; 1;
  // V(317) = K(317,1) * [HIPK2_p] * [MDM2] -K(317,2) * [HIPK2_p |MDM2];
  R317: HIPK2_p => MDM2; 1;
  // V(318) = K(318,1) * [HIPK2_p |MDM2];
  R318: HIPK2_p => MDM2; 1;
  // V(319) = K(319,1) * [ROCK2] * [EP300] -K(319,2) * [ROCK2 |EP300];
  R319: EP300 => ROCK2; 1;
  // V(320) = K(320,1) * [ROCK2 |EP300];
  R320: EP300 => ROCK2; 1;
  // V(321) = K(321,1) * [MAPK1_p] * [STAT3] -K(321,2) * [MAPK1_p |STAT3];
  R321: STAT3 => MAPK1_p; 1;
  // V(322) = K(322,1) * [MAPK1_p |STAT3];
  R322: STAT3 => MAPK1_p; 1;
  // V(323) = K(323,1) * [BTK_p] * [STAT5A] -K(323,2) * [BTK_p |STAT5A];
  R323: BTK_p => STAT5A; 1;
  // V(324) = K(324,1) * [BTK_p |STAT5A];
  R324: BTK_p => STAT5A; 1;
  // V(325) = K(325,1) * [AKT1_p] * [BECN1] -K(325,2) * [AKT1_p |BECN1];
  R325: BECN1 => AKT1_p; 1;
  // V(326) = K(326,1) * [AKT1_p |BECN1];
  R326: BECN1 => AKT1_p; 1;
  // V(327) = K(327,1) * [IRAK1_p] * [STAT3] -K(327,2) * [IRAK1_p |STAT3];
  R327: IRAK1_p => STAT3; 1;
  // V(328) = K(328,1) * [IRAK1_p |STAT3];
  R328: IRAK1_p => STAT3; 1;
  // V(329) = K(329,1) * [MAPK1_p] * [NR4A1] -K(329,2) * [MAPK1_p |NR4A1];
  R329: NR4A1 => MAPK1_p; 1;
  // V(330) = K(330,1) * [MAPK1_p |NR4A1];
  R330: NR4A1 => MAPK1_p; 1;
  // V(331) = K(331,1) * [PINK1] * [PTEN] -K(331,2) * [PINK1 |PTEN];
  R331: PTEN => PINK1; 1;
  // V(332) = K(332,1) * [PINK1 |PTEN];
  R332: PTEN => PINK1; 1;
  // V(333) = K(333,1) * [BTK_p] * [MDM2] -K(333,2) * [BTK_p |MDM2];
  R333: BTK_p => MDM2; 1;
  // V(334) = K(334,1) * [BTK_p |MDM2];
  R334: BTK_p => MDM2; 1;
  // V(335) = K(335,1) * [MAPK1_p] * [TXNIP] -K(335,2) * [MAPK1_p |TXNIP];
  R335: TXNIP => MAPK1_p; 1;
  // V(336) = K(336,1) * [MAPK1_p |TXNIP];
  R336: TXNIP => MAPK1_p; 1;
  // V(337) = K(337,1) * [STK11_p] * [CDKN1A] -K(337,2) * [STK11_p |CDKN1A];
  R337: STK11_p => CDKN1A; 1;
  // V(338) = K(338,1) * [STK11_p |CDKN1A];
  R338: STK11_p => CDKN1A; 1;
  // V(339) = K(339,1) * [TLR4] * [MAPK8] -K(339,2) * [TLR4 |MAPK8];
  R339: MAPK8 => TLR4; 1;
  // V(340) = K(340,1) * [TLR4 |MAPK8];
  R340: MAPK8 => TLR4; 1;
  // V(341) = K(341,1) * [PIK3CA] * [PIK3R1] -K(341,2) * [PIK3CA |PIK3R1];
  R341: PIK3CA => PIK3R1; 1;
  // V(342) = K(342,1) * [PIK3CA |PIK3R1];
  R342: PIK3CA => PIK3R1; 1;
  // V(343) = K(343,1) * [AKT1_p] * [BAX] -K(343,2) * [AKT1_p |BAX];
  R343: AKT1_p => BAX; 1;
  // V(344) = K(344,1) * [AKT1_p |BAX];
  R344: AKT1_p => BAX; 1;
  // V(345) = K(345,1) * [JAK2_p] * [SIGNOR-C118] -K(345,2) * [JAK2_p |SIGNOR-C118];
  R345: JAK2_p => ; 1;
  // V(346) = K(346,1) * [JAK2_p |SIGNOR-C118];
  R346: JAK2_p => ; 1;
  // V(347) = K(347,1) * [LYN_p] * [PTPN6] -K(347,2) * [LYN_p |PTPN6];
  R347: PTPN6 => LYN_p; 1;
  // V(348) = K(348,1) * [LYN_p |PTPN6];
  R348: PTPN6 => LYN_p; 1;
  // V(349) = K(349,1) * [LYN_p] * [NLRP3] -K(349,2) * [LYN_p |NLRP3];
  R349: NLRP3 => LYN_p; 1;
  // V(350) = K(350,1) * [LYN_p |NLRP3];
  R350: NLRP3 => LYN_p; 1;
  // V(351) = K(351,1) * [HIPK2_p] * [CREB1] -K(351,2) * [HIPK2_p |CREB1];
  R351: CREB1 => HIPK2_p; 1;
  // V(352) = K(352,1) * [HIPK2_p |CREB1];
  R352: CREB1 => HIPK2_p; 1;
  // V(353) = K(353,1) * [PTPRJ] * [INSR_p] -K(353,2) * [PTPRJ |INSR_p];
  R353: INSR_p => PTPRJ; 1;
  // V(354) = K(354,1) * [PTPRJ |INSR_p];
  R354: INSR_p => PTPRJ; 1;
  // V(355) = K(355,1) * [PTPRJ] * [MAPK1_p] -K(355,2) * [PTPRJ |MAPK1_p];
  R355: PTPRJ => MAPK1_p; 1;
  // V(356) = K(356,1) * [PTPRJ |MAPK1_p];
  R356: PTPRJ => MAPK1_p; 1;
  // V(357) = K(357,1) * [PTPN6_p] * [JAK2_p] -K(357,2) * [PTPN6_p |JAK2_p];
  R357: PTPN6_p => JAK2_p; 1;
  // V(358) = K(358,1) * [PTPN6_p |JAK2_p];
  R358: PTPN6_p => JAK2_p; 1;
  // V(359) = K(359,1) * [PTPRJ] * [CTNNB1_p] -K(359,2) * [PTPRJ |CTNNB1_p];
  R359: CTNNB1_p => PTPRJ; 1;
  // V(360) = K(360,1) * [PTPRJ |CTNNB1_p];
  R360: CTNNB1_p => PTPRJ; 1;
  // V(361) = K(361,1) * [PTPN2] * [INSR_p] -K(361,2) * [PTPN2 |INSR_p];
  R361: INSR_p => PTPN2; 1;
  // V(362) = K(362,1) * [PTPN2 |INSR_p];
  R362: INSR_p => PTPN2; 1;
  // V(363) = K(363,1) * [PTPN6_p] * [PKM_p] -K(363,2) * [PTPN6_p |PKM_p];
  R363: PTPN6_p => PKM_p; 1;
  // V(364) = K(364,1) * [PTPN6_p |PKM_p];
  R364: PTPN6_p => PKM_p; 1;
  // V(365) = K(365,1) * [PTPN6_p] * [INSR_p] -K(365,2) * [PTPN6_p |INSR_p];
  R365: PTPN6_p => INSR_p; 1;
  // V(366) = K(366,1) * [PTPN6_p |INSR_p];
  R366: PTPN6_p => INSR_p; 1;
  // V(367) = K(367,1) * [DUSP1_p] * [MAPK1_p] -K(367,2) * [DUSP1_p |MAPK1_p];
  R367: DUSP1_p => MAPK1_p; 1;
  // V(368) = K(368,1) * [DUSP1_p |MAPK1_p];
  R368: DUSP1_p => MAPK1_p; 1;
  // V(369) = K(369,1) * [PTPN2] * [JAK1_p] -K(369,2) * [PTPN2 |JAK1_p];
  R369: PTPN2 => JAK1_p; 1;
  // V(370) = K(370,1) * [PTPN2 |JAK1_p];
  R370: PTPN2 => JAK1_p; 1;
  // V(371) = K(371,1) * [PTPN11_p] * [IRF8_p] -K(371,2) * [PTPN11_p |IRF8_p];
  R371: IRF8_p => PTPN11_p; 1;
  // V(372) = K(372,1) * [PTPN11_p |IRF8_p];
  R372: IRF8_p => PTPN11_p; 1;
  // V(373) = K(373,1) * [PTPN6_p] * [JAK1_p] -K(373,2) * [PTPN6_p |JAK1_p];
  R373: PTPN6_p => JAK1_p; 1;
  // V(374) = K(374,1) * [PTPN6_p |JAK1_p];
  R374: PTPN6_p => JAK1_p; 1;
  // V(375) = K(375,1) * [PTPN11_p] * [MAP3K5_p] -K(375,2) * [PTPN11_p |MAP3K5_p];
  R375: PTPN11_p => MAP3K5_p; 1;
  // V(376) = K(376,1) * [PTPN11_p |MAP3K5_p];
  R376: PTPN11_p => MAP3K5_p; 1;
  // V(377) = K(377,1) * [PTPN2] * [STAT3_p] -K(377,2) * [PTPN2 |STAT3_p];
  R377: STAT3_p => PTPN2; 1;
  // V(378) = K(378,1) * [PTPN2 |STAT3_p];
  R378: STAT3_p => PTPN2; 1;
  // V(379) = K(379,1) * [PTPN2] * [STAT6_p] -K(379,2) * [PTPN2 |STAT6_p];
  R379: STAT6_p => PTPN2; 1;
  // V(380) = K(380,1) * [PTPN2 |STAT6_p];
  R380: STAT6_p => PTPN2; 1;
  // V(381) = K(381,1) * [DUSP1_p] * [MAPK8_p] -K(381,2) * [DUSP1_p |MAPK8_p];
  R381: MAPK8_p => DUSP1_p; 1;
  // V(382) = K(382,1) * [DUSP1_p |MAPK8_p];
  R382: MAPK8_p => DUSP1_p; 1;
  // V(383) = K(383,1) * [PTPN11_p] * [JAK2_p] -K(383,2) * [PTPN11_p |JAK2_p];
  R383: JAK2_p => PTPN11_p; 1;
  // V(384) = K(384,1) * [PTPN11_p |JAK2_p];
  R384: JAK2_p => PTPN11_p; 1;
  // V(385) = K(385,1) * [PTEN_p] * [PTEN_p] -K(385,2) * [PTEN_p |PTEN_p];
  R385: PTEN_p => ; 1;
  // V(386) = K(386,1) * [PTEN_p |PTEN_p];
  R386: PTEN_p => ; 1;
  // V(387) = K(387,1) * [PTPRJ] * [PIK3R1_p] -K(387,2) * [PTPRJ |PIK3R1_p];
  R387: PIK3R1_p => PTPRJ; 1;
  // V(388) = K(388,1) * [PTPRJ |PIK3R1_p];
  R388: PIK3R1_p => PTPRJ; 1;
  // V(389) = K(389,1) * [PTPRJ] * [SIGNOR-C156_p] -K(389,2) * [PTPRJ |SIGNOR-C156_p];
  R389: PTPRJ => ; 1;
  // V(390) = K(390,1) * [PTPRJ |SIGNOR-C156_p];
  R390: PTPRJ => ; 1;
  // V(391) = K(391,1) * [PTPRJ] * [JAK2_p] -K(391,2) * [PTPRJ |JAK2_p];
  R391: JAK2_p => PTPRJ; 1;
  // V(392) = K(392,1) * [PTPRJ |JAK2_p];
  R392: JAK2_p => PTPRJ; 1;
  // V(393) = K(393,1) * [PTPN2] * [STAT1_p] -K(393,2) * [PTPN2 |STAT1_p];
  R393: STAT1_p => PTPN2; 1;
  // V(394) = K(394,1) * [PTPN2 |STAT1_p];
  R394: STAT1_p => PTPN2; 1;
  // V(395) = K(395,1) * [PTPN11_p] * [CDKN1B_p] -K(395,2) * [PTPN11_p |CDKN1B_p];
  R395: PTPN11_p => CDKN1B_p; 1;
  // V(396) = K(396,1) * [PTPN11_p |CDKN1B_p];
  R396: PTPN11_p => CDKN1B_p; 1;
  // V(397) = K(397,1) * [PTPN6_p] * [STAT3_p] -K(397,2) * [PTPN6_p |STAT3_p];
  R397: PTPN6_p => STAT3_p; 1;
  // V(398) = K(398,1) * [PTPN6_p |STAT3_p];
  R398: PTPN6_p => STAT3_p; 1;
  // V(399) = K(399,1) * [PTEN_p] * [IRF3_p] -K(399,2) * [PTEN_p |IRF3_p];
  R399: PTEN_p => IRF3_p; 1;
  // V(400) = K(400,1) * [PTEN_p |IRF3_p];
  R400: PTEN_p => IRF3_p; 1;
  // V(401) = K(401,1) * [PTEN_p] * [STAT5A_p] -K(401,2) * [PTEN_p |STAT5A_p];
  R401: PTEN_p => STAT5A_p; 1;
  // V(402) = K(402,1) * [PTEN_p |STAT5A_p];
  R402: PTEN_p => STAT5A_p; 1;
  // V(403) = K(403,1) * [PTPN11_p] * [STAT1_p] -K(403,2) * [PTPN11_p |STAT1_p];
  R403: STAT1_p => PTPN11_p; 1;
  // V(404) = K(404,1) * [PTPN11_p |STAT1_p];
  R404: STAT1_p => PTPN11_p; 1;
  // V(405) = K(405,1) * [PTEN_p] * [CREB1_p] -K(405,2) * [PTEN_p |CREB1_p];
  R405: PTEN_p => CREB1_p; 1;
  // V(406) = K(406,1) * [PTEN_p |CREB1_p];
  R406: PTEN_p => CREB1_p; 1;
  // V(407) = K(407,1) * [DUSP1_p] * [JUN_p] -K(407,2) * [DUSP1_p |JUN_p];
  R407: JUN_p => DUSP1_p; 1;
  // V(408) = K(408,1) * [DUSP1_p |JUN_p];
  R408: JUN_p => DUSP1_p; 1;
  // V(409) = K(409,1) * [PTPN6_p] * [CTNNB1_p] -K(409,2) * [PTPN6_p |CTNNB1_p];
  R409: PTPN6_p => CTNNB1_p; 1;
  // V(410) = K(410,1) * [PTPN6_p |CTNNB1_p];
  R410: PTPN6_p => CTNNB1_p; 1;
  // V(411) = K(411,1) * [PTPN11_p] * [STAT3_p] -K(411,2) * [PTPN11_p |STAT3_p];
  R411: STAT3_p => PTPN11_p; 1;
  // V(412) = K(412,1) * [PTPN11_p |STAT3_p];
  R412: STAT3_p => PTPN11_p; 1;
  // V(413) = K(413,1) * [PTPN2] * [STAT5A_p] -K(413,2) * [PTPN2 |STAT5A_p];
  R413: STAT5A_p => PTPN2; 1;
  // V(414) = K(414,1) * [PTPN2 |STAT5A_p];
  R414: STAT5A_p => PTPN2; 1;
  // V(415) = K(415,1) * [PTPN6_p] * [LYN_p] -K(415,2) * [PTPN6_p |LYN_p];
  R415: PTPN6_p => LYN_p; 1;
  // V(416) = K(416,1) * [PTPN6_p |LYN_p];
  R416: PTPN6_p => LYN_p; 1;
  // V(417) = K(417,1) * [MDM2_p] * [IRF1] -K(417,2) * [MDM2_p |IRF1];
  R417: IRF1 => MDM2_p; 1;
  // V(418) = K(418,1) * [MDM2_p |IRF1];
  R418: IRF1 => MDM2_p; 1;
  // V(419) = K(419,1) * [MDM2_p] * [HIF1A] -K(419,2) * [MDM2_p |HIF1A];
  R419: HIF1A => MDM2_p; 1;
  // V(420) = K(420,1) * [MDM2_p |HIF1A];
  R420: HIF1A => MDM2_p; 1;
  // V(421) = K(421,1) * [RNF7] * [HIF1A] -K(421,2) * [RNF7 |HIF1A];
  R421: HIF1A => RNF7; 1;
  // V(422) = K(422,1) * [RNF7 |HIF1A];
  R422: HIF1A => RNF7; 1;
  // V(423) = K(423,1) * [MDM2_p] * [NUMB] -K(423,2) * [MDM2_p |NUMB];
  R423: MDM2_p => NUMB; 1;
  // V(424) = K(424,1) * [MDM2_p |NUMB];
  R424: MDM2_p => NUMB; 1;
  // V(425) = K(425,1) * [SOCS1] * [JAK2] -K(425,2) * [SOCS1 |JAK2];
  R425: JAK2 => SOCS1; 1;
  // V(426) = K(426,1) * [SOCS1 |JAK2];
  R426: JAK2 => SOCS1; 1;
  // V(427) = K(427,1) * [RNF7] * [CDKN1B] -K(427,2) * [RNF7 |CDKN1B];
  R427: CDKN1B => RNF7; 1;
  // V(428) = K(428,1) * [RNF7 |CDKN1B];
  R428: CDKN1B => RNF7; 1;
  // V(429) = K(429,1) * [MDM2_p] * [TP53] -K(429,2) * [MDM2_p |TP53];
  R429: TP53 => MDM2_p; 1;
  // V(430) = K(430,1) * [MDM2_p |TP53];
  R430: TP53 => MDM2_p; 1;
  // V(431) = K(431,1) * [MDM2_p] * [HDAC1] -K(431,2) * [MDM2_p |HDAC1];
  R431: MDM2_p => HDAC1; 1;
  // V(432) = K(432,1) * [MDM2_p |HDAC1];
  R432: MDM2_p => HDAC1; 1;
  // V(433) = K(433,1) * [CUL3] * [RHOA] -K(433,2) * [CUL3 |RHOA];
  R433: RHOA => CUL3; 1;
  // V(434) = K(434,1) * [CUL3 |RHOA];
  R434: RHOA => CUL3; 1;
  // V(435) = K(435,1) * [RNF7] * [JUN] -K(435,2) * [RNF7 |JUN];
  R435: JUN => RNF7; 1;
  // V(436) = K(436,1) * [RNF7 |JUN];
  R436: JUN => RNF7; 1;
  // V(437) = K(437,1) * [RNF7] * [CASP3] -K(437,2) * [RNF7 |CASP3];
  R437: RNF7 => CASP3; 1;
  // V(438) = K(438,1) * [RNF7 |CASP3];
  R438: RNF7 => CASP3; 1;
  // V(439) = K(439,1) * [JUN_p] * [TGFB1_g] -K(439,2) * [JUN_p |TGFB1_g];
  R439: JUN_p => TGFB1_g; 1;
  // V(440) = K(440,1) * [JUN_p |TGFB1_g];
  R440: JUN_p => TGFB1_g; 1;
  // V(441) = K(441,1) * [TGFB1_rna];
  R441: TGFB1_rna => ; 1;
  // V(442) = K(442,1) * [TP53_p] * [VCAN_g] -K(442,2) * [TP53_p |VCAN_g];
  R442: VCAN_g => TP53_p; 1;
  // V(443) = K(443,1) * [TP53_p |VCAN_g];
  R443: VCAN_g => TP53_p; 1;
  // V(444) = K(444,1) * [VCAN_rna];
  R444: VCAN_rna => ; 1;
  // V(445) = K(445,1) * [TP53_p] * [CDKN1A_g] -K(445,2) * [TP53_p |CDKN1A_g];
  R445: CDKN1A_g => TP53_p; 1;
  // V(446) = K(446,1) * [TP53_p |CDKN1A_g];
  R446: CDKN1A_g => TP53_p; 1;
  // V(447) = K(447,1) * [CDKN1A_rna];
  R447: CDKN1A_rna => ; 1;
  // V(448) = K(448,1) * [NFE2L2] * [SOD1_g] -K(448,2) * [NFE2L2 |SOD1_g];
  R448: SOD1_g => NFE2L2; 1;
  // V(449) = K(449,1) * [NFE2L2 |SOD1_g];
  R449: SOD1_g => NFE2L2; 1;
  // V(450) = K(450,1) * [SOD1_rna];
  R450: SOD1_rna => ; 1;
  // V(451) = K(451,1) * [HIF1A_p] * [SIGNOR-C154_p] * [CCL2_g] -K(451,2) * [HIF1A_p |SIGNOR-C154_p |CCL2_g];
  R451: CCL2_g => HIF1A_p; 1;
  // V(452) = K(452,1) * [HIF1A_p |SIGNOR-C154_p |CCL2_g];
  R452: CCL2_g => HIF1A_p; 1;
  // V(453) = K(453,1) * [CCL2_rna];
  R453: CCL2_rna => ; 1;
  // V(454) = K(454,1) * [STAT3_p] * [STAT1_p] * [SIGNOR-C13] * [STAT5A_p] * [SOCS3_g] -K(454,2) * [STAT3_p |STAT1_p |SIGNOR-C13 |STAT5A_p |SOCS3_g];
  R454: STAT3_p => STAT5A_p; 1;
  // V(455) = K(455,1) * [STAT3_p |STAT1_p |SIGNOR-C13 |STAT5A_p |SOCS3_g];
  R455: STAT3_p => STAT5A_p; 1;
  // V(456) = K(456,1) * [SOCS3_rna];
  R456: SOCS3_rna => ; 1;
  // V(457) = K(457,1) * [SREBF1_p] * [PKM_g] -K(457,2) * [SREBF1_p |PKM_g];
  R457: PKM_g => SREBF1_p; 1;
  // V(458) = K(458,1) * [SREBF1_p |PKM_g];
  R458: PKM_g => SREBF1_p; 1;
  // V(459) = K(459,1) * [PKM_rna];
  R459: PKM_rna => ; 1;
  // V(460) = K(460,1) * [STAT5A_p] * [IGF1_g] -K(460,2) * [STAT5A_p |IGF1_g];
  R460: STAT5A_p => IGF1_g; 1;
  // V(461) = K(461,1) * [STAT5A_p |IGF1_g];
  R461: STAT5A_p => IGF1_g; 1;
  // V(462) = K(462,1) * [IGF1_rna];
  R462: IGF1_rna => ; 1;
  // V(463) = K(463,1) * [CTNNB1_p] * [CCND1_g] -K(463,2) * [CTNNB1_p |CCND1_g];
  R463: CTNNB1_p => CCND1_g; 1;
  // V(464) = K(464,1) * [CTNNB1_p |CCND1_g];
  R464: CTNNB1_p => CCND1_g; 1;
  // V(465) = K(465,1) * [CCND1_rna];
  R465: CCND1_rna => ; 1;
  // V(466) = K(466,1) * [HIF1A_p] * [RELA_p] * [SIGNOR-C13] * [IL1B_g] -K(466,2) * [HIF1A_p |RELA_p |SIGNOR-C13 |IL1B_g];
  R466: IL1B_g => HIF1A_p; 1;
  // V(467) = K(467,1) * [HIF1A_p |RELA_p |SIGNOR-C13 |IL1B_g];
  R467: IL1B_g => HIF1A_p; 1;
  // V(468) = K(468,1) * [IL1B_rna];
  R468: IL1B_rna => ; 1;
  // V(469) = K(469,1) * [TP53_p] * [BAX_g] -K(469,2) * [TP53_p |BAX_g];
  R469: BAX_g => TP53_p; 1;
  // V(470) = K(470,1) * [TP53_p |BAX_g];
  R470: BAX_g => TP53_p; 1;
  // V(471) = K(471,1) * [BAX_rna];
  R471: BAX_rna => ; 1;
  // V(472) = K(472,1) * [NFE2L2] * [CAT_g] -K(472,2) * [NFE2L2 |CAT_g];
  R472: CAT_g => NFE2L2; 1;
  // V(473) = K(473,1) * [NFE2L2 |CAT_g];
  R473: CAT_g => NFE2L2; 1;
  // V(474) = K(474,1) * [CAT_rna];
  R474: CAT_rna => ; 1;
  // V(475) = K(475,1) * [HIF1A_p] * [STAT3_p] * [VEGFA_g] -K(475,2) * [HIF1A_p |STAT3_p |VEGFA_g];
  R475: STAT3_p => HIF1A_p; 1;
  // V(476) = K(476,1) * [HIF1A_p |STAT3_p |VEGFA_g];
  R476: STAT3_p => HIF1A_p; 1;
  // V(477) = K(477,1) * [VEGFA_rna];
  R477: VEGFA_rna => ; 1;
  // V(478) = K(478,1) * [NFE2L2] * [GCLC_g] -K(478,2) * [NFE2L2 |GCLC_g];
  R478: GCLC_g => NFE2L2; 1;
  // V(479) = K(479,1) * [NFE2L2 |GCLC_g];
  R479: GCLC_g => NFE2L2; 1;
  // V(480) = K(480,1) * [GCLC_rna];
  R480: GCLC_rna => ; 1;
  // V(481) = K(481,1) * [STAT3_p] * [HGF_g] -K(481,2) * [STAT3_p |HGF_g];
  R481: STAT3_p => HGF_g; 1;
  // V(482) = K(482,1) * [STAT3_p |HGF_g];
  R482: STAT3_p => HGF_g; 1;
  // V(483) = K(483,1) * [HGF_rna];
  R483: HGF_rna => ; 1;
  // V(484) = K(484,1) * [HIF1A_p] * [KDM6B_g] -K(484,2) * [HIF1A_p |KDM6B_g];
  R484: KDM6B_g => HIF1A_p; 1;
  // V(485) = K(485,1) * [HIF1A_p |KDM6B_g];
  R485: KDM6B_g => HIF1A_p; 1;
  // V(486) = K(486,1) * [KDM6B_rna];
  R486: KDM6B_rna => ; 1;
  // V(487) = K(487,1) * [NR3C1_p] * [KLF9_g] -K(487,2) * [NR3C1_p |KLF9_g];
  R487: KLF9_g => NR3C1_p; 1;
  // V(488) = K(488,1) * [NR3C1_p |KLF9_g];
  R488: KLF9_g => NR3C1_p; 1;
  // V(489) = K(489,1) * [KLF9_rna];
  R489: KLF9_rna => ; 1;
  // V(490) = K(490,1) * [CREB1_p] * [IRS2_g] -K(490,2) * [CREB1_p |IRS2_g];
  R490: CREB1_p => IRS2_g; 1;
  // V(491) = K(491,1) * [CREB1_p |IRS2_g];
  R491: CREB1_p => IRS2_g; 1;
  // V(492) = K(492,1) * [IRS2_rna];
  R492: IRS2_rna => ; 1;
  // V(493) = K(493,1) * [NFE2L2] * [GPX4_g] -K(493,2) * [NFE2L2 |GPX4_g];
  R493: GPX4_g => NFE2L2; 1;
  // V(494) = K(494,1) * [NFE2L2 |GPX4_g];
  R494: GPX4_g => NFE2L2; 1;
  // V(495) = K(495,1) * [GPX4_rna];
  R495: GPX4_rna => ; 1;
  // V(496) = K(496,1) * [STAT6_p] * [SOCS1_g] -K(496,2) * [STAT6_p |SOCS1_g];
  R496: STAT6_p => SOCS1_g; 1;
  // V(497) = K(497,1) * [STAT6_p |SOCS1_g];
  R497: STAT6_p => SOCS1_g; 1;
  // V(498) = K(498,1) * [SOCS1_rna];
  R498: SOCS1_rna => ; 1;
  // V(499) = K(499,1) * [NFE2L2] * [HMOX1_g] -K(499,2) * [NFE2L2 |HMOX1_g];
  R499: HMOX1_g => NFE2L2; 1;
  // V(500) = K(500,1) * [NFE2L2 |HMOX1_g];
  R500: HMOX1_g => NFE2L2; 1;
  // V(501) = K(501,1) * [HMOX1_rna];
  R501: HMOX1_rna => ; 1;
  // V(502) = K(502,1) * [TP53_p] * [AIFM1_g] -K(502,2) * [TP53_p |AIFM1_g];
  R502: AIFM1_g => TP53_p; 1;
  // V(503) = K(503,1) * [TP53_p |AIFM1_g];
  R503: AIFM1_g => TP53_p; 1;
  // V(504) = K(504,1) * [AIFM1_rna];
  R504: AIFM1_rna => ; 1;
  // V(505) = K(505,1) * [NFE2L2] * [SOD2_g] -K(505,2) * [NFE2L2 |SOD2_g];
  R505: SOD2_g => NFE2L2; 1;
  // V(506) = K(506,1) * [NFE2L2 |SOD2_g];
  R506: SOD2_g => NFE2L2; 1;
  // V(507) = K(507,1) * [SOD2_rna];
  R507: SOD2_rna => ; 1;
  // V(508) = K(508,1) * [STAT3_p] * [STAT1_g] -K(508,2) * [STAT3_p |STAT1_g];
  R508: STAT3_p => STAT1_g; 1;
  // V(509) = K(509,1) * [STAT3_p |STAT1_g];
  R509: STAT3_p => STAT1_g; 1;
  // V(510) = K(510,1) * [STAT1_rna];
  R510: STAT1_rna => ; 1;
  // V(511) = K(511,1) * [RELA_p] * [IL1B_g] -K(511,2) * [RELA_p |IL1B_g];
  R511: IL1B_g => RELA_p; 1;
  // V(512) = K(512,1) * [IL1B_g];
  R512: IL1B_g => ; 1;
  // V(513) = K(513,1) * [HES1] * [NR3C1_g] -K(513,2) * [HES1 |NR3C1_g];
  R513: HES1 => NR3C1_g; 1;
  // V(514) = K(514,1) * [NR3C1_g];
  R514: NR3C1_g => ; 1;
  // V(515) = K(515,1) * [NR3C1_rna];
  R515: NR3C1_rna => ; 1;
  // V(516) = K(516,1) * [NR3C1_p] * [JUN_g] -K(516,2) * [NR3C1_p |JUN_g];
  R516: JUN_g => NR3C1_p; 1;
  // V(517) = K(517,1) * [JUN_g];
  R517: JUN_g => ; 1;
  // V(518) = K(518,1) * [JUN_rna];
  R518: JUN_rna => ; 1;
  // V(519) = K(519,1) * [MECP2_p] * [SGK1_g] -K(519,2) * [MECP2_p |SGK1_g];
  R519: MECP2_p => SGK1_g; 1;
  // V(520) = K(520,1) * [SGK1_g];
  R520: SGK1_g => ; 1;
  // V(521) = K(521,1) * [SGK1_rna];
  R521: SGK1_rna => ; 1;
  // V(522) = K(522,1) * [NR3C1_p] * [NFKB1_g] -K(522,2) * [NR3C1_p |NFKB1_g];
  R522: NR3C1_p => NFKB1_g; 1;
  // V(523) = K(523,1) * [NFKB1_g];
  R523: NFKB1_g => ; 1;
  // V(524) = K(524,1) * [NFKB1_rna];
  R524: NFKB1_rna => ; 1;
  // V(525) = K(525,1) * [SGK1];
  R525: SGK1 => ; 1;
  // V(526) = K(526,1) * [TLR4];
  R526: TLR4 => ; 1;
  // V(527) = K(527,1) * [DNM1L];
  R527: DNM1L => ; 1;
  // V(528) = K(528,1) * [SOCS3];
  R528: SOCS3 => ; 1;
  // V(529) = K(529,1) * [IKBKB];
  R529: IKBKB => ; 1;
  // V(530) = K(530,1) * [KDM6B];
  R530: KDM6B => ; 1;
  // V(531) = K(531,1) * [SOCS1];
  R531: SOCS1 => ; 1;
  // V(532) = K(532,1) * [TLR2];
  R532: TLR2 => ; 1;
  // V(533) = K(533,1) * [JAK2];
  R533: JAK2 => ; 1;
  // V(534) = K(534,1) * [ROCK2];
  R534: ROCK2 => ; 1;
  // V(535) = K(535,1) * [AIFM1];
  R535: AIFM1 => ; 1;
  // V(536) = K(536,1) * [SOD1];
  R536: SOD1 => ; 1;
  // V(537) = K(537,1) * [FOS];
  R537: FOS => ; 1;
  // V(538) = K(538,1) * [TGFB1];
  R538: TGFB1 => ; 1;
  // V(539) = K(539,1) * [IL1B];
  R539: IL1B => ; 1;
  // V(540) = K(540,1) * [CAT];
  R540: CAT => ; 1;
  // V(541) = K(541,1) * [NR3C1];
  R541: NR3C1 => ; 1;
  // V(542) = K(542,1) * [SOD2];
  R542: SOD2 => ; 1;
  // V(543) = K(543,1) * [TP53];
  R543: TP53 => ; 1;
  // V(544) = K(544,1) * [HSPB1];
  R544: HSPB1 => ; 1;
  // V(545) = K(545,1) * [IGF1];
  R545: IGF1 => ; 1;
  // V(546) = K(546,1) * [HMGN1];
  R546: HMGN1 => ; 1;
  // V(547) = K(547,1) * [JUN];
  R547: JUN => ; 1;
  // V(548) = K(548,1) * [INSR];
  R548: INSR => ; 1;
  // V(549) = K(549,1) * [LYN];
  R549: LYN => ; 1;
  // V(550) = K(550,1) * [VIM];
  R550: VIM => ; 1;
  // V(551) = K(551,1) * [IL6R];
  R551: IL6R => ; 1;
  // V(552) = K(552,1) * [HMOX1];
  R552: HMOX1 => ; 1;
  // V(553) = K(553,1) * [PARP1];
  R553: PARP1 => ; 1;
  // V(554) = K(554,1) * [UBC];
  R554: UBC => ; 1;
  // V(555) = K(555,1) * [CALM1];
  R555: CALM1 => ; 1;
  // V(556) = K(556,1) * [BCL2];
  R556: BCL2 => ; 1;
  // V(557) = K(557,1) * [IRF1];
  R557: IRF1 => ; 1;
  // V(558) = K(558,1) * [CCL2];
  R558: CCL2 => ; 1;
  // V(559) = K(559,1) * [VCAN];
  R559: VCAN => ; 1;
  // V(560) = K(560,1) * [HGF];
  R560: HGF => ; 1;
  // V(561) = K(561,1) * [NCF1];
  R561: NCF1 => ; 1;
  // V(562) = K(562,1) * [PKM];
  R562: PKM => ; 1;
  // V(563) = K(563,1) * [VEGFA];
  R563: VEGFA => ; 1;
  // V(564) = K(564,1) * [CREB1];
  R564: CREB1 => ; 1;
  // V(565) = K(565,1) * [JUNB];
  R565: JUNB => ; 1;
  // V(566) = K(566,1) * [PTPN2];
  R566: PTPN2 => ; 1;
  // V(567) = K(567,1) * [NFKB1];
  R567: NFKB1 => ; 1;
  // V(568) = K(568,1) * [NR4A1];
  R568: NR4A1 => ; 1;
  // V(569) = K(569,1) * [JAK1];
  R569: JAK1 => ; 1;
  // V(570) = K(570,1) * [CCND1];
  R570: CCND1 => ; 1;
  // V(571) = K(571,1) * [DNMT1];
  R571: DNMT1 => ; 1;
  // V(572) = K(572,1) * [ZFP36];
  R572: ZFP36 => ; 1;
  // V(573) = K(573,1) * [PIK3R1];
  R573: PIK3R1 => ; 1;
  // V(574) = K(574,1) * [MAPK1];
  R574: MAPK1 => ; 1;
  // V(575) = K(575,1) * [DUSP1];
  R575: DUSP1 => ; 1;
  // V(576) = K(576,1) * [PTPN6];
  R576: PTPN6 => ; 1;
  // V(577) = K(577,1) * [PRDX6];
  R577: PRDX6 => ; 1;
  // V(578) = K(578,1) * [AXL];
  R578: AXL => ; 1;
  // V(579) = K(579,1) * [AKT1];
  R579: AKT1 => ; 1;
  // V(580) = K(580,1) * [CTNNB1];
  R580: CTNNB1 => ; 1;
  // V(581) = K(581,1) * [PTGS2];
  R581: PTGS2 => ; 1;
  // V(582) = K(582,1) * [TGFBR1];
  R582: TGFBR1 => ; 1;
  // V(583) = K(583,1) * [SREBF1];
  R583: SREBF1 => ; 1;
  // V(584) = K(584,1) * [GPX4];
  R584: GPX4 => ; 1;
  // V(585) = K(585,1) * [CDKN1A];
  R585: CDKN1A => ; 1;
  // V(586) = K(586,1) * [STAT3];
  R586: STAT3 => ; 1;
  // V(587) = K(587,1) * [STAT1];
  R587: STAT1 => ; 1;
  // V(588) = K(588,1) * [STAT6];
  R588: STAT6 => ; 1;
  // V(589) = K(589,1) * [STAT5A];
  R589: STAT5A => ; 1;
  // V(590) = K(590,1) * [PIK3CA];
  R590: PIK3CA => ; 1;
  // V(591) = K(591,1) * [CASP3];
  R591: CASP3 => ; 1;
  // V(592) = K(592,1) * [MAPK8];
  R592: MAPK8 => ; 1;
  // V(593) = K(593,1) * [CDKN1B];
  R593: CDKN1B => ; 1;
  // V(594) = K(594,1) * [GCLC];
  R594: GCLC => ; 1;
  // V(595) = K(595,1) * [NUMB];
  R595: NUMB => ; 1;
  // V(596) = K(596,1) * [MECP2];
  R596: MECP2 => ; 1;
  // V(597) = K(597,1) * [IRAK1];
  R597: IRAK1 => ; 1;
  // V(598) = K(598,1) * [RPS6KA3];
  R598: RPS6KA3 => ; 1;
  // V(599) = K(599,1) * [PTEN];
  R599: PTEN => ; 1;
  // V(600) = K(600,1) * [RHOA];
  R600: RHOA => ; 1;
  // V(601) = K(601,1) * [RAC1];
  R601: RAC1 => ; 1;
  // V(602) = K(602,1) * [MDM2];
  R602: MDM2 => ; 1;
  // V(603) = K(603,1) * [IRF8];
  R603: IRF8 => ; 1;
  // V(604) = K(604,1) * [RELA];
  R604: RELA => ; 1;
  // V(605) = K(605,1) * [NOTCH2];
  R605: NOTCH2 => ; 1;
  // V(606) = K(606,1) * [GLO1];
  R606: GLO1 => ; 1;
  // V(607) = K(607,1) * [PTPN11];
  R607: PTPN11 => ; 1;
  // V(608) = K(608,1) * [BTK];
  R608: BTK => ; 1;
  // V(609) = K(609,1) * [PRDX1];
  R609: PRDX1 => ; 1;
  // V(610) = K(610,1) * [BAX];
  R610: BAX => ; 1;
  // V(611) = K(611,1) * [EP300];
  R611: EP300 => ; 1;
  // V(612) = K(612,1) * [PTPRJ];
  R612: PTPRJ => ; 1;
  // V(613) = K(613,1) * [STK4];
  R613: STK4 => ; 1;
  // V(614) = K(614,1) * [ILK];
  R614: ILK => ; 1;
  // V(615) = K(615,1) * [ROCK1];
  R615: ROCK1 => ; 1;
  // V(616) = K(616,1) * [SMAD4];
  R616: SMAD4 => ; 1;
  // V(617) = K(617,1) * [HDAC1];
  R617: HDAC1 => ; 1;
  // V(618) = K(618,1) * [CUL3];
  R618: CUL3 => ; 1;
  // V(619) = K(619,1) * [KLF9];
  R619: KLF9 => ; 1;
  // V(620) = K(620,1) * [BECN1];
  R620: BECN1 => ; 1;
  // V(621) = K(621,1) * [HES1];
  R621: HES1 => ; 1;
  // V(622) = K(622,1) * [IRF3];
  R622: IRF3 => ; 1;
  // V(623) = K(623,1) * [SMAD2];
  R623: SMAD2 => ; 1;
  // V(624) = K(624,1) * [STK11];
  R624: STK11 => ; 1;
  // V(625) = K(625,1) * [NFE2L2];
  R625: NFE2L2 => ; 1;
  // V(626) = K(626,1) * [PKN1];
  R626: PKN1 => ; 1;
  // V(627) = K(627,1) * [HIF1A];
  R627: HIF1A => ; 1;
  // V(628) = K(628,1) * [SIRT1];
  R628: SIRT1 => ; 1;
  // V(629) = K(629,1) * [NLRP3];
  R629: NLRP3 => ; 1;
  // V(630) = K(630,1) * [PARK7];
  R630: PARK7 => ; 1;
  // V(631) = K(631,1) * [MAP3K5];
  R631: MAP3K5 => ; 1;
  // V(632) = K(632,1) * [MAPKAP1];
  R632: MAPKAP1 => ; 1;
  // V(633) = K(633,1) * [PINK1];
  R633: PINK1 => ; 1;
  // V(634) = K(634,1) * [HIPK2];
  R634: HIPK2 => ; 1;
  // V(635) = K(635,1) * [TXNIP];
  R635: TXNIP => ; 1;
  // V(636) = K(636,1) * [TLR7];
  R636: TLR7 => ; 1;
  // V(637) = K(637,1) * [RNF7];
  R637: RNF7 => ; 1;
  // V(638) = K(638,1) * [IRS2];
  R638: IRS2 => ; 1;
  // V(639) = K(639,1) * [SGK1_rna];
  R639: SGK1_rna => ; 1;
  // V(640) = K(640,1) * [SOCS3_rna];
  R640: SOCS3_rna => ; 1;
  // V(641) = K(641,1) * [KDM6B_rna];
  R641: KDM6B_rna => ; 1;
  // V(642) = K(642,1) * [SOCS1_rna];
  R642: SOCS1_rna => ; 1;
  // V(643) = K(643,1) * [AIFM1_rna];
  R643: AIFM1_rna => ; 1;
  // V(644) = K(644,1) * [SOD1_rna];
  R644: SOD1_rna => ; 1;
  // V(645) = K(645,1) * [TGFB1_rna];
  R645: TGFB1_rna => ; 1;
  // V(646) = K(646,1) * [IL1B_rna];
  R646: IL1B_rna => ; 1;
  // V(647) = K(647,1) * [CAT_rna];
  R647: CAT_rna => ; 1;
  // V(648) = K(648,1) * [NR3C1_rna];
  R648: NR3C1_rna => ; 1;
  // V(649) = K(649,1) * [SOD2_rna];
  R649: SOD2_rna => ; 1;
  // V(650) = K(650,1) * [IGF1_rna];
  R650: IGF1_rna => ; 1;
  // V(651) = K(651,1) * [JUN_rna];
  R651: JUN_rna => ; 1;
  // V(652) = K(652,1) * [HMOX1_rna];
  R652: HMOX1_rna => ; 1;
  // V(653) = K(653,1) * [CCL2_rna];
  R653: CCL2_rna => ; 1;
  // V(654) = K(654,1) * [VCAN_rna];
  R654: VCAN_rna => ; 1;
  // V(655) = K(655,1) * [HGF_rna];
  R655: HGF_rna => ; 1;
  // V(656) = K(656,1) * [PKM_rna];
  R656: PKM_rna => ; 1;
  // V(657) = K(657,1) * [VEGFA_rna];
  R657: VEGFA_rna => ; 1;
  // V(658) = K(658,1) * [NFKB1_rna];
  R658: NFKB1_rna => ; 1;
  // V(659) = K(659,1) * [CCND1_rna];
  R659: CCND1_rna => ; 1;
  // V(660) = K(660,1) * [GPX4_rna];
  R660: GPX4_rna => ; 1;
  // V(661) = K(661,1) * [CDKN1A_rna];
  R661: CDKN1A_rna => ; 1;
  // V(662) = K(662,1) * [STAT1_rna];
  R662: STAT1_rna => ; 1;
  // V(663) = K(663,1) * [GCLC_rna];
  R663: GCLC_rna => ; 1;
  // V(664) = K(664,1) * [BAX_rna];
  R664: BAX_rna => ; 1;
  // V(665) = K(665,1) * [KLF9_rna];
  R665: KLF9_rna => ; 1;
  // V(666) = K(666,1) * [IRS2_rna];
  R666: IRS2_rna => ; 1;
  // V(667) = K(667,1) * [TLR4_g];
  R667: TLR4_g => ; 1;
  // V(668) = K(668,1) * [TLR4_rna];
  R668: TLR4_rna => ; 1;
  // V(669) = K(669,1) * [DNM1L_g];
  R669: DNM1L_g => ; 1;
  // V(670) = K(670,1) * [DNM1L_rna];
  R670: DNM1L_rna => ; 1;
  // V(671) = K(671,1) * [IKBKB_g];
  R671: IKBKB_g => ; 1;
  // V(672) = K(672,1) * [IKBKB_rna];
  R672: IKBKB_rna => ; 1;
  // V(673) = K(673,1) * [TLR2_g];
  R673: TLR2_g => ; 1;
  // V(674) = K(674,1) * [TLR2_rna];
  R674: TLR2_rna => ; 1;
  // V(675) = K(675,1) * [JAK2_g];
  R675: JAK2_g => ; 1;
  // V(676) = K(676,1) * [JAK2_rna];
  R676: JAK2_rna => ; 1;
  // V(677) = K(677,1) * [ROCK2_g];
  R677: ROCK2_g => ; 1;
  // V(678) = K(678,1) * [ROCK2_rna];
  R678: ROCK2_rna => ; 1;
  // V(679) = K(679,1) * [FOS_g];
  R679: FOS_g => ; 1;
  // V(680) = K(680,1) * [FOS_rna];
  R680: FOS_rna => ; 1;
  // V(681) = K(681,1) * [TP53_g];
  R681: TP53_g => ; 1;
  // V(682) = K(682,1) * [TP53_rna];
  R682: TP53_rna => ; 1;
  // V(683) = K(683,1) * [HSPB1_g];
  R683: HSPB1_g => ; 1;
  // V(684) = K(684,1) * [HSPB1_rna];
  R684: HSPB1_rna => ; 1;
  // V(685) = K(685,1) * [HMGN1_g];
  R685: HMGN1_g => ; 1;
  // V(686) = K(686,1) * [HMGN1_rna];
  R686: HMGN1_rna => ; 1;
  // V(687) = K(687,1) * [INSR_g];
  R687: INSR_g => ; 1;
  // V(688) = K(688,1) * [INSR_rna];
  R688: INSR_rna => ; 1;
  // V(689) = K(689,1) * [LYN_g];
  R689: LYN_g => ; 1;
  // V(690) = K(690,1) * [LYN_rna];
  R690: LYN_rna => ; 1;
  // V(691) = K(691,1) * [VIM_g];
  R691: VIM_g => ; 1;
  // V(692) = K(692,1) * [VIM_rna];
  R692: VIM_rna => ; 1;
  // V(693) = K(693,1) * [IL6R_g];
  R693: IL6R_g => ; 1;
  // V(694) = K(694,1) * [IL6R_rna];
  R694: IL6R_rna => ; 1;
  // V(695) = K(695,1) * [PARP1_g];
  R695: PARP1_g => ; 1;
  // V(696) = K(696,1) * [PARP1_rna];
  R696: PARP1_rna => ; 1;
  // V(697) = K(697,1) * [UBC_g];
  R697: UBC_g => ; 1;
  // V(698) = K(698,1) * [UBC_rna];
  R698: UBC_rna => ; 1;
  // V(699) = K(699,1) * [CALM1_g];
  R699: CALM1_g => ; 1;
  // V(700) = K(700,1) * [CALM1_rna];
  R700: CALM1_rna => ; 1;
  // V(701) = K(701,1) * [BCL2_g];
  R701: BCL2_g => ; 1;
  // V(702) = K(702,1) * [BCL2_rna];
  R702: BCL2_rna => ; 1;
  // V(703) = K(703,1) * [IRF1_g];
  R703: IRF1_g => ; 1;
  // V(704) = K(704,1) * [IRF1_rna];
  R704: IRF1_rna => ; 1;
  // V(705) = K(705,1) * [NCF1_g];
  R705: NCF1_g => ; 1;
  // V(706) = K(706,1) * [NCF1_rna];
  R706: NCF1_rna => ; 1;
  // V(707) = K(707,1) * [CREB1_g];
  R707: CREB1_g => ; 1;
  // V(708) = K(708,1) * [CREB1_rna];
  R708: CREB1_rna => ; 1;
  // V(709) = K(709,1) * [JUNB_g];
  R709: JUNB_g => ; 1;
  // V(710) = K(710,1) * [JUNB_rna];
  R710: JUNB_rna => ; 1;
  // V(711) = K(711,1) * [PTPN2_g];
  R711: PTPN2_g => ; 1;
  // V(712) = K(712,1) * [PTPN2_rna];
  R712: PTPN2_rna => ; 1;
  // V(713) = K(713,1) * [NR4A1_g];
  R713: NR4A1_g => ; 1;
  // V(714) = K(714,1) * [NR4A1_rna];
  R714: NR4A1_rna => ; 1;
  // V(715) = K(715,1) * [JAK1_g];
  R715: JAK1_g => ; 1;
  // V(716) = K(716,1) * [JAK1_rna];
  R716: JAK1_rna => ; 1;
  // V(717) = K(717,1) * [DNMT1_g];
  R717: DNMT1_g => ; 1;
  // V(718) = K(718,1) * [DNMT1_rna];
  R718: DNMT1_rna => ; 1;
  // V(719) = K(719,1) * [ZFP36_g];
  R719: ZFP36_g => ; 1;
  // V(720) = K(720,1) * [ZFP36_rna];
  R720: ZFP36_rna => ; 1;
  // V(721) = K(721,1) * [PIK3R1_g];
  R721: PIK3R1_g => ; 1;
  // V(722) = K(722,1) * [PIK3R1_rna];
  R722: PIK3R1_rna => ; 1;
  // V(723) = K(723,1) * [MAPK1_g];
  R723: MAPK1_g => ; 1;
  // V(724) = K(724,1) * [MAPK1_rna];
  R724: MAPK1_rna => ; 1;
  // V(725) = K(725,1) * [DUSP1_g];
  R725: DUSP1_g => ; 1;
  // V(726) = K(726,1) * [DUSP1_rna];
  R726: DUSP1_rna => ; 1;
  // V(727) = K(727,1) * [PTPN6_g];
  R727: PTPN6_g => ; 1;
  // V(728) = K(728,1) * [PTPN6_rna];
  R728: PTPN6_rna => ; 1;
  // V(729) = K(729,1) * [PRDX6_g];
  R729: PRDX6_g => ; 1;
  // V(730) = K(730,1) * [PRDX6_rna];
  R730: PRDX6_rna => ; 1;
  // V(731) = K(731,1) * [AXL_g];
  R731: AXL_g => ; 1;
  // V(732) = K(732,1) * [AXL_rna];
  R732: AXL_rna => ; 1;
  // V(733) = K(733,1) * [AKT1_g];
  R733: AKT1_g => ; 1;
  // V(734) = K(734,1) * [AKT1_rna];
  R734: AKT1_rna => ; 1;
  // V(735) = K(735,1) * [CTNNB1_g];
  R735: CTNNB1_g => ; 1;
  // V(736) = K(736,1) * [CTNNB1_rna];
  R736: CTNNB1_rna => ; 1;
  // V(737) = K(737,1) * [PTGS2_g];
  R737: PTGS2_g => ; 1;
  // V(738) = K(738,1) * [PTGS2_rna];
  R738: PTGS2_rna => ; 1;
  // V(739) = K(739,1) * [TGFBR1_g];
  R739: TGFBR1_g => ; 1;
  // V(740) = K(740,1) * [TGFBR1_rna];
  R740: TGFBR1_rna => ; 1;
  // V(741) = K(741,1) * [SREBF1_g];
  R741: SREBF1_g => ; 1;
  // V(742) = K(742,1) * [SREBF1_rna];
  R742: SREBF1_rna => ; 1;
  // V(743) = K(743,1) * [STAT3_g];
  R743: STAT3_g => ; 1;
  // V(744) = K(744,1) * [STAT3_rna];
  R744: STAT3_rna => ; 1;
  // V(745) = K(745,1) * [STAT6_g];
  R745: STAT6_g => ; 1;
  // V(746) = K(746,1) * [STAT6_rna];
  R746: STAT6_rna => ; 1;
  // V(747) = K(747,1) * [STAT5A_g];
  R747: STAT5A_g => ; 1;
  // V(748) = K(748,1) * [STAT5A_rna];
  R748: STAT5A_rna => ; 1;
  // V(749) = K(749,1) * [PIK3CA_g];
  R749: PIK3CA_g => ; 1;
  // V(750) = K(750,1) * [PIK3CA_rna];
  R750: PIK3CA_rna => ; 1;
  // V(751) = K(751,1) * [CASP3_g];
  R751: CASP3_g => ; 1;
  // V(752) = K(752,1) * [CASP3_rna];
  R752: CASP3_rna => ; 1;
  // V(753) = K(753,1) * [MAPK8_g];
  R753: MAPK8_g => ; 1;
  // V(754) = K(754,1) * [MAPK8_rna];
  R754: MAPK8_rna => ; 1;
  // V(755) = K(755,1) * [CDKN1B_g];
  R755: CDKN1B_g => ; 1;
  // V(756) = K(756,1) * [CDKN1B_rna];
  R756: CDKN1B_rna => ; 1;
  // V(757) = K(757,1) * [NUMB_g];
  R757: NUMB_g => ; 1;
  // V(758) = K(758,1) * [NUMB_rna];
  R758: NUMB_rna => ; 1;
  // V(759) = K(759,1) * [MECP2_g];
  R759: MECP2_g => ; 1;
  // V(760) = K(760,1) * [MECP2_rna];
  R760: MECP2_rna => ; 1;
  // V(761) = K(761,1) * [IRAK1_g];
  R761: IRAK1_g => ; 1;
  // V(762) = K(762,1) * [IRAK1_rna];
  R762: IRAK1_rna => ; 1;
  // V(763) = K(763,1) * [RPS6KA3_g];
  R763: RPS6KA3_g => ; 1;
  // V(764) = K(764,1) * [RPS6KA3_rna];
  R764: RPS6KA3_rna => ; 1;
  // V(765) = K(765,1) * [PTEN_g];
  R765: PTEN_g => ; 1;
  // V(766) = K(766,1) * [PTEN_rna];
  R766: PTEN_rna => ; 1;
  // V(767) = K(767,1) * [RHOA_g];
  R767: RHOA_g => ; 1;
  // V(768) = K(768,1) * [RHOA_rna];
  R768: RHOA_rna => ; 1;
  // V(769) = K(769,1) * [RAC1_g];
  R769: RAC1_g => ; 1;
  // V(770) = K(770,1) * [RAC1_rna];
  R770: RAC1_rna => ; 1;
  // V(771) = K(771,1) * [MDM2_g];
  R771: MDM2_g => ; 1;
  // V(772) = K(772,1) * [MDM2_rna];
  R772: MDM2_rna => ; 1;
  // V(773) = K(773,1) * [IRF8_g];
  R773: IRF8_g => ; 1;
  // V(774) = K(774,1) * [IRF8_rna];
  R774: IRF8_rna => ; 1;
  // V(775) = K(775,1) * [RELA_g];
  R775: RELA_g => ; 1;
  // V(776) = K(776,1) * [RELA_rna];
  R776: RELA_rna => ; 1;
  // V(777) = K(777,1) * [NOTCH2_g];
  R777: NOTCH2_g => ; 1;
  // V(778) = K(778,1) * [NOTCH2_rna];
  R778: NOTCH2_rna => ; 1;
  // V(779) = K(779,1) * [GLO1_g];
  R779: GLO1_g => ; 1;
  // V(780) = K(780,1) * [GLO1_rna];
  R780: GLO1_rna => ; 1;
  // V(781) = K(781,1) * [PTPN11_g];
  R781: PTPN11_g => ; 1;
  // V(782) = K(782,1) * [PTPN11_rna];
  R782: PTPN11_rna => ; 1;
  // V(783) = K(783,1) * [BTK_g];
  R783: BTK_g => ; 1;
  // V(784) = K(784,1) * [BTK_rna];
  R784: BTK_rna => ; 1;
  // V(785) = K(785,1) * [PRDX1_g];
  R785: PRDX1_g => ; 1;
  // V(786) = K(786,1) * [PRDX1_rna];
  R786: PRDX1_rna => ; 1;
  // V(787) = K(787,1) * [EP300_g];
  R787: EP300_g => ; 1;
  // V(788) = K(788,1) * [EP300_rna];
  R788: EP300_rna => ; 1;
  // V(789) = K(789,1) * [PTPRJ_g];
  R789: PTPRJ_g => ; 1;
  // V(790) = K(790,1) * [PTPRJ_rna];
  R790: PTPRJ_rna => ; 1;
  // V(791) = K(791,1) * [STK4_g];
  R791: STK4_g => ; 1;
  // V(792) = K(792,1) * [STK4_rna];
  R792: STK4_rna => ; 1;
  // V(793) = K(793,1) * [ILK_g];
  R793: ILK_g => ; 1;
  // V(794) = K(794,1) * [ILK_rna];
  R794: ILK_rna => ; 1;
  // V(795) = K(795,1) * [ROCK1_g];
  R795: ROCK1_g => ; 1;
  // V(796) = K(796,1) * [ROCK1_rna];
  R796: ROCK1_rna => ; 1;
  // V(797) = K(797,1) * [SMAD4_g];
  R797: SMAD4_g => ; 1;
  // V(798) = K(798,1) * [SMAD4_rna];
  R798: SMAD4_rna => ; 1;
  // V(799) = K(799,1) * [HDAC1_g];
  R799: HDAC1_g => ; 1;
  // V(800) = K(800,1) * [HDAC1_rna];
  R800: HDAC1_rna => ; 1;
  // V(801) = K(801,1) * [CUL3_g];
  R801: CUL3_g => ; 1;
  // V(802) = K(802,1) * [CUL3_rna];
  R802: CUL3_rna => ; 1;
  // V(803) = K(803,1) * [BECN1_g];
  R803: BECN1_g => ; 1;
  // V(804) = K(804,1) * [BECN1_rna];
  R804: BECN1_rna => ; 1;
  // V(805) = K(805,1) * [HES1_g];
  R805: HES1_g => ; 1;
  // V(806) = K(806,1) * [HES1_rna];
  R806: HES1_rna => ; 1;
  // V(807) = K(807,1) * [IRF3_g];
  R807: IRF3_g => ; 1;
  // V(808) = K(808,1) * [IRF3_rna];
  R808: IRF3_rna => ; 1;
  // V(809) = K(809,1) * [SMAD2_g];
  R809: SMAD2_g => ; 1;
  // V(810) = K(810,1) * [SMAD2_rna];
  R810: SMAD2_rna => ; 1;
  // V(811) = K(811,1) * [STK11_g];
  R811: STK11_g => ; 1;
  // V(812) = K(812,1) * [STK11_rna];
  R812: STK11_rna => ; 1;
  // V(813) = K(813,1) * [NFE2L2_g];
  R813: NFE2L2_g => ; 1;
  // V(814) = K(814,1) * [NFE2L2_rna];
  R814: NFE2L2_rna => ; 1;
  // V(815) = K(815,1) * [PKN1_g];
  R815: PKN1_g => ; 1;
  // V(816) = K(816,1) * [PKN1_rna];
  R816: PKN1_rna => ; 1;
  // V(817) = K(817,1) * [HIF1A_g];
  R817: HIF1A_g => ; 1;
  // V(818) = K(818,1) * [HIF1A_rna];
  R818: HIF1A_rna => ; 1;
  // V(819) = K(819,1) * [SIRT1_g];
  R819: SIRT1_g => ; 1;
  // V(820) = K(820,1) * [SIRT1_rna];
  R820: SIRT1_rna => ; 1;
  // V(821) = K(821,1) * [NLRP3_g];
  R821: NLRP3_g => ; 1;
  // V(822) = K(822,1) * [NLRP3_rna];
  R822: NLRP3_rna => ; 1;
  // V(823) = K(823,1) * [PARK7_g];
  R823: PARK7_g => ; 1;
  // V(824) = K(824,1) * [PARK7_rna];
  R824: PARK7_rna => ; 1;
  // V(825) = K(825,1) * [MAP3K5_g];
  R825: MAP3K5_g => ; 1;
  // V(826) = K(826,1) * [MAP3K5_rna];
  R826: MAP3K5_rna => ; 1;
  // V(827) = K(827,1) * [MAPKAP1_g];
  R827: MAPKAP1_g => ; 1;
  // V(828) = K(828,1) * [MAPKAP1_rna];
  R828: MAPKAP1_rna => ; 1;
  // V(829) = K(829,1) * [PINK1_g];
  R829: PINK1_g => ; 1;
  // V(830) = K(830,1) * [PINK1_rna];
  R830: PINK1_rna => ; 1;
  // V(831) = K(831,1) * [HIPK2_g];
  R831: HIPK2_g => ; 1;
  // V(832) = K(832,1) * [HIPK2_rna];
  R832: HIPK2_rna => ; 1;
  // V(833) = K(833,1) * [TXNIP_g];
  R833: TXNIP_g => ; 1;
  // V(834) = K(834,1) * [TXNIP_rna];
  R834: TXNIP_rna => ; 1;
  // V(835) = K(835,1) * [TLR7_g];
  R835: TLR7_g => ; 1;
  // V(836) = K(836,1) * [TLR7_rna];
  R836: TLR7_rna => ; 1;
  // V(837) = K(837,1) * [RNF7_g];
  R837: RNF7_g => ; 1;
  // V(838) = K(838,1) * [RNF7_rna];
  R838: RNF7_rna => ; 1;
  // V(839) = K(839,1) * [DNM1L_p];
  R839: DNM1L_p => ; 1;
  // V(840) = K(840,1) * [IKBKB_p];
  R840: IKBKB_p => ; 1;
  // V(841) = K(841,1) * [SOCS1_p];
  R841: SOCS1_p => ; 1;
  // V(842) = K(842,1) * [JAK2_p];
  R842: JAK2_p => ; 1;
  // V(843) = K(843,1) * [FOS_p];
  R843: FOS_p => ; 1;
  // V(844) = K(844,1) * [NR3C1_p];
  R844: NR3C1_p => ; 1;
  // V(845) = K(845,1) * [TP53_p];
  R845: TP53_p => ; 1;
  // V(846) = K(846,1) * [HSPB1_p];
  R846: HSPB1_p => ; 1;
  // V(847) = K(847,1) * [HMGN1_p];
  R847: HMGN1_p => ; 1;
  // V(848) = K(848,1) * [JUN_p];
  R848: JUN_p => ; 1;
  // V(849) = K(849,1) * [INSR_p];
  R849: INSR_p => ; 1;
  // V(850) = K(850,1) * [LYN_p];
  R850: LYN_p => ; 1;
  // V(851) = K(851,1) * [VIM_p];
  R851: VIM_p => ; 1;
  // V(852) = K(852,1) * [HMOX1_p];
  R852: HMOX1_p => ; 1;
  // V(853) = K(853,1) * [PARP1_p];
  R853: PARP1_p => ; 1;
  // V(854) = K(854,1) * [UBC_p];
  R854: UBC_p => ; 1;
  // V(855) = K(855,1) * [CALM1_p];
  R855: CALM1_p => ; 1;
  // V(856) = K(856,1) * [BCL2_p];
  R856: BCL2_p => ; 1;
  // V(857) = K(857,1) * [NCF1_p];
  R857: NCF1_p => ; 1;
  // V(858) = K(858,1) * [PKM_p];
  R858: PKM_p => ; 1;
  // V(859) = K(859,1) * [CREB1_p];
  R859: CREB1_p => ; 1;
  // V(860) = K(860,1) * [JUNB_p];
  R860: JUNB_p => ; 1;
  // V(861) = K(861,1) * [NFKB1_p];
  R861: NFKB1_p => ; 1;
  // V(862) = K(862,1) * [NR4A1_p];
  R862: NR4A1_p => ; 1;
  // V(863) = K(863,1) * [JAK1_p];
  R863: JAK1_p => ; 1;
  // V(864) = K(864,1) * [DNMT1_p];
  R864: DNMT1_p => ; 1;
  // V(865) = K(865,1) * [ZFP36_p];
  R865: ZFP36_p => ; 1;
  // V(866) = K(866,1) * [PIK3R1_p];
  R866: PIK3R1_p => ; 1;
  // V(867) = K(867,1) * [MAPK1_p];
  R867: MAPK1_p => ; 1;
  // V(868) = K(868,1) * [DUSP1_p];
  R868: DUSP1_p => ; 1;
  // V(869) = K(869,1) * [PTPN6_p];
  R869: PTPN6_p => ; 1;
  // V(870) = K(870,1) * [PRDX6_p];
  R870: PRDX6_p => ; 1;
  // V(871) = K(871,1) * [AXL_p];
  R871: AXL_p => ; 1;
  // V(872) = K(872,1) * [AKT1_p];
  R872: AKT1_p => ; 1;
  // V(873) = K(873,1) * [CTNNB1_p];
  R873: CTNNB1_p => ; 1;
  // V(874) = K(874,1) * [PTGS2_p];
  R874: PTGS2_p => ; 1;
  // V(875) = K(875,1) * [SREBF1_p];
  R875: SREBF1_p => ; 1;
  // V(876) = K(876,1) * [CDKN1A_p];
  R876: CDKN1A_p => ; 1;
  // V(877) = K(877,1) * [STAT3_p];
  R877: STAT3_p => ; 1;
  // V(878) = K(878,1) * [STAT1_p];
  R878: STAT1_p => ; 1;
  // V(879) = K(879,1) * [STAT6_p];
  R879: STAT6_p => ; 1;
  // V(880) = K(880,1) * [STAT5A_p];
  R880: STAT5A_p => ; 1;
  // V(881) = K(881,1) * [PIK3CA_p];
  R881: PIK3CA_p => ; 1;
  // V(882) = K(882,1) * [MAPK8_p];
  R882: MAPK8_p => ; 1;
  // V(883) = K(883,1) * [CDKN1B_p];
  R883: CDKN1B_p => ; 1;
  // V(884) = K(884,1) * [MECP2_p];
  R884: MECP2_p => ; 1;
  // V(885) = K(885,1) * [IRAK1_p];
  R885: IRAK1_p => ; 1;
  // V(886) = K(886,1) * [RPS6KA3_p];
  R886: RPS6KA3_p => ; 1;
  // V(887) = K(887,1) * [PTEN_p];
  R887: PTEN_p => ; 1;
  // V(888) = K(888,1) * [RHOA_p];
  R888: RHOA_p => ; 1;
  // V(889) = K(889,1) * [RAC1_p];
  R889: RAC1_p => ; 1;
  // V(890) = K(890,1) * [MDM2_p];
  R890: MDM2_p => ; 1;
  // V(891) = K(891,1) * [IRF8_p];
  R891: IRF8_p => ; 1;
  // V(892) = K(892,1) * [RELA_p];
  R892: RELA_p => ; 1;
  // V(893) = K(893,1) * [GLO1_p];
  R893: GLO1_p => ; 1;
  // V(894) = K(894,1) * [PTPN11_p];
  R894: PTPN11_p => ; 1;
  // V(895) = K(895,1) * [BTK_p];
  R895: BTK_p => ; 1;
  // V(896) = K(896,1) * [PRDX1_p];
  R896: PRDX1_p => ; 1;
  // V(897) = K(897,1) * [BAX_p];
  R897: BAX_p => ; 1;
  // V(898) = K(898,1) * [EP300_p];
  R898: EP300_p => ; 1;
  // V(899) = K(899,1) * [STK4_p];
  R899: STK4_p => ; 1;
  // V(900) = K(900,1) * [ILK_p];
  R900: ILK_p => ; 1;
  // V(901) = K(901,1) * [SMAD4_p];
  R901: SMAD4_p => ; 1;
  // V(902) = K(902,1) * [BECN1_p];
  R902: BECN1_p => ; 1;
  // V(903) = K(903,1) * [IRF3_p];
  R903: IRF3_p => ; 1;
  // V(904) = K(904,1) * [SMAD2_p];
  R904: SMAD2_p => ; 1;
  // V(905) = K(905,1) * [STK11_p];
  R905: STK11_p => ; 1;
  // V(906) = K(906,1) * [PKN1_p];
  R906: PKN1_p => ; 1;
  // V(907) = K(907,1) * [HIF1A_p];
  R907: HIF1A_p => ; 1;
  // V(908) = K(908,1) * [SIRT1_p];
  R908: SIRT1_p => ; 1;
  // V(909) = K(909,1) * [NLRP3_p];
  R909: NLRP3_p => ; 1;
  // V(910) = K(910,1) * [PARK7_p];
  R910: PARK7_p => ; 1;
  // V(911) = K(911,1) * [MAP3K5_p];
  R911: MAP3K5_p => ; 1;
  // V(912) = K(912,1) * [MAPKAP1_p];
  R912: MAPKAP1_p => ; 1;
  // V(913) = K(913,1) * [HIPK2_p];
  R913: HIPK2_p => ; 1;
  // V(914) = K(914,1) * [TXNIP_p];
  R914: TXNIP_p => ; 1;
  // V(915) = K(915,1) * [IRS2_p];
  R915: IRS2_p => ; 1;
  // V(916) = K(916,1) * [SIGNOR-C118_p];
  R916: => ; 1;
  // V(917) = K(917,1) * [SIGNOR-C13_p];
  R917: => ; 1;
  // V(918) = K(918,1) * [SIGNOR-C154_p];
  R918: => ; 1;
  // V(919) = K(919,1) * [SIGNOR-C156_p];
  R919: => ; 1;
  // V(920) = K(920,1) * [TLR4_rna];
  R920: TLR4_rna => ; 1;
  // V(921) = K(921,1) * [DNM1L_rna];
  R921: DNM1L_rna => ; 1;
  // V(922) = K(922,1) * [IKBKB_rna];
  R922: IKBKB_rna => ; 1;
  // V(923) = K(923,1) * [TLR2_rna];
  R923: TLR2_rna => ; 1;
  // V(924) = K(924,1) * [JAK2_rna];
  R924: JAK2_rna => ; 1;
  // V(925) = K(925,1) * [ROCK2_rna];
  R925: ROCK2_rna => ; 1;
  // V(926) = K(926,1) * [FOS_rna];
  R926: FOS_rna => ; 1;
  // V(927) = K(927,1) * [TP53_rna];
  R927: TP53_rna => ; 1;
  // V(928) = K(928,1) * [HSPB1_rna];
  R928: HSPB1_rna => ; 1;
  // V(929) = K(929,1) * [HMGN1_rna];
  R929: HMGN1_rna => ; 1;
  // V(930) = K(930,1) * [INSR_rna];
  R930: INSR_rna => ; 1;
  // V(931) = K(931,1) * [LYN_rna];
  R931: LYN_rna => ; 1;
  // V(932) = K(932,1) * [VIM_rna];
  R932: VIM_rna => ; 1;
  // V(933) = K(933,1) * [IL6R_rna];
  R933: IL6R_rna => ; 1;
  // V(934) = K(934,1) * [PARP1_rna];
  R934: PARP1_rna => ; 1;
  // V(935) = K(935,1) * [UBC_rna];
  R935: UBC_rna => ; 1;
  // V(936) = K(936,1) * [CALM1_rna];
  R936: CALM1_rna => ; 1;
  // V(937) = K(937,1) * [BCL2_rna];
  R937: BCL2_rna => ; 1;
  // V(938) = K(938,1) * [IRF1_rna];
  R938: IRF1_rna => ; 1;
  // V(939) = K(939,1) * [NCF1_rna];
  R939: NCF1_rna => ; 1;
  // V(940) = K(940,1) * [CREB1_rna];
  R940: CREB1_rna => ; 1;
  // V(941) = K(941,1) * [JUNB_rna];
  R941: JUNB_rna => ; 1;
  // V(942) = K(942,1) * [PTPN2_rna];
  R942: PTPN2_rna => ; 1;
  // V(943) = K(943,1) * [NR4A1_rna];
  R943: NR4A1_rna => ; 1;
  // V(944) = K(944,1) * [JAK1_rna];
  R944: JAK1_rna => ; 1;
  // V(945) = K(945,1) * [DNMT1_rna];
  R945: DNMT1_rna => ; 1;
  // V(946) = K(946,1) * [ZFP36_rna];
  R946: ZFP36_rna => ; 1;
  // V(947) = K(947,1) * [PIK3R1_rna];
  R947: PIK3R1_rna => ; 1;
  // V(948) = K(948,1) * [MAPK1_rna];
  R948: MAPK1_rna => ; 1;
  // V(949) = K(949,1) * [DUSP1_rna];
  R949: DUSP1_rna => ; 1;
  // V(950) = K(950,1) * [PTPN6_rna];
  R950: PTPN6_rna => ; 1;
  // V(951) = K(951,1) * [PRDX6_rna];
  R951: PRDX6_rna => ; 1;
  // V(952) = K(952,1) * [AXL_rna];
  R952: AXL_rna => ; 1;
  // V(953) = K(953,1) * [AKT1_rna];
  R953: AKT1_rna => ; 1;
  // V(954) = K(954,1) * [CTNNB1_rna];
  R954: CTNNB1_rna => ; 1;
  // V(955) = K(955,1) * [PTGS2_rna];
  R955: PTGS2_rna => ; 1;
  // V(956) = K(956,1) * [TGFBR1_rna];
  R956: TGFBR1_rna => ; 1;
  // V(957) = K(957,1) * [SREBF1_rna];
  R957: SREBF1_rna => ; 1;
  // V(958) = K(958,1) * [STAT3_rna];
  R958: STAT3_rna => ; 1;
  // V(959) = K(959,1) * [STAT6_rna];
  R959: STAT6_rna => ; 1;
  // V(960) = K(960,1) * [STAT5A_rna];
  R960: STAT5A_rna => ; 1;
  // V(961) = K(961,1) * [PIK3CA_rna];
  R961: PIK3CA_rna => ; 1;
  // V(962) = K(962,1) * [CASP3_rna];
  R962: CASP3_rna => ; 1;
  // V(963) = K(963,1) * [MAPK8_rna];
  R963: MAPK8_rna => ; 1;
  // V(964) = K(964,1) * [CDKN1B_rna];
  R964: CDKN1B_rna => ; 1;
  // V(965) = K(965,1) * [NUMB_rna];
  R965: NUMB_rna => ; 1;
  // V(966) = K(966,1) * [MECP2_rna];
  R966: MECP2_rna => ; 1;
  // V(967) = K(967,1) * [IRAK1_rna];
  R967: IRAK1_rna => ; 1;
  // V(968) = K(968,1) * [RPS6KA3_rna];
  R968: RPS6KA3_rna => ; 1;
  // V(969) = K(969,1) * [PTEN_rna];
  R969: PTEN_rna => ; 1;
  // V(970) = K(970,1) * [RHOA_rna];
  R970: RHOA_rna => ; 1;
  // V(971) = K(971,1) * [RAC1_rna];
  R971: RAC1_rna => ; 1;
  // V(972) = K(972,1) * [MDM2_rna];
  R972: MDM2_rna => ; 1;
  // V(973) = K(973,1) * [IRF8_rna];
  R973: IRF8_rna => ; 1;
  // V(974) = K(974,1) * [RELA_rna];
  R974: RELA_rna => ; 1;
  // V(975) = K(975,1) * [NOTCH2_rna];
  R975: NOTCH2_rna => ; 1;
  // V(976) = K(976,1) * [GLO1_rna];
  R976: GLO1_rna => ; 1;
  // V(977) = K(977,1) * [PTPN11_rna];
  R977: PTPN11_rna => ; 1;
  // V(978) = K(978,1) * [BTK_rna];
  R978: BTK_rna => ; 1;
  // V(979) = K(979,1) * [PRDX1_rna];
  R979: PRDX1_rna => ; 1;
  // V(980) = K(980,1) * [EP300_rna];
  R980: EP300_rna => ; 1;
  // V(981) = K(981,1) * [PTPRJ_rna];
  R981: PTPRJ_rna => ; 1;
  // V(982) = K(982,1) * [STK4_rna];
  R982: STK4_rna => ; 1;
  // V(983) = K(983,1) * [ILK_rna];
  R983: ILK_rna => ; 1;
  // V(984) = K(984,1) * [ROCK1_rna];
  R984: ROCK1_rna => ; 1;
  // V(985) = K(985,1) * [SMAD4_rna];
  R985: SMAD4_rna => ; 1;
  // V(986) = K(986,1) * [HDAC1_rna];
  R986: HDAC1_rna => ; 1;
  // V(987) = K(987,1) * [CUL3_rna];
  R987: CUL3_rna => ; 1;
  // V(988) = K(988,1) * [BECN1_rna];
  R988: BECN1_rna => ; 1;
  // V(989) = K(989,1) * [HES1_rna];
  R989: HES1_rna => ; 1;
  // V(990) = K(990,1) * [IRF3_rna];
  R990: IRF3_rna => ; 1;
  // V(991) = K(991,1) * [SMAD2_rna];
  R991: SMAD2_rna => ; 1;
  // V(992) = K(992,1) * [STK11_rna];
  R992: STK11_rna => ; 1;
  // V(993) = K(993,1) * [NFE2L2_rna];
  R993: NFE2L2_rna => ; 1;
  // V(994) = K(994,1) * [PKN1_rna];
  R994: PKN1_rna => ; 1;
  // V(995) = K(995,1) * [HIF1A_rna];
  R995: HIF1A_rna => ; 1;
  // V(996) = K(996,1) * [SIRT1_rna];
  R996: SIRT1_rna => ; 1;
  // V(997) = K(997,1) * [NLRP3_rna];
  R997: NLRP3_rna => ; 1;
  // V(998) = K(998,1) * [PARK7_rna];
  R998: PARK7_rna => ; 1;
  // V(999) = K(999,1) * [MAP3K5_rna];
  R999: MAP3K5_rna => ; 1;
  // V(1000) = K(1000,1) * [MAPKAP1_rna];
  R1000: MAPKAP1_rna => ; 1;
  // V(1001) = K(1001,1) * [PINK1_rna];
  R1001: PINK1_rna => ; 1;
  // V(1002) = K(1002,1) * [HIPK2_rna];
  R1002: HIPK2_rna => ; 1;
  // V(1003) = K(1003,1) * [TXNIP_rna];
  R1003: TXNIP_rna => ; 1;
  // V(1004) = K(1004,1) * [TLR7_rna];
  R1004: TLR7_rna => ; 1;
  // V(1005) = K(1005,1) * [RNF7_rna];
  R1005: RNF7_rna => ; 1;
end
