// SBML level 3 version 2

model MaculaDensa()

  // Compartments:
  compartment cell = 1;

  // Species:
  species ABCA1 in cell = 1/cell;
  species ABCA1_g in cell = 1/cell;
  species ABCA1_p in cell = 1/cell;
  species ABCA1_rna in cell = 1/cell;
  species AKT1 in cell = 1/cell;
  species AKT1_g in cell = 1/cell;
  species AKT1_p in cell = 1/cell;
  species AKT1_rna in cell = 1/cell;
  species ATF3 in cell = 1/cell;
  species ATF3_g in cell = 1/cell;
  species ATF3_rna in cell = 1/cell;
  species BAX in cell = 1/cell;
  species BAX_g in cell = 1/cell;
  species BAX_p in cell = 1/cell;
  species BAX_rna in cell = 1/cell;
  species BMP4 in cell = 1/cell;
  species BMP4_g in cell = 1/cell;
  species BMP4_rna in cell = 1/cell;
  species CALM1 in cell = 1/cell;
  species CALM1_g in cell = 1/cell;
  species CALM1_p in cell = 1/cell;
  species CALM1_rna in cell = 1/cell;
  species CASP9 in cell = 1/cell;
  species CASP9_g in cell = 1/cell;
  species CASP9_p in cell = 1/cell;
  species CASP9_rna in cell = 1/cell;
  species CCND1 in cell = 1/cell;
  species CCND1_g in cell = 1/cell;
  species CCND1_rna in cell = 1/cell;
  species CDH1 in cell = 1/cell;
  species CDH1_g in cell = 1/cell;
  species CDH1_p in cell = 1/cell;
  species CDH1_rna in cell = 1/cell;
  species CDKN1A in cell = 1/cell;
  species CDKN1A_g in cell = 1/cell;
  species CDKN1A_p in cell = 1/cell;
  species CDKN1A_rna in cell = 1/cell;
  species CDKN1B in cell = 1/cell;
  species CDKN1B_g in cell = 1/cell;
  species CDKN1B_p in cell = 1/cell;
  species CDKN1B_rna in cell = 1/cell;
  species CREB1 in cell = 1/cell;
  species CREB1_g in cell = 1/cell;
  species CREB1_p in cell = 1/cell;
  species CREB1_rna in cell = 1/cell;
  species CTNNB1 in cell = 1/cell;
  species CTNNB1_g in cell = 1/cell;
  species CTNNB1_p in cell = 1/cell;
  species CTNNB1_rna in cell = 1/cell;
  species DDIT3 in cell = 1/cell;
  species DDIT3_g in cell = 1/cell;
  species DDIT3_p in cell = 1/cell;
  species DDIT3_rna in cell = 1/cell;
  species DNMT1 in cell = 1/cell;
  species DNMT1_g in cell = 1/cell;
  species DNMT1_p in cell = 1/cell;
  species DNMT1_rna in cell = 1/cell;
  species DUSP1 in cell = 1/cell;
  species DUSP1_g in cell = 1/cell;
  species DUSP1_p in cell = 1/cell;
  species DUSP1_rna in cell = 1/cell;
  species EGF in cell = 1/cell;
  species EGFR in cell = 1/cell;
  species EGFR_g in cell = 1/cell;
  species EGFR_p in cell = 1/cell;
  species EGFR_rna in cell = 1/cell;
  species EGF_g in cell = 1/cell;
  species EGF_rna in cell = 1/cell;
  species EIF2AK3 in cell = 1/cell;
  species EIF2AK3_g in cell = 1/cell;
  species EIF2AK3_p in cell = 1/cell;
  species EIF2AK3_rna in cell = 1/cell;
  species EP300 in cell = 1/cell;
  species EP300_g in cell = 1/cell;
  species EP300_p in cell = 1/cell;
  species EP300_rna in cell = 1/cell;
  species ERN1 in cell = 1/cell;
  species ERN1_g in cell = 1/cell;
  species ERN1_p in cell = 1/cell;
  species ERN1_rna in cell = 1/cell;
  species ESR1 in cell = 1/cell;
  species ESR1_g in cell = 1/cell;
  species ESR1_p in cell = 1/cell;
  species ESR1_rna in cell = 1/cell;
  species FOS in cell = 1/cell;
  species FOS_g in cell = 1/cell;
  species FOS_p in cell = 1/cell;
  species FOS_rna in cell = 1/cell;
  species FOXO1 in cell = 1/cell;
  species FOXO1_g in cell = 1/cell;
  species FOXO1_p in cell = 1/cell;
  species FOXO1_rna in cell = 1/cell;
  species GCLM in cell = 1/cell;
  species GCLM_g in cell = 1/cell;
  species GCLM_rna in cell = 1/cell;
  species GDF15 in cell = 1/cell;
  species GDF15_g in cell = 1/cell;
  species GDF15_rna in cell = 1/cell;
  species GSTA1 in cell = 1/cell;
  species GSTA1_g in cell = 1/cell;
  species GSTA1_rna in cell = 1/cell;
  species HES1 in cell = 1/cell;
  species HES1_g in cell = 1/cell;
  species HES1_rna in cell = 1/cell;
  species HIF1A in cell = 1/cell;
  species HIF1A_g in cell = 1/cell;
  species HIF1A_p in cell = 1/cell;
  species HIF1A_rna in cell = 1/cell;
  species HSPB1 in cell = 1/cell;
  species HSPB1_g in cell = 1/cell;
  species HSPB1_p in cell = 1/cell;
  species HSPB1_rna in cell = 1/cell;
  species IKBKB in cell = 1/cell;
  species IKBKB_g in cell = 1/cell;
  species IKBKB_p in cell = 1/cell;
  species IKBKB_rna in cell = 1/cell;
  species ILK in cell = 1/cell;
  species ILK_g in cell = 1/cell;
  species ILK_p in cell = 1/cell;
  species ILK_rna in cell = 1/cell;
  species INSR in cell = 1/cell;
  species INSR_g in cell = 1/cell;
  species INSR_p in cell = 1/cell;
  species INSR_rna in cell = 1/cell;
  species JAK1 in cell = 1/cell;
  species JAK1_g in cell = 1/cell;
  species JAK1_p in cell = 1/cell;
  species JAK1_rna in cell = 1/cell;
  species JUN in cell = 1/cell;
  species JUN_g in cell = 1/cell;
  species JUN_p in cell = 1/cell;
  species JUN_rna in cell = 1/cell;
  species KDM6B in cell = 1/cell;
  species KDM6B_g in cell = 1/cell;
  species KDM6B_rna in cell = 1/cell;
  species KLF9 in cell = 1/cell;
  species KLF9_g in cell = 1/cell;
  species KLF9_rna in cell = 1/cell;
  species KRT19 in cell = 1/cell;
  species KRT19_g in cell = 1/cell;
  species KRT19_p in cell = 1/cell;
  species KRT19_rna in cell = 1/cell;
  species LDLR in cell = 1/cell;
  species LDLR_g in cell = 1/cell;
  species LDLR_rna in cell = 1/cell;
  species MAP4K2 in cell = 1/cell;
  species MAP4K2_g in cell = 1/cell;
  species MAP4K2_p in cell = 1/cell;
  species MAP4K2_rna in cell = 1/cell;
  species MAPK1 in cell = 1/cell;
  species MAPK1_g in cell = 1/cell;
  species MAPK1_p in cell = 1/cell;
  species MAPK1_rna in cell = 1/cell;
  species MAPKAP1 in cell = 1/cell;
  species MAPKAP1_g in cell = 1/cell;
  species MAPKAP1_p in cell = 1/cell;
  species MAPKAP1_rna in cell = 1/cell;
  species MFF in cell = 1/cell;
  species MFF_g in cell = 1/cell;
  species MFF_p in cell = 1/cell;
  species MFF_rna in cell = 1/cell;
  species MYLIP in cell = 1/cell;
  species MYLIP_g in cell = 1/cell;
  species MYLIP_rna in cell = 1/cell;
  species NFE2L2 in cell = 1/cell;
  species NFE2L2_g in cell = 1/cell;
  species NFE2L2_p in cell = 1/cell;
  species NFE2L2_rna in cell = 1/cell;
  species NFKB2 in cell = 1/cell;
  species NFKB2_g in cell = 1/cell;
  species NFKB2_rna in cell = 1/cell;
  species NOTCH1 in cell = 1/cell;
  species NOTCH1_g in cell = 1/cell;
  species NOTCH1_rna in cell = 1/cell;
  species NOTCH2 in cell = 1/cell;
  species NOTCH2_g in cell = 1/cell;
  species NOTCH2_rna in cell = 1/cell;
  species NR3C1 in cell = 1/cell;
  species NR3C1_g in cell = 1/cell;
  species NR3C1_p in cell = 1/cell;
  species NR3C1_rna in cell = 1/cell;
  species NR4A1 in cell = 1/cell;
  species NR4A1_g in cell = 1/cell;
  species NR4A1_p in cell = 1/cell;
  species NR4A1_rna in cell = 1/cell;
  species NUMB in cell = 1/cell;
  species NUMB_g in cell = 1/cell;
  species NUMB_rna in cell = 1/cell;
  species PCK1 in cell = 1/cell;
  species PCK1_g in cell = 1/cell;
  species PCK1_rna in cell = 1/cell;
  species PCNA in cell = 1/cell;
  species PCNA_g in cell = 1/cell;
  species PCNA_p in cell = 1/cell;
  species PCNA_rna in cell = 1/cell;
  species PIK3C3 in cell = 1/cell;
  species PIK3C3_g in cell = 1/cell;
  species PIK3C3_p in cell = 1/cell;
  species PIK3C3_rna in cell = 1/cell;
  species PPARA in cell = 1/cell;
  species PPARA_g in cell = 1/cell;
  species PPARA_p in cell = 1/cell;
  species PPARA_rna in cell = 1/cell;
  species PPARGC1A in cell = 1/cell;
  species PPARGC1A_g in cell = 1/cell;
  species PPARGC1A_p in cell = 1/cell;
  species PPARGC1A_rna in cell = 1/cell;
  species PRDX6 in cell = 1/cell;
  species PRDX6_g in cell = 1/cell;
  species PRDX6_p in cell = 1/cell;
  species PRDX6_rna in cell = 1/cell;
  species PRKAA1 in cell = 1/cell;
  species PRKAA1_g in cell = 1/cell;
  species PRKAA1_p in cell = 1/cell;
  species PRKAA1_rna in cell = 1/cell;
  species PRKCZ in cell = 1/cell;
  species PRKCZ_g in cell = 1/cell;
  species PRKCZ_p in cell = 1/cell;
  species PRKCZ_rna in cell = 1/cell;
  species PROM1 in cell = 1/cell;
  species PROM1_g in cell = 1/cell;
  species PROM1_p in cell = 1/cell;
  species PROM1_rna in cell = 1/cell;
  species PTEN in cell = 1/cell;
  species PTEN_g in cell = 1/cell;
  species PTEN_p in cell = 1/cell;
  species PTEN_rna in cell = 1/cell;
  species PTPA in cell = 1/cell;
  species PTPA_g in cell = 1/cell;
  species PTPA_rna in cell = 1/cell;
  species PTPN2 in cell = 1/cell;
  species PTPN2_g in cell = 1/cell;
  species PTPN2_rna in cell = 1/cell;
  species PTPRJ in cell = 1/cell;
  species PTPRJ_g in cell = 1/cell;
  species PTPRJ_p in cell = 1/cell;
  species PTPRJ_rna in cell = 1/cell;
  species RAPGEF1 in cell = 1/cell;
  species RAPGEF1_g in cell = 1/cell;
  species RAPGEF1_p in cell = 1/cell;
  species RAPGEF1_rna in cell = 1/cell;
  species RCAN1 in cell = 1/cell;
  species RCAN1_g in cell = 1/cell;
  species RCAN1_p in cell = 1/cell;
  species RCAN1_rna in cell = 1/cell;
  species RELA in cell = 1/cell;
  species RELA_g in cell = 1/cell;
  species RELA_p in cell = 1/cell;
  species RELA_rna in cell = 1/cell;
  species RHOA in cell = 1/cell;
  species RHOA_g in cell = 1/cell;
  species RHOA_p in cell = 1/cell;
  species RHOA_rna in cell = 1/cell;
  species RICTOR in cell = 1/cell;
  species RICTOR_g in cell = 1/cell;
  species RICTOR_p in cell = 1/cell;
  species RICTOR_rna in cell = 1/cell;
  species ROCK2 in cell = 1/cell;
  species ROCK2_g in cell = 1/cell;
  species ROCK2_rna in cell = 1/cell;
  species RORA in cell = 1/cell;
  species RORA_g in cell = 1/cell;
  species RORA_p in cell = 1/cell;
  species RORA_rna in cell = 1/cell;
  species RPS6KB1 in cell = 1/cell;
  species RPS6KB1_g in cell = 1/cell;
  species RPS6KB1_p in cell = 1/cell;
  species RPS6KB1_rna in cell = 1/cell;
  species RRAS in cell = 1/cell;
  species RRAS_g in cell = 1/cell;
  species RRAS_p in cell = 1/cell;
  species RRAS_rna in cell = 1/cell;
  species SGK1 in cell = 1/cell;
  species SGK1_g in cell = 1/cell;
  species SGK1_rna in cell = 1/cell;
  species SMAD2 in cell = 1/cell;
  species SMAD2_g in cell = 1/cell;
  species SMAD2_p in cell = 1/cell;
  species SMAD2_rna in cell = 1/cell;
  species SMAD3 in cell = 1/cell;
  species SMAD3_g in cell = 1/cell;
  species SMAD3_p in cell = 1/cell;
  species SMAD3_rna in cell = 1/cell;
  species SMAD4 in cell = 1/cell;
  species SMAD4_g in cell = 1/cell;
  species SMAD4_p in cell = 1/cell;
  species SMAD4_rna in cell = 1/cell;
  species SOCS2 in cell = 1/cell;
  species SOCS2_g in cell = 1/cell;
  species SOCS2_rna in cell = 1/cell;
  species SOD1 in cell = 1/cell;
  species SOD1_g in cell = 1/cell;
  species SOD1_rna in cell = 1/cell;
  species SP1 in cell = 1/cell;
  species SP1_g in cell = 1/cell;
  species SP1_p in cell = 1/cell;
  species SP1_rna in cell = 1/cell;
  species SRC in cell = 1/cell;
  species SRC_g in cell = 1/cell;
  species SRC_p in cell = 1/cell;
  species SRC_rna in cell = 1/cell;
  species STAT1 in cell = 1/cell;
  species STAT1_g in cell = 1/cell;
  species STAT1_p in cell = 1/cell;
  species STAT1_rna in cell = 1/cell;
  species STAT5A in cell = 1/cell;
  species STAT5A_g in cell = 1/cell;
  species STAT5A_p in cell = 1/cell;
  species STAT5A_rna in cell = 1/cell;
  species STAT6 in cell = 1/cell;
  species STAT6_g in cell = 1/cell;
  species STAT6_p in cell = 1/cell;
  species STAT6_rna in cell = 1/cell;
  species STK11 in cell = 1/cell;
  species STK11_g in cell = 1/cell;
  species STK11_p in cell = 1/cell;
  species STK11_rna in cell = 1/cell;
  species TFEB in cell = 1/cell;
  species TFEB_g in cell = 1/cell;
  species TFEB_p in cell = 1/cell;
  species TFEB_rna in cell = 1/cell;
  species TGFA in cell = 1/cell;
  species TGFA_g in cell = 1/cell;
  species TGFA_rna in cell = 1/cell;
  species TLR3 in cell = 1/cell;
  species TLR3_g in cell = 1/cell;
  species TLR3_p in cell = 1/cell;
  species TLR3_rna in cell = 1/cell;
  species TRAF6 in cell = 1/cell;
  species TRAF6_g in cell = 1/cell;
  species TRAF6_p in cell = 1/cell;
  species TRAF6_rna in cell = 1/cell;
  species VIM in cell = 1/cell;
  species VIM_g in cell = 1/cell;
  species VIM_p in cell = 1/cell;
  species VIM_rna in cell = 1/cell;
  species VLDLR in cell = 1/cell;
  species VLDLR_g in cell = 1/cell;
  species VLDLR_rna in cell = 1/cell;
  species YAP1 in cell = 1/cell;
  species YAP1_g in cell = 1/cell;
  species YAP1_p in cell = 1/cell;
  species YAP1_rna in cell = 1/cell;
  species ZFP36 in cell = 1/cell;
  species ZFP36_g in cell = 1/cell;
  species ZFP36_p in cell = 1/cell;
  species ZFP36_rna in cell = 1/cell;

  // Reactions:
  // V(1) = K(1,1) * [SMAD2_p] * [SMAD4_p] -K(1,2) * [SIGNOR-C8];
  R1: SMAD2_p => SMAD4_p; 1;
  // V(2) = K(2,1) * [SMAD4_p] * [SMAD3_p] -K(2,2) * [SIGNOR-C9];
  R2: SMAD4_p => SMAD3_p; 1;
  // V(3) = K(3,1) * [SMAD4_p] * [JUN_p] -K(3,2) * [SIGNOR-C10];
  R3: JUN_p => SMAD4_p; 1;
  // V(4) = K(4,1) * [NR3C1_p] * [STAT5A_p] -K(4,2) * [SIGNOR-C84];
  R4: NR3C1_p => STAT5A_p; 1;
  // V(5) = K(5,1) * [JUN_p] * [SMAD3_p] -K(5,2) * [SIGNOR-C86];
  R5: JUN_p => SMAD3_p; 1;
  // V(6) = K(6,1) * [FOS_p] * [JUN_p] * [JUN_p] * [FOS_p] * [JUN_p] * [FOS_p] * [FOS_p] * [JUN_p] -K(6,2) * [SIGNOR-C154];
  R6: JUN_p => FOS_p; 1;
  // V(7) = K(7,1) * [MAPK1_p] * [EP300] -K(7,2) * [MAPK1_p |EP300];
  R7: EP300 => MAPK1_p; 1;
  // V(8) = K(8,1) * [MAPK1_p |EP300];
  R8: EP300 => MAPK1_p; 1;
  // V(9) = K(9,1) * [MAPK1_p] * [HIF1A] -K(9,2) * [MAPK1_p |HIF1A];
  R9: HIF1A => MAPK1_p; 1;
  // V(10) = K(10,1) * [MAPK1_p |HIF1A];
  R10: HIF1A => MAPK1_p; 1;
  // V(11) = K(11,1) * [MAPK1_p] * [NR3C1] -K(11,2) * [MAPK1_p |NR3C1];
  R11: NR3C1 => MAPK1_p; 1;
  // V(12) = K(12,1) * [MAPK1_p |NR3C1];
  R12: NR3C1 => MAPK1_p; 1;
  // V(13) = K(13,1) * [AKT1_p] * [FOXO1] -K(13,2) * [AKT1_p |FOXO1];
  R13: FOXO1 => AKT1_p; 1;
  // V(14) = K(14,1) * [AKT1_p |FOXO1];
  R14: FOXO1 => AKT1_p; 1;
  // V(15) = K(15,1) * [MAPK1_p] * [PRDX6] -K(15,2) * [MAPK1_p |PRDX6];
  R15: PRDX6 => MAPK1_p; 1;
  // V(16) = K(16,1) * [MAPK1_p |PRDX6];
  R16: PRDX6 => MAPK1_p; 1;
  // V(17) = K(17,1) * [PRKCZ_p] * [SP1] -K(17,2) * [PRKCZ_p |SP1];
  R17: SP1 => PRKCZ_p; 1;
  // V(18) = K(18,1) * [PRKCZ_p |SP1];
  R18: SP1 => PRKCZ_p; 1;
  // V(19) = K(19,1) * [MAPK1_p] * [RPS6KB1] -K(19,2) * [MAPK1_p |RPS6KB1];
  R19: RPS6KB1 => MAPK1_p; 1;
  // V(20) = K(20,1) * [MAPK1_p |RPS6KB1];
  R20: RPS6KB1 => MAPK1_p; 1;
  // V(21) = K(21,1) * [AKT1_p] * [PRKAA1] -K(21,2) * [AKT1_p |PRKAA1];
  R21: PRKAA1 => AKT1_p; 1;
  // V(22) = K(22,1) * [AKT1_p |PRKAA1];
  R22: PRKAA1 => AKT1_p; 1;
  // V(23) = K(23,1) * [EGFR_p] * [EGFR] -K(23,2) * [EGFR_p |EGFR];
  R23: EGFR_p => EGFR; 1;
  // V(24) = K(24,1) * [EGFR_p |EGFR];
  R24: EGFR_p => EGFR; 1;
  // V(25) = K(25,1) * [IKBKB_p] * [IKBKB] -K(25,2) * [IKBKB_p |IKBKB];
  R25: IKBKB => IKBKB_p; 1;
  // V(26) = K(26,1) * [IKBKB_p |IKBKB];
  R26: IKBKB => IKBKB_p; 1;
  // V(27) = K(27,1) * [MAPK1_p] * [CDKN1B] -K(27,2) * [MAPK1_p |CDKN1B];
  R27: CDKN1B => MAPK1_p; 1;
  // V(28) = K(28,1) * [MAPK1_p |CDKN1B];
  R28: CDKN1B => MAPK1_p; 1;
  // V(29) = K(29,1) * [MAPK1_p] * [SMAD4] -K(29,2) * [MAPK1_p |SMAD4];
  R29: SMAD4 => MAPK1_p; 1;
  // V(30) = K(30,1) * [MAPK1_p |SMAD4];
  R30: SMAD4 => MAPK1_p; 1;
  // V(31) = K(31,1) * [MAPK1_p] * [ESR1] -K(31,2) * [MAPK1_p |ESR1];
  R31: ESR1 => MAPK1_p; 1;
  // V(32) = K(32,1) * [MAPK1_p |ESR1];
  R32: ESR1 => MAPK1_p; 1;
  // V(33) = K(33,1) * [MAPK1_p] * [STK11] -K(33,2) * [MAPK1_p |STK11];
  R33: STK11 => MAPK1_p; 1;
  // V(34) = K(34,1) * [MAPK1_p |STK11];
  R34: STK11 => MAPK1_p; 1;
  // V(35) = K(35,1) * [MAPK1_p] * [JUN] -K(35,2) * [MAPK1_p |JUN];
  R35: JUN => MAPK1_p; 1;
  // V(36) = K(36,1) * [MAPK1_p |JUN];
  R36: JUN => MAPK1_p; 1;
  // V(37) = K(37,1) * [AKT1_p] * [NR4A1] -K(37,2) * [AKT1_p |NR4A1];
  R37: NR4A1 => AKT1_p; 1;
  // V(38) = K(38,1) * [AKT1_p |NR4A1];
  R38: NR4A1 => AKT1_p; 1;
  // V(39) = K(39,1) * [MAPK1_p] * [FOS] -K(39,2) * [MAPK1_p |FOS];
  R39: FOS => MAPK1_p; 1;
  // V(40) = K(40,1) * [MAPK1_p |FOS];
  R40: FOS => MAPK1_p; 1;
  // V(41) = K(41,1) * [STK11_p] * [STK11] -K(41,2) * [STK11_p |STK11];
  R41: STK11_p => STK11; 1;
  // V(42) = K(42,1) * [STK11_p |STK11];
  R42: STK11_p => STK11; 1;
  // V(43) = K(43,1) * [SRC_p] * [SRC] -K(43,2) * [SRC_p |SRC];
  R43: SRC => SRC_p; 1;
  // V(44) = K(44,1) * [SRC_p |SRC];
  R44: SRC => SRC_p; 1;
  // V(45) = K(45,1) * [SRC_p] * [TLR3] -K(45,2) * [SRC_p |TLR3];
  R45: TLR3 => SRC_p; 1;
  // V(46) = K(46,1) * [SRC_p |TLR3];
  R46: TLR3 => SRC_p; 1;
  // V(47) = K(47,1) * [MAPK1_p] * [SMAD2] -K(47,2) * [MAPK1_p |SMAD2];
  R47: SMAD2 => MAPK1_p; 1;
  // V(48) = K(48,1) * [MAPK1_p |SMAD2];
  R48: SMAD2 => MAPK1_p; 1;
  // V(49) = K(49,1) * [MAPK1_p] * [RORA] -K(49,2) * [MAPK1_p |RORA];
  R49: RORA => MAPK1_p; 1;
  // V(50) = K(50,1) * [MAPK1_p |RORA];
  R50: RORA => MAPK1_p; 1;
  // V(51) = K(51,1) * [PRKAA1_p] * [PPARGC1A] -K(51,2) * [PRKAA1_p |PPARGC1A];
  R51: PPARGC1A => PRKAA1_p; 1;
  // V(52) = K(52,1) * [PRKAA1_p |PPARGC1A];
  R52: PPARGC1A => PRKAA1_p; 1;
  // V(53) = K(53,1) * [INSR_p] * [INSR] -K(53,2) * [INSR_p |INSR];
  R53: INSR_p => INSR; 1;
  // V(54) = K(54,1) * [INSR_p |INSR];
  R54: INSR_p => INSR; 1;
  // V(55) = K(55,1) * [JAK1_p] * [STAT1] -K(55,2) * [JAK1_p |STAT1];
  R55: STAT1 => JAK1_p; 1;
  // V(56) = K(56,1) * [JAK1_p |STAT1];
  R56: STAT1 => JAK1_p; 1;
  // V(57) = K(57,1) * [MAPK1_p] * [DUSP1] -K(57,2) * [MAPK1_p |DUSP1];
  R57: DUSP1 => MAPK1_p; 1;
  // V(58) = K(58,1) * [MAPK1_p |DUSP1];
  R58: DUSP1 => MAPK1_p; 1;
  // V(59) = K(59,1) * [AKT1_p] * [HSPB1] -K(59,2) * [AKT1_p |HSPB1];
  R59: HSPB1 => AKT1_p; 1;
  // V(60) = K(60,1) * [AKT1_p |HSPB1];
  R60: HSPB1 => AKT1_p; 1;
  // V(61) = K(61,1) * [RPS6KB1_p] * [HSPB1] -K(61,2) * [RPS6KB1_p |HSPB1];
  R61: HSPB1 => RPS6KB1_p; 1;
  // V(62) = K(62,1) * [RPS6KB1_p |HSPB1];
  R62: HSPB1 => RPS6KB1_p; 1;
  // V(63) = K(63,1) * [AKT1_p] * [CDKN1A] -K(63,2) * [AKT1_p |CDKN1A];
  R63: AKT1_p => CDKN1A; 1;
  // V(64) = K(64,1) * [AKT1_p |CDKN1A];
  R64: AKT1_p => CDKN1A; 1;
  // V(65) = K(65,1) * [SRC_p] * [AKT1] -K(65,2) * [SRC_p |AKT1];
  R65: AKT1 => SRC_p; 1;
  // V(66) = K(66,1) * [SRC_p |AKT1];
  R66: AKT1 => SRC_p; 1;
  // V(67) = K(67,1) * [JAK1_p] * [EIF2AK3] -K(67,2) * [JAK1_p |EIF2AK3];
  R67: EIF2AK3 => JAK1_p; 1;
  // V(68) = K(68,1) * [JAK1_p |EIF2AK3];
  R68: EIF2AK3 => JAK1_p; 1;
  // V(69) = K(69,1) * [AKT1_p] * [ESR1] -K(69,2) * [AKT1_p |ESR1];
  R69: ESR1 => AKT1_p; 1;
  // V(70) = K(70,1) * [AKT1_p |ESR1];
  R70: ESR1 => AKT1_p; 1;
  // V(71) = K(71,1) * [MAPK1_p] * [RHOA] -K(71,2) * [MAPK1_p |RHOA];
  R71: RHOA => MAPK1_p; 1;
  // V(72) = K(72,1) * [MAPK1_p |RHOA];
  R72: RHOA => MAPK1_p; 1;
  // V(73) = K(73,1) * [EGFR_p] * [CALM1] -K(73,2) * [EGFR_p |CALM1];
  R73: EGFR_p => CALM1; 1;
  // V(74) = K(74,1) * [EGFR_p |CALM1];
  R74: EGFR_p => CALM1; 1;
  // V(75) = K(75,1) * [AKT1_p] * [PPARGC1A] -K(75,2) * [AKT1_p |PPARGC1A];
  R75: PPARGC1A => AKT1_p; 1;
  // V(76) = K(76,1) * [AKT1_p |PPARGC1A];
  R76: PPARGC1A => AKT1_p; 1;
  // V(77) = K(77,1) * [MAPK1_p] * [FOXO1] -K(77,2) * [MAPK1_p |FOXO1];
  R77: FOXO1 => MAPK1_p; 1;
  // V(78) = K(78,1) * [MAPK1_p |FOXO1];
  R78: FOXO1 => MAPK1_p; 1;
  // V(79) = K(79,1) * [SRC_p] * [EGFR] -K(79,2) * [SRC_p |EGFR];
  R79: EGFR => SRC_p; 1;
  // V(80) = K(80,1) * [SRC_p |EGFR];
  R80: EGFR => SRC_p; 1;
  // V(81) = K(81,1) * [SRC_p] * [STAT1] -K(81,2) * [SRC_p |STAT1];
  R81: STAT1 => SRC_p; 1;
  // V(82) = K(82,1) * [SRC_p |STAT1];
  R82: STAT1 => SRC_p; 1;
  // V(83) = K(83,1) * [MAPK1_p] * [SMAD3] -K(83,2) * [MAPK1_p |SMAD3];
  R83: SMAD3 => MAPK1_p; 1;
  // V(84) = K(84,1) * [MAPK1_p |SMAD3];
  R84: SMAD3 => MAPK1_p; 1;
  // V(85) = K(85,1) * [MAPK1_p] * [TFEB] -K(85,2) * [MAPK1_p |TFEB];
  R85: TFEB => MAPK1_p; 1;
  // V(86) = K(86,1) * [MAPK1_p |TFEB];
  R86: TFEB => MAPK1_p; 1;
  // V(87) = K(87,1) * [INSR_p] * [CALM1] -K(87,2) * [INSR_p |CALM1];
  R87: INSR_p => CALM1; 1;
  // V(88) = K(88,1) * [INSR_p |CALM1];
  R88: INSR_p => CALM1; 1;
  // V(89) = K(89,1) * [ERN1_p] * [ERN1] -K(89,2) * [ERN1_p |ERN1];
  R89: ERN1_p => ERN1; 1;
  // V(90) = K(90,1) * [ERN1_p |ERN1];
  R90: ERN1_p => ERN1; 1;
  // V(91) = K(91,1) * [SRC_p] * [TRAF6] -K(91,2) * [SRC_p |TRAF6];
  R91: SRC_p => TRAF6; 1;
  // V(92) = K(92,1) * [SRC_p |TRAF6];
  R92: SRC_p => TRAF6; 1;
  // V(93) = K(93,1) * [AKT1_p] * [CDKN1B] -K(93,2) * [AKT1_p |CDKN1B];
  R93: CDKN1B => AKT1_p; 1;
  // V(94) = K(94,1) * [AKT1_p |CDKN1B];
  R94: CDKN1B => AKT1_p; 1;
  // V(95) = K(95,1) * [PRKCZ_p] * [BAX] -K(95,2) * [PRKCZ_p |BAX];
  R95: PRKCZ_p => BAX; 1;
  // V(96) = K(96,1) * [PRKCZ_p |BAX];
  R96: PRKCZ_p => BAX; 1;
  // V(97) = K(97,1) * [PRKCZ_p] * [YAP1] -K(97,2) * [PRKCZ_p |YAP1];
  R97: YAP1 => PRKCZ_p; 1;
  // V(98) = K(98,1) * [PRKCZ_p |YAP1];
  R98: YAP1 => PRKCZ_p; 1;
  // V(99) = K(99,1) * [MAPK1_p] * [SIGNOR-C154] -K(99,2) * [MAPK1_p |SIGNOR-C154];
  R99: MAPK1_p => ; 1;
  // V(100) = K(100,1) * [MAPK1_p |SIGNOR-C154];
  R100: MAPK1_p => ; 1;
  // V(101) = K(101,1) * [MAPK1_p] * [PPARA] -K(101,2) * [MAPK1_p |PPARA];
  R101: PPARA => MAPK1_p; 1;
  // V(102) = K(102,1) * [MAPK1_p |PPARA];
  R102: PPARA => MAPK1_p; 1;
  // V(103) = K(103,1) * [PRKCZ_p] * [VIM] -K(103,2) * [PRKCZ_p |VIM];
  R103: PRKCZ_p => VIM; 1;
  // V(104) = K(104,1) * [PRKCZ_p |VIM];
  R104: PRKCZ_p => VIM; 1;
  // V(105) = K(105,1) * [STK11_p] * [PTEN] -K(105,2) * [STK11_p |PTEN];
  R105: PTEN => STK11_p; 1;
  // V(106) = K(106,1) * [STK11_p |PTEN];
  R106: PTEN => STK11_p; 1;
  // V(107) = K(107,1) * [SGK1] * [FOXO1] -K(107,2) * [SGK1 |FOXO1];
  R107: FOXO1 => SGK1; 1;
  // V(108) = K(108,1) * [SGK1 |FOXO1];
  R108: FOXO1 => SGK1; 1;
  // V(109) = K(109,1) * [SGK1] * [CDKN1B] -K(109,2) * [SGK1 |CDKN1B];
  R109: CDKN1B => SGK1; 1;
  // V(110) = K(110,1) * [SGK1 |CDKN1B];
  R110: CDKN1B => SGK1; 1;
  // V(111) = K(111,1) * [AKT1_p] * [EP300] -K(111,2) * [AKT1_p |EP300];
  R111: EP300 => AKT1_p; 1;
  // V(112) = K(112,1) * [AKT1_p |EP300];
  R112: EP300 => AKT1_p; 1;
  // V(113) = K(113,1) * [IKBKB_p] * [FOXO1] -K(113,2) * [IKBKB_p |FOXO1];
  R113: FOXO1 => IKBKB_p; 1;
  // V(114) = K(114,1) * [IKBKB_p |FOXO1];
  R114: FOXO1 => IKBKB_p; 1;
  // V(115) = K(115,1) * [MAPK1_p] * [EGFR] -K(115,2) * [MAPK1_p |EGFR];
  R115: EGFR => MAPK1_p; 1;
  // V(116) = K(116,1) * [MAPK1_p |EGFR];
  R116: EGFR => MAPK1_p; 1;
  // V(117) = K(117,1) * [SRC_p] * [PTEN] -K(117,2) * [SRC_p |PTEN];
  R117: PTEN => SRC_p; 1;
  // V(118) = K(118,1) * [SRC_p |PTEN];
  R118: PTEN => SRC_p; 1;
  // V(119) = K(119,1) * [EIF2AK3_p] * [EIF2AK3] -K(119,2) * [EIF2AK3_p |EIF2AK3];
  R119: EIF2AK3_p => EIF2AK3; 1;
  // V(120) = K(120,1) * [EIF2AK3_p |EIF2AK3];
  R120: EIF2AK3_p => EIF2AK3; 1;
  // V(121) = K(121,1) * [RPS6KB1_p] * [ESR1] -K(121,2) * [RPS6KB1_p |ESR1];
  R121: RPS6KB1_p => ESR1; 1;
  // V(122) = K(122,1) * [RPS6KB1_p |ESR1];
  R122: RPS6KB1_p => ESR1; 1;
  // V(123) = K(123,1) * [AKT1_p] * [VIM] -K(123,2) * [AKT1_p |VIM];
  R123: VIM => AKT1_p; 1;
  // V(124) = K(124,1) * [AKT1_p |VIM];
  R124: VIM => AKT1_p; 1;
  // V(125) = K(125,1) * [PRKCZ_p] * [PRKCZ] -K(125,2) * [PRKCZ_p |PRKCZ];
  R125: PRKCZ_p => PRKCZ; 1;
  // V(126) = K(126,1) * [PRKCZ_p |PRKCZ];
  R126: PRKCZ_p => PRKCZ; 1;
  // V(127) = K(127,1) * [PRKAA1_p] * [DNMT1] -K(127,2) * [PRKAA1_p |DNMT1];
  R127: DNMT1 => PRKAA1_p; 1;
  // V(128) = K(128,1) * [PRKAA1_p |DNMT1];
  R128: DNMT1 => PRKAA1_p; 1;
  // V(129) = K(129,1) * [ILK_p] * [AKT1] -K(129,2) * [ILK_p |AKT1];
  R129: ILK_p => AKT1; 1;
  // V(130) = K(130,1) * [ILK_p |AKT1];
  R130: ILK_p => AKT1; 1;
  // V(131) = K(131,1) * [MAPK1_p] * [SP1] -K(131,2) * [MAPK1_p |SP1];
  R131: SP1 => MAPK1_p; 1;
  // V(132) = K(132,1) * [MAPK1_p |SP1];
  R132: SP1 => MAPK1_p; 1;
  // V(133) = K(133,1) * [PRKCZ_p] * [STK11] -K(133,2) * [PRKCZ_p |STK11];
  R133: PRKCZ_p => STK11; 1;
  // V(134) = K(134,1) * [PRKCZ_p |STK11];
  R134: PRKCZ_p => STK11; 1;
  // V(135) = K(135,1) * [MAPK1_p] * [STAT5A] -K(135,2) * [MAPK1_p |STAT5A];
  R135: STAT5A => MAPK1_p; 1;
  // V(136) = K(136,1) * [MAPK1_p |STAT5A];
  R136: STAT5A => MAPK1_p; 1;
  // V(137) = K(137,1) * [SRC_p] * [PTPRJ] -K(137,2) * [SRC_p |PTPRJ];
  R137: PTPRJ => SRC_p; 1;
  // V(138) = K(138,1) * [SRC_p |PTPRJ];
  R138: PTPRJ => SRC_p; 1;
  // V(139) = K(139,1) * [MAPK1_p] * [CDKN1A] -K(139,2) * [MAPK1_p |CDKN1A];
  R139: CDKN1A => MAPK1_p; 1;
  // V(140) = K(140,1) * [MAPK1_p |CDKN1A];
  R140: CDKN1A => MAPK1_p; 1;
  // V(141) = K(141,1) * [PRKAA1_p] * [FOXO1] -K(141,2) * [PRKAA1_p |FOXO1];
  R141: FOXO1 => PRKAA1_p; 1;
  // V(142) = K(142,1) * [PRKAA1_p |FOXO1];
  R142: FOXO1 => PRKAA1_p; 1;
  // V(143) = K(143,1) * [SRC_p] * [RAPGEF1] -K(143,2) * [SRC_p |RAPGEF1];
  R143: SRC_p => RAPGEF1; 1;
  // V(144) = K(144,1) * [SRC_p |RAPGEF1];
  R144: SRC_p => RAPGEF1; 1;
  // V(145) = K(145,1) * [SRC_p] * [KRT19] -K(145,2) * [SRC_p |KRT19];
  R145: SRC_p => KRT19; 1;
  // V(146) = K(146,1) * [SRC_p |KRT19];
  R146: SRC_p => KRT19; 1;
  // V(147) = K(147,1) * [AKT1_p] * [CASP9] -K(147,2) * [AKT1_p |CASP9];
  R147: CASP9 => AKT1_p; 1;
  // V(148) = K(148,1) * [AKT1_p |CASP9];
  R148: CASP9 => AKT1_p; 1;
  // V(149) = K(149,1) * [AKT1_p] * [NR3C1] -K(149,2) * [AKT1_p |NR3C1];
  R149: AKT1_p => NR3C1; 1;
  // V(150) = K(150,1) * [AKT1_p |NR3C1];
  R150: AKT1_p => NR3C1; 1;
  // V(151) = K(151,1) * [STK11_p] * [SMAD4] -K(151,2) * [STK11_p |SMAD4];
  R151: SMAD4 => STK11_p; 1;
  // V(152) = K(152,1) * [STK11_p |SMAD4];
  R152: SMAD4 => STK11_p; 1;
  // V(153) = K(153,1) * [PRKCZ_p] * [CASP9] -K(153,2) * [PRKCZ_p |CASP9];
  R153: PRKCZ_p => CASP9; 1;
  // V(154) = K(154,1) * [PRKCZ_p |CASP9];
  R154: PRKCZ_p => CASP9; 1;
  // V(155) = K(155,1) * [MAPK1_p] * [CASP9] -K(155,2) * [MAPK1_p |CASP9];
  R155: CASP9 => MAPK1_p; 1;
  // V(156) = K(156,1) * [MAPK1_p |CASP9];
  R156: CASP9 => MAPK1_p; 1;
  // V(157) = K(157,1) * [SRC_p] * [IKBKB] -K(157,2) * [SRC_p |IKBKB];
  R157: SRC_p => IKBKB; 1;
  // V(158) = K(158,1) * [SRC_p |IKBKB];
  R158: SRC_p => IKBKB; 1;
  // V(159) = K(159,1) * [RPS6KB1_p] * [RICTOR] -K(159,2) * [RPS6KB1_p |RICTOR];
  R159: RICTOR => RPS6KB1_p; 1;
  // V(160) = K(160,1) * [RPS6KB1_p |RICTOR];
  R160: RICTOR => RPS6KB1_p; 1;
  // V(161) = K(161,1) * [JAK1_p] * [STAT6] -K(161,2) * [JAK1_p |STAT6];
  R161: STAT6 => JAK1_p; 1;
  // V(162) = K(162,1) * [JAK1_p |STAT6];
  R162: STAT6 => JAK1_p; 1;
  // V(163) = K(163,1) * [AKT1_p] * [YAP1] -K(163,2) * [AKT1_p |YAP1];
  R163: YAP1 => AKT1_p; 1;
  // V(164) = K(164,1) * [AKT1_p |YAP1];
  R164: YAP1 => AKT1_p; 1;
  // V(165) = K(165,1) * [AKT1_p] * [DNMT1] -K(165,2) * [AKT1_p |DNMT1];
  R165: DNMT1 => AKT1_p; 1;
  // V(166) = K(166,1) * [AKT1_p |DNMT1];
  R166: DNMT1 => AKT1_p; 1;
  // V(167) = K(167,1) * [PRKAA1_p] * [EP300] -K(167,2) * [PRKAA1_p |EP300];
  R167: PRKAA1_p => EP300; 1;
  // V(168) = K(168,1) * [PRKAA1_p |EP300];
  R168: PRKAA1_p => EP300; 1;
  // V(169) = K(169,1) * [AKT1_p] * [CTNNB1] -K(169,2) * [AKT1_p |CTNNB1];
  R169: CTNNB1 => AKT1_p; 1;
  // V(170) = K(170,1) * [AKT1_p |CTNNB1];
  R170: CTNNB1 => AKT1_p; 1;
  // V(171) = K(171,1) * [MAP4K2_p] * [MAP4K2] -K(171,2) * [MAP4K2_p |MAP4K2];
  R171: MAP4K2_p => MAP4K2; 1;
  // V(172) = K(172,1) * [MAP4K2_p |MAP4K2];
  R172: MAP4K2_p => MAP4K2; 1;
  // V(173) = K(173,1) * [STK11_p] * [YAP1] -K(173,2) * [STK11_p |YAP1];
  R173: YAP1 => STK11_p; 1;
  // V(174) = K(174,1) * [STK11_p |YAP1];
  R174: YAP1 => STK11_p; 1;
  // V(175) = K(175,1) * [MAPK1_p] * [MAPK1] -K(175,2) * [MAPK1_p |MAPK1];
  R175: MAPK1 => MAPK1_p; 1;
  // V(176) = K(176,1) * [MAPK1_p |MAPK1];
  R176: MAPK1 => MAPK1_p; 1;
  // V(177) = K(177,1) * [MAPK1_p] * [RRAS] -K(177,2) * [MAPK1_p |RRAS];
  R177: RRAS => MAPK1_p; 1;
  // V(178) = K(178,1) * [MAPK1_p |RRAS];
  R178: RRAS => MAPK1_p; 1;
  // V(179) = K(179,1) * [SRC_p] * [CDH1] -K(179,2) * [SRC_p |CDH1];
  R179: CDH1 => SRC_p; 1;
  // V(180) = K(180,1) * [SRC_p |CDH1];
  R180: CDH1 => SRC_p; 1;
  // V(181) = K(181,1) * [MAPK1_p] * [ZFP36] -K(181,2) * [MAPK1_p |ZFP36];
  R181: ZFP36 => MAPK1_p; 1;
  // V(182) = K(182,1) * [MAPK1_p |ZFP36];
  R182: ZFP36 => MAPK1_p; 1;
  // V(183) = K(183,1) * [AKT1_p] * [MAPKAP1] -K(183,2) * [AKT1_p |MAPKAP1];
  R183: MAPKAP1 => AKT1_p; 1;
  // V(184) = K(184,1) * [AKT1_p |MAPKAP1];
  R184: MAPKAP1 => AKT1_p; 1;
  // V(185) = K(185,1) * [MAPK1_p] * [RCAN1] -K(185,2) * [MAPK1_p |RCAN1];
  R185: RCAN1 => MAPK1_p; 1;
  // V(186) = K(186,1) * [MAPK1_p |RCAN1];
  R186: RCAN1 => MAPK1_p; 1;
  // V(187) = K(187,1) * [EGFR_p] * [ESR1] -K(187,2) * [EGFR_p |ESR1];
  R187: EGFR_p => ESR1; 1;
  // V(188) = K(188,1) * [EGFR_p |ESR1];
  R188: EGFR_p => ESR1; 1;
  // V(189) = K(189,1) * [PRKCZ_p] * [CTNNB1] -K(189,2) * [PRKCZ_p |CTNNB1];
  R189: CTNNB1 => PRKCZ_p; 1;
  // V(190) = K(190,1) * [PRKCZ_p |CTNNB1];
  R190: CTNNB1 => PRKCZ_p; 1;
  // V(191) = K(191,1) * [SGK1] * [SP1] -K(191,2) * [SGK1 |SP1];
  R191: SP1 => SGK1; 1;
  // V(192) = K(192,1) * [SGK1 |SP1];
  R192: SP1 => SGK1; 1;
  // V(193) = K(193,1) * [SRC_p] * [PROM1] -K(193,2) * [SRC_p |PROM1];
  R193: PROM1 => SRC_p; 1;
  // V(194) = K(194,1) * [SRC_p |PROM1];
  R194: PROM1 => SRC_p; 1;
  // V(195) = K(195,1) * [SRC_p] * [CTNNB1] -K(195,2) * [SRC_p |CTNNB1];
  R195: CTNNB1 => SRC_p; 1;
  // V(196) = K(196,1) * [SRC_p |CTNNB1];
  R196: CTNNB1 => SRC_p; 1;
  // V(197) = K(197,1) * [SGK1] * [MAPK1] -K(197,2) * [SGK1 |MAPK1];
  R197: MAPK1 => SGK1; 1;
  // V(198) = K(198,1) * [SGK1 |MAPK1];
  R198: MAPK1 => SGK1; 1;
  // V(199) = K(199,1) * [PRKAA1_p] * [DDIT3] -K(199,2) * [PRKAA1_p |DDIT3];
  R199: DDIT3 => PRKAA1_p; 1;
  // V(200) = K(200,1) * [PRKAA1_p |DDIT3];
  R200: DDIT3 => PRKAA1_p; 1;
  // V(201) = K(201,1) * [SGK1] * [NR3C1] -K(201,2) * [SGK1 |NR3C1];
  R201: SGK1 => NR3C1; 1;
  // V(202) = K(202,1) * [SGK1 |NR3C1];
  R202: SGK1 => NR3C1; 1;
  // V(203) = K(203,1) * [AKT1_p] * [AKT1] -K(203,2) * [AKT1_p |AKT1];
  R203: AKT1 => AKT1_p; 1;
  // V(204) = K(204,1) * [AKT1_p |AKT1];
  R204: AKT1 => AKT1_p; 1;
  // V(205) = K(205,1) * [EGFR_p] * [STAT1] -K(205,2) * [EGFR_p |STAT1];
  R205: EGFR_p => STAT1; 1;
  // V(206) = K(206,1) * [EGFR_p |STAT1];
  R206: EGFR_p => STAT1; 1;
  // V(207) = K(207,1) * [INSR_p] * [PTEN] -K(207,2) * [INSR_p |PTEN];
  R207: PTEN => INSR_p; 1;
  // V(208) = K(208,1) * [INSR_p |PTEN];
  R208: PTEN => INSR_p; 1;
  // V(209) = K(209,1) * [EGFR_p] * [PCNA] -K(209,2) * [EGFR_p |PCNA];
  R209: EGFR_p => PCNA; 1;
  // V(210) = K(210,1) * [EGFR_p |PCNA];
  R210: EGFR_p => PCNA; 1;
  // V(211) = K(211,1) * [PRKAA1_p] * [MFF] -K(211,2) * [PRKAA1_p |MFF];
  R211: PRKAA1_p => MFF; 1;
  // V(212) = K(212,1) * [PRKAA1_p |MFF];
  R212: PRKAA1_p => MFF; 1;
  // V(213) = K(213,1) * [SRC_p] * [STAT5A] -K(213,2) * [SRC_p |STAT5A];
  R213: SRC_p => STAT5A; 1;
  // V(214) = K(214,1) * [SRC_p |STAT5A];
  R214: SRC_p => STAT5A; 1;
  // V(215) = K(215,1) * [SRC_p] * [CDKN1B] -K(215,2) * [SRC_p |CDKN1B];
  R215: CDKN1B => SRC_p; 1;
  // V(216) = K(216,1) * [SRC_p |CDKN1B];
  R216: CDKN1B => SRC_p; 1;
  // V(217) = K(217,1) * [AKT1_p] * [CREB1] -K(217,2) * [AKT1_p |CREB1];
  R217: CREB1 => AKT1_p; 1;
  // V(218) = K(218,1) * [AKT1_p |CREB1];
  R218: CREB1 => AKT1_p; 1;
  // V(219) = K(219,1) * [AKT1_p] * [MAPK1] -K(219,2) * [AKT1_p |MAPK1];
  R219: MAPK1 => AKT1_p; 1;
  // V(220) = K(220,1) * [AKT1_p |MAPK1];
  R220: MAPK1 => AKT1_p; 1;
  // V(221) = K(221,1) * [IKBKB_p] * [RELA] -K(221,2) * [IKBKB_p |RELA];
  R221: RELA => IKBKB_p; 1;
  // V(222) = K(222,1) * [IKBKB_p |RELA];
  R222: RELA => IKBKB_p; 1;
  // V(223) = K(223,1) * [PRKCZ_p] * [IKBKB] -K(223,2) * [PRKCZ_p |IKBKB];
  R223: PRKCZ_p => IKBKB; 1;
  // V(224) = K(224,1) * [PRKCZ_p |IKBKB];
  R224: PRKCZ_p => IKBKB; 1;
  // V(225) = K(225,1) * [EGFR_p] * [TLR3] -K(225,2) * [EGFR_p |TLR3];
  R225: EGFR_p => TLR3; 1;
  // V(226) = K(226,1) * [EGFR_p |TLR3];
  R226: EGFR_p => TLR3; 1;
  // V(227) = K(227,1) * [SRC_p] * [RRAS] -K(227,2) * [SRC_p |RRAS];
  R227: RRAS => SRC_p; 1;
  // V(228) = K(228,1) * [SRC_p |RRAS];
  R228: RRAS => SRC_p; 1;
  // V(229) = K(229,1) * [STK11_p] * [PRKAA1] -K(229,2) * [STK11_p |PRKAA1];
  R229: PRKAA1 => STK11_p; 1;
  // V(230) = K(230,1) * [STK11_p |PRKAA1];
  R230: PRKAA1 => STK11_p; 1;
  // V(231) = K(231,1) * [PRKCZ_p] * [RELA] -K(231,2) * [PRKCZ_p |RELA];
  R231: PRKCZ_p => RELA; 1;
  // V(232) = K(232,1) * [PRKCZ_p |RELA];
  R232: PRKCZ_p => RELA; 1;
  // V(233) = K(233,1) * [PRKAA1_p] * [NFE2L2] -K(233,2) * [PRKAA1_p |NFE2L2];
  R233: PRKAA1_p => NFE2L2; 1;
  // V(234) = K(234,1) * [PRKAA1_p |NFE2L2];
  R234: PRKAA1_p => NFE2L2; 1;
  // V(235) = K(235,1) * [PRKAA1_p] * [PRKAA1] -K(235,2) * [PRKAA1_p |PRKAA1];
  R235: PRKAA1 => PRKAA1_p; 1;
  // V(236) = K(236,1) * [PRKAA1_p |PRKAA1];
  R236: PRKAA1 => PRKAA1_p; 1;
  // V(237) = K(237,1) * [SGK1] * [STAT1] -K(237,2) * [SGK1 |STAT1];
  R237: STAT1 => SGK1; 1;
  // V(238) = K(238,1) * [SGK1 |STAT1];
  R238: STAT1 => SGK1; 1;
  // V(239) = K(239,1) * [ILK_p] * [ILK] -K(239,2) * [ILK_p |ILK];
  R239: ILK_p => ILK; 1;
  // V(240) = K(240,1) * [ILK_p |ILK];
  R240: ILK_p => ILK; 1;
  // V(241) = K(241,1) * [SRC_p] * [RHOA] -K(241,2) * [SRC_p |RHOA];
  R241: RHOA => SRC_p; 1;
  // V(242) = K(242,1) * [SRC_p |RHOA];
  R242: RHOA => SRC_p; 1;
  // V(243) = K(243,1) * [EGFR_p] * [CTNNB1] -K(243,2) * [EGFR_p |CTNNB1];
  R243: EGFR_p => CTNNB1; 1;
  // V(244) = K(244,1) * [EGFR_p |CTNNB1];
  R244: EGFR_p => CTNNB1; 1;
  // V(245) = K(245,1) * [SRC_p] * [SMAD3] -K(245,2) * [SRC_p |SMAD3];
  R245: SRC_p => SMAD3; 1;
  // V(246) = K(246,1) * [SRC_p |SMAD3];
  R246: SRC_p => SMAD3; 1;
  // V(247) = K(247,1) * [SRC_p] * [PIK3C3] -K(247,2) * [SRC_p |PIK3C3];
  R247: PIK3C3 => SRC_p; 1;
  // V(248) = K(248,1) * [SRC_p |PIK3C3];
  R248: PIK3C3 => SRC_p; 1;
  // V(249) = K(249,1) * [ROCK2] * [EP300] -K(249,2) * [ROCK2 |EP300];
  R249: EP300 => ROCK2; 1;
  // V(250) = K(250,1) * [ROCK2 |EP300];
  R250: EP300 => ROCK2; 1;
  // V(251) = K(251,1) * [RPS6KB1_p] * [MAPKAP1] -K(251,2) * [RPS6KB1_p |MAPKAP1];
  R251: MAPKAP1 => RPS6KB1_p; 1;
  // V(252) = K(252,1) * [RPS6KB1_p |MAPKAP1];
  R252: MAPKAP1 => RPS6KB1_p; 1;
  // V(253) = K(253,1) * [SRC_p] * [CASP9] -K(253,2) * [SRC_p |CASP9];
  R253: SRC_p => CASP9; 1;
  // V(254) = K(254,1) * [SRC_p |CASP9];
  R254: SRC_p => CASP9; 1;
  // V(255) = K(255,1) * [MAPK1_p] * [NR4A1] -K(255,2) * [MAPK1_p |NR4A1];
  R255: NR4A1 => MAPK1_p; 1;
  // V(256) = K(256,1) * [MAPK1_p |NR4A1];
  R256: NR4A1 => MAPK1_p; 1;
  // V(257) = K(257,1) * [EGFR_p] * [ABCA1] -K(257,2) * [EGFR_p |ABCA1];
  R257: EGFR_p => ABCA1; 1;
  // V(258) = K(258,1) * [EGFR_p |ABCA1];
  R258: EGFR_p => ABCA1; 1;
  // V(259) = K(259,1) * [PTPRJ_p] * [SRC] -K(259,2) * [PTPRJ_p |SRC];
  R259: PTPRJ_p => SRC; 1;
  // V(260) = K(260,1) * [PTPRJ_p |SRC];
  R260: PTPRJ_p => SRC; 1;
  // V(261) = K(261,1) * [STK11_p] * [CDKN1A] -K(261,2) * [STK11_p |CDKN1A];
  R261: STK11_p => CDKN1A; 1;
  // V(262) = K(262,1) * [STK11_p |CDKN1A];
  R262: STK11_p => CDKN1A; 1;
  // V(263) = K(263,1) * [SRC_p] * [ESR1] -K(263,2) * [SRC_p |ESR1];
  R263: SRC_p => ESR1; 1;
  // V(264) = K(264,1) * [SRC_p |ESR1];
  R264: SRC_p => ESR1; 1;
  // V(265) = K(265,1) * [AKT1_p] * [BAX] -K(265,2) * [AKT1_p |BAX];
  R265: AKT1_p => BAX; 1;
  // V(266) = K(266,1) * [AKT1_p |BAX];
  R266: AKT1_p => BAX; 1;
  // V(267) = K(267,1) * [PRKAA1_p] * [CDKN1B] -K(267,2) * [PRKAA1_p |CDKN1B];
  R267: CDKN1B => PRKAA1_p; 1;
  // V(268) = K(268,1) * [PRKAA1_p |CDKN1B];
  R268: CDKN1B => PRKAA1_p; 1;
  // V(269) = K(269,1) * [PTPRJ_p] * [INSR_p] -K(269,2) * [PTPRJ_p |INSR_p];
  R269: PTPRJ_p => INSR_p; 1;
  // V(270) = K(270,1) * [PTPRJ_p |INSR_p];
  R270: PTPRJ_p => INSR_p; 1;
  // V(271) = K(271,1) * [PTPRJ_p] * [MAPK1_p] -K(271,2) * [PTPRJ_p |MAPK1_p];
  R271: PTPRJ_p => MAPK1_p; 1;
  // V(272) = K(272,1) * [PTPRJ_p |MAPK1_p];
  R272: PTPRJ_p => MAPK1_p; 1;
  // V(273) = K(273,1) * [PTPRJ_p] * [CTNNB1_p] -K(273,2) * [PTPRJ_p |CTNNB1_p];
  R273: PTPRJ_p => CTNNB1_p; 1;
  // V(274) = K(274,1) * [PTPRJ_p |CTNNB1_p];
  R274: PTPRJ_p => CTNNB1_p; 1;
  // V(275) = K(275,1) * [PTEN_p] * [RPS6KB1_p] -K(275,2) * [PTEN_p |RPS6KB1_p];
  R275: PTEN_p => RPS6KB1_p; 1;
  // V(276) = K(276,1) * [PTEN_p |RPS6KB1_p];
  R276: PTEN_p => RPS6KB1_p; 1;
  // V(277) = K(277,1) * [PTPN2] * [INSR_p] -K(277,2) * [PTPN2 |INSR_p];
  R277: INSR_p => PTPN2; 1;
  // V(278) = K(278,1) * [PTPN2 |INSR_p];
  R278: INSR_p => PTPN2; 1;
  // V(279) = K(279,1) * [PTEN_p] * [SRC_p] -K(279,2) * [PTEN_p |SRC_p];
  R279: PTEN_p => SRC_p; 1;
  // V(280) = K(280,1) * [PTEN_p |SRC_p];
  R280: PTEN_p => SRC_p; 1;
  // V(281) = K(281,1) * [PTPN2] * [SRC_p] -K(281,2) * [PTPN2 |SRC_p];
  R281: PTPN2 => SRC_p; 1;
  // V(282) = K(282,1) * [PTPN2 |SRC_p];
  R282: PTPN2 => SRC_p; 1;
  // V(283) = K(283,1) * [DUSP1_p] * [MAPK1_p] -K(283,2) * [DUSP1_p |MAPK1_p];
  R283: DUSP1_p => MAPK1_p; 1;
  // V(284) = K(284,1) * [DUSP1_p |MAPK1_p];
  R284: DUSP1_p => MAPK1_p; 1;
  // V(285) = K(285,1) * [PTPN2] * [JAK1_p] -K(285,2) * [PTPN2 |JAK1_p];
  R285: PTPN2 => JAK1_p; 1;
  // V(286) = K(286,1) * [PTPN2 |JAK1_p];
  R286: PTPN2 => JAK1_p; 1;
  // V(287) = K(287,1) * [PTPN2] * [EGFR_p] -K(287,2) * [PTPN2 |EGFR_p];
  R287: EGFR_p => PTPN2; 1;
  // V(288) = K(288,1) * [PTPN2 |EGFR_p];
  R288: EGFR_p => PTPN2; 1;
  // V(289) = K(289,1) * [PTEN_p] * [SP1_p] -K(289,2) * [PTEN_p |SP1_p];
  R289: PTEN_p => SP1_p; 1;
  // V(290) = K(290,1) * [PTEN_p |SP1_p];
  R290: PTEN_p => SP1_p; 1;
  // V(291) = K(291,1) * [PTPN2] * [STAT6_p] -K(291,2) * [PTPN2 |STAT6_p];
  R291: STAT6_p => PTPN2; 1;
  // V(292) = K(292,1) * [PTPN2 |STAT6_p];
  R292: STAT6_p => PTPN2; 1;
  // V(293) = K(293,1) * [PTEN_p] * [PTEN_p] -K(293,2) * [PTEN_p |PTEN_p];
  R293: PTEN_p => ; 1;
  // V(294) = K(294,1) * [PTEN_p |PTEN_p];
  R294: PTEN_p => ; 1;
  // V(295) = K(295,1) * [PTPN2] * [STAT1_p] -K(295,2) * [PTPN2 |STAT1_p];
  R295: STAT1_p => PTPN2; 1;
  // V(296) = K(296,1) * [PTPN2 |STAT1_p];
  R296: STAT1_p => PTPN2; 1;
  // V(297) = K(297,1) * [PTPRJ_p] * [SRC_p] -K(297,2) * [PTPRJ_p |SRC_p];
  R297: PTPRJ_p => SRC_p; 1;
  // V(298) = K(298,1) * [PTPRJ_p |SRC_p];
  R298: PTPRJ_p => SRC_p; 1;
  // V(299) = K(299,1) * [PTPRJ_p] * [EGFR_p] -K(299,2) * [PTPRJ_p |EGFR_p];
  R299: PTPRJ_p => EGFR_p; 1;
  // V(300) = K(300,1) * [PTPRJ_p |EGFR_p];
  R300: PTPRJ_p => EGFR_p; 1;
  // V(301) = K(301,1) * [PTPA] * [AKT1_p] -K(301,2) * [PTPA |AKT1_p];
  R301: PTPA => AKT1_p; 1;
  // V(302) = K(302,1) * [PTPA |AKT1_p];
  R302: PTPA => AKT1_p; 1;
  // V(303) = K(303,1) * [PTEN_p] * [STAT5A_p] -K(303,2) * [PTEN_p |STAT5A_p];
  R303: PTEN_p => STAT5A_p; 1;
  // V(304) = K(304,1) * [PTEN_p |STAT5A_p];
  R304: PTEN_p => STAT5A_p; 1;
  // V(305) = K(305,1) * [PTEN_p] * [CREB1_p] -K(305,2) * [PTEN_p |CREB1_p];
  R305: PTEN_p => CREB1_p; 1;
  // V(306) = K(306,1) * [PTEN_p |CREB1_p];
  R306: PTEN_p => CREB1_p; 1;
  // V(307) = K(307,1) * [DUSP1_p] * [JUN_p] -K(307,2) * [DUSP1_p |JUN_p];
  R307: JUN_p => DUSP1_p; 1;
  // V(308) = K(308,1) * [DUSP1_p |JUN_p];
  R308: JUN_p => DUSP1_p; 1;
  // V(309) = K(309,1) * [PTPN2] * [STAT5A_p] -K(309,2) * [PTPN2 |STAT5A_p];
  R309: STAT5A_p => PTPN2; 1;
  // V(310) = K(310,1) * [PTPN2 |STAT5A_p];
  R310: STAT5A_p => PTPN2; 1;
  // V(311) = K(311,1) * [MYLIP] * [LDLR] -K(311,2) * [MYLIP |LDLR];
  R311: MYLIP => LDLR; 1;
  // V(312) = K(312,1) * [MYLIP |LDLR];
  R312: MYLIP => LDLR; 1;
  // V(313) = K(313,1) * [TRAF6_p] * [TRAF6] -K(313,2) * [TRAF6_p |TRAF6];
  R313: TRAF6_p => TRAF6; 1;
  // V(314) = K(314,1) * [TRAF6_p |TRAF6];
  R314: TRAF6_p => TRAF6; 1;
  // V(315) = K(315,1) * [MYLIP] * [VLDLR] -K(315,2) * [MYLIP |VLDLR];
  R315: VLDLR => MYLIP; 1;
  // V(316) = K(316,1) * [MYLIP |VLDLR];
  R316: VLDLR => MYLIP; 1;
  // V(317) = K(317,1) * [MYLIP] * [MYLIP] -K(317,2) * [MYLIP |MYLIP];
  R317: MYLIP => ; 1;
  // V(318) = K(318,1) * [MYLIP |MYLIP];
  R318: MYLIP => ; 1;
  // V(319) = K(319,1) * [NUMB] * [NOTCH1] -K(319,2) * [NUMB |NOTCH1];
  R319: NOTCH1 => NUMB; 1;
  // V(320) = K(320,1) * [NUMB |NOTCH1];
  R320: NOTCH1 => NUMB; 1;
  // V(321) = K(321,1) * [NFE2L2_p] * [SOD1_g] -K(321,2) * [NFE2L2_p |SOD1_g];
  R321: SOD1_g => NFE2L2_p; 1;
  // V(322) = K(322,1) * [NFE2L2_p |SOD1_g];
  R322: SOD1_g => NFE2L2_p; 1;
  // V(323) = K(323,1) * [SOD1_rna];
  R323: SOD1_rna => ; 1;
  // V(324) = K(324,1) * [CREB1_p] * [PPARGC1A_g] -K(324,2) * [CREB1_p |PPARGC1A_g];
  R324: CREB1_p => PPARGC1A_g; 1;
  // V(325) = K(325,1) * [CREB1_p |PPARGC1A_g];
  R325: CREB1_p => PPARGC1A_g; 1;
  // V(326) = K(326,1) * [PPARGC1A_rna];
  R326: PPARGC1A_rna => ; 1;
  // V(327) = K(327,1) * [CTNNB1_p] * [ESR1_p] * [CCND1_g] -K(327,2) * [CTNNB1_p |ESR1_p |CCND1_g];
  R327: CTNNB1_p => CCND1_g; 1;
  // V(328) = K(328,1) * [CTNNB1_p |ESR1_p |CCND1_g];
  R328: CTNNB1_p => CCND1_g; 1;
  // V(329) = K(329,1) * [CCND1_rna];
  R329: CCND1_rna => ; 1;
  // V(330) = K(330,1) * [ATF3] * [GDF15_g] -K(330,2) * [ATF3 |GDF15_g];
  R330: GDF15_g => ATF3; 1;
  // V(331) = K(331,1) * [ATF3 |GDF15_g];
  R331: GDF15_g => ATF3; 1;
  // V(332) = K(332,1) * [GDF15_rna];
  R332: GDF15_rna => ; 1;
  // V(333) = K(333,1) * [FOXO1_p] * [CDKN1B_g] -K(333,2) * [FOXO1_p |CDKN1B_g];
  R333: FOXO1_p => CDKN1B_g; 1;
  // V(334) = K(334,1) * [FOXO1_p |CDKN1B_g];
  R334: FOXO1_p => CDKN1B_g; 1;
  // V(335) = K(335,1) * [CDKN1B_rna];
  R335: CDKN1B_rna => ; 1;
  // V(336) = K(336,1) * [FOXO1_p] * [PCK1_g] -K(336,2) * [FOXO1_p |PCK1_g];
  R336: FOXO1_p => PCK1_g; 1;
  // V(337) = K(337,1) * [FOXO1_p |PCK1_g];
  R337: FOXO1_p => PCK1_g; 1;
  // V(338) = K(338,1) * [PCK1_rna];
  R338: PCK1_rna => ; 1;
  // V(339) = K(339,1) * [HIF1A_p] * [KDM6B_g] -K(339,2) * [HIF1A_p |KDM6B_g];
  R339: KDM6B_g => HIF1A_p; 1;
  // V(340) = K(340,1) * [HIF1A_p |KDM6B_g];
  R340: KDM6B_g => HIF1A_p; 1;
  // V(341) = K(341,1) * [KDM6B_rna];
  R341: KDM6B_rna => ; 1;
  // V(342) = K(342,1) * [NR3C1_p] * [KLF9_g] -K(342,2) * [NR3C1_p |KLF9_g];
  R342: KLF9_g => NR3C1_p; 1;
  // V(343) = K(343,1) * [NR3C1_p |KLF9_g];
  R343: KLF9_g => NR3C1_p; 1;
  // V(344) = K(344,1) * [KLF9_rna];
  R344: KLF9_rna => ; 1;
  // V(345) = K(345,1) * [NFE2L2_p] * [GCLM_g] -K(345,2) * [NFE2L2_p |GCLM_g];
  R345: GCLM_g => NFE2L2_p; 1;
  // V(346) = K(346,1) * [NFE2L2_p |GCLM_g];
  R346: GCLM_g => NFE2L2_p; 1;
  // V(347) = K(347,1) * [GCLM_rna];
  R347: GCLM_rna => ; 1;
  // V(348) = K(348,1) * [NFE2L2_p] * [GSTA1_g] -K(348,2) * [NFE2L2_p |GSTA1_g];
  R348: GSTA1_g => NFE2L2_p; 1;
  // V(349) = K(349,1) * [NFE2L2_p |GSTA1_g];
  R349: GSTA1_g => NFE2L2_p; 1;
  // V(350) = K(350,1) * [GSTA1_rna];
  R350: GSTA1_rna => ; 1;
  // V(351) = K(351,1) * [STAT5A_p] * [SOCS2_g] -K(351,2) * [STAT5A_p |SOCS2_g];
  R351: STAT5A_p => SOCS2_g; 1;
  // V(352) = K(352,1) * [STAT5A_p |SOCS2_g];
  R352: STAT5A_p => SOCS2_g; 1;
  // V(353) = K(353,1) * [SOCS2_rna];
  R353: SOCS2_rna => ; 1;
  // V(354) = K(354,1) * [HES1] * [NR3C1_g] -K(354,2) * [HES1 |NR3C1_g];
  R354: HES1 => NR3C1_g; 1;
  // V(355) = K(355,1) * [NR3C1_g];
  R355: NR3C1_g => ; 1;
  // V(356) = K(356,1) * [NR3C1_rna];
  R356: NR3C1_rna => ; 1;
  // V(357) = K(357,1) * [NR3C1_p] * [JUN_g] -K(357,2) * [NR3C1_p |JUN_g];
  R357: JUN_g => NR3C1_p; 1;
  // V(358) = K(358,1) * [JUN_g];
  R358: JUN_g => ; 1;
  // V(359) = K(359,1) * [JUN_rna];
  R359: JUN_rna => ; 1;
  // V(360) = K(360,1) * [RELA_p] * [BMP4_g] -K(360,2) * [RELA_p |BMP4_g];
  R360: BMP4_g => RELA_p; 1;
  // V(361) = K(361,1) * [BMP4_g];
  R361: BMP4_g => ; 1;
  // V(362) = K(362,1) * [BMP4_rna];
  R362: BMP4_rna => ; 1;
  // V(363) = K(363,1) * [HES1] * [RCAN1_g] -K(363,2) * [HES1 |RCAN1_g];
  R363: HES1 => RCAN1_g; 1;
  // V(364) = K(364,1) * [RCAN1_g];
  R364: RCAN1_g => ; 1;
  // V(365) = K(365,1) * [RCAN1_rna];
  R365: RCAN1_rna => ; 1;
  // V(366) = K(366,1) * [SGK1];
  R366: SGK1 => ; 1;
  // V(367) = K(367,1) * [SOCS2];
  R367: SOCS2 => ; 1;
  // V(368) = K(368,1) * [IKBKB];
  R368: IKBKB => ; 1;
  // V(369) = K(369,1) * [KDM6B];
  R369: KDM6B => ; 1;
  // V(370) = K(370,1) * [TLR3];
  R370: TLR3 => ; 1;
  // V(371) = K(371,1) * [PROM1];
  R371: PROM1 => ; 1;
  // V(372) = K(372,1) * [ROCK2];
  R372: ROCK2 => ; 1;
  // V(373) = K(373,1) * [ERN1];
  R373: ERN1 => ; 1;
  // V(374) = K(374,1) * [ABCA1];
  R374: ABCA1 => ; 1;
  // V(375) = K(375,1) * [SOD1];
  R375: SOD1 => ; 1;
  // V(376) = K(376,1) * [EGFR];
  R376: EGFR => ; 1;
  // V(377) = K(377,1) * [FOS];
  R377: FOS => ; 1;
  // V(378) = K(378,1) * [LDLR];
  R378: LDLR => ; 1;
  // V(379) = K(379,1) * [EGF];
  R379: EGF => ; 1;
  // V(380) = K(380,1) * [TGFA];
  R380: TGFA => ; 1;
  // V(381) = K(381,1) * [ESR1];
  R381: ESR1 => ; 1;
  // V(382) = K(382,1) * [NR3C1];
  R382: NR3C1 => ; 1;
  // V(383) = K(383,1) * [HSPB1];
  R383: HSPB1 => ; 1;
  // V(384) = K(384,1) * [JUN];
  R384: JUN => ; 1;
  // V(385) = K(385,1) * [INSR];
  R385: INSR => ; 1;
  // V(386) = K(386,1) * [SP1];
  R386: SP1 => ; 1;
  // V(387) = K(387,1) * [GSTA1];
  R387: GSTA1 => ; 1;
  // V(388) = K(388,1) * [VIM];
  R388: VIM => ; 1;
  // V(389) = K(389,1) * [KRT19];
  R389: KRT19 => ; 1;
  // V(390) = K(390,1) * [CALM1];
  R390: CALM1 => ; 1;
  // V(391) = K(391,1) * [RRAS];
  R391: RRAS => ; 1;
  // V(392) = K(392,1) * [PCNA];
  R392: PCNA => ; 1;
  // V(393) = K(393,1) * [BMP4];
  R393: BMP4 => ; 1;
  // V(394) = K(394,1) * [CDH1];
  R394: CDH1 => ; 1;
  // V(395) = K(395,1) * [SRC];
  R395: SRC => ; 1;
  // V(396) = K(396,1) * [CREB1];
  R396: CREB1 => ; 1;
  // V(397) = K(397,1) * [PTPN2];
  R397: PTPN2 => ; 1;
  // V(398) = K(398,1) * [ATF3];
  R398: ATF3 => ; 1;
  // V(399) = K(399,1) * [TFEB];
  R399: TFEB => ; 1;
  // V(400) = K(400,1) * [NR4A1];
  R400: NR4A1 => ; 1;
  // V(401) = K(401,1) * [RPS6KB1];
  R401: RPS6KB1 => ; 1;
  // V(402) = K(402,1) * [JAK1];
  R402: JAK1 => ; 1;
  // V(403) = K(403,1) * [CCND1];
  R403: CCND1 => ; 1;
  // V(404) = K(404,1) * [DNMT1];
  R404: DNMT1 => ; 1;
  // V(405) = K(405,1) * [ZFP36];
  R405: ZFP36 => ; 1;
  // V(406) = K(406,1) * [MAPK1];
  R406: MAPK1 => ; 1;
  // V(407) = K(407,1) * [DUSP1];
  R407: DUSP1 => ; 1;
  // V(408) = K(408,1) * [PRDX6];
  R408: PRDX6 => ; 1;
  // V(409) = K(409,1) * [AKT1];
  R409: AKT1 => ; 1;
  // V(410) = K(410,1) * [CTNNB1];
  R410: CTNNB1 => ; 1;
  // V(411) = K(411,1) * [RORA];
  R411: RORA => ; 1;
  // V(412) = K(412,1) * [PCK1];
  R412: PCK1 => ; 1;
  // V(413) = K(413,1) * [DDIT3];
  R413: DDIT3 => ; 1;
  // V(414) = K(414,1) * [CDKN1A];
  R414: CDKN1A => ; 1;
  // V(415) = K(415,1) * [STAT1];
  R415: STAT1 => ; 1;
  // V(416) = K(416,1) * [STAT6];
  R416: STAT6 => ; 1;
  // V(417) = K(417,1) * [STAT5A];
  R417: STAT5A => ; 1;
  // V(418) = K(418,1) * [CDKN1B];
  R418: CDKN1B => ; 1;
  // V(419) = K(419,1) * [NOTCH1];
  R419: NOTCH1 => ; 1;
  // V(420) = K(420,1) * [YAP1];
  R420: YAP1 => ; 1;
  // V(421) = K(421,1) * [GCLM];
  R421: GCLM => ; 1;
  // V(422) = K(422,1) * [NUMB];
  R422: NUMB => ; 1;
  // V(423) = K(423,1) * [RCAN1];
  R423: RCAN1 => ; 1;
  // V(424) = K(424,1) * [CASP9];
  R424: CASP9 => ; 1;
  // V(425) = K(425,1) * [PTEN];
  R425: PTEN => ; 1;
  // V(426) = K(426,1) * [RHOA];
  R426: RHOA => ; 1;
  // V(427) = K(427,1) * [SMAD3];
  R427: SMAD3 => ; 1;
  // V(428) = K(428,1) * [VLDLR];
  R428: VLDLR => ; 1;
  // V(429) = K(429,1) * [NFKB2];
  R429: NFKB2 => ; 1;
  // V(430) = K(430,1) * [RELA];
  R430: RELA => ; 1;
  // V(431) = K(431,1) * [NOTCH2];
  R431: NOTCH2 => ; 1;
  // V(432) = K(432,1) * [PRKCZ];
  R432: PRKCZ => ; 1;
  // V(433) = K(433,1) * [BAX];
  R433: BAX => ; 1;
  // V(434) = K(434,1) * [PPARA];
  R434: PPARA => ; 1;
  // V(435) = K(435,1) * [EP300];
  R435: EP300 => ; 1;
  // V(436) = K(436,1) * [FOXO1];
  R436: FOXO1 => ; 1;
  // V(437) = K(437,1) * [MAP4K2];
  R437: MAP4K2 => ; 1;
  // V(438) = K(438,1) * [PTPRJ];
  R438: PTPRJ => ; 1;
  // V(439) = K(439,1) * [PRKAA1];
  R439: PRKAA1 => ; 1;
  // V(440) = K(440,1) * [ILK];
  R440: ILK => ; 1;
  // V(441) = K(441,1) * [SMAD4];
  R441: SMAD4 => ; 1;
  // V(442) = K(442,1) * [KLF9];
  R442: KLF9 => ; 1;
  // V(443) = K(443,1) * [RAPGEF1];
  R443: RAPGEF1 => ; 1;
  // V(444) = K(444,1) * [HES1];
  R444: HES1 => ; 1;
  // V(445) = K(445,1) * [PTPA];
  R445: PTPA => ; 1;
  // V(446) = K(446,1) * [SMAD2];
  R446: SMAD2 => ; 1;
  // V(447) = K(447,1) * [STK11];
  R447: STK11 => ; 1;
  // V(448) = K(448,1) * [NFE2L2];
  R448: NFE2L2 => ; 1;
  // V(449) = K(449,1) * [HIF1A];
  R449: HIF1A => ; 1;
  // V(450) = K(450,1) * [RICTOR];
  R450: RICTOR => ; 1;
  // V(451) = K(451,1) * [PIK3C3];
  R451: PIK3C3 => ; 1;
  // V(452) = K(452,1) * [MYLIP];
  R452: MYLIP => ; 1;
  // V(453) = K(453,1) * [GDF15];
  R453: GDF15 => ; 1;
  // V(454) = K(454,1) * [MAPKAP1];
  R454: MAPKAP1 => ; 1;
  // V(455) = K(455,1) * [MFF];
  R455: MFF => ; 1;
  // V(456) = K(456,1) * [EIF2AK3];
  R456: EIF2AK3 => ; 1;
  // V(457) = K(457,1) * [PPARGC1A];
  R457: PPARGC1A => ; 1;
  // V(458) = K(458,1) * [TRAF6];
  R458: TRAF6 => ; 1;
  // V(459) = K(459,1) * [SOCS2_rna];
  R459: SOCS2_rna => ; 1;
  // V(460) = K(460,1) * [KDM6B_rna];
  R460: KDM6B_rna => ; 1;
  // V(461) = K(461,1) * [SOD1_rna];
  R461: SOD1_rna => ; 1;
  // V(462) = K(462,1) * [NR3C1_rna];
  R462: NR3C1_rna => ; 1;
  // V(463) = K(463,1) * [JUN_rna];
  R463: JUN_rna => ; 1;
  // V(464) = K(464,1) * [GSTA1_rna];
  R464: GSTA1_rna => ; 1;
  // V(465) = K(465,1) * [BMP4_rna];
  R465: BMP4_rna => ; 1;
  // V(466) = K(466,1) * [CCND1_rna];
  R466: CCND1_rna => ; 1;
  // V(467) = K(467,1) * [PCK1_rna];
  R467: PCK1_rna => ; 1;
  // V(468) = K(468,1) * [CDKN1B_rna];
  R468: CDKN1B_rna => ; 1;
  // V(469) = K(469,1) * [GCLM_rna];
  R469: GCLM_rna => ; 1;
  // V(470) = K(470,1) * [RCAN1_rna];
  R470: RCAN1_rna => ; 1;
  // V(471) = K(471,1) * [KLF9_rna];
  R471: KLF9_rna => ; 1;
  // V(472) = K(472,1) * [GDF15_rna];
  R472: GDF15_rna => ; 1;
  // V(473) = K(473,1) * [PPARGC1A_rna];
  R473: PPARGC1A_rna => ; 1;
  // V(474) = K(474,1) * [SGK1_g];
  R474: SGK1_g => ; 1;
  // V(475) = K(475,1) * [SGK1_rna];
  R475: SGK1_rna => ; 1;
  // V(476) = K(476,1) * [IKBKB_g];
  R476: IKBKB_g => ; 1;
  // V(477) = K(477,1) * [IKBKB_rna];
  R477: IKBKB_rna => ; 1;
  // V(478) = K(478,1) * [TLR3_g];
  R478: TLR3_g => ; 1;
  // V(479) = K(479,1) * [TLR3_rna];
  R479: TLR3_rna => ; 1;
  // V(480) = K(480,1) * [PROM1_g];
  R480: PROM1_g => ; 1;
  // V(481) = K(481,1) * [PROM1_rna];
  R481: PROM1_rna => ; 1;
  // V(482) = K(482,1) * [ROCK2_g];
  R482: ROCK2_g => ; 1;
  // V(483) = K(483,1) * [ROCK2_rna];
  R483: ROCK2_rna => ; 1;
  // V(484) = K(484,1) * [ERN1_g];
  R484: ERN1_g => ; 1;
  // V(485) = K(485,1) * [ERN1_rna];
  R485: ERN1_rna => ; 1;
  // V(486) = K(486,1) * [ABCA1_g];
  R486: ABCA1_g => ; 1;
  // V(487) = K(487,1) * [ABCA1_rna];
  R487: ABCA1_rna => ; 1;
  // V(488) = K(488,1) * [EGFR_g];
  R488: EGFR_g => ; 1;
  // V(489) = K(489,1) * [EGFR_rna];
  R489: EGFR_rna => ; 1;
  // V(490) = K(490,1) * [FOS_g];
  R490: FOS_g => ; 1;
  // V(491) = K(491,1) * [FOS_rna];
  R491: FOS_rna => ; 1;
  // V(492) = K(492,1) * [LDLR_g];
  R492: LDLR_g => ; 1;
  // V(493) = K(493,1) * [LDLR_rna];
  R493: LDLR_rna => ; 1;
  // V(494) = K(494,1) * [EGF_g];
  R494: EGF_g => ; 1;
  // V(495) = K(495,1) * [EGF_rna];
  R495: EGF_rna => ; 1;
  // V(496) = K(496,1) * [TGFA_g];
  R496: TGFA_g => ; 1;
  // V(497) = K(497,1) * [TGFA_rna];
  R497: TGFA_rna => ; 1;
  // V(498) = K(498,1) * [ESR1_g];
  R498: ESR1_g => ; 1;
  // V(499) = K(499,1) * [ESR1_rna];
  R499: ESR1_rna => ; 1;
  // V(500) = K(500,1) * [HSPB1_g];
  R500: HSPB1_g => ; 1;
  // V(501) = K(501,1) * [HSPB1_rna];
  R501: HSPB1_rna => ; 1;
  // V(502) = K(502,1) * [INSR_g];
  R502: INSR_g => ; 1;
  // V(503) = K(503,1) * [INSR_rna];
  R503: INSR_rna => ; 1;
  // V(504) = K(504,1) * [SP1_g];
  R504: SP1_g => ; 1;
  // V(505) = K(505,1) * [SP1_rna];
  R505: SP1_rna => ; 1;
  // V(506) = K(506,1) * [VIM_g];
  R506: VIM_g => ; 1;
  // V(507) = K(507,1) * [VIM_rna];
  R507: VIM_rna => ; 1;
  // V(508) = K(508,1) * [KRT19_g];
  R508: KRT19_g => ; 1;
  // V(509) = K(509,1) * [KRT19_rna];
  R509: KRT19_rna => ; 1;
  // V(510) = K(510,1) * [CALM1_g];
  R510: CALM1_g => ; 1;
  // V(511) = K(511,1) * [CALM1_rna];
  R511: CALM1_rna => ; 1;
  // V(512) = K(512,1) * [RRAS_g];
  R512: RRAS_g => ; 1;
  // V(513) = K(513,1) * [RRAS_rna];
  R513: RRAS_rna => ; 1;
  // V(514) = K(514,1) * [PCNA_g];
  R514: PCNA_g => ; 1;
  // V(515) = K(515,1) * [PCNA_rna];
  R515: PCNA_rna => ; 1;
  // V(516) = K(516,1) * [CDH1_g];
  R516: CDH1_g => ; 1;
  // V(517) = K(517,1) * [CDH1_rna];
  R517: CDH1_rna => ; 1;
  // V(518) = K(518,1) * [SRC_g];
  R518: SRC_g => ; 1;
  // V(519) = K(519,1) * [SRC_rna];
  R519: SRC_rna => ; 1;
  // V(520) = K(520,1) * [CREB1_g];
  R520: CREB1_g => ; 1;
  // V(521) = K(521,1) * [CREB1_rna];
  R521: CREB1_rna => ; 1;
  // V(522) = K(522,1) * [PTPN2_g];
  R522: PTPN2_g => ; 1;
  // V(523) = K(523,1) * [PTPN2_rna];
  R523: PTPN2_rna => ; 1;
  // V(524) = K(524,1) * [ATF3_g];
  R524: ATF3_g => ; 1;
  // V(525) = K(525,1) * [ATF3_rna];
  R525: ATF3_rna => ; 1;
  // V(526) = K(526,1) * [TFEB_g];
  R526: TFEB_g => ; 1;
  // V(527) = K(527,1) * [TFEB_rna];
  R527: TFEB_rna => ; 1;
  // V(528) = K(528,1) * [NR4A1_g];
  R528: NR4A1_g => ; 1;
  // V(529) = K(529,1) * [NR4A1_rna];
  R529: NR4A1_rna => ; 1;
  // V(530) = K(530,1) * [RPS6KB1_g];
  R530: RPS6KB1_g => ; 1;
  // V(531) = K(531,1) * [RPS6KB1_rna];
  R531: RPS6KB1_rna => ; 1;
  // V(532) = K(532,1) * [JAK1_g];
  R532: JAK1_g => ; 1;
  // V(533) = K(533,1) * [JAK1_rna];
  R533: JAK1_rna => ; 1;
  // V(534) = K(534,1) * [DNMT1_g];
  R534: DNMT1_g => ; 1;
  // V(535) = K(535,1) * [DNMT1_rna];
  R535: DNMT1_rna => ; 1;
  // V(536) = K(536,1) * [ZFP36_g];
  R536: ZFP36_g => ; 1;
  // V(537) = K(537,1) * [ZFP36_rna];
  R537: ZFP36_rna => ; 1;
  // V(538) = K(538,1) * [MAPK1_g];
  R538: MAPK1_g => ; 1;
  // V(539) = K(539,1) * [MAPK1_rna];
  R539: MAPK1_rna => ; 1;
  // V(540) = K(540,1) * [DUSP1_g];
  R540: DUSP1_g => ; 1;
  // V(541) = K(541,1) * [DUSP1_rna];
  R541: DUSP1_rna => ; 1;
  // V(542) = K(542,1) * [PRDX6_g];
  R542: PRDX6_g => ; 1;
  // V(543) = K(543,1) * [PRDX6_rna];
  R543: PRDX6_rna => ; 1;
  // V(544) = K(544,1) * [AKT1_g];
  R544: AKT1_g => ; 1;
  // V(545) = K(545,1) * [AKT1_rna];
  R545: AKT1_rna => ; 1;
  // V(546) = K(546,1) * [CTNNB1_g];
  R546: CTNNB1_g => ; 1;
  // V(547) = K(547,1) * [CTNNB1_rna];
  R547: CTNNB1_rna => ; 1;
  // V(548) = K(548,1) * [RORA_g];
  R548: RORA_g => ; 1;
  // V(549) = K(549,1) * [RORA_rna];
  R549: RORA_rna => ; 1;
  // V(550) = K(550,1) * [DDIT3_g];
  R550: DDIT3_g => ; 1;
  // V(551) = K(551,1) * [DDIT3_rna];
  R551: DDIT3_rna => ; 1;
  // V(552) = K(552,1) * [CDKN1A_g];
  R552: CDKN1A_g => ; 1;
  // V(553) = K(553,1) * [CDKN1A_rna];
  R553: CDKN1A_rna => ; 1;
  // V(554) = K(554,1) * [STAT1_g];
  R554: STAT1_g => ; 1;
  // V(555) = K(555,1) * [STAT1_rna];
  R555: STAT1_rna => ; 1;
  // V(556) = K(556,1) * [STAT6_g];
  R556: STAT6_g => ; 1;
  // V(557) = K(557,1) * [STAT6_rna];
  R557: STAT6_rna => ; 1;
  // V(558) = K(558,1) * [STAT5A_g];
  R558: STAT5A_g => ; 1;
  // V(559) = K(559,1) * [STAT5A_rna];
  R559: STAT5A_rna => ; 1;
  // V(560) = K(560,1) * [NOTCH1_g];
  R560: NOTCH1_g => ; 1;
  // V(561) = K(561,1) * [NOTCH1_rna];
  R561: NOTCH1_rna => ; 1;
  // V(562) = K(562,1) * [YAP1_g];
  R562: YAP1_g => ; 1;
  // V(563) = K(563,1) * [YAP1_rna];
  R563: YAP1_rna => ; 1;
  // V(564) = K(564,1) * [NUMB_g];
  R564: NUMB_g => ; 1;
  // V(565) = K(565,1) * [NUMB_rna];
  R565: NUMB_rna => ; 1;
  // V(566) = K(566,1) * [CASP9_g];
  R566: CASP9_g => ; 1;
  // V(567) = K(567,1) * [CASP9_rna];
  R567: CASP9_rna => ; 1;
  // V(568) = K(568,1) * [PTEN_g];
  R568: PTEN_g => ; 1;
  // V(569) = K(569,1) * [PTEN_rna];
  R569: PTEN_rna => ; 1;
  // V(570) = K(570,1) * [RHOA_g];
  R570: RHOA_g => ; 1;
  // V(571) = K(571,1) * [RHOA_rna];
  R571: RHOA_rna => ; 1;
  // V(572) = K(572,1) * [SMAD3_g];
  R572: SMAD3_g => ; 1;
  // V(573) = K(573,1) * [SMAD3_rna];
  R573: SMAD3_rna => ; 1;
  // V(574) = K(574,1) * [VLDLR_g];
  R574: VLDLR_g => ; 1;
  // V(575) = K(575,1) * [VLDLR_rna];
  R575: VLDLR_rna => ; 1;
  // V(576) = K(576,1) * [NFKB2_g];
  R576: NFKB2_g => ; 1;
  // V(577) = K(577,1) * [NFKB2_rna];
  R577: NFKB2_rna => ; 1;
  // V(578) = K(578,1) * [RELA_g];
  R578: RELA_g => ; 1;
  // V(579) = K(579,1) * [RELA_rna];
  R579: RELA_rna => ; 1;
  // V(580) = K(580,1) * [NOTCH2_g];
  R580: NOTCH2_g => ; 1;
  // V(581) = K(581,1) * [NOTCH2_rna];
  R581: NOTCH2_rna => ; 1;
  // V(582) = K(582,1) * [PRKCZ_g];
  R582: PRKCZ_g => ; 1;
  // V(583) = K(583,1) * [PRKCZ_rna];
  R583: PRKCZ_rna => ; 1;
  // V(584) = K(584,1) * [BAX_g];
  R584: BAX_g => ; 1;
  // V(585) = K(585,1) * [BAX_rna];
  R585: BAX_rna => ; 1;
  // V(586) = K(586,1) * [PPARA_g];
  R586: PPARA_g => ; 1;
  // V(587) = K(587,1) * [PPARA_rna];
  R587: PPARA_rna => ; 1;
  // V(588) = K(588,1) * [EP300_g];
  R588: EP300_g => ; 1;
  // V(589) = K(589,1) * [EP300_rna];
  R589: EP300_rna => ; 1;
  // V(590) = K(590,1) * [FOXO1_g];
  R590: FOXO1_g => ; 1;
  // V(591) = K(591,1) * [FOXO1_rna];
  R591: FOXO1_rna => ; 1;
  // V(592) = K(592,1) * [MAP4K2_g];
  R592: MAP4K2_g => ; 1;
  // V(593) = K(593,1) * [MAP4K2_rna];
  R593: MAP4K2_rna => ; 1;
  // V(594) = K(594,1) * [PTPRJ_g];
  R594: PTPRJ_g => ; 1;
  // V(595) = K(595,1) * [PTPRJ_rna];
  R595: PTPRJ_rna => ; 1;
  // V(596) = K(596,1) * [PRKAA1_g];
  R596: PRKAA1_g => ; 1;
  // V(597) = K(597,1) * [PRKAA1_rna];
  R597: PRKAA1_rna => ; 1;
  // V(598) = K(598,1) * [ILK_g];
  R598: ILK_g => ; 1;
  // V(599) = K(599,1) * [ILK_rna];
  R599: ILK_rna => ; 1;
  // V(600) = K(600,1) * [SMAD4_g];
  R600: SMAD4_g => ; 1;
  // V(601) = K(601,1) * [SMAD4_rna];
  R601: SMAD4_rna => ; 1;
  // V(602) = K(602,1) * [RAPGEF1_g];
  R602: RAPGEF1_g => ; 1;
  // V(603) = K(603,1) * [RAPGEF1_rna];
  R603: RAPGEF1_rna => ; 1;
  // V(604) = K(604,1) * [HES1_g];
  R604: HES1_g => ; 1;
  // V(605) = K(605,1) * [HES1_rna];
  R605: HES1_rna => ; 1;
  // V(606) = K(606,1) * [PTPA_g];
  R606: PTPA_g => ; 1;
  // V(607) = K(607,1) * [PTPA_rna];
  R607: PTPA_rna => ; 1;
  // V(608) = K(608,1) * [SMAD2_g];
  R608: SMAD2_g => ; 1;
  // V(609) = K(609,1) * [SMAD2_rna];
  R609: SMAD2_rna => ; 1;
  // V(610) = K(610,1) * [STK11_g];
  R610: STK11_g => ; 1;
  // V(611) = K(611,1) * [STK11_rna];
  R611: STK11_rna => ; 1;
  // V(612) = K(612,1) * [NFE2L2_g];
  R612: NFE2L2_g => ; 1;
  // V(613) = K(613,1) * [NFE2L2_rna];
  R613: NFE2L2_rna => ; 1;
  // V(614) = K(614,1) * [HIF1A_g];
  R614: HIF1A_g => ; 1;
  // V(615) = K(615,1) * [HIF1A_rna];
  R615: HIF1A_rna => ; 1;
  // V(616) = K(616,1) * [RICTOR_g];
  R616: RICTOR_g => ; 1;
  // V(617) = K(617,1) * [RICTOR_rna];
  R617: RICTOR_rna => ; 1;
  // V(618) = K(618,1) * [PIK3C3_g];
  R618: PIK3C3_g => ; 1;
  // V(619) = K(619,1) * [PIK3C3_rna];
  R619: PIK3C3_rna => ; 1;
  // V(620) = K(620,1) * [MYLIP_g];
  R620: MYLIP_g => ; 1;
  // V(621) = K(621,1) * [MYLIP_rna];
  R621: MYLIP_rna => ; 1;
  // V(622) = K(622,1) * [MAPKAP1_g];
  R622: MAPKAP1_g => ; 1;
  // V(623) = K(623,1) * [MAPKAP1_rna];
  R623: MAPKAP1_rna => ; 1;
  // V(624) = K(624,1) * [MFF_g];
  R624: MFF_g => ; 1;
  // V(625) = K(625,1) * [MFF_rna];
  R625: MFF_rna => ; 1;
  // V(626) = K(626,1) * [EIF2AK3_g];
  R626: EIF2AK3_g => ; 1;
  // V(627) = K(627,1) * [EIF2AK3_rna];
  R627: EIF2AK3_rna => ; 1;
  // V(628) = K(628,1) * [TRAF6_g];
  R628: TRAF6_g => ; 1;
  // V(629) = K(629,1) * [TRAF6_rna];
  R629: TRAF6_rna => ; 1;
  // V(630) = K(630,1) * [IKBKB_p];
  R630: IKBKB_p => ; 1;
  // V(631) = K(631,1) * [TLR3_p];
  R631: TLR3_p => ; 1;
  // V(632) = K(632,1) * [PROM1_p];
  R632: PROM1_p => ; 1;
  // V(633) = K(633,1) * [ERN1_p];
  R633: ERN1_p => ; 1;
  // V(634) = K(634,1) * [ABCA1_p];
  R634: ABCA1_p => ; 1;
  // V(635) = K(635,1) * [EGFR_p];
  R635: EGFR_p => ; 1;
  // V(636) = K(636,1) * [FOS_p];
  R636: FOS_p => ; 1;
  // V(637) = K(637,1) * [ESR1_p];
  R637: ESR1_p => ; 1;
  // V(638) = K(638,1) * [NR3C1_p];
  R638: NR3C1_p => ; 1;
  // V(639) = K(639,1) * [HSPB1_p];
  R639: HSPB1_p => ; 1;
  // V(640) = K(640,1) * [JUN_p];
  R640: JUN_p => ; 1;
  // V(641) = K(641,1) * [INSR_p];
  R641: INSR_p => ; 1;
  // V(642) = K(642,1) * [SP1_p];
  R642: SP1_p => ; 1;
  // V(643) = K(643,1) * [VIM_p];
  R643: VIM_p => ; 1;
  // V(644) = K(644,1) * [KRT19_p];
  R644: KRT19_p => ; 1;
  // V(645) = K(645,1) * [CALM1_p];
  R645: CALM1_p => ; 1;
  // V(646) = K(646,1) * [RRAS_p];
  R646: RRAS_p => ; 1;
  // V(647) = K(647,1) * [PCNA_p];
  R647: PCNA_p => ; 1;
  // V(648) = K(648,1) * [CDH1_p];
  R648: CDH1_p => ; 1;
  // V(649) = K(649,1) * [SRC_p];
  R649: SRC_p => ; 1;
  // V(650) = K(650,1) * [CREB1_p];
  R650: CREB1_p => ; 1;
  // V(651) = K(651,1) * [TFEB_p];
  R651: TFEB_p => ; 1;
  // V(652) = K(652,1) * [NR4A1_p];
  R652: NR4A1_p => ; 1;
  // V(653) = K(653,1) * [RPS6KB1_p];
  R653: RPS6KB1_p => ; 1;
  // V(654) = K(654,1) * [JAK1_p];
  R654: JAK1_p => ; 1;
  // V(655) = K(655,1) * [DNMT1_p];
  R655: DNMT1_p => ; 1;
  // V(656) = K(656,1) * [ZFP36_p];
  R656: ZFP36_p => ; 1;
  // V(657) = K(657,1) * [MAPK1_p];
  R657: MAPK1_p => ; 1;
  // V(658) = K(658,1) * [DUSP1_p];
  R658: DUSP1_p => ; 1;
  // V(659) = K(659,1) * [PRDX6_p];
  R659: PRDX6_p => ; 1;
  // V(660) = K(660,1) * [AKT1_p];
  R660: AKT1_p => ; 1;
  // V(661) = K(661,1) * [CTNNB1_p];
  R661: CTNNB1_p => ; 1;
  // V(662) = K(662,1) * [RORA_p];
  R662: RORA_p => ; 1;
  // V(663) = K(663,1) * [DDIT3_p];
  R663: DDIT3_p => ; 1;
  // V(664) = K(664,1) * [CDKN1A_p];
  R664: CDKN1A_p => ; 1;
  // V(665) = K(665,1) * [STAT1_p];
  R665: STAT1_p => ; 1;
  // V(666) = K(666,1) * [STAT6_p];
  R666: STAT6_p => ; 1;
  // V(667) = K(667,1) * [STAT5A_p];
  R667: STAT5A_p => ; 1;
  // V(668) = K(668,1) * [CDKN1B_p];
  R668: CDKN1B_p => ; 1;
  // V(669) = K(669,1) * [YAP1_p];
  R669: YAP1_p => ; 1;
  // V(670) = K(670,1) * [RCAN1_p];
  R670: RCAN1_p => ; 1;
  // V(671) = K(671,1) * [CASP9_p];
  R671: CASP9_p => ; 1;
  // V(672) = K(672,1) * [PTEN_p];
  R672: PTEN_p => ; 1;
  // V(673) = K(673,1) * [RHOA_p];
  R673: RHOA_p => ; 1;
  // V(674) = K(674,1) * [SMAD3_p];
  R674: SMAD3_p => ; 1;
  // V(675) = K(675,1) * [RELA_p];
  R675: RELA_p => ; 1;
  // V(676) = K(676,1) * [PRKCZ_p];
  R676: PRKCZ_p => ; 1;
  // V(677) = K(677,1) * [BAX_p];
  R677: BAX_p => ; 1;
  // V(678) = K(678,1) * [PPARA_p];
  R678: PPARA_p => ; 1;
  // V(679) = K(679,1) * [EP300_p];
  R679: EP300_p => ; 1;
  // V(680) = K(680,1) * [FOXO1_p];
  R680: FOXO1_p => ; 1;
  // V(681) = K(681,1) * [MAP4K2_p];
  R681: MAP4K2_p => ; 1;
  // V(682) = K(682,1) * [PTPRJ_p];
  R682: PTPRJ_p => ; 1;
  // V(683) = K(683,1) * [PRKAA1_p];
  R683: PRKAA1_p => ; 1;
  // V(684) = K(684,1) * [ILK_p];
  R684: ILK_p => ; 1;
  // V(685) = K(685,1) * [SMAD4_p];
  R685: SMAD4_p => ; 1;
  // V(686) = K(686,1) * [RAPGEF1_p];
  R686: RAPGEF1_p => ; 1;
  // V(687) = K(687,1) * [SMAD2_p];
  R687: SMAD2_p => ; 1;
  // V(688) = K(688,1) * [STK11_p];
  R688: STK11_p => ; 1;
  // V(689) = K(689,1) * [NFE2L2_p];
  R689: NFE2L2_p => ; 1;
  // V(690) = K(690,1) * [HIF1A_p];
  R690: HIF1A_p => ; 1;
  // V(691) = K(691,1) * [RICTOR_p];
  R691: RICTOR_p => ; 1;
  // V(692) = K(692,1) * [PIK3C3_p];
  R692: PIK3C3_p => ; 1;
  // V(693) = K(693,1) * [MAPKAP1_p];
  R693: MAPKAP1_p => ; 1;
  // V(694) = K(694,1) * [MFF_p];
  R694: MFF_p => ; 1;
  // V(695) = K(695,1) * [EIF2AK3_p];
  R695: EIF2AK3_p => ; 1;
  // V(696) = K(696,1) * [PPARGC1A_p];
  R696: PPARGC1A_p => ; 1;
  // V(697) = K(697,1) * [TRAF6_p];
  R697: TRAF6_p => ; 1;
  // V(698) = K(698,1) * [SIGNOR-C154_p];
  R698: => ; 1;
  // V(699) = K(699,1) * [SGK1_rna];
  R699: SGK1_rna => ; 1;
  // V(700) = K(700,1) * [IKBKB_rna];
  R700: IKBKB_rna => ; 1;
  // V(701) = K(701,1) * [TLR3_rna];
  R701: TLR3_rna => ; 1;
  // V(702) = K(702,1) * [PROM1_rna];
  R702: PROM1_rna => ; 1;
  // V(703) = K(703,1) * [ROCK2_rna];
  R703: ROCK2_rna => ; 1;
  // V(704) = K(704,1) * [ERN1_rna];
  R704: ERN1_rna => ; 1;
  // V(705) = K(705,1) * [ABCA1_rna];
  R705: ABCA1_rna => ; 1;
  // V(706) = K(706,1) * [EGFR_rna];
  R706: EGFR_rna => ; 1;
  // V(707) = K(707,1) * [FOS_rna];
  R707: FOS_rna => ; 1;
  // V(708) = K(708,1) * [LDLR_rna];
  R708: LDLR_rna => ; 1;
  // V(709) = K(709,1) * [EGF_rna];
  R709: EGF_rna => ; 1;
  // V(710) = K(710,1) * [TGFA_rna];
  R710: TGFA_rna => ; 1;
  // V(711) = K(711,1) * [ESR1_rna];
  R711: ESR1_rna => ; 1;
  // V(712) = K(712,1) * [HSPB1_rna];
  R712: HSPB1_rna => ; 1;
  // V(713) = K(713,1) * [INSR_rna];
  R713: INSR_rna => ; 1;
  // V(714) = K(714,1) * [SP1_rna];
  R714: SP1_rna => ; 1;
  // V(715) = K(715,1) * [VIM_rna];
  R715: VIM_rna => ; 1;
  // V(716) = K(716,1) * [KRT19_rna];
  R716: KRT19_rna => ; 1;
  // V(717) = K(717,1) * [CALM1_rna];
  R717: CALM1_rna => ; 1;
  // V(718) = K(718,1) * [RRAS_rna];
  R718: RRAS_rna => ; 1;
  // V(719) = K(719,1) * [PCNA_rna];
  R719: PCNA_rna => ; 1;
  // V(720) = K(720,1) * [CDH1_rna];
  R720: CDH1_rna => ; 1;
  // V(721) = K(721,1) * [SRC_rna];
  R721: SRC_rna => ; 1;
  // V(722) = K(722,1) * [CREB1_rna];
  R722: CREB1_rna => ; 1;
  // V(723) = K(723,1) * [PTPN2_rna];
  R723: PTPN2_rna => ; 1;
  // V(724) = K(724,1) * [ATF3_rna];
  R724: ATF3_rna => ; 1;
  // V(725) = K(725,1) * [TFEB_rna];
  R725: TFEB_rna => ; 1;
  // V(726) = K(726,1) * [NR4A1_rna];
  R726: NR4A1_rna => ; 1;
  // V(727) = K(727,1) * [RPS6KB1_rna];
  R727: RPS6KB1_rna => ; 1;
  // V(728) = K(728,1) * [JAK1_rna];
  R728: JAK1_rna => ; 1;
  // V(729) = K(729,1) * [DNMT1_rna];
  R729: DNMT1_rna => ; 1;
  // V(730) = K(730,1) * [ZFP36_rna];
  R730: ZFP36_rna => ; 1;
  // V(731) = K(731,1) * [MAPK1_rna];
  R731: MAPK1_rna => ; 1;
  // V(732) = K(732,1) * [DUSP1_rna];
  R732: DUSP1_rna => ; 1;
  // V(733) = K(733,1) * [PRDX6_rna];
  R733: PRDX6_rna => ; 1;
  // V(734) = K(734,1) * [AKT1_rna];
  R734: AKT1_rna => ; 1;
  // V(735) = K(735,1) * [CTNNB1_rna];
  R735: CTNNB1_rna => ; 1;
  // V(736) = K(736,1) * [RORA_rna];
  R736: RORA_rna => ; 1;
  // V(737) = K(737,1) * [DDIT3_rna];
  R737: DDIT3_rna => ; 1;
  // V(738) = K(738,1) * [CDKN1A_rna];
  R738: CDKN1A_rna => ; 1;
  // V(739) = K(739,1) * [STAT1_rna];
  R739: STAT1_rna => ; 1;
  // V(740) = K(740,1) * [STAT6_rna];
  R740: STAT6_rna => ; 1;
  // V(741) = K(741,1) * [STAT5A_rna];
  R741: STAT5A_rna => ; 1;
  // V(742) = K(742,1) * [NOTCH1_rna];
  R742: NOTCH1_rna => ; 1;
  // V(743) = K(743,1) * [YAP1_rna];
  R743: YAP1_rna => ; 1;
  // V(744) = K(744,1) * [NUMB_rna];
  R744: NUMB_rna => ; 1;
  // V(745) = K(745,1) * [CASP9_rna];
  R745: CASP9_rna => ; 1;
  // V(746) = K(746,1) * [PTEN_rna];
  R746: PTEN_rna => ; 1;
  // V(747) = K(747,1) * [RHOA_rna];
  R747: RHOA_rna => ; 1;
  // V(748) = K(748,1) * [SMAD3_rna];
  R748: SMAD3_rna => ; 1;
  // V(749) = K(749,1) * [VLDLR_rna];
  R749: VLDLR_rna => ; 1;
  // V(750) = K(750,1) * [NFKB2_rna];
  R750: NFKB2_rna => ; 1;
  // V(751) = K(751,1) * [RELA_rna];
  R751: RELA_rna => ; 1;
  // V(752) = K(752,1) * [NOTCH2_rna];
  R752: NOTCH2_rna => ; 1;
  // V(753) = K(753,1) * [PRKCZ_rna];
  R753: PRKCZ_rna => ; 1;
  // V(754) = K(754,1) * [BAX_rna];
  R754: BAX_rna => ; 1;
  // V(755) = K(755,1) * [PPARA_rna];
  R755: PPARA_rna => ; 1;
  // V(756) = K(756,1) * [EP300_rna];
  R756: EP300_rna => ; 1;
  // V(757) = K(757,1) * [FOXO1_rna];
  R757: FOXO1_rna => ; 1;
  // V(758) = K(758,1) * [MAP4K2_rna];
  R758: MAP4K2_rna => ; 1;
  // V(759) = K(759,1) * [PTPRJ_rna];
  R759: PTPRJ_rna => ; 1;
  // V(760) = K(760,1) * [PRKAA1_rna];
  R760: PRKAA1_rna => ; 1;
  // V(761) = K(761,1) * [ILK_rna];
  R761: ILK_rna => ; 1;
  // V(762) = K(762,1) * [SMAD4_rna];
  R762: SMAD4_rna => ; 1;
  // V(763) = K(763,1) * [RAPGEF1_rna];
  R763: RAPGEF1_rna => ; 1;
  // V(764) = K(764,1) * [HES1_rna];
  R764: HES1_rna => ; 1;
  // V(765) = K(765,1) * [PTPA_rna];
  R765: PTPA_rna => ; 1;
  // V(766) = K(766,1) * [SMAD2_rna];
  R766: SMAD2_rna => ; 1;
  // V(767) = K(767,1) * [STK11_rna];
  R767: STK11_rna => ; 1;
  // V(768) = K(768,1) * [NFE2L2_rna];
  R768: NFE2L2_rna => ; 1;
  // V(769) = K(769,1) * [HIF1A_rna];
  R769: HIF1A_rna => ; 1;
  // V(770) = K(770,1) * [RICTOR_rna];
  R770: RICTOR_rna => ; 1;
  // V(771) = K(771,1) * [PIK3C3_rna];
  R771: PIK3C3_rna => ; 1;
  // V(772) = K(772,1) * [MYLIP_rna];
  R772: MYLIP_rna => ; 1;
  // V(773) = K(773,1) * [MAPKAP1_rna];
  R773: MAPKAP1_rna => ; 1;
  // V(774) = K(774,1) * [MFF_rna];
  R774: MFF_rna => ; 1;
  // V(775) = K(775,1) * [EIF2AK3_rna];
  R775: EIF2AK3_rna => ; 1;
  // V(776) = K(776,1) * [TRAF6_rna];
  R776: TRAF6_rna => ; 1;
end
