// SBML level 3 version 2

model NKT()

  // Compartments:
  compartment cell = 1;

  // Species:
  species AIFM1 in cell = 1/cell;
  species AIFM1_g in cell = 1/cell;
  species AIFM1_rna in cell = 1/cell;
  species AKT1 in cell = 1/cell;
  species AKT1_g in cell = 1/cell;
  species AKT1_p in cell = 1/cell;
  species AKT1_rna in cell = 1/cell;
  species BAD in cell = 1/cell;
  species BAD_g in cell = 1/cell;
  species BAD_p in cell = 1/cell;
  species BAD_rna in cell = 1/cell;
  species BCL2 in cell = 1/cell;
  species BCL2_g in cell = 1/cell;
  species BCL2_p in cell = 1/cell;
  species BCL2_rna in cell = 1/cell;
  species BECN1 in cell = 1/cell;
  species BECN1_g in cell = 1/cell;
  species BECN1_p in cell = 1/cell;
  species BECN1_rna in cell = 1/cell;
  species CASP3 in cell = 1/cell;
  species CASP3_g in cell = 1/cell;
  species CASP3_rna in cell = 1/cell;
  species CAT in cell = 1/cell;
  species CAT_g in cell = 1/cell;
  species CAT_rna in cell = 1/cell;
  species CDKN1B in cell = 1/cell;
  species CDKN1B_g in cell = 1/cell;
  species CDKN1B_p in cell = 1/cell;
  species CDKN1B_rna in cell = 1/cell;
  species CREB1 in cell = 1/cell;
  species CREB1_g in cell = 1/cell;
  species CREB1_p in cell = 1/cell;
  species CREB1_rna in cell = 1/cell;
  species CTNNB1 in cell = 1/cell;
  species CTNNB1_g in cell = 1/cell;
  species CTNNB1_p in cell = 1/cell;
  species CTNNB1_rna in cell = 1/cell;
  species CUL3 in cell = 1/cell;
  species CUL3_g in cell = 1/cell;
  species CUL3_rna in cell = 1/cell;
  species DDIT3 in cell = 1/cell;
  species DDIT3_g in cell = 1/cell;
  species DDIT3_p in cell = 1/cell;
  species DDIT3_rna in cell = 1/cell;
  species DNM1L in cell = 1/cell;
  species DNM1L_g in cell = 1/cell;
  species DNM1L_p in cell = 1/cell;
  species DNM1L_rna in cell = 1/cell;
  species DNMT1 in cell = 1/cell;
  species DNMT1_g in cell = 1/cell;
  species DNMT1_p in cell = 1/cell;
  species DNMT1_rna in cell = 1/cell;
  species DUSP1 in cell = 1/cell;
  species DUSP1_g in cell = 1/cell;
  species DUSP1_p in cell = 1/cell;
  species DUSP1_rna in cell = 1/cell;
  species EP300 in cell = 1/cell;
  species EP300_g in cell = 1/cell;
  species EP300_p in cell = 1/cell;
  species EP300_rna in cell = 1/cell;
  species ERN1 in cell = 1/cell;
  species ERN1_g in cell = 1/cell;
  species ERN1_p in cell = 1/cell;
  species ERN1_rna in cell = 1/cell;
  species ETS1 in cell = 1/cell;
  species ETS1_g in cell = 1/cell;
  species ETS1_rna in cell = 1/cell;
  species F2R in cell = 1/cell;
  species F2R_g in cell = 1/cell;
  species F2R_p in cell = 1/cell;
  species F2R_rna in cell = 1/cell;
  species FOS in cell = 1/cell;
  species FOS_g in cell = 1/cell;
  species FOS_p in cell = 1/cell;
  species FOS_rna in cell = 1/cell;
  species FYN in cell = 1/cell;
  species FYN_g in cell = 1/cell;
  species FYN_p in cell = 1/cell;
  species FYN_rna in cell = 1/cell;
  species GCLM in cell = 1/cell;
  species GCLM_g in cell = 1/cell;
  species GCLM_rna in cell = 1/cell;
  species GLO1 in cell = 1/cell;
  species GLO1_g in cell = 1/cell;
  species GLO1_p in cell = 1/cell;
  species GLO1_rna in cell = 1/cell;
  species GPX4 in cell = 1/cell;
  species GPX4_g in cell = 1/cell;
  species GPX4_rna in cell = 1/cell;
  species GSTA1 in cell = 1/cell;
  species GSTA1_g in cell = 1/cell;
  species GSTA1_rna in cell = 1/cell;
  species HDAC1 in cell = 1/cell;
  species HDAC1_g in cell = 1/cell;
  species HDAC1_rna in cell = 1/cell;
  species HIF1A in cell = 1/cell;
  species HIF1A_g in cell = 1/cell;
  species HIF1A_p in cell = 1/cell;
  species HIF1A_rna in cell = 1/cell;
  species HIPK2 in cell = 1/cell;
  species HIPK2_g in cell = 1/cell;
  species HIPK2_p in cell = 1/cell;
  species HIPK2_rna in cell = 1/cell;
  species HMGN1 in cell = 1/cell;
  species HMGN1_g in cell = 1/cell;
  species HMGN1_p in cell = 1/cell;
  species HMGN1_rna in cell = 1/cell;
  species HSPB1 in cell = 1/cell;
  species HSPB1_g in cell = 1/cell;
  species HSPB1_p in cell = 1/cell;
  species HSPB1_rna in cell = 1/cell;
  species ILK in cell = 1/cell;
  species ILK_g in cell = 1/cell;
  species ILK_p in cell = 1/cell;
  species ILK_rna in cell = 1/cell;
  species IRAK1 in cell = 1/cell;
  species IRAK1_g in cell = 1/cell;
  species IRAK1_p in cell = 1/cell;
  species IRAK1_rna in cell = 1/cell;
  species IRF1 in cell = 1/cell;
  species IRF1_g in cell = 1/cell;
  species IRF1_rna in cell = 1/cell;
  species IRF8 in cell = 1/cell;
  species IRF8_g in cell = 1/cell;
  species IRF8_p in cell = 1/cell;
  species IRF8_rna in cell = 1/cell;
  species JAK1 in cell = 1/cell;
  species JAK1_g in cell = 1/cell;
  species JAK1_p in cell = 1/cell;
  species JAK1_rna in cell = 1/cell;
  species JAK3 in cell = 1/cell;
  species JAK3_g in cell = 1/cell;
  species JAK3_p in cell = 1/cell;
  species JAK3_rna in cell = 1/cell;
  species JUN in cell = 1/cell;
  species JUN_g in cell = 1/cell;
  species JUN_p in cell = 1/cell;
  species JUN_rna in cell = 1/cell;
  species KDM6B in cell = 1/cell;
  species KDM6B_g in cell = 1/cell;
  species KDM6B_rna in cell = 1/cell;
  species LYN in cell = 1/cell;
  species LYN_g in cell = 1/cell;
  species LYN_p in cell = 1/cell;
  species LYN_rna in cell = 1/cell;
  species MAPK1 in cell = 1/cell;
  species MAPK1_g in cell = 1/cell;
  species MAPK1_p in cell = 1/cell;
  species MAPK1_rna in cell = 1/cell;
  species MAPK9 in cell = 1/cell;
  species MAPK9_g in cell = 1/cell;
  species MAPK9_p in cell = 1/cell;
  species MAPK9_rna in cell = 1/cell;
  species MAPKAP1 in cell = 1/cell;
  species MAPKAP1_g in cell = 1/cell;
  species MAPKAP1_p in cell = 1/cell;
  species MAPKAP1_rna in cell = 1/cell;
  species MDM2 in cell = 1/cell;
  species MDM2_g in cell = 1/cell;
  species MDM2_p in cell = 1/cell;
  species MDM2_rna in cell = 1/cell;
  species MFF in cell = 1/cell;
  species MFF_g in cell = 1/cell;
  species MFF_p in cell = 1/cell;
  species MFF_rna in cell = 1/cell;
  species MYLIP in cell = 1/cell;
  species MYLIP_g in cell = 1/cell;
  species MYLIP_rna in cell = 1/cell;
  species NCF1 in cell = 1/cell;
  species NCF1_g in cell = 1/cell;
  species NCF1_p in cell = 1/cell;
  species NCF1_rna in cell = 1/cell;
  species NFE2L2 in cell = 1/cell;
  species NFE2L2_g in cell = 1/cell;
  species NFE2L2_p in cell = 1/cell;
  species NFE2L2_rna in cell = 1/cell;
  species NFKB1 in cell = 1/cell;
  species NFKB1_g in cell = 1/cell;
  species NFKB1_rna in cell = 1/cell;
  species NOTCH1 in cell = 1/cell;
  species NOTCH1_g in cell = 1/cell;
  species NOTCH1_rna in cell = 1/cell;
  species NR4A1 in cell = 1/cell;
  species NR4A1_g in cell = 1/cell;
  species NR4A1_p in cell = 1/cell;
  species NR4A1_rna in cell = 1/cell;
  species NUMB in cell = 1/cell;
  species NUMB_g in cell = 1/cell;
  species NUMB_rna in cell = 1/cell;
  species PARK7 in cell = 1/cell;
  species PARK7_g in cell = 1/cell;
  species PARK7_p in cell = 1/cell;
  species PARK7_rna in cell = 1/cell;
  species PARP1 in cell = 1/cell;
  species PARP1_g in cell = 1/cell;
  species PARP1_p in cell = 1/cell;
  species PARP1_rna in cell = 1/cell;
  species PDPK1 in cell = 1/cell;
  species PDPK1_g in cell = 1/cell;
  species PDPK1_p in cell = 1/cell;
  species PDPK1_rna in cell = 1/cell;
  species PKM in cell = 1/cell;
  species PKM_g in cell = 1/cell;
  species PKM_p in cell = 1/cell;
  species PKM_rna in cell = 1/cell;
  species PKN1 in cell = 1/cell;
  species PKN1_g in cell = 1/cell;
  species PKN1_p in cell = 1/cell;
  species PKN1_rna in cell = 1/cell;
  species PRDX1 in cell = 1/cell;
  species PRDX1_g in cell = 1/cell;
  species PRDX1_p in cell = 1/cell;
  species PRDX1_rna in cell = 1/cell;
  species PRDX6 in cell = 1/cell;
  species PRDX6_g in cell = 1/cell;
  species PRDX6_p in cell = 1/cell;
  species PRDX6_rna in cell = 1/cell;
  species PRKAA1 in cell = 1/cell;
  species PRKAA1_g in cell = 1/cell;
  species PRKAA1_p in cell = 1/cell;
  species PRKAA1_rna in cell = 1/cell;
  species PTEN in cell = 1/cell;
  species PTEN_g in cell = 1/cell;
  species PTEN_p in cell = 1/cell;
  species PTEN_rna in cell = 1/cell;
  species PTPN11 in cell = 1/cell;
  species PTPN11_g in cell = 1/cell;
  species PTPN11_p in cell = 1/cell;
  species PTPN11_rna in cell = 1/cell;
  species PTPN2 in cell = 1/cell;
  species PTPN2_g in cell = 1/cell;
  species PTPN2_rna in cell = 1/cell;
  species PTPN6 in cell = 1/cell;
  species PTPN6_g in cell = 1/cell;
  species PTPN6_p in cell = 1/cell;
  species PTPN6_rna in cell = 1/cell;
  species RAC1 in cell = 1/cell;
  species RAC1_g in cell = 1/cell;
  species RAC1_p in cell = 1/cell;
  species RAC1_rna in cell = 1/cell;
  species RELA in cell = 1/cell;
  species RELA_g in cell = 1/cell;
  species RELA_rna in cell = 1/cell;
  species RHOA in cell = 1/cell;
  species RHOA_g in cell = 1/cell;
  species RHOA_p in cell = 1/cell;
  species RHOA_rna in cell = 1/cell;
  species RICTOR in cell = 1/cell;
  species RICTOR_g in cell = 1/cell;
  species RICTOR_p in cell = 1/cell;
  species RICTOR_rna in cell = 1/cell;
  species RNF7 in cell = 1/cell;
  species RNF7_g in cell = 1/cell;
  species RNF7_rna in cell = 1/cell;
  species ROCK1 in cell = 1/cell;
  species ROCK1_g in cell = 1/cell;
  species ROCK1_rna in cell = 1/cell;
  species ROCK2 in cell = 1/cell;
  species ROCK2_g in cell = 1/cell;
  species ROCK2_rna in cell = 1/cell;
  species RORA in cell = 1/cell;
  species RORA_g in cell = 1/cell;
  species RORA_p in cell = 1/cell;
  species RORA_rna in cell = 1/cell;
  species RPS6KA3 in cell = 1/cell;
  species RPS6KA3_g in cell = 1/cell;
  species RPS6KA3_p in cell = 1/cell;
  species RPS6KA3_rna in cell = 1/cell;
  species RPS6KB1 in cell = 1/cell;
  species RPS6KB1_g in cell = 1/cell;
  species RPS6KB1_p in cell = 1/cell;
  species RPS6KB1_rna in cell = 1/cell;
  species SIRT1 in cell = 1/cell;
  species SIRT1_g in cell = 1/cell;
  species SIRT1_p in cell = 1/cell;
  species SIRT1_rna in cell = 1/cell;
  species SIRT7 in cell = 1/cell;
  species SIRT7_g in cell = 1/cell;
  species SIRT7_p in cell = 1/cell;
  species SIRT7_rna in cell = 1/cell;
  species SMAD2 in cell = 1/cell;
  species SMAD2_g in cell = 1/cell;
  species SMAD2_p in cell = 1/cell;
  species SMAD2_rna in cell = 1/cell;
  species SMAD4 in cell = 1/cell;
  species SMAD4_g in cell = 1/cell;
  species SMAD4_p in cell = 1/cell;
  species SMAD4_rna in cell = 1/cell;
  species SOCS1 in cell = 1/cell;
  species SOCS1_g in cell = 1/cell;
  species SOCS1_p in cell = 1/cell;
  species SOCS1_rna in cell = 1/cell;
  species SOD1 in cell = 1/cell;
  species SOD1_g in cell = 1/cell;
  species SOD1_rna in cell = 1/cell;
  species SOD2 in cell = 1/cell;
  species SOD2_g in cell = 1/cell;
  species SOD2_rna in cell = 1/cell;
  species SP1 in cell = 1/cell;
  species SP1_g in cell = 1/cell;
  species SP1_p in cell = 1/cell;
  species SP1_rna in cell = 1/cell;
  species STAT1 in cell = 1/cell;
  species STAT1_g in cell = 1/cell;
  species STAT1_p in cell = 1/cell;
  species STAT1_rna in cell = 1/cell;
  species STAT3 in cell = 1/cell;
  species STAT3_g in cell = 1/cell;
  species STAT3_p in cell = 1/cell;
  species STAT3_rna in cell = 1/cell;
  species STAT6 in cell = 1/cell;
  species STAT6_g in cell = 1/cell;
  species STAT6_p in cell = 1/cell;
  species STAT6_rna in cell = 1/cell;
  species STIM1 in cell = 1/cell;
  species STIM1_g in cell = 1/cell;
  species STIM1_p in cell = 1/cell;
  species STIM1_rna in cell = 1/cell;
  species STK11 in cell = 1/cell;
  species STK11_g in cell = 1/cell;
  species STK11_p in cell = 1/cell;
  species STK11_rna in cell = 1/cell;
  species STK4 in cell = 1/cell;
  species STK4_g in cell = 1/cell;
  species STK4_p in cell = 1/cell;
  species STK4_rna in cell = 1/cell;
  species TFEB in cell = 1/cell;
  species TFEB_g in cell = 1/cell;
  species TFEB_p in cell = 1/cell;
  species TFEB_rna in cell = 1/cell;
  species TGFB1 in cell = 1/cell;
  species TGFB1_g in cell = 1/cell;
  species TGFB1_rna in cell = 1/cell;
  species TGFBR1 in cell = 1/cell;
  species TGFBR1_g in cell = 1/cell;
  species TGFBR1_rna in cell = 1/cell;
  species TP53 in cell = 1/cell;
  species TP53_g in cell = 1/cell;
  species TP53_p in cell = 1/cell;
  species TP53_rna in cell = 1/cell;
  species TXNIP in cell = 1/cell;
  species TXNIP_g in cell = 1/cell;
  species TXNIP_p in cell = 1/cell;
  species TXNIP_rna in cell = 1/cell;
  species VIM in cell = 1/cell;
  species VIM_g in cell = 1/cell;
  species VIM_p in cell = 1/cell;
  species VIM_rna in cell = 1/cell;
  species XBP1 in cell = 1/cell;
  species XBP1_g in cell = 1/cell;
  species XBP1_p in cell = 1/cell;
  species XBP1_rna in cell = 1/cell;
  species ZFP36 in cell = 1/cell;
  species ZFP36_g in cell = 1/cell;
  species ZFP36_p in cell = 1/cell;
  species ZFP36_rna in cell = 1/cell;

  // Reactions:
  // V(1) = K(1,1) * [SMAD2_p] * [SMAD4_p] -K(1,2) * [SIGNOR-C8];
  R1: SMAD2_p => SMAD4_p; 1;
  // V(2) = K(2,1) * [SMAD4_p] * [JUN_p] -K(2,2) * [SIGNOR-C10];
  R2: JUN_p => SMAD4_p; 1;
  // V(3) = K(3,1) * [NFKB1] * [RELA] -K(3,2) * [SIGNOR-C13];
  R3: NFKB1 => RELA; 1;
  // V(4) = K(4,1) * [STAT3_p] * [SP1_p] -K(4,2) * [SIGNOR-C74];
  R4: STAT3_p => SP1_p; 1;
  // V(5) = K(5,1) * [STAT1_p] * [STAT3_p] -K(5,2) * [SIGNOR-C118];
  R5: STAT3_p => STAT1_p; 1;
  // V(6) = K(6,1) * [SIGNOR-C118] * [JAK1_p] -K(6,2) * [SIGNOR-C120];
  R6: JAK1_p => ; 1;
  // V(7) = K(7,1) * [FOS_p] * [JUN_p] * [JUN_p] * [FOS_p] * [JUN_p] * [FOS_p] * [FOS_p] * [JUN_p] -K(7,2) * [SIGNOR-C154];
  R7: JUN_p => FOS_p; 1;
  // V(8) = K(8,1) * [TGFBR1] * [SMAD2] -K(8,2) * [TGFBR1 |SMAD2];
  R8: TGFBR1 => SMAD2; 1;
  // V(9) = K(9,1) * [TGFBR1 |SMAD2];
  R9: TGFBR1 => SMAD2; 1;
  // V(10) = K(10,1) * [MAPK1_p] * [EP300] -K(10,2) * [MAPK1_p |EP300];
  R10: EP300 => MAPK1_p; 1;
  // V(11) = K(11,1) * [MAPK1_p |EP300];
  R11: EP300 => MAPK1_p; 1;
  // V(12) = K(12,1) * [MAPK1_p] * [HIF1A] -K(12,2) * [MAPK1_p |HIF1A];
  R12: HIF1A => MAPK1_p; 1;
  // V(13) = K(13,1) * [MAPK1_p |HIF1A];
  R13: HIF1A => MAPK1_p; 1;
  // V(14) = K(14,1) * [MAPK1_p] * [RPS6KA3] -K(14,2) * [MAPK1_p |RPS6KA3];
  R14: RPS6KA3 => MAPK1_p; 1;
  // V(15) = K(15,1) * [MAPK1_p |RPS6KA3];
  R15: RPS6KA3 => MAPK1_p; 1;
  // V(16) = K(16,1) * [MAPK1_p] * [PRDX6] -K(16,2) * [MAPK1_p |PRDX6];
  R16: PRDX6 => MAPK1_p; 1;
  // V(17) = K(17,1) * [MAPK1_p |PRDX6];
  R17: PRDX6 => MAPK1_p; 1;
  // V(18) = K(18,1) * [FYN_p] * [STK11] -K(18,2) * [FYN_p |STK11];
  R18: FYN_p => STK11; 1;
  // V(19) = K(19,1) * [FYN_p |STK11];
  R19: FYN_p => STK11; 1;
  // V(20) = K(20,1) * [AKT1_p] * [MDM2] -K(20,2) * [AKT1_p |MDM2];
  R20: AKT1_p => MDM2; 1;
  // V(21) = K(21,1) * [AKT1_p |MDM2];
  R21: AKT1_p => MDM2; 1;
  // V(22) = K(22,1) * [MAPK1_p] * [RPS6KB1] -K(22,2) * [MAPK1_p |RPS6KB1];
  R22: RPS6KB1 => MAPK1_p; 1;
  // V(23) = K(23,1) * [MAPK1_p |RPS6KB1];
  R23: RPS6KB1 => MAPK1_p; 1;
  // V(24) = K(24,1) * [AKT1_p] * [PRKAA1] -K(24,2) * [AKT1_p |PRKAA1];
  R24: PRKAA1 => AKT1_p; 1;
  // V(25) = K(25,1) * [AKT1_p |PRKAA1];
  R25: PRKAA1 => AKT1_p; 1;
  // V(26) = K(26,1) * [MAPK1_p] * [CDKN1B] -K(26,2) * [MAPK1_p |CDKN1B];
  R26: CDKN1B => MAPK1_p; 1;
  // V(27) = K(27,1) * [MAPK1_p |CDKN1B];
  R27: CDKN1B => MAPK1_p; 1;
  // V(28) = K(28,1) * [MAPK1_p] * [SMAD4] -K(28,2) * [MAPK1_p |SMAD4];
  R28: SMAD4 => MAPK1_p; 1;
  // V(29) = K(29,1) * [MAPK1_p |SMAD4];
  R29: SMAD4 => MAPK1_p; 1;
  // V(30) = K(30,1) * [ROCK1] * [DNM1L] -K(30,2) * [ROCK1 |DNM1L];
  R30: ROCK1 => DNM1L; 1;
  // V(31) = K(31,1) * [ROCK1 |DNM1L];
  R31: ROCK1 => DNM1L; 1;
  // V(32) = K(32,1) * [MAPK1_p] * [STK11] -K(32,2) * [MAPK1_p |STK11];
  R32: STK11 => MAPK1_p; 1;
  // V(33) = K(33,1) * [MAPK1_p |STK11];
  R33: STK11 => MAPK1_p; 1;
  // V(34) = K(34,1) * [PDPK1_p] * [RPS6KB1] -K(34,2) * [PDPK1_p |RPS6KB1];
  R34: PDPK1_p => RPS6KB1; 1;
  // V(35) = K(35,1) * [PDPK1_p |RPS6KB1];
  R35: PDPK1_p => RPS6KB1; 1;
  // V(36) = K(36,1) * [MAPK1_p] * [JUN] -K(36,2) * [MAPK1_p |JUN];
  R36: JUN => MAPK1_p; 1;
  // V(37) = K(37,1) * [MAPK1_p |JUN];
  R37: JUN => MAPK1_p; 1;
  // V(38) = K(38,1) * [AKT1_p] * [NR4A1] -K(38,2) * [AKT1_p |NR4A1];
  R38: NR4A1 => AKT1_p; 1;
  // V(39) = K(39,1) * [AKT1_p |NR4A1];
  R39: NR4A1 => AKT1_p; 1;
  // V(40) = K(40,1) * [MAPK1_p] * [FOS] -K(40,2) * [MAPK1_p |FOS];
  R40: FOS => MAPK1_p; 1;
  // V(41) = K(41,1) * [MAPK1_p |FOS];
  R41: FOS => MAPK1_p; 1;
  // V(42) = K(42,1) * [STK11_p] * [STK11] -K(42,2) * [STK11_p |STK11];
  R42: STK11_p => STK11; 1;
  // V(43) = K(43,1) * [STK11_p |STK11];
  R43: STK11_p => STK11; 1;
  // V(44) = K(44,1) * [JAK3_p] * [CTNNB1] -K(44,2) * [JAK3_p |CTNNB1];
  R44: CTNNB1 => JAK3_p; 1;
  // V(45) = K(45,1) * [JAK3_p |CTNNB1];
  R45: CTNNB1 => JAK3_p; 1;
  // V(46) = K(46,1) * [FYN_p] * [PTPN6] -K(46,2) * [FYN_p |PTPN6];
  R46: FYN_p => PTPN6; 1;
  // V(47) = K(47,1) * [FYN_p |PTPN6];
  R47: FYN_p => PTPN6; 1;
  // V(48) = K(48,1) * [MAPK9_p] * [TP53] -K(48,2) * [MAPK9_p |TP53];
  R48: TP53 => MAPK9_p; 1;
  // V(49) = K(49,1) * [MAPK9_p |TP53];
  R49: TP53 => MAPK9_p; 1;
  // V(50) = K(50,1) * [MAPK1_p] * [SMAD2] -K(50,2) * [MAPK1_p |SMAD2];
  R50: SMAD2 => MAPK1_p; 1;
  // V(51) = K(51,1) * [MAPK1_p |SMAD2];
  R51: SMAD2 => MAPK1_p; 1;
  // V(52) = K(52,1) * [MAPK1_p] * [RORA] -K(52,2) * [MAPK1_p |RORA];
  R52: RORA => MAPK1_p; 1;
  // V(53) = K(53,1) * [MAPK1_p |RORA];
  R53: RORA => MAPK1_p; 1;
  // V(54) = K(54,1) * [MAPK9_p] * [JUN] -K(54,2) * [MAPK9_p |JUN];
  R54: JUN => MAPK9_p; 1;
  // V(55) = K(55,1) * [MAPK9_p |JUN];
  R55: JUN => MAPK9_p; 1;
  // V(56) = K(56,1) * [MAPK1_p] * [BCL2] -K(56,2) * [MAPK1_p |BCL2];
  R56: BCL2 => MAPK1_p; 1;
  // V(57) = K(57,1) * [MAPK1_p |BCL2];
  R57: BCL2 => MAPK1_p; 1;
  // V(58) = K(58,1) * [AKT1_p] * [BAD] -K(58,2) * [AKT1_p |BAD];
  R58: BAD => AKT1_p; 1;
  // V(59) = K(59,1) * [AKT1_p |BAD];
  R59: BAD => AKT1_p; 1;
  // V(60) = K(60,1) * [MAPK1_p] * [NCF1] -K(60,2) * [MAPK1_p |NCF1];
  R60: NCF1 => MAPK1_p; 1;
  // V(61) = K(61,1) * [MAPK1_p |NCF1];
  R61: NCF1 => MAPK1_p; 1;
  // V(62) = K(62,1) * [JAK1_p] * [STAT1] -K(62,2) * [JAK1_p |STAT1];
  R62: STAT1 => JAK1_p; 1;
  // V(63) = K(63,1) * [JAK1_p |STAT1];
  R63: STAT1 => JAK1_p; 1;
  // V(64) = K(64,1) * [MAPK1_p] * [DUSP1] -K(64,2) * [MAPK1_p |DUSP1];
  R64: DUSP1 => MAPK1_p; 1;
  // V(65) = K(65,1) * [MAPK1_p |DUSP1];
  R65: DUSP1 => MAPK1_p; 1;
  // V(66) = K(66,1) * [AKT1_p] * [HSPB1] -K(66,2) * [AKT1_p |HSPB1];
  R66: HSPB1 => AKT1_p; 1;
  // V(67) = K(67,1) * [AKT1_p |HSPB1];
  R67: HSPB1 => AKT1_p; 1;
  // V(68) = K(68,1) * [AKT1_p] * [NCF1] -K(68,2) * [AKT1_p |NCF1];
  R68: NCF1 => AKT1_p; 1;
  // V(69) = K(69,1) * [AKT1_p |NCF1];
  R69: NCF1 => AKT1_p; 1;
  // V(70) = K(70,1) * [RPS6KA3_p] * [HMGN1] -K(70,2) * [RPS6KA3_p |HMGN1];
  R70: HMGN1 => RPS6KA3_p; 1;
  // V(71) = K(71,1) * [RPS6KA3_p |HMGN1];
  R71: HMGN1 => RPS6KA3_p; 1;
  // V(72) = K(72,1) * [PKN1_p] * [PKN1] -K(72,2) * [PKN1_p |PKN1];
  R72: PKN1 => PKN1_p; 1;
  // V(73) = K(73,1) * [PKN1_p |PKN1];
  R73: PKN1 => PKN1_p; 1;
  // V(74) = K(74,1) * [RPS6KB1_p] * [HSPB1] -K(74,2) * [RPS6KB1_p |HSPB1];
  R74: HSPB1 => RPS6KB1_p; 1;
  // V(75) = K(75,1) * [RPS6KB1_p |HSPB1];
  R75: HSPB1 => RPS6KB1_p; 1;
  // V(76) = K(76,1) * [JAK3_p] * [JAK1] -K(76,2) * [JAK3_p |JAK1];
  R76: JAK1 => JAK3_p; 1;
  // V(77) = K(77,1) * [JAK3_p |JAK1];
  R77: JAK1 => JAK3_p; 1;
  // V(78) = K(78,1) * [MAPK1_p] * [RHOA] -K(78,2) * [MAPK1_p |RHOA];
  R78: RHOA => MAPK1_p; 1;
  // V(79) = K(79,1) * [MAPK1_p |RHOA];
  R79: RHOA => MAPK1_p; 1;
  // V(80) = K(80,1) * [MAPK1_p] * [TFEB] -K(80,2) * [MAPK1_p |TFEB];
  R80: TFEB => MAPK1_p; 1;
  // V(81) = K(81,1) * [MAPK1_p |TFEB];
  R81: TFEB => MAPK1_p; 1;
  // V(82) = K(82,1) * [ERN1_p] * [ERN1] -K(82,2) * [ERN1_p |ERN1];
  R82: ERN1_p => ERN1; 1;
  // V(83) = K(83,1) * [ERN1_p |ERN1];
  R83: ERN1_p => ERN1; 1;
  // V(84) = K(84,1) * [AKT1_p] * [CDKN1B] -K(84,2) * [AKT1_p |CDKN1B];
  R84: CDKN1B => AKT1_p; 1;
  // V(85) = K(85,1) * [AKT1_p |CDKN1B];
  R85: CDKN1B => AKT1_p; 1;
  // V(86) = K(86,1) * [MAPK1_p] * [SIGNOR-C154] -K(86,2) * [MAPK1_p |SIGNOR-C154];
  R86: MAPK1_p => ; 1;
  // V(87) = K(87,1) * [MAPK1_p |SIGNOR-C154];
  R87: MAPK1_p => ; 1;
  // V(88) = K(88,1) * [RPS6KA3_p] * [BAD] -K(88,2) * [RPS6KA3_p |BAD];
  R88: RPS6KA3_p => BAD; 1;
  // V(89) = K(89,1) * [RPS6KA3_p |BAD];
  R89: RPS6KA3_p => BAD; 1;
  // V(90) = K(90,1) * [MAPK9_p] * [CTNNB1] -K(90,2) * [MAPK9_p |CTNNB1];
  R90: CTNNB1 => MAPK9_p; 1;
  // V(91) = K(91,1) * [MAPK9_p |CTNNB1];
  R91: CTNNB1 => MAPK9_p; 1;
  // V(92) = K(92,1) * [AKT1_p] * [RAC1] -K(92,2) * [AKT1_p |RAC1];
  R92: RAC1 => AKT1_p; 1;
  // V(93) = K(93,1) * [AKT1_p |RAC1];
  R93: RAC1 => AKT1_p; 1;
  // V(94) = K(94,1) * [PDPK1_p] * [AKT1] -K(94,2) * [PDPK1_p |AKT1];
  R94: PDPK1_p => AKT1; 1;
  // V(95) = K(95,1) * [PDPK1_p |AKT1];
  R95: PDPK1_p => AKT1; 1;
  // V(96) = K(96,1) * [STK4_p] * [STK4] -K(96,2) * [STK4_p |STK4];
  R96: STK4_p => STK4; 1;
  // V(97) = K(97,1) * [STK4_p |STK4];
  R97: STK4_p => STK4; 1;
  // V(98) = K(98,1) * [STK11_p] * [PTEN] -K(98,2) * [STK11_p |PTEN];
  R98: PTEN => STK11_p; 1;
  // V(99) = K(99,1) * [STK11_p |PTEN];
  R99: PTEN => STK11_p; 1;
  // V(100) = K(100,1) * [HIPK2_p] * [HIPK2] -K(100,2) * [HIPK2_p |HIPK2];
  R100: HIPK2_p => HIPK2; 1;
  // V(101) = K(101,1) * [HIPK2_p |HIPK2];
  R101: HIPK2_p => HIPK2; 1;
  // V(102) = K(102,1) * [PDPK1_p] * [PDPK1] -K(102,2) * [PDPK1_p |PDPK1];
  R102: PDPK1_p => PDPK1; 1;
  // V(103) = K(103,1) * [PDPK1_p |PDPK1];
  R103: PDPK1_p => PDPK1; 1;
  // V(104) = K(104,1) * [RPS6KA3_p] * [CREB1] -K(104,2) * [RPS6KA3_p |CREB1];
  R104: RPS6KA3_p => CREB1; 1;
  // V(105) = K(105,1) * [RPS6KA3_p |CREB1];
  R105: RPS6KA3_p => CREB1; 1;
  // V(106) = K(106,1) * [AKT1_p] * [EP300] -K(106,2) * [AKT1_p |EP300];
  R106: EP300 => AKT1_p; 1;
  // V(107) = K(107,1) * [AKT1_p |EP300];
  R107: EP300 => AKT1_p; 1;
  // V(108) = K(108,1) * [FYN_p] * [FYN] -K(108,2) * [FYN_p |FYN];
  R108: FYN_p => FYN; 1;
  // V(109) = K(109,1) * [FYN_p |FYN];
  R109: FYN_p => FYN; 1;
  // V(110) = K(110,1) * [IRAK1_p] * [IRAK1] -K(110,2) * [IRAK1_p |IRAK1];
  R110: IRAK1_p => IRAK1; 1;
  // V(111) = K(111,1) * [IRAK1_p |IRAK1];
  R111: IRAK1_p => IRAK1; 1;
  // V(112) = K(112,1) * [AKT1_p] * [VIM] -K(112,2) * [AKT1_p |VIM];
  R112: VIM => AKT1_p; 1;
  // V(113) = K(113,1) * [AKT1_p |VIM];
  R113: VIM => AKT1_p; 1;
  // V(114) = K(114,1) * [PRKAA1_p] * [SIRT7] -K(114,2) * [PRKAA1_p |SIRT7];
  R114: PRKAA1_p => SIRT7; 1;
  // V(115) = K(115,1) * [PRKAA1_p |SIRT7];
  R115: PRKAA1_p => SIRT7; 1;
  // V(116) = K(116,1) * [PRKAA1_p] * [DNMT1] -K(116,2) * [PRKAA1_p |DNMT1];
  R116: DNMT1 => PRKAA1_p; 1;
  // V(117) = K(117,1) * [PRKAA1_p |DNMT1];
  R117: DNMT1 => PRKAA1_p; 1;
  // V(118) = K(118,1) * [ILK_p] * [AKT1] -K(118,2) * [ILK_p |AKT1];
  R118: ILK_p => AKT1; 1;
  // V(119) = K(119,1) * [ILK_p |AKT1];
  R119: ILK_p => AKT1; 1;
  // V(120) = K(120,1) * [MAPK1_p] * [SP1] -K(120,2) * [MAPK1_p |SP1];
  R120: SP1 => MAPK1_p; 1;
  // V(121) = K(121,1) * [MAPK1_p |SP1];
  R121: SP1 => MAPK1_p; 1;
  // V(122) = K(122,1) * [ROCK1] * [PTEN] -K(122,2) * [ROCK1 |PTEN];
  R122: PTEN => ROCK1; 1;
  // V(123) = K(123,1) * [ROCK1 |PTEN];
  R123: PTEN => ROCK1; 1;
  // V(124) = K(124,1) * [MAPK1_p] * [BAD] -K(124,2) * [MAPK1_p |BAD];
  R124: BAD => MAPK1_p; 1;
  // V(125) = K(125,1) * [MAPK1_p |BAD];
  R125: BAD => MAPK1_p; 1;
  // V(126) = K(126,1) * [PDPK1_p] * [RPS6KA3] -K(126,2) * [PDPK1_p |RPS6KA3];
  R126: PDPK1_p => RPS6KA3; 1;
  // V(127) = K(127,1) * [PDPK1_p |RPS6KA3];
  R127: PDPK1_p => RPS6KA3; 1;
  // V(128) = K(128,1) * [JAK3_p] * [JAK3] -K(128,2) * [JAK3_p |JAK3];
  R128: JAK3_p => JAK3; 1;
  // V(129) = K(129,1) * [JAK3_p |JAK3];
  R129: JAK3_p => JAK3; 1;
  // V(130) = K(130,1) * [MAPK1_p] * [STIM1] -K(130,2) * [MAPK1_p |STIM1];
  R130: STIM1 => MAPK1_p; 1;
  // V(131) = K(131,1) * [MAPK1_p |STIM1];
  R131: STIM1 => MAPK1_p; 1;
  // V(132) = K(132,1) * [JAK1_p] * [STAT3] -K(132,2) * [JAK1_p |STAT3];
  R132: STAT3 => JAK1_p; 1;
  // V(133) = K(133,1) * [JAK1_p |STAT3];
  R133: STAT3 => JAK1_p; 1;
  // V(134) = K(134,1) * [MAPK1_p] * [PARP1] -K(134,2) * [MAPK1_p |PARP1];
  R134: PARP1 => MAPK1_p; 1;
  // V(135) = K(135,1) * [MAPK1_p |PARP1];
  R135: PARP1 => MAPK1_p; 1;
  // V(136) = K(136,1) * [STK11_p] * [SMAD4] -K(136,2) * [STK11_p |SMAD4];
  R136: SMAD4 => STK11_p; 1;
  // V(137) = K(137,1) * [STK11_p |SMAD4];
  R137: SMAD4 => STK11_p; 1;
  // V(138) = K(138,1) * [RPS6KB1_p] * [RICTOR] -K(138,2) * [RPS6KB1_p |RICTOR];
  R138: RICTOR => RPS6KB1_p; 1;
  // V(139) = K(139,1) * [RPS6KB1_p |RICTOR];
  R139: RICTOR => RPS6KB1_p; 1;
  // V(140) = K(140,1) * [JAK1_p] * [STAT6] -K(140,2) * [JAK1_p |STAT6];
  R140: STAT6 => JAK1_p; 1;
  // V(141) = K(141,1) * [JAK1_p |STAT6];
  R141: STAT6 => JAK1_p; 1;
  // V(142) = K(142,1) * [RPS6KA3_p] * [FOS] -K(142,2) * [RPS6KA3_p |FOS];
  R142: RPS6KA3_p => FOS; 1;
  // V(143) = K(143,1) * [RPS6KA3_p |FOS];
  R143: RPS6KA3_p => FOS; 1;
  // V(144) = K(144,1) * [AKT1_p] * [RPS6KA3] -K(144,2) * [AKT1_p |RPS6KA3];
  R144: RPS6KA3 => AKT1_p; 1;
  // V(145) = K(145,1) * [AKT1_p |RPS6KA3];
  R145: RPS6KA3 => AKT1_p; 1;
  // V(146) = K(146,1) * [AKT1_p] * [DNMT1] -K(146,2) * [AKT1_p |DNMT1];
  R146: DNMT1 => AKT1_p; 1;
  // V(147) = K(147,1) * [AKT1_p |DNMT1];
  R147: DNMT1 => AKT1_p; 1;
  // V(148) = K(148,1) * [STK11_p] * [SIRT1] -K(148,2) * [STK11_p |SIRT1];
  R148: STK11_p => SIRT1; 1;
  // V(149) = K(149,1) * [STK11_p |SIRT1];
  R149: STK11_p => SIRT1; 1;
  // V(150) = K(150,1) * [RPS6KA3_p] * [RPS6KA3] -K(150,2) * [RPS6KA3_p |RPS6KA3];
  R150: RPS6KA3_p => RPS6KA3; 1;
  // V(151) = K(151,1) * [RPS6KA3_p |RPS6KA3];
  R151: RPS6KA3_p => RPS6KA3; 1;
  // V(152) = K(152,1) * [PRKAA1_p] * [EP300] -K(152,2) * [PRKAA1_p |EP300];
  R152: PRKAA1_p => EP300; 1;
  // V(153) = K(153,1) * [PRKAA1_p |EP300];
  R153: PRKAA1_p => EP300; 1;
  // V(154) = K(154,1) * [AKT1_p] * [CTNNB1] -K(154,2) * [AKT1_p |CTNNB1];
  R154: CTNNB1 => AKT1_p; 1;
  // V(155) = K(155,1) * [AKT1_p |CTNNB1];
  R155: CTNNB1 => AKT1_p; 1;
  // V(156) = K(156,1) * [AKT1_p] * [STK4] -K(156,2) * [AKT1_p |STK4];
  R156: STK4 => AKT1_p; 1;
  // V(157) = K(157,1) * [AKT1_p |STK4];
  R157: STK4 => AKT1_p; 1;
  // V(158) = K(158,1) * [RPS6KA3_p] * [NR4A1] -K(158,2) * [RPS6KA3_p |NR4A1];
  R158: NR4A1 => RPS6KA3_p; 1;
  // V(159) = K(159,1) * [RPS6KA3_p |NR4A1];
  R159: NR4A1 => RPS6KA3_p; 1;
  // V(160) = K(160,1) * [AKT1_p] * [IRAK1] -K(160,2) * [AKT1_p |IRAK1];
  R160: IRAK1 => AKT1_p; 1;
  // V(161) = K(161,1) * [AKT1_p |IRAK1];
  R161: IRAK1 => AKT1_p; 1;
  // V(162) = K(162,1) * [RPS6KB1_p] * [BAD] -K(162,2) * [RPS6KB1_p |BAD];
  R162: BAD => RPS6KB1_p; 1;
  // V(163) = K(163,1) * [RPS6KB1_p |BAD];
  R163: BAD => RPS6KB1_p; 1;
  // V(164) = K(164,1) * [PRKAA1_p] * [SIRT1] -K(164,2) * [PRKAA1_p |SIRT1];
  R164: PRKAA1_p => SIRT1; 1;
  // V(165) = K(165,1) * [PRKAA1_p |SIRT1];
  R165: PRKAA1_p => SIRT1; 1;
  // V(166) = K(166,1) * [ROCK1] * [TP53] -K(166,2) * [ROCK1 |TP53];
  R166: TP53 => ROCK1; 1;
  // V(167) = K(167,1) * [ROCK1 |TP53];
  R167: TP53 => ROCK1; 1;
  // V(168) = K(168,1) * [MAPK1_p] * [MAPK1] -K(168,2) * [MAPK1_p |MAPK1];
  R168: MAPK1 => MAPK1_p; 1;
  // V(169) = K(169,1) * [MAPK1_p |MAPK1];
  R169: MAPK1 => MAPK1_p; 1;
  // V(170) = K(170,1) * [LYN_p] * [LYN] -K(170,2) * [LYN_p |LYN];
  R170: LYN => LYN_p; 1;
  // V(171) = K(171,1) * [LYN_p |LYN];
  R171: LYN => LYN_p; 1;
  // V(172) = K(172,1) * [MAPK1_p] * [ZFP36] -K(172,2) * [MAPK1_p |ZFP36];
  R172: ZFP36 => MAPK1_p; 1;
  // V(173) = K(173,1) * [MAPK1_p |ZFP36];
  R173: ZFP36 => MAPK1_p; 1;
  // V(174) = K(174,1) * [AKT1_p] * [MAPKAP1] -K(174,2) * [AKT1_p |MAPKAP1];
  R174: MAPKAP1 => AKT1_p; 1;
  // V(175) = K(175,1) * [AKT1_p |MAPKAP1];
  R175: MAPKAP1 => AKT1_p; 1;
  // V(176) = K(176,1) * [AKT1_p] * [PARK7] -K(176,2) * [AKT1_p |PARK7];
  R176: AKT1_p => PARK7; 1;
  // V(177) = K(177,1) * [AKT1_p |PARK7];
  R177: AKT1_p => PARK7; 1;
  // V(178) = K(178,1) * [PRKAA1_p] * [HIPK2] -K(178,2) * [PRKAA1_p |HIPK2];
  R178: PRKAA1_p => HIPK2; 1;
  // V(179) = K(179,1) * [PRKAA1_p |HIPK2];
  R179: PRKAA1_p => HIPK2; 1;
  // V(180) = K(180,1) * [PDPK1_p] * [PKN1] -K(180,2) * [PDPK1_p |PKN1];
  R180: PDPK1_p => PKN1; 1;
  // V(181) = K(181,1) * [PDPK1_p |PKN1];
  R181: PDPK1_p => PKN1; 1;
  // V(182) = K(182,1) * [MAPK1_p] * [DNM1L] -K(182,2) * [MAPK1_p |DNM1L];
  R182: DNM1L => MAPK1_p; 1;
  // V(183) = K(183,1) * [MAPK1_p |DNM1L];
  R183: DNM1L => MAPK1_p; 1;
  // V(184) = K(184,1) * [PRKAA1_p] * [DDIT3] -K(184,2) * [PRKAA1_p |DDIT3];
  R184: DDIT3 => PRKAA1_p; 1;
  // V(185) = K(185,1) * [PRKAA1_p |DDIT3];
  R185: DDIT3 => PRKAA1_p; 1;
  // V(186) = K(186,1) * [RPS6KA3_p] * [TP53] -K(186,2) * [RPS6KA3_p |TP53];
  R186: TP53 => RPS6KA3_p; 1;
  // V(187) = K(187,1) * [RPS6KA3_p |TP53];
  R187: TP53 => RPS6KA3_p; 1;
  // V(188) = K(188,1) * [ROCK1] * [BECN1] -K(188,2) * [ROCK1 |BECN1];
  R188: ROCK1 => BECN1; 1;
  // V(189) = K(189,1) * [ROCK1 |BECN1];
  R189: ROCK1 => BECN1; 1;
  // V(190) = K(190,1) * [MAPK1_p] * [XBP1] -K(190,2) * [MAPK1_p |XBP1];
  R190: XBP1 => MAPK1_p; 1;
  // V(191) = K(191,1) * [MAPK1_p |XBP1];
  R191: XBP1 => MAPK1_p; 1;
  // V(192) = K(192,1) * [HIPK2_p] * [EP300] -K(192,2) * [HIPK2_p |EP300];
  R192: EP300 => HIPK2_p; 1;
  // V(193) = K(193,1) * [HIPK2_p |EP300];
  R193: EP300 => HIPK2_p; 1;
  // V(194) = K(194,1) * [PKM_p] * [STAT3] -K(194,2) * [PKM_p |STAT3];
  R194: PKM_p => STAT3; 1;
  // V(195) = K(195,1) * [PKM_p |STAT3];
  R195: PKM_p => STAT3; 1;
  // V(196) = K(196,1) * [AKT1_p] * [AKT1] -K(196,2) * [AKT1_p |AKT1];
  R196: AKT1 => AKT1_p; 1;
  // V(197) = K(197,1) * [AKT1_p |AKT1];
  R197: AKT1 => AKT1_p; 1;
  // V(198) = K(198,1) * [JAK1_p] * [PTPN11] -K(198,2) * [JAK1_p |PTPN11];
  R198: PTPN11 => JAK1_p; 1;
  // V(199) = K(199,1) * [JAK1_p |PTPN11];
  R199: PTPN11 => JAK1_p; 1;
  // V(200) = K(200,1) * [STK11_p] * [TP53] -K(200,2) * [STK11_p |TP53];
  R200: TP53 => STK11_p; 1;
  // V(201) = K(201,1) * [STK11_p |TP53];
  R201: TP53 => STK11_p; 1;
  // V(202) = K(202,1) * [STK4_p] * [BECN1] -K(202,2) * [STK4_p |BECN1];
  R202: STK4_p => BECN1; 1;
  // V(203) = K(203,1) * [STK4_p |BECN1];
  R203: STK4_p => BECN1; 1;
  // V(204) = K(204,1) * [STK4_p] * [PRDX1] -K(204,2) * [STK4_p |PRDX1];
  R204: STK4_p => PRDX1; 1;
  // V(205) = K(205,1) * [STK4_p |PRDX1];
  R205: STK4_p => PRDX1; 1;
  // V(206) = K(206,1) * [PRKAA1_p] * [MFF] -K(206,2) * [PRKAA1_p |MFF];
  R206: PRKAA1_p => MFF; 1;
  // V(207) = K(207,1) * [PRKAA1_p |MFF];
  R207: PRKAA1_p => MFF; 1;
  // V(208) = K(208,1) * [LYN_p] * [GLO1] -K(208,2) * [LYN_p |GLO1];
  R208: GLO1 => LYN_p; 1;
  // V(209) = K(209,1) * [LYN_p |GLO1];
  R209: GLO1 => LYN_p; 1;
  // V(210) = K(210,1) * [AKT1_p] * [CREB1] -K(210,2) * [AKT1_p |CREB1];
  R210: CREB1 => AKT1_p; 1;
  // V(211) = K(211,1) * [AKT1_p |CREB1];
  R211: CREB1 => AKT1_p; 1;
  // V(212) = K(212,1) * [AKT1_p] * [MAPK1] -K(212,2) * [AKT1_p |MAPK1];
  R212: MAPK1 => AKT1_p; 1;
  // V(213) = K(213,1) * [AKT1_p |MAPK1];
  R213: MAPK1 => AKT1_p; 1;
  // V(214) = K(214,1) * [ROCK1] * [VIM] -K(214,2) * [ROCK1 |VIM];
  R214: ROCK1 => VIM; 1;
  // V(215) = K(215,1) * [ROCK1 |VIM];
  R215: ROCK1 => VIM; 1;
  // V(216) = K(216,1) * [STK4_p] * [SIRT1] -K(216,2) * [STK4_p |SIRT1];
  R216: STK4_p => SIRT1; 1;
  // V(217) = K(217,1) * [STK4_p |SIRT1];
  R217: STK4_p => SIRT1; 1;
  // V(218) = K(218,1) * [LYN_p] * [CDKN1B] -K(218,2) * [LYN_p |CDKN1B];
  R218: CDKN1B => LYN_p; 1;
  // V(219) = K(219,1) * [LYN_p |CDKN1B];
  R219: CDKN1B => LYN_p; 1;
  // V(220) = K(220,1) * [STK11_p] * [F2R] -K(220,2) * [STK11_p |F2R];
  R220: F2R => STK11_p; 1;
  // V(221) = K(221,1) * [STK11_p |F2R];
  R221: F2R => STK11_p; 1;
  // V(222) = K(222,1) * [MAPK9_p] * [BCL2] -K(222,2) * [MAPK9_p |BCL2];
  R222: BCL2 => MAPK9_p; 1;
  // V(223) = K(223,1) * [MAPK9_p |BCL2];
  R223: BCL2 => MAPK9_p; 1;
  // V(224) = K(224,1) * [STK11_p] * [PRKAA1] -K(224,2) * [STK11_p |PRKAA1];
  R224: PRKAA1 => STK11_p; 1;
  // V(225) = K(225,1) * [STK11_p |PRKAA1];
  R225: PRKAA1 => STK11_p; 1;
  // V(226) = K(226,1) * [FYN_p] * [CTNNB1] -K(226,2) * [FYN_p |CTNNB1];
  R226: FYN_p => CTNNB1; 1;
  // V(227) = K(227,1) * [FYN_p |CTNNB1];
  R227: FYN_p => CTNNB1; 1;
  // V(228) = K(228,1) * [MAPK1_p] * [TP53] -K(228,2) * [MAPK1_p |TP53];
  R228: TP53 => MAPK1_p; 1;
  // V(229) = K(229,1) * [MAPK1_p |TP53];
  R229: TP53 => MAPK1_p; 1;
  // V(230) = K(230,1) * [LYN_p] * [STAT3] -K(230,2) * [LYN_p |STAT3];
  R230: STAT3 => LYN_p; 1;
  // V(231) = K(231,1) * [LYN_p |STAT3];
  R231: STAT3 => LYN_p; 1;
  // V(232) = K(232,1) * [PRKAA1_p] * [NFE2L2] -K(232,2) * [PRKAA1_p |NFE2L2];
  R232: PRKAA1_p => NFE2L2; 1;
  // V(233) = K(233,1) * [PRKAA1_p |NFE2L2];
  R233: PRKAA1_p => NFE2L2; 1;
  // V(234) = K(234,1) * [HIPK2_p] * [CDKN1B] -K(234,2) * [HIPK2_p |CDKN1B];
  R234: CDKN1B => HIPK2_p; 1;
  // V(235) = K(235,1) * [HIPK2_p |CDKN1B];
  R235: CDKN1B => HIPK2_p; 1;
  // V(236) = K(236,1) * [HIPK2_p] * [TP53] -K(236,2) * [HIPK2_p |TP53];
  R236: TP53 => HIPK2_p; 1;
  // V(237) = K(237,1) * [HIPK2_p |TP53];
  R237: TP53 => HIPK2_p; 1;
  // V(238) = K(238,1) * [PRKAA1_p] * [PRKAA1] -K(238,2) * [PRKAA1_p |PRKAA1];
  R238: PRKAA1 => PRKAA1_p; 1;
  // V(239) = K(239,1) * [PRKAA1_p |PRKAA1];
  R239: PRKAA1 => PRKAA1_p; 1;
  // V(240) = K(240,1) * [RPS6KA3_p] * [STK11] -K(240,2) * [RPS6KA3_p |STK11];
  R240: RPS6KA3_p => STK11; 1;
  // V(241) = K(241,1) * [RPS6KA3_p |STK11];
  R241: RPS6KA3_p => STK11; 1;
  // V(242) = K(242,1) * [ERN1_p] * [XBP1] -K(242,2) * [ERN1_p |XBP1];
  R242: ERN1_p => XBP1; 1;
  // V(243) = K(243,1) * [ERN1_p |XBP1];
  R243: ERN1_p => XBP1; 1;
  // V(244) = K(244,1) * [PRKAA1_p] * [STIM1] -K(244,2) * [PRKAA1_p |STIM1];
  R244: PRKAA1_p => STIM1; 1;
  // V(245) = K(245,1) * [PRKAA1_p |STIM1];
  R245: PRKAA1_p => STIM1; 1;
  // V(246) = K(246,1) * [FYN_p] * [RPS6KA3] -K(246,2) * [FYN_p |RPS6KA3];
  R246: FYN_p => RPS6KA3; 1;
  // V(247) = K(247,1) * [FYN_p |RPS6KA3];
  R247: FYN_p => RPS6KA3; 1;
  // V(248) = K(248,1) * [ILK_p] * [ILK] -K(248,2) * [ILK_p |ILK];
  R248: ILK_p => ILK; 1;
  // V(249) = K(249,1) * [ILK_p |ILK];
  R249: ILK_p => ILK; 1;
  // V(250) = K(250,1) * [LYN_p] * [SOCS1] -K(250,2) * [LYN_p |SOCS1];
  R250: SOCS1 => LYN_p; 1;
  // V(251) = K(251,1) * [LYN_p |SOCS1];
  R251: SOCS1 => LYN_p; 1;
  // V(252) = K(252,1) * [FYN_p] * [NFE2L2] -K(252,2) * [FYN_p |NFE2L2];
  R252: FYN_p => NFE2L2; 1;
  // V(253) = K(253,1) * [FYN_p |NFE2L2];
  R253: FYN_p => NFE2L2; 1;
  // V(254) = K(254,1) * [HIPK2_p] * [MDM2] -K(254,2) * [HIPK2_p |MDM2];
  R254: HIPK2_p => MDM2; 1;
  // V(255) = K(255,1) * [HIPK2_p |MDM2];
  R255: HIPK2_p => MDM2; 1;
  // V(256) = K(256,1) * [ROCK2] * [EP300] -K(256,2) * [ROCK2 |EP300];
  R256: EP300 => ROCK2; 1;
  // V(257) = K(257,1) * [ROCK2 |EP300];
  R257: EP300 => ROCK2; 1;
  // V(258) = K(258,1) * [RPS6KB1_p] * [MAPKAP1] -K(258,2) * [RPS6KB1_p |MAPKAP1];
  R258: MAPKAP1 => RPS6KB1_p; 1;
  // V(259) = K(259,1) * [RPS6KB1_p |MAPKAP1];
  R259: MAPKAP1 => RPS6KB1_p; 1;
  // V(260) = K(260,1) * [MAPK1_p] * [STAT3] -K(260,2) * [MAPK1_p |STAT3];
  R260: STAT3 => MAPK1_p; 1;
  // V(261) = K(261,1) * [MAPK1_p |STAT3];
  R261: STAT3 => MAPK1_p; 1;
  // V(262) = K(262,1) * [AKT1_p] * [BECN1] -K(262,2) * [AKT1_p |BECN1];
  R262: BECN1 => AKT1_p; 1;
  // V(263) = K(263,1) * [AKT1_p |BECN1];
  R263: BECN1 => AKT1_p; 1;
  // V(264) = K(264,1) * [ROCK1] * [PDPK1] -K(264,2) * [ROCK1 |PDPK1];
  R264: ROCK1 => PDPK1; 1;
  // V(265) = K(265,1) * [ROCK1 |PDPK1];
  R265: ROCK1 => PDPK1; 1;
  // V(266) = K(266,1) * [IRAK1_p] * [STAT3] -K(266,2) * [IRAK1_p |STAT3];
  R266: IRAK1_p => STAT3; 1;
  // V(267) = K(267,1) * [IRAK1_p |STAT3];
  R267: IRAK1_p => STAT3; 1;
  // V(268) = K(268,1) * [RPS6KB1_p] * [PDPK1] -K(268,2) * [RPS6KB1_p |PDPK1];
  R268: PDPK1 => RPS6KB1_p; 1;
  // V(269) = K(269,1) * [RPS6KB1_p |PDPK1];
  R269: PDPK1 => RPS6KB1_p; 1;
  // V(270) = K(270,1) * [MAPK1_p] * [NR4A1] -K(270,2) * [MAPK1_p |NR4A1];
  R270: NR4A1 => MAPK1_p; 1;
  // V(271) = K(271,1) * [MAPK1_p |NR4A1];
  R271: NR4A1 => MAPK1_p; 1;
  // V(272) = K(272,1) * [JAK1_p] * [JAK3] -K(272,2) * [JAK1_p |JAK3];
  R272: JAK1_p => JAK3; 1;
  // V(273) = K(273,1) * [JAK1_p |JAK3];
  R273: JAK1_p => JAK3; 1;
  // V(274) = K(274,1) * [MAPK1_p] * [TXNIP] -K(274,2) * [MAPK1_p |TXNIP];
  R274: TXNIP => MAPK1_p; 1;
  // V(275) = K(275,1) * [MAPK1_p |TXNIP];
  R275: TXNIP => MAPK1_p; 1;
  // V(276) = K(276,1) * [MAPK9_p] * [STAT3] -K(276,2) * [MAPK9_p |STAT3];
  R276: STAT3 => MAPK9_p; 1;
  // V(277) = K(277,1) * [MAPK9_p |STAT3];
  R277: STAT3 => MAPK9_p; 1;
  // V(278) = K(278,1) * [JAK3_p] * [STAT3] -K(278,2) * [JAK3_p |STAT3];
  R278: STAT3 => JAK3_p; 1;
  // V(279) = K(279,1) * [JAK3_p |STAT3];
  R279: STAT3 => JAK3_p; 1;
  // V(280) = K(280,1) * [LYN_p] * [PTPN6] -K(280,2) * [LYN_p |PTPN6];
  R280: PTPN6 => LYN_p; 1;
  // V(281) = K(281,1) * [LYN_p |PTPN6];
  R281: PTPN6 => LYN_p; 1;
  // V(282) = K(282,1) * [PRKAA1_p] * [CDKN1B] -K(282,2) * [PRKAA1_p |CDKN1B];
  R282: CDKN1B => PRKAA1_p; 1;
  // V(283) = K(283,1) * [PRKAA1_p |CDKN1B];
  R283: CDKN1B => PRKAA1_p; 1;
  // V(284) = K(284,1) * [HIPK2_p] * [CREB1] -K(284,2) * [HIPK2_p |CREB1];
  R284: CREB1 => HIPK2_p; 1;
  // V(285) = K(285,1) * [HIPK2_p |CREB1];
  R285: CREB1 => HIPK2_p; 1;
  // V(286) = K(286,1) * [PRKAA1_p] * [TP53] -K(286,2) * [PRKAA1_p |TP53];
  R286: TP53 => PRKAA1_p; 1;
  // V(287) = K(287,1) * [PRKAA1_p |TP53];
  R287: TP53 => PRKAA1_p; 1;
  // V(288) = K(288,1) * [PTEN_p] * [RPS6KB1_p] -K(288,2) * [PTEN_p |RPS6KB1_p];
  R288: PTEN_p => RPS6KB1_p; 1;
  // V(289) = K(289,1) * [PTEN_p |RPS6KB1_p];
  R289: PTEN_p => RPS6KB1_p; 1;
  // V(290) = K(290,1) * [DUSP1_p] * [MAPK9_p] -K(290,2) * [DUSP1_p |MAPK9_p];
  R290: DUSP1_p => MAPK9_p; 1;
  // V(291) = K(291,1) * [DUSP1_p |MAPK9_p];
  R291: DUSP1_p => MAPK9_p; 1;
  // V(292) = K(292,1) * [PTPN2] * [FYN_p] -K(292,2) * [PTPN2 |FYN_p];
  R292: FYN_p => PTPN2; 1;
  // V(293) = K(293,1) * [PTPN2 |FYN_p];
  R293: FYN_p => PTPN2; 1;
  // V(294) = K(294,1) * [PTPN6_p] * [PKM_p] -K(294,2) * [PTPN6_p |PKM_p];
  R294: PTPN6_p => PKM_p; 1;
  // V(295) = K(295,1) * [PTPN6_p |PKM_p];
  R295: PTPN6_p => PKM_p; 1;
  // V(296) = K(296,1) * [DUSP1_p] * [MAPK1_p] -K(296,2) * [DUSP1_p |MAPK1_p];
  R296: DUSP1_p => MAPK1_p; 1;
  // V(297) = K(297,1) * [DUSP1_p |MAPK1_p];
  R297: DUSP1_p => MAPK1_p; 1;
  // V(298) = K(298,1) * [PTPN2] * [JAK1_p] -K(298,2) * [PTPN2 |JAK1_p];
  R298: PTPN2 => JAK1_p; 1;
  // V(299) = K(299,1) * [PTPN2 |JAK1_p];
  R299: PTPN2 => JAK1_p; 1;
  // V(300) = K(300,1) * [PTPN11_p] * [IRF8_p] -K(300,2) * [PTPN11_p |IRF8_p];
  R300: IRF8_p => PTPN11_p; 1;
  // V(301) = K(301,1) * [PTPN11_p |IRF8_p];
  R301: IRF8_p => PTPN11_p; 1;
  // V(302) = K(302,1) * [PTPN6_p] * [JAK1_p] -K(302,2) * [PTPN6_p |JAK1_p];
  R302: PTPN6_p => JAK1_p; 1;
  // V(303) = K(303,1) * [PTPN6_p |JAK1_p];
  R303: PTPN6_p => JAK1_p; 1;
  // V(304) = K(304,1) * [PTEN_p] * [SP1_p] -K(304,2) * [PTEN_p |SP1_p];
  R304: PTEN_p => SP1_p; 1;
  // V(305) = K(305,1) * [PTEN_p |SP1_p];
  R305: PTEN_p => SP1_p; 1;
  // V(306) = K(306,1) * [PTPN2] * [STAT3_p] -K(306,2) * [PTPN2 |STAT3_p];
  R306: STAT3_p => PTPN2; 1;
  // V(307) = K(307,1) * [PTPN2 |STAT3_p];
  R307: STAT3_p => PTPN2; 1;
  // V(308) = K(308,1) * [PTPN2] * [STAT6_p] -K(308,2) * [PTPN2 |STAT6_p];
  R308: STAT6_p => PTPN2; 1;
  // V(309) = K(309,1) * [PTPN2 |STAT6_p];
  R309: STAT6_p => PTPN2; 1;
  // V(310) = K(310,1) * [PTEN_p] * [PTEN_p] -K(310,2) * [PTEN_p |PTEN_p];
  R310: PTEN_p => ; 1;
  // V(311) = K(311,1) * [PTEN_p |PTEN_p];
  R311: PTEN_p => ; 1;
  // V(312) = K(312,1) * [PTPN2] * [STAT1_p] -K(312,2) * [PTPN2 |STAT1_p];
  R312: STAT1_p => PTPN2; 1;
  // V(313) = K(313,1) * [PTPN2 |STAT1_p];
  R313: STAT1_p => PTPN2; 1;
  // V(314) = K(314,1) * [PTPN11_p] * [CDKN1B_p] -K(314,2) * [PTPN11_p |CDKN1B_p];
  R314: PTPN11_p => CDKN1B_p; 1;
  // V(315) = K(315,1) * [PTPN11_p |CDKN1B_p];
  R315: PTPN11_p => CDKN1B_p; 1;
  // V(316) = K(316,1) * [PTPN6_p] * [STAT3_p] -K(316,2) * [PTPN6_p |STAT3_p];
  R316: PTPN6_p => STAT3_p; 1;
  // V(317) = K(317,1) * [PTPN6_p |STAT3_p];
  R317: PTPN6_p => STAT3_p; 1;
  // V(318) = K(318,1) * [PTPN11_p] * [STAT1_p] -K(318,2) * [PTPN11_p |STAT1_p];
  R318: STAT1_p => PTPN11_p; 1;
  // V(319) = K(319,1) * [PTPN11_p |STAT1_p];
  R319: STAT1_p => PTPN11_p; 1;
  // V(320) = K(320,1) * [PTEN_p] * [CREB1_p] -K(320,2) * [PTEN_p |CREB1_p];
  R320: PTEN_p => CREB1_p; 1;
  // V(321) = K(321,1) * [PTEN_p |CREB1_p];
  R321: PTEN_p => CREB1_p; 1;
  // V(322) = K(322,1) * [DUSP1_p] * [JUN_p] -K(322,2) * [DUSP1_p |JUN_p];
  R322: JUN_p => DUSP1_p; 1;
  // V(323) = K(323,1) * [DUSP1_p |JUN_p];
  R323: JUN_p => DUSP1_p; 1;
  // V(324) = K(324,1) * [PTPN6_p] * [CTNNB1_p] -K(324,2) * [PTPN6_p |CTNNB1_p];
  R324: PTPN6_p => CTNNB1_p; 1;
  // V(325) = K(325,1) * [PTPN6_p |CTNNB1_p];
  R325: PTPN6_p => CTNNB1_p; 1;
  // V(326) = K(326,1) * [PTPN11_p] * [STAT3_p] -K(326,2) * [PTPN11_p |STAT3_p];
  R326: STAT3_p => PTPN11_p; 1;
  // V(327) = K(327,1) * [PTPN11_p |STAT3_p];
  R327: STAT3_p => PTPN11_p; 1;
  // V(328) = K(328,1) * [PTPN6_p] * [LYN_p] -K(328,2) * [PTPN6_p |LYN_p];
  R328: PTPN6_p => LYN_p; 1;
  // V(329) = K(329,1) * [PTPN6_p |LYN_p];
  R329: PTPN6_p => LYN_p; 1;
  // V(330) = K(330,1) * [PTPN2] * [JAK3_p] -K(330,2) * [PTPN2 |JAK3_p];
  R330: PTPN2 => JAK3_p; 1;
  // V(331) = K(331,1) * [PTPN2 |JAK3_p];
  R331: PTPN2 => JAK3_p; 1;
  // V(332) = K(332,1) * [PTPN6_p] * [JAK3_p] -K(332,2) * [PTPN6_p |JAK3_p];
  R332: PTPN6_p => JAK3_p; 1;
  // V(333) = K(333,1) * [PTPN6_p |JAK3_p];
  R333: PTPN6_p => JAK3_p; 1;
  // V(334) = K(334,1) * [MDM2_p] * [IRF1] -K(334,2) * [MDM2_p |IRF1];
  R334: IRF1 => MDM2_p; 1;
  // V(335) = K(335,1) * [MDM2_p |IRF1];
  R335: IRF1 => MDM2_p; 1;
  // V(336) = K(336,1) * [MDM2_p] * [HIF1A] -K(336,2) * [MDM2_p |HIF1A];
  R336: HIF1A => MDM2_p; 1;
  // V(337) = K(337,1) * [MDM2_p |HIF1A];
  R337: HIF1A => MDM2_p; 1;
  // V(338) = K(338,1) * [MDM2_p] * [NOTCH1] -K(338,2) * [MDM2_p |NOTCH1];
  R338: MDM2_p => NOTCH1; 1;
  // V(339) = K(339,1) * [MDM2_p |NOTCH1];
  R339: MDM2_p => NOTCH1; 1;
  // V(340) = K(340,1) * [RNF7] * [HIF1A] -K(340,2) * [RNF7 |HIF1A];
  R340: HIF1A => RNF7; 1;
  // V(341) = K(341,1) * [RNF7 |HIF1A];
  R341: HIF1A => RNF7; 1;
  // V(342) = K(342,1) * [MDM2_p] * [NUMB] -K(342,2) * [MDM2_p |NUMB];
  R342: MDM2_p => NUMB; 1;
  // V(343) = K(343,1) * [MDM2_p |NUMB];
  R343: MDM2_p => NUMB; 1;
  // V(344) = K(344,1) * [RNF7] * [CDKN1B] -K(344,2) * [RNF7 |CDKN1B];
  R344: CDKN1B => RNF7; 1;
  // V(345) = K(345,1) * [RNF7 |CDKN1B];
  R345: CDKN1B => RNF7; 1;
  // V(346) = K(346,1) * [MDM2_p] * [TP53] -K(346,2) * [MDM2_p |TP53];
  R346: TP53 => MDM2_p; 1;
  // V(347) = K(347,1) * [MDM2_p |TP53];
  R347: TP53 => MDM2_p; 1;
  // V(348) = K(348,1) * [MDM2_p] * [HDAC1] -K(348,2) * [MDM2_p |HDAC1];
  R348: MDM2_p => HDAC1; 1;
  // V(349) = K(349,1) * [MDM2_p |HDAC1];
  R349: MDM2_p => HDAC1; 1;
  // V(350) = K(350,1) * [MYLIP] * [MYLIP] -K(350,2) * [MYLIP |MYLIP];
  R350: MYLIP => ; 1;
  // V(351) = K(351,1) * [MYLIP |MYLIP];
  R351: MYLIP => ; 1;
  // V(352) = K(352,1) * [CUL3] * [RHOA] -K(352,2) * [CUL3 |RHOA];
  R352: RHOA => CUL3; 1;
  // V(353) = K(353,1) * [CUL3 |RHOA];
  R353: RHOA => CUL3; 1;
  // V(354) = K(354,1) * [RNF7] * [JUN] -K(354,2) * [RNF7 |JUN];
  R354: JUN => RNF7; 1;
  // V(355) = K(355,1) * [RNF7 |JUN];
  R355: JUN => RNF7; 1;
  // V(356) = K(356,1) * [NUMB] * [NOTCH1] -K(356,2) * [NUMB |NOTCH1];
  R356: NOTCH1 => NUMB; 1;
  // V(357) = K(357,1) * [NUMB |NOTCH1];
  R357: NOTCH1 => NUMB; 1;
  // V(358) = K(358,1) * [RNF7] * [CASP3] -K(358,2) * [RNF7 |CASP3];
  R358: RNF7 => CASP3; 1;
  // V(359) = K(359,1) * [RNF7 |CASP3];
  R359: RNF7 => CASP3; 1;
  // V(360) = K(360,1) * [JUN_p] * [SP1_p] * [TGFB1_g] -K(360,2) * [JUN_p |SP1_p |TGFB1_g];
  R360: SP1_p => TGFB1_g; 1;
  // V(361) = K(361,1) * [JUN_p |SP1_p |TGFB1_g];
  R361: SP1_p => TGFB1_g; 1;
  // V(362) = K(362,1) * [TGFB1_rna];
  R362: TGFB1_rna => ; 1;
  // V(363) = K(363,1) * [NFE2L2_p] * [SOD1_g] -K(363,2) * [NFE2L2_p |SOD1_g];
  R363: SOD1_g => NFE2L2_p; 1;
  // V(364) = K(364,1) * [NFE2L2_p |SOD1_g];
  R364: SOD1_g => NFE2L2_p; 1;
  // V(365) = K(365,1) * [SOD1_rna];
  R365: SOD1_rna => ; 1;
  // V(366) = K(366,1) * [NFE2L2_p] * [CAT_g] -K(366,2) * [NFE2L2_p |CAT_g];
  R366: CAT_g => NFE2L2_p; 1;
  // V(367) = K(367,1) * [NFE2L2_p |CAT_g];
  R367: CAT_g => NFE2L2_p; 1;
  // V(368) = K(368,1) * [CAT_rna];
  R368: CAT_rna => ; 1;
  // V(369) = K(369,1) * [HIF1A_p] * [KDM6B_g] -K(369,2) * [HIF1A_p |KDM6B_g];
  R369: KDM6B_g => HIF1A_p; 1;
  // V(370) = K(370,1) * [HIF1A_p |KDM6B_g];
  R370: KDM6B_g => HIF1A_p; 1;
  // V(371) = K(371,1) * [KDM6B_rna];
  R371: KDM6B_rna => ; 1;
  // V(372) = K(372,1) * [NFE2L2_p] * [GPX4_g] -K(372,2) * [NFE2L2_p |GPX4_g];
  R372: GPX4_g => NFE2L2_p; 1;
  // V(373) = K(373,1) * [NFE2L2_p |GPX4_g];
  R373: GPX4_g => NFE2L2_p; 1;
  // V(374) = K(374,1) * [GPX4_rna];
  R374: GPX4_rna => ; 1;
  // V(375) = K(375,1) * [STAT6_p] * [SOCS1_g] -K(375,2) * [STAT6_p |SOCS1_g];
  R375: STAT6_p => SOCS1_g; 1;
  // V(376) = K(376,1) * [STAT6_p |SOCS1_g];
  R376: STAT6_p => SOCS1_g; 1;
  // V(377) = K(377,1) * [SOCS1_rna];
  R377: SOCS1_rna => ; 1;
  // V(378) = K(378,1) * [NFE2L2_p] * [GCLM_g] -K(378,2) * [NFE2L2_p |GCLM_g];
  R378: GCLM_g => NFE2L2_p; 1;
  // V(379) = K(379,1) * [NFE2L2_p |GCLM_g];
  R379: GCLM_g => NFE2L2_p; 1;
  // V(380) = K(380,1) * [GCLM_rna];
  R380: GCLM_rna => ; 1;
  // V(381) = K(381,1) * [TP53_p] * [AIFM1_g] -K(381,2) * [TP53_p |AIFM1_g];
  R381: AIFM1_g => TP53_p; 1;
  // V(382) = K(382,1) * [TP53_p |AIFM1_g];
  R382: AIFM1_g => TP53_p; 1;
  // V(383) = K(383,1) * [AIFM1_rna];
  R383: AIFM1_rna => ; 1;
  // V(384) = K(384,1) * [NFE2L2_p] * [GSTA1_g] -K(384,2) * [NFE2L2_p |GSTA1_g];
  R384: GSTA1_g => NFE2L2_p; 1;
  // V(385) = K(385,1) * [NFE2L2_p |GSTA1_g];
  R385: GSTA1_g => NFE2L2_p; 1;
  // V(386) = K(386,1) * [GSTA1_rna];
  R386: GSTA1_rna => ; 1;
  // V(387) = K(387,1) * [NFE2L2_p] * [SOD2_g] -K(387,2) * [NFE2L2_p |SOD2_g];
  R387: SOD2_g => NFE2L2_p; 1;
  // V(388) = K(388,1) * [NFE2L2_p |SOD2_g];
  R388: SOD2_g => NFE2L2_p; 1;
  // V(389) = K(389,1) * [SOD2_rna];
  R389: SOD2_rna => ; 1;
  // V(390) = K(390,1) * [TFEB] * [BECN1_g] -K(390,2) * [TFEB |BECN1_g];
  R390: TFEB => BECN1_g; 1;
  // V(391) = K(391,1) * [TFEB |BECN1_g];
  R391: TFEB => BECN1_g; 1;
  // V(392) = K(392,1) * [BECN1_rna];
  R392: BECN1_rna => ; 1;
  // V(393) = K(393,1) * [STAT3_p] * [STAT1_g] -K(393,2) * [STAT3_p |STAT1_g];
  R393: STAT3_p => STAT1_g; 1;
  // V(394) = K(394,1) * [STAT3_p |STAT1_g];
  R394: STAT3_p => STAT1_g; 1;
  // V(395) = K(395,1) * [STAT1_rna];
  R395: STAT1_rna => ; 1;
  // V(396) = K(396,1) * [ETS1] * [FOS_g] -K(396,2) * [ETS1 |FOS_g];
  R396: FOS_g => ETS1; 1;
  // V(397) = K(397,1) * [ETS1 |FOS_g];
  R397: FOS_g => ETS1; 1;
  // V(398) = K(398,1) * [FOS_rna];
  R398: FOS_rna => ; 1;
  // V(399) = K(399,1) * [DNM1L];
  R399: DNM1L => ; 1;
  // V(400) = K(400,1) * [KDM6B];
  R400: KDM6B => ; 1;
  // V(401) = K(401,1) * [SOCS1];
  R401: SOCS1 => ; 1;
  // V(402) = K(402,1) * [PDPK1];
  R402: PDPK1 => ; 1;
  // V(403) = K(403,1) * [ROCK2];
  R403: ROCK2 => ; 1;
  // V(404) = K(404,1) * [ERN1];
  R404: ERN1 => ; 1;
  // V(405) = K(405,1) * [AIFM1];
  R405: AIFM1 => ; 1;
  // V(406) = K(406,1) * [SOD1];
  R406: SOD1 => ; 1;
  // V(407) = K(407,1) * [FOS];
  R407: FOS => ; 1;
  // V(408) = K(408,1) * [TGFB1];
  R408: TGFB1 => ; 1;
  // V(409) = K(409,1) * [CAT];
  R409: CAT => ; 1;
  // V(410) = K(410,1) * [SOD2];
  R410: SOD2 => ; 1;
  // V(411) = K(411,1) * [TP53];
  R411: TP53 => ; 1;
  // V(412) = K(412,1) * [HSPB1];
  R412: HSPB1 => ; 1;
  // V(413) = K(413,1) * [HMGN1];
  R413: HMGN1 => ; 1;
  // V(414) = K(414,1) * [JUN];
  R414: JUN => ; 1;
  // V(415) = K(415,1) * [FYN];
  R415: FYN => ; 1;
  // V(416) = K(416,1) * [LYN];
  R416: LYN => ; 1;
  // V(417) = K(417,1) * [SP1];
  R417: SP1 => ; 1;
  // V(418) = K(418,1) * [GSTA1];
  R418: GSTA1 => ; 1;
  // V(419) = K(419,1) * [VIM];
  R419: VIM => ; 1;
  // V(420) = K(420,1) * [PARP1];
  R420: PARP1 => ; 1;
  // V(421) = K(421,1) * [BCL2];
  R421: BCL2 => ; 1;
  // V(422) = K(422,1) * [IRF1];
  R422: IRF1 => ; 1;
  // V(423) = K(423,1) * [NCF1];
  R423: NCF1 => ; 1;
  // V(424) = K(424,1) * [PKM];
  R424: PKM => ; 1;
  // V(425) = K(425,1) * [ETS1];
  R425: ETS1 => ; 1;
  // V(426) = K(426,1) * [CREB1];
  R426: CREB1 => ; 1;
  // V(427) = K(427,1) * [PTPN2];
  R427: PTPN2 => ; 1;
  // V(428) = K(428,1) * [XBP1];
  R428: XBP1 => ; 1;
  // V(429) = K(429,1) * [TFEB];
  R429: TFEB => ; 1;
  // V(430) = K(430,1) * [NFKB1];
  R430: NFKB1 => ; 1;
  // V(431) = K(431,1) * [NR4A1];
  R431: NR4A1 => ; 1;
  // V(432) = K(432,1) * [RPS6KB1];
  R432: RPS6KB1 => ; 1;
  // V(433) = K(433,1) * [JAK1];
  R433: JAK1 => ; 1;
  // V(434) = K(434,1) * [F2R];
  R434: F2R => ; 1;
  // V(435) = K(435,1) * [DNMT1];
  R435: DNMT1 => ; 1;
  // V(436) = K(436,1) * [ZFP36];
  R436: ZFP36 => ; 1;
  // V(437) = K(437,1) * [MAPK1];
  R437: MAPK1 => ; 1;
  // V(438) = K(438,1) * [DUSP1];
  R438: DUSP1 => ; 1;
  // V(439) = K(439,1) * [PTPN6];
  R439: PTPN6 => ; 1;
  // V(440) = K(440,1) * [PRDX6];
  R440: PRDX6 => ; 1;
  // V(441) = K(441,1) * [AKT1];
  R441: AKT1 => ; 1;
  // V(442) = K(442,1) * [CTNNB1];
  R442: CTNNB1 => ; 1;
  // V(443) = K(443,1) * [RORA];
  R443: RORA => ; 1;
  // V(444) = K(444,1) * [DDIT3];
  R444: DDIT3 => ; 1;
  // V(445) = K(445,1) * [TGFBR1];
  R445: TGFBR1 => ; 1;
  // V(446) = K(446,1) * [GPX4];
  R446: GPX4 => ; 1;
  // V(447) = K(447,1) * [STAT3];
  R447: STAT3 => ; 1;
  // V(448) = K(448,1) * [STAT1];
  R448: STAT1 => ; 1;
  // V(449) = K(449,1) * [STAT6];
  R449: STAT6 => ; 1;
  // V(450) = K(450,1) * [CASP3];
  R450: CASP3 => ; 1;
  // V(451) = K(451,1) * [MAPK9];
  R451: MAPK9 => ; 1;
  // V(452) = K(452,1) * [CDKN1B];
  R452: CDKN1B => ; 1;
  // V(453) = K(453,1) * [NOTCH1];
  R453: NOTCH1 => ; 1;
  // V(454) = K(454,1) * [GCLM];
  R454: GCLM => ; 1;
  // V(455) = K(455,1) * [NUMB];
  R455: NUMB => ; 1;
  // V(456) = K(456,1) * [IRAK1];
  R456: IRAK1 => ; 1;
  // V(457) = K(457,1) * [RPS6KA3];
  R457: RPS6KA3 => ; 1;
  // V(458) = K(458,1) * [JAK3];
  R458: JAK3 => ; 1;
  // V(459) = K(459,1) * [PTEN];
  R459: PTEN => ; 1;
  // V(460) = K(460,1) * [RHOA];
  R460: RHOA => ; 1;
  // V(461) = K(461,1) * [RAC1];
  R461: RAC1 => ; 1;
  // V(462) = K(462,1) * [MDM2];
  R462: MDM2 => ; 1;
  // V(463) = K(463,1) * [IRF8];
  R463: IRF8 => ; 1;
  // V(464) = K(464,1) * [RELA];
  R464: RELA => ; 1;
  // V(465) = K(465,1) * [GLO1];
  R465: GLO1 => ; 1;
  // V(466) = K(466,1) * [PTPN11];
  R466: PTPN11 => ; 1;
  // V(467) = K(467,1) * [PRDX1];
  R467: PRDX1 => ; 1;
  // V(468) = K(468,1) * [EP300];
  R468: EP300 => ; 1;
  // V(469) = K(469,1) * [STK4];
  R469: STK4 => ; 1;
  // V(470) = K(470,1) * [PRKAA1];
  R470: PRKAA1 => ; 1;
  // V(471) = K(471,1) * [ILK];
  R471: ILK => ; 1;
  // V(472) = K(472,1) * [ROCK1];
  R472: ROCK1 => ; 1;
  // V(473) = K(473,1) * [SMAD4];
  R473: SMAD4 => ; 1;
  // V(474) = K(474,1) * [HDAC1];
  R474: HDAC1 => ; 1;
  // V(475) = K(475,1) * [STIM1];
  R475: STIM1 => ; 1;
  // V(476) = K(476,1) * [CUL3];
  R476: CUL3 => ; 1;
  // V(477) = K(477,1) * [BECN1];
  R477: BECN1 => ; 1;
  // V(478) = K(478,1) * [SMAD2];
  R478: SMAD2 => ; 1;
  // V(479) = K(479,1) * [STK11];
  R479: STK11 => ; 1;
  // V(480) = K(480,1) * [NFE2L2];
  R480: NFE2L2 => ; 1;
  // V(481) = K(481,1) * [PKN1];
  R481: PKN1 => ; 1;
  // V(482) = K(482,1) * [HIF1A];
  R482: HIF1A => ; 1;
  // V(483) = K(483,1) * [RICTOR];
  R483: RICTOR => ; 1;
  // V(484) = K(484,1) * [MYLIP];
  R484: MYLIP => ; 1;
  // V(485) = K(485,1) * [BAD];
  R485: BAD => ; 1;
  // V(486) = K(486,1) * [SIRT1];
  R486: SIRT1 => ; 1;
  // V(487) = K(487,1) * [PARK7];
  R487: PARK7 => ; 1;
  // V(488) = K(488,1) * [MAPKAP1];
  R488: MAPKAP1 => ; 1;
  // V(489) = K(489,1) * [MFF];
  R489: MFF => ; 1;
  // V(490) = K(490,1) * [HIPK2];
  R490: HIPK2 => ; 1;
  // V(491) = K(491,1) * [TXNIP];
  R491: TXNIP => ; 1;
  // V(492) = K(492,1) * [SIRT7];
  R492: SIRT7 => ; 1;
  // V(493) = K(493,1) * [RNF7];
  R493: RNF7 => ; 1;
  // V(494) = K(494,1) * [KDM6B_rna];
  R494: KDM6B_rna => ; 1;
  // V(495) = K(495,1) * [SOCS1_rna];
  R495: SOCS1_rna => ; 1;
  // V(496) = K(496,1) * [AIFM1_rna];
  R496: AIFM1_rna => ; 1;
  // V(497) = K(497,1) * [SOD1_rna];
  R497: SOD1_rna => ; 1;
  // V(498) = K(498,1) * [FOS_rna];
  R498: FOS_rna => ; 1;
  // V(499) = K(499,1) * [TGFB1_rna];
  R499: TGFB1_rna => ; 1;
  // V(500) = K(500,1) * [CAT_rna];
  R500: CAT_rna => ; 1;
  // V(501) = K(501,1) * [SOD2_rna];
  R501: SOD2_rna => ; 1;
  // V(502) = K(502,1) * [GSTA1_rna];
  R502: GSTA1_rna => ; 1;
  // V(503) = K(503,1) * [GPX4_rna];
  R503: GPX4_rna => ; 1;
  // V(504) = K(504,1) * [STAT1_rna];
  R504: STAT1_rna => ; 1;
  // V(505) = K(505,1) * [GCLM_rna];
  R505: GCLM_rna => ; 1;
  // V(506) = K(506,1) * [BECN1_rna];
  R506: BECN1_rna => ; 1;
  // V(507) = K(507,1) * [DNM1L_g];
  R507: DNM1L_g => ; 1;
  // V(508) = K(508,1) * [DNM1L_rna];
  R508: DNM1L_rna => ; 1;
  // V(509) = K(509,1) * [PDPK1_g];
  R509: PDPK1_g => ; 1;
  // V(510) = K(510,1) * [PDPK1_rna];
  R510: PDPK1_rna => ; 1;
  // V(511) = K(511,1) * [ROCK2_g];
  R511: ROCK2_g => ; 1;
  // V(512) = K(512,1) * [ROCK2_rna];
  R512: ROCK2_rna => ; 1;
  // V(513) = K(513,1) * [ERN1_g];
  R513: ERN1_g => ; 1;
  // V(514) = K(514,1) * [ERN1_rna];
  R514: ERN1_rna => ; 1;
  // V(515) = K(515,1) * [TP53_g];
  R515: TP53_g => ; 1;
  // V(516) = K(516,1) * [TP53_rna];
  R516: TP53_rna => ; 1;
  // V(517) = K(517,1) * [HSPB1_g];
  R517: HSPB1_g => ; 1;
  // V(518) = K(518,1) * [HSPB1_rna];
  R518: HSPB1_rna => ; 1;
  // V(519) = K(519,1) * [HMGN1_g];
  R519: HMGN1_g => ; 1;
  // V(520) = K(520,1) * [HMGN1_rna];
  R520: HMGN1_rna => ; 1;
  // V(521) = K(521,1) * [JUN_g];
  R521: JUN_g => ; 1;
  // V(522) = K(522,1) * [JUN_rna];
  R522: JUN_rna => ; 1;
  // V(523) = K(523,1) * [FYN_g];
  R523: FYN_g => ; 1;
  // V(524) = K(524,1) * [FYN_rna];
  R524: FYN_rna => ; 1;
  // V(525) = K(525,1) * [LYN_g];
  R525: LYN_g => ; 1;
  // V(526) = K(526,1) * [LYN_rna];
  R526: LYN_rna => ; 1;
  // V(527) = K(527,1) * [SP1_g];
  R527: SP1_g => ; 1;
  // V(528) = K(528,1) * [SP1_rna];
  R528: SP1_rna => ; 1;
  // V(529) = K(529,1) * [VIM_g];
  R529: VIM_g => ; 1;
  // V(530) = K(530,1) * [VIM_rna];
  R530: VIM_rna => ; 1;
  // V(531) = K(531,1) * [PARP1_g];
  R531: PARP1_g => ; 1;
  // V(532) = K(532,1) * [PARP1_rna];
  R532: PARP1_rna => ; 1;
  // V(533) = K(533,1) * [BCL2_g];
  R533: BCL2_g => ; 1;
  // V(534) = K(534,1) * [BCL2_rna];
  R534: BCL2_rna => ; 1;
  // V(535) = K(535,1) * [IRF1_g];
  R535: IRF1_g => ; 1;
  // V(536) = K(536,1) * [IRF1_rna];
  R536: IRF1_rna => ; 1;
  // V(537) = K(537,1) * [NCF1_g];
  R537: NCF1_g => ; 1;
  // V(538) = K(538,1) * [NCF1_rna];
  R538: NCF1_rna => ; 1;
  // V(539) = K(539,1) * [PKM_g];
  R539: PKM_g => ; 1;
  // V(540) = K(540,1) * [PKM_rna];
  R540: PKM_rna => ; 1;
  // V(541) = K(541,1) * [ETS1_g];
  R541: ETS1_g => ; 1;
  // V(542) = K(542,1) * [ETS1_rna];
  R542: ETS1_rna => ; 1;
  // V(543) = K(543,1) * [CREB1_g];
  R543: CREB1_g => ; 1;
  // V(544) = K(544,1) * [CREB1_rna];
  R544: CREB1_rna => ; 1;
  // V(545) = K(545,1) * [PTPN2_g];
  R545: PTPN2_g => ; 1;
  // V(546) = K(546,1) * [PTPN2_rna];
  R546: PTPN2_rna => ; 1;
  // V(547) = K(547,1) * [XBP1_g];
  R547: XBP1_g => ; 1;
  // V(548) = K(548,1) * [XBP1_rna];
  R548: XBP1_rna => ; 1;
  // V(549) = K(549,1) * [TFEB_g];
  R549: TFEB_g => ; 1;
  // V(550) = K(550,1) * [TFEB_rna];
  R550: TFEB_rna => ; 1;
  // V(551) = K(551,1) * [NFKB1_g];
  R551: NFKB1_g => ; 1;
  // V(552) = K(552,1) * [NFKB1_rna];
  R552: NFKB1_rna => ; 1;
  // V(553) = K(553,1) * [NR4A1_g];
  R553: NR4A1_g => ; 1;
  // V(554) = K(554,1) * [NR4A1_rna];
  R554: NR4A1_rna => ; 1;
  // V(555) = K(555,1) * [RPS6KB1_g];
  R555: RPS6KB1_g => ; 1;
  // V(556) = K(556,1) * [RPS6KB1_rna];
  R556: RPS6KB1_rna => ; 1;
  // V(557) = K(557,1) * [JAK1_g];
  R557: JAK1_g => ; 1;
  // V(558) = K(558,1) * [JAK1_rna];
  R558: JAK1_rna => ; 1;
  // V(559) = K(559,1) * [F2R_g];
  R559: F2R_g => ; 1;
  // V(560) = K(560,1) * [F2R_rna];
  R560: F2R_rna => ; 1;
  // V(561) = K(561,1) * [DNMT1_g];
  R561: DNMT1_g => ; 1;
  // V(562) = K(562,1) * [DNMT1_rna];
  R562: DNMT1_rna => ; 1;
  // V(563) = K(563,1) * [ZFP36_g];
  R563: ZFP36_g => ; 1;
  // V(564) = K(564,1) * [ZFP36_rna];
  R564: ZFP36_rna => ; 1;
  // V(565) = K(565,1) * [MAPK1_g];
  R565: MAPK1_g => ; 1;
  // V(566) = K(566,1) * [MAPK1_rna];
  R566: MAPK1_rna => ; 1;
  // V(567) = K(567,1) * [DUSP1_g];
  R567: DUSP1_g => ; 1;
  // V(568) = K(568,1) * [DUSP1_rna];
  R568: DUSP1_rna => ; 1;
  // V(569) = K(569,1) * [PTPN6_g];
  R569: PTPN6_g => ; 1;
  // V(570) = K(570,1) * [PTPN6_rna];
  R570: PTPN6_rna => ; 1;
  // V(571) = K(571,1) * [PRDX6_g];
  R571: PRDX6_g => ; 1;
  // V(572) = K(572,1) * [PRDX6_rna];
  R572: PRDX6_rna => ; 1;
  // V(573) = K(573,1) * [AKT1_g];
  R573: AKT1_g => ; 1;
  // V(574) = K(574,1) * [AKT1_rna];
  R574: AKT1_rna => ; 1;
  // V(575) = K(575,1) * [CTNNB1_g];
  R575: CTNNB1_g => ; 1;
  // V(576) = K(576,1) * [CTNNB1_rna];
  R576: CTNNB1_rna => ; 1;
  // V(577) = K(577,1) * [RORA_g];
  R577: RORA_g => ; 1;
  // V(578) = K(578,1) * [RORA_rna];
  R578: RORA_rna => ; 1;
  // V(579) = K(579,1) * [DDIT3_g];
  R579: DDIT3_g => ; 1;
  // V(580) = K(580,1) * [DDIT3_rna];
  R580: DDIT3_rna => ; 1;
  // V(581) = K(581,1) * [TGFBR1_g];
  R581: TGFBR1_g => ; 1;
  // V(582) = K(582,1) * [TGFBR1_rna];
  R582: TGFBR1_rna => ; 1;
  // V(583) = K(583,1) * [STAT3_g];
  R583: STAT3_g => ; 1;
  // V(584) = K(584,1) * [STAT3_rna];
  R584: STAT3_rna => ; 1;
  // V(585) = K(585,1) * [STAT6_g];
  R585: STAT6_g => ; 1;
  // V(586) = K(586,1) * [STAT6_rna];
  R586: STAT6_rna => ; 1;
  // V(587) = K(587,1) * [CASP3_g];
  R587: CASP3_g => ; 1;
  // V(588) = K(588,1) * [CASP3_rna];
  R588: CASP3_rna => ; 1;
  // V(589) = K(589,1) * [MAPK9_g];
  R589: MAPK9_g => ; 1;
  // V(590) = K(590,1) * [MAPK9_rna];
  R590: MAPK9_rna => ; 1;
  // V(591) = K(591,1) * [CDKN1B_g];
  R591: CDKN1B_g => ; 1;
  // V(592) = K(592,1) * [CDKN1B_rna];
  R592: CDKN1B_rna => ; 1;
  // V(593) = K(593,1) * [NOTCH1_g];
  R593: NOTCH1_g => ; 1;
  // V(594) = K(594,1) * [NOTCH1_rna];
  R594: NOTCH1_rna => ; 1;
  // V(595) = K(595,1) * [NUMB_g];
  R595: NUMB_g => ; 1;
  // V(596) = K(596,1) * [NUMB_rna];
  R596: NUMB_rna => ; 1;
  // V(597) = K(597,1) * [IRAK1_g];
  R597: IRAK1_g => ; 1;
  // V(598) = K(598,1) * [IRAK1_rna];
  R598: IRAK1_rna => ; 1;
  // V(599) = K(599,1) * [RPS6KA3_g];
  R599: RPS6KA3_g => ; 1;
  // V(600) = K(600,1) * [RPS6KA3_rna];
  R600: RPS6KA3_rna => ; 1;
  // V(601) = K(601,1) * [JAK3_g];
  R601: JAK3_g => ; 1;
  // V(602) = K(602,1) * [JAK3_rna];
  R602: JAK3_rna => ; 1;
  // V(603) = K(603,1) * [PTEN_g];
  R603: PTEN_g => ; 1;
  // V(604) = K(604,1) * [PTEN_rna];
  R604: PTEN_rna => ; 1;
  // V(605) = K(605,1) * [RHOA_g];
  R605: RHOA_g => ; 1;
  // V(606) = K(606,1) * [RHOA_rna];
  R606: RHOA_rna => ; 1;
  // V(607) = K(607,1) * [RAC1_g];
  R607: RAC1_g => ; 1;
  // V(608) = K(608,1) * [RAC1_rna];
  R608: RAC1_rna => ; 1;
  // V(609) = K(609,1) * [MDM2_g];
  R609: MDM2_g => ; 1;
  // V(610) = K(610,1) * [MDM2_rna];
  R610: MDM2_rna => ; 1;
  // V(611) = K(611,1) * [IRF8_g];
  R611: IRF8_g => ; 1;
  // V(612) = K(612,1) * [IRF8_rna];
  R612: IRF8_rna => ; 1;
  // V(613) = K(613,1) * [RELA_g];
  R613: RELA_g => ; 1;
  // V(614) = K(614,1) * [RELA_rna];
  R614: RELA_rna => ; 1;
  // V(615) = K(615,1) * [GLO1_g];
  R615: GLO1_g => ; 1;
  // V(616) = K(616,1) * [GLO1_rna];
  R616: GLO1_rna => ; 1;
  // V(617) = K(617,1) * [PTPN11_g];
  R617: PTPN11_g => ; 1;
  // V(618) = K(618,1) * [PTPN11_rna];
  R618: PTPN11_rna => ; 1;
  // V(619) = K(619,1) * [PRDX1_g];
  R619: PRDX1_g => ; 1;
  // V(620) = K(620,1) * [PRDX1_rna];
  R620: PRDX1_rna => ; 1;
  // V(621) = K(621,1) * [EP300_g];
  R621: EP300_g => ; 1;
  // V(622) = K(622,1) * [EP300_rna];
  R622: EP300_rna => ; 1;
  // V(623) = K(623,1) * [STK4_g];
  R623: STK4_g => ; 1;
  // V(624) = K(624,1) * [STK4_rna];
  R624: STK4_rna => ; 1;
  // V(625) = K(625,1) * [PRKAA1_g];
  R625: PRKAA1_g => ; 1;
  // V(626) = K(626,1) * [PRKAA1_rna];
  R626: PRKAA1_rna => ; 1;
  // V(627) = K(627,1) * [ILK_g];
  R627: ILK_g => ; 1;
  // V(628) = K(628,1) * [ILK_rna];
  R628: ILK_rna => ; 1;
  // V(629) = K(629,1) * [ROCK1_g];
  R629: ROCK1_g => ; 1;
  // V(630) = K(630,1) * [ROCK1_rna];
  R630: ROCK1_rna => ; 1;
  // V(631) = K(631,1) * [SMAD4_g];
  R631: SMAD4_g => ; 1;
  // V(632) = K(632,1) * [SMAD4_rna];
  R632: SMAD4_rna => ; 1;
  // V(633) = K(633,1) * [HDAC1_g];
  R633: HDAC1_g => ; 1;
  // V(634) = K(634,1) * [HDAC1_rna];
  R634: HDAC1_rna => ; 1;
  // V(635) = K(635,1) * [STIM1_g];
  R635: STIM1_g => ; 1;
  // V(636) = K(636,1) * [STIM1_rna];
  R636: STIM1_rna => ; 1;
  // V(637) = K(637,1) * [CUL3_g];
  R637: CUL3_g => ; 1;
  // V(638) = K(638,1) * [CUL3_rna];
  R638: CUL3_rna => ; 1;
  // V(639) = K(639,1) * [SMAD2_g];
  R639: SMAD2_g => ; 1;
  // V(640) = K(640,1) * [SMAD2_rna];
  R640: SMAD2_rna => ; 1;
  // V(641) = K(641,1) * [STK11_g];
  R641: STK11_g => ; 1;
  // V(642) = K(642,1) * [STK11_rna];
  R642: STK11_rna => ; 1;
  // V(643) = K(643,1) * [NFE2L2_g];
  R643: NFE2L2_g => ; 1;
  // V(644) = K(644,1) * [NFE2L2_rna];
  R644: NFE2L2_rna => ; 1;
  // V(645) = K(645,1) * [PKN1_g];
  R645: PKN1_g => ; 1;
  // V(646) = K(646,1) * [PKN1_rna];
  R646: PKN1_rna => ; 1;
  // V(647) = K(647,1) * [HIF1A_g];
  R647: HIF1A_g => ; 1;
  // V(648) = K(648,1) * [HIF1A_rna];
  R648: HIF1A_rna => ; 1;
  // V(649) = K(649,1) * [RICTOR_g];
  R649: RICTOR_g => ; 1;
  // V(650) = K(650,1) * [RICTOR_rna];
  R650: RICTOR_rna => ; 1;
  // V(651) = K(651,1) * [MYLIP_g];
  R651: MYLIP_g => ; 1;
  // V(652) = K(652,1) * [MYLIP_rna];
  R652: MYLIP_rna => ; 1;
  // V(653) = K(653,1) * [BAD_g];
  R653: BAD_g => ; 1;
  // V(654) = K(654,1) * [BAD_rna];
  R654: BAD_rna => ; 1;
  // V(655) = K(655,1) * [SIRT1_g];
  R655: SIRT1_g => ; 1;
  // V(656) = K(656,1) * [SIRT1_rna];
  R656: SIRT1_rna => ; 1;
  // V(657) = K(657,1) * [PARK7_g];
  R657: PARK7_g => ; 1;
  // V(658) = K(658,1) * [PARK7_rna];
  R658: PARK7_rna => ; 1;
  // V(659) = K(659,1) * [MAPKAP1_g];
  R659: MAPKAP1_g => ; 1;
  // V(660) = K(660,1) * [MAPKAP1_rna];
  R660: MAPKAP1_rna => ; 1;
  // V(661) = K(661,1) * [MFF_g];
  R661: MFF_g => ; 1;
  // V(662) = K(662,1) * [MFF_rna];
  R662: MFF_rna => ; 1;
  // V(663) = K(663,1) * [HIPK2_g];
  R663: HIPK2_g => ; 1;
  // V(664) = K(664,1) * [HIPK2_rna];
  R664: HIPK2_rna => ; 1;
  // V(665) = K(665,1) * [TXNIP_g];
  R665: TXNIP_g => ; 1;
  // V(666) = K(666,1) * [TXNIP_rna];
  R666: TXNIP_rna => ; 1;
  // V(667) = K(667,1) * [SIRT7_g];
  R667: SIRT7_g => ; 1;
  // V(668) = K(668,1) * [SIRT7_rna];
  R668: SIRT7_rna => ; 1;
  // V(669) = K(669,1) * [RNF7_g];
  R669: RNF7_g => ; 1;
  // V(670) = K(670,1) * [RNF7_rna];
  R670: RNF7_rna => ; 1;
  // V(671) = K(671,1) * [DNM1L_p];
  R671: DNM1L_p => ; 1;
  // V(672) = K(672,1) * [SOCS1_p];
  R672: SOCS1_p => ; 1;
  // V(673) = K(673,1) * [PDPK1_p];
  R673: PDPK1_p => ; 1;
  // V(674) = K(674,1) * [ERN1_p];
  R674: ERN1_p => ; 1;
  // V(675) = K(675,1) * [FOS_p];
  R675: FOS_p => ; 1;
  // V(676) = K(676,1) * [TP53_p];
  R676: TP53_p => ; 1;
  // V(677) = K(677,1) * [HSPB1_p];
  R677: HSPB1_p => ; 1;
  // V(678) = K(678,1) * [HMGN1_p];
  R678: HMGN1_p => ; 1;
  // V(679) = K(679,1) * [JUN_p];
  R679: JUN_p => ; 1;
  // V(680) = K(680,1) * [FYN_p];
  R680: FYN_p => ; 1;
  // V(681) = K(681,1) * [LYN_p];
  R681: LYN_p => ; 1;
  // V(682) = K(682,1) * [SP1_p];
  R682: SP1_p => ; 1;
  // V(683) = K(683,1) * [VIM_p];
  R683: VIM_p => ; 1;
  // V(684) = K(684,1) * [PARP1_p];
  R684: PARP1_p => ; 1;
  // V(685) = K(685,1) * [BCL2_p];
  R685: BCL2_p => ; 1;
  // V(686) = K(686,1) * [NCF1_p];
  R686: NCF1_p => ; 1;
  // V(687) = K(687,1) * [PKM_p];
  R687: PKM_p => ; 1;
  // V(688) = K(688,1) * [CREB1_p];
  R688: CREB1_p => ; 1;
  // V(689) = K(689,1) * [XBP1_p];
  R689: XBP1_p => ; 1;
  // V(690) = K(690,1) * [TFEB_p];
  R690: TFEB_p => ; 1;
  // V(691) = K(691,1) * [NR4A1_p];
  R691: NR4A1_p => ; 1;
  // V(692) = K(692,1) * [RPS6KB1_p];
  R692: RPS6KB1_p => ; 1;
  // V(693) = K(693,1) * [JAK1_p];
  R693: JAK1_p => ; 1;
  // V(694) = K(694,1) * [F2R_p];
  R694: F2R_p => ; 1;
  // V(695) = K(695,1) * [DNMT1_p];
  R695: DNMT1_p => ; 1;
  // V(696) = K(696,1) * [ZFP36_p];
  R696: ZFP36_p => ; 1;
  // V(697) = K(697,1) * [MAPK1_p];
  R697: MAPK1_p => ; 1;
  // V(698) = K(698,1) * [DUSP1_p];
  R698: DUSP1_p => ; 1;
  // V(699) = K(699,1) * [PTPN6_p];
  R699: PTPN6_p => ; 1;
  // V(700) = K(700,1) * [PRDX6_p];
  R700: PRDX6_p => ; 1;
  // V(701) = K(701,1) * [AKT1_p];
  R701: AKT1_p => ; 1;
  // V(702) = K(702,1) * [CTNNB1_p];
  R702: CTNNB1_p => ; 1;
  // V(703) = K(703,1) * [RORA_p];
  R703: RORA_p => ; 1;
  // V(704) = K(704,1) * [DDIT3_p];
  R704: DDIT3_p => ; 1;
  // V(705) = K(705,1) * [STAT3_p];
  R705: STAT3_p => ; 1;
  // V(706) = K(706,1) * [STAT1_p];
  R706: STAT1_p => ; 1;
  // V(707) = K(707,1) * [STAT6_p];
  R707: STAT6_p => ; 1;
  // V(708) = K(708,1) * [MAPK9_p];
  R708: MAPK9_p => ; 1;
  // V(709) = K(709,1) * [CDKN1B_p];
  R709: CDKN1B_p => ; 1;
  // V(710) = K(710,1) * [IRAK1_p];
  R710: IRAK1_p => ; 1;
  // V(711) = K(711,1) * [RPS6KA3_p];
  R711: RPS6KA3_p => ; 1;
  // V(712) = K(712,1) * [JAK3_p];
  R712: JAK3_p => ; 1;
  // V(713) = K(713,1) * [PTEN_p];
  R713: PTEN_p => ; 1;
  // V(714) = K(714,1) * [RHOA_p];
  R714: RHOA_p => ; 1;
  // V(715) = K(715,1) * [RAC1_p];
  R715: RAC1_p => ; 1;
  // V(716) = K(716,1) * [MDM2_p];
  R716: MDM2_p => ; 1;
  // V(717) = K(717,1) * [IRF8_p];
  R717: IRF8_p => ; 1;
  // V(718) = K(718,1) * [GLO1_p];
  R718: GLO1_p => ; 1;
  // V(719) = K(719,1) * [PTPN11_p];
  R719: PTPN11_p => ; 1;
  // V(720) = K(720,1) * [PRDX1_p];
  R720: PRDX1_p => ; 1;
  // V(721) = K(721,1) * [EP300_p];
  R721: EP300_p => ; 1;
  // V(722) = K(722,1) * [STK4_p];
  R722: STK4_p => ; 1;
  // V(723) = K(723,1) * [PRKAA1_p];
  R723: PRKAA1_p => ; 1;
  // V(724) = K(724,1) * [ILK_p];
  R724: ILK_p => ; 1;
  // V(725) = K(725,1) * [SMAD4_p];
  R725: SMAD4_p => ; 1;
  // V(726) = K(726,1) * [STIM1_p];
  R726: STIM1_p => ; 1;
  // V(727) = K(727,1) * [BECN1_p];
  R727: BECN1_p => ; 1;
  // V(728) = K(728,1) * [SMAD2_p];
  R728: SMAD2_p => ; 1;
  // V(729) = K(729,1) * [STK11_p];
  R729: STK11_p => ; 1;
  // V(730) = K(730,1) * [NFE2L2_p];
  R730: NFE2L2_p => ; 1;
  // V(731) = K(731,1) * [PKN1_p];
  R731: PKN1_p => ; 1;
  // V(732) = K(732,1) * [HIF1A_p];
  R732: HIF1A_p => ; 1;
  // V(733) = K(733,1) * [RICTOR_p];
  R733: RICTOR_p => ; 1;
  // V(734) = K(734,1) * [BAD_p];
  R734: BAD_p => ; 1;
  // V(735) = K(735,1) * [SIRT1_p];
  R735: SIRT1_p => ; 1;
  // V(736) = K(736,1) * [PARK7_p];
  R736: PARK7_p => ; 1;
  // V(737) = K(737,1) * [MAPKAP1_p];
  R737: MAPKAP1_p => ; 1;
  // V(738) = K(738,1) * [MFF_p];
  R738: MFF_p => ; 1;
  // V(739) = K(739,1) * [HIPK2_p];
  R739: HIPK2_p => ; 1;
  // V(740) = K(740,1) * [TXNIP_p];
  R740: TXNIP_p => ; 1;
  // V(741) = K(741,1) * [SIRT7_p];
  R741: SIRT7_p => ; 1;
  // V(742) = K(742,1) * [SIGNOR-C154_p];
  R742: => ; 1;
  // V(743) = K(743,1) * [DNM1L_rna];
  R743: DNM1L_rna => ; 1;
  // V(744) = K(744,1) * [PDPK1_rna];
  R744: PDPK1_rna => ; 1;
  // V(745) = K(745,1) * [ROCK2_rna];
  R745: ROCK2_rna => ; 1;
  // V(746) = K(746,1) * [ERN1_rna];
  R746: ERN1_rna => ; 1;
  // V(747) = K(747,1) * [TP53_rna];
  R747: TP53_rna => ; 1;
  // V(748) = K(748,1) * [HSPB1_rna];
  R748: HSPB1_rna => ; 1;
  // V(749) = K(749,1) * [HMGN1_rna];
  R749: HMGN1_rna => ; 1;
  // V(750) = K(750,1) * [JUN_rna];
  R750: JUN_rna => ; 1;
  // V(751) = K(751,1) * [FYN_rna];
  R751: FYN_rna => ; 1;
  // V(752) = K(752,1) * [LYN_rna];
  R752: LYN_rna => ; 1;
  // V(753) = K(753,1) * [SP1_rna];
  R753: SP1_rna => ; 1;
  // V(754) = K(754,1) * [VIM_rna];
  R754: VIM_rna => ; 1;
  // V(755) = K(755,1) * [PARP1_rna];
  R755: PARP1_rna => ; 1;
  // V(756) = K(756,1) * [BCL2_rna];
  R756: BCL2_rna => ; 1;
  // V(757) = K(757,1) * [IRF1_rna];
  R757: IRF1_rna => ; 1;
  // V(758) = K(758,1) * [NCF1_rna];
  R758: NCF1_rna => ; 1;
  // V(759) = K(759,1) * [PKM_rna];
  R759: PKM_rna => ; 1;
  // V(760) = K(760,1) * [ETS1_rna];
  R760: ETS1_rna => ; 1;
  // V(761) = K(761,1) * [CREB1_rna];
  R761: CREB1_rna => ; 1;
  // V(762) = K(762,1) * [PTPN2_rna];
  R762: PTPN2_rna => ; 1;
  // V(763) = K(763,1) * [XBP1_rna];
  R763: XBP1_rna => ; 1;
  // V(764) = K(764,1) * [TFEB_rna];
  R764: TFEB_rna => ; 1;
  // V(765) = K(765,1) * [NFKB1_rna];
  R765: NFKB1_rna => ; 1;
  // V(766) = K(766,1) * [NR4A1_rna];
  R766: NR4A1_rna => ; 1;
  // V(767) = K(767,1) * [RPS6KB1_rna];
  R767: RPS6KB1_rna => ; 1;
  // V(768) = K(768,1) * [JAK1_rna];
  R768: JAK1_rna => ; 1;
  // V(769) = K(769,1) * [F2R_rna];
  R769: F2R_rna => ; 1;
  // V(770) = K(770,1) * [DNMT1_rna];
  R770: DNMT1_rna => ; 1;
  // V(771) = K(771,1) * [ZFP36_rna];
  R771: ZFP36_rna => ; 1;
  // V(772) = K(772,1) * [MAPK1_rna];
  R772: MAPK1_rna => ; 1;
  // V(773) = K(773,1) * [DUSP1_rna];
  R773: DUSP1_rna => ; 1;
  // V(774) = K(774,1) * [PTPN6_rna];
  R774: PTPN6_rna => ; 1;
  // V(775) = K(775,1) * [PRDX6_rna];
  R775: PRDX6_rna => ; 1;
  // V(776) = K(776,1) * [AKT1_rna];
  R776: AKT1_rna => ; 1;
  // V(777) = K(777,1) * [CTNNB1_rna];
  R777: CTNNB1_rna => ; 1;
  // V(778) = K(778,1) * [RORA_rna];
  R778: RORA_rna => ; 1;
  // V(779) = K(779,1) * [DDIT3_rna];
  R779: DDIT3_rna => ; 1;
  // V(780) = K(780,1) * [TGFBR1_rna];
  R780: TGFBR1_rna => ; 1;
  // V(781) = K(781,1) * [STAT3_rna];
  R781: STAT3_rna => ; 1;
  // V(782) = K(782,1) * [STAT6_rna];
  R782: STAT6_rna => ; 1;
  // V(783) = K(783,1) * [CASP3_rna];
  R783: CASP3_rna => ; 1;
  // V(784) = K(784,1) * [MAPK9_rna];
  R784: MAPK9_rna => ; 1;
  // V(785) = K(785,1) * [CDKN1B_rna];
  R785: CDKN1B_rna => ; 1;
  // V(786) = K(786,1) * [NOTCH1_rna];
  R786: NOTCH1_rna => ; 1;
  // V(787) = K(787,1) * [NUMB_rna];
  R787: NUMB_rna => ; 1;
  // V(788) = K(788,1) * [IRAK1_rna];
  R788: IRAK1_rna => ; 1;
  // V(789) = K(789,1) * [RPS6KA3_rna];
  R789: RPS6KA3_rna => ; 1;
  // V(790) = K(790,1) * [JAK3_rna];
  R790: JAK3_rna => ; 1;
  // V(791) = K(791,1) * [PTEN_rna];
  R791: PTEN_rna => ; 1;
  // V(792) = K(792,1) * [RHOA_rna];
  R792: RHOA_rna => ; 1;
  // V(793) = K(793,1) * [RAC1_rna];
  R793: RAC1_rna => ; 1;
  // V(794) = K(794,1) * [MDM2_rna];
  R794: MDM2_rna => ; 1;
  // V(795) = K(795,1) * [IRF8_rna];
  R795: IRF8_rna => ; 1;
  // V(796) = K(796,1) * [RELA_rna];
  R796: RELA_rna => ; 1;
  // V(797) = K(797,1) * [GLO1_rna];
  R797: GLO1_rna => ; 1;
  // V(798) = K(798,1) * [PTPN11_rna];
  R798: PTPN11_rna => ; 1;
  // V(799) = K(799,1) * [PRDX1_rna];
  R799: PRDX1_rna => ; 1;
  // V(800) = K(800,1) * [EP300_rna];
  R800: EP300_rna => ; 1;
  // V(801) = K(801,1) * [STK4_rna];
  R801: STK4_rna => ; 1;
  // V(802) = K(802,1) * [PRKAA1_rna];
  R802: PRKAA1_rna => ; 1;
  // V(803) = K(803,1) * [ILK_rna];
  R803: ILK_rna => ; 1;
  // V(804) = K(804,1) * [ROCK1_rna];
  R804: ROCK1_rna => ; 1;
  // V(805) = K(805,1) * [SMAD4_rna];
  R805: SMAD4_rna => ; 1;
  // V(806) = K(806,1) * [HDAC1_rna];
  R806: HDAC1_rna => ; 1;
  // V(807) = K(807,1) * [STIM1_rna];
  R807: STIM1_rna => ; 1;
  // V(808) = K(808,1) * [CUL3_rna];
  R808: CUL3_rna => ; 1;
  // V(809) = K(809,1) * [SMAD2_rna];
  R809: SMAD2_rna => ; 1;
  // V(810) = K(810,1) * [STK11_rna];
  R810: STK11_rna => ; 1;
  // V(811) = K(811,1) * [NFE2L2_rna];
  R811: NFE2L2_rna => ; 1;
  // V(812) = K(812,1) * [PKN1_rna];
  R812: PKN1_rna => ; 1;
  // V(813) = K(813,1) * [HIF1A_rna];
  R813: HIF1A_rna => ; 1;
  // V(814) = K(814,1) * [RICTOR_rna];
  R814: RICTOR_rna => ; 1;
  // V(815) = K(815,1) * [MYLIP_rna];
  R815: MYLIP_rna => ; 1;
  // V(816) = K(816,1) * [BAD_rna];
  R816: BAD_rna => ; 1;
  // V(817) = K(817,1) * [SIRT1_rna];
  R817: SIRT1_rna => ; 1;
  // V(818) = K(818,1) * [PARK7_rna];
  R818: PARK7_rna => ; 1;
  // V(819) = K(819,1) * [MAPKAP1_rna];
  R819: MAPKAP1_rna => ; 1;
  // V(820) = K(820,1) * [MFF_rna];
  R820: MFF_rna => ; 1;
  // V(821) = K(821,1) * [HIPK2_rna];
  R821: HIPK2_rna => ; 1;
  // V(822) = K(822,1) * [TXNIP_rna];
  R822: TXNIP_rna => ; 1;
  // V(823) = K(823,1) * [SIRT7_rna];
  R823: SIRT7_rna => ; 1;
  // V(824) = K(824,1) * [RNF7_rna];
  R824: RNF7_rna => ; 1;
end
