// SBML level 3 version 2

model NonClassicalMonocyte()

  // Compartments:
  compartment cell = 1;

  // Species:
  species AKT1 in cell = 1/cell;
  species AKT1_g in cell = 1/cell;
  species AKT1_p in cell = 1/cell;
  species AKT1_rna in cell = 1/cell;
  species ATR in cell = 1/cell;
  species ATR_g in cell = 1/cell;
  species ATR_rna in cell = 1/cell;
  species BAD in cell = 1/cell;
  species BAD_g in cell = 1/cell;
  species BAD_p in cell = 1/cell;
  species BAD_rna in cell = 1/cell;
  species BAX in cell = 1/cell;
  species BAX_g in cell = 1/cell;
  species BAX_p in cell = 1/cell;
  species BAX_rna in cell = 1/cell;
  species BECN1 in cell = 1/cell;
  species BECN1_g in cell = 1/cell;
  species BECN1_p in cell = 1/cell;
  species BECN1_rna in cell = 1/cell;
  species BTK in cell = 1/cell;
  species BTK_g in cell = 1/cell;
  species BTK_p in cell = 1/cell;
  species BTK_rna in cell = 1/cell;
  species CALM1 in cell = 1/cell;
  species CALM1_g in cell = 1/cell;
  species CALM1_p in cell = 1/cell;
  species CALM1_rna in cell = 1/cell;
  species CASP3 in cell = 1/cell;
  species CASP3_g in cell = 1/cell;
  species CASP3_rna in cell = 1/cell;
  species CAT in cell = 1/cell;
  species CAT_g in cell = 1/cell;
  species CAT_rna in cell = 1/cell;
  species CD163 in cell = 1/cell;
  species CD163_g in cell = 1/cell;
  species CD163_p in cell = 1/cell;
  species CD163_rna in cell = 1/cell;
  species CDK5 in cell = 1/cell;
  species CDK5_g in cell = 1/cell;
  species CDK5_p in cell = 1/cell;
  species CDK5_rna in cell = 1/cell;
  species CDKN1A in cell = 1/cell;
  species CDKN1A_g in cell = 1/cell;
  species CDKN1A_p in cell = 1/cell;
  species CDKN1A_rna in cell = 1/cell;
  species CDKN1B in cell = 1/cell;
  species CDKN1B_g in cell = 1/cell;
  species CDKN1B_p in cell = 1/cell;
  species CDKN1B_rna in cell = 1/cell;
  species CREB1 in cell = 1/cell;
  species CREB1_g in cell = 1/cell;
  species CREB1_p in cell = 1/cell;
  species CREB1_rna in cell = 1/cell;
  species CTNNB1 in cell = 1/cell;
  species CTNNB1_g in cell = 1/cell;
  species CTNNB1_p in cell = 1/cell;
  species CTNNB1_rna in cell = 1/cell;
  species CYBA in cell = 1/cell;
  species CYBA_g in cell = 1/cell;
  species CYBA_p in cell = 1/cell;
  species CYBA_rna in cell = 1/cell;
  species DDIT3 in cell = 1/cell;
  species DDIT3_g in cell = 1/cell;
  species DDIT3_p in cell = 1/cell;
  species DDIT3_rna in cell = 1/cell;
  species DNM1L in cell = 1/cell;
  species DNM1L_g in cell = 1/cell;
  species DNM1L_p in cell = 1/cell;
  species DNM1L_rna in cell = 1/cell;
  species DNMT1 in cell = 1/cell;
  species DNMT1_g in cell = 1/cell;
  species DNMT1_p in cell = 1/cell;
  species DNMT1_rna in cell = 1/cell;
  species DUSP1 in cell = 1/cell;
  species DUSP1_g in cell = 1/cell;
  species DUSP1_p in cell = 1/cell;
  species DUSP1_rna in cell = 1/cell;
  species EP300 in cell = 1/cell;
  species EP300_g in cell = 1/cell;
  species EP300_p in cell = 1/cell;
  species EP300_rna in cell = 1/cell;
  species FOS in cell = 1/cell;
  species FOS_g in cell = 1/cell;
  species FOS_p in cell = 1/cell;
  species FOS_rna in cell = 1/cell;
  species FYN in cell = 1/cell;
  species FYN_g in cell = 1/cell;
  species FYN_p in cell = 1/cell;
  species FYN_rna in cell = 1/cell;
  species GCLC in cell = 1/cell;
  species GCLC_g in cell = 1/cell;
  species GCLC_rna in cell = 1/cell;
  species GLO1 in cell = 1/cell;
  species GLO1_g in cell = 1/cell;
  species GLO1_p in cell = 1/cell;
  species GLO1_rna in cell = 1/cell;
  species GPX4 in cell = 1/cell;
  species GPX4_g in cell = 1/cell;
  species GPX4_rna in cell = 1/cell;
  species HDAC1 in cell = 1/cell;
  species HDAC1_g in cell = 1/cell;
  species HDAC1_rna in cell = 1/cell;
  species HES1 in cell = 1/cell;
  species HES1_g in cell = 1/cell;
  species HES1_p in cell = 1/cell;
  species HES1_rna in cell = 1/cell;
  species HIF1A in cell = 1/cell;
  species HIF1A_g in cell = 1/cell;
  species HIF1A_p in cell = 1/cell;
  species HIF1A_rna in cell = 1/cell;
  species HIPK2 in cell = 1/cell;
  species HIPK2_g in cell = 1/cell;
  species HIPK2_p in cell = 1/cell;
  species HIPK2_rna in cell = 1/cell;
  species HMOX1 in cell = 1/cell;
  species HMOX1_g in cell = 1/cell;
  species HMOX1_p in cell = 1/cell;
  species HMOX1_rna in cell = 1/cell;
  species HSPB1 in cell = 1/cell;
  species HSPB1_g in cell = 1/cell;
  species HSPB1_p in cell = 1/cell;
  species HSPB1_rna in cell = 1/cell;
  species IKBKB in cell = 1/cell;
  species IKBKB_g in cell = 1/cell;
  species IKBKB_p in cell = 1/cell;
  species IKBKB_rna in cell = 1/cell;
  species IL6R in cell = 1/cell;
  species IL6R_g in cell = 1/cell;
  species IL6R_rna in cell = 1/cell;
  species ILK in cell = 1/cell;
  species ILK_g in cell = 1/cell;
  species ILK_p in cell = 1/cell;
  species ILK_rna in cell = 1/cell;
  species INSR in cell = 1/cell;
  species INSR_g in cell = 1/cell;
  species INSR_p in cell = 1/cell;
  species INSR_rna in cell = 1/cell;
  species IRAK1 in cell = 1/cell;
  species IRAK1_g in cell = 1/cell;
  species IRAK1_p in cell = 1/cell;
  species IRAK1_rna in cell = 1/cell;
  species IRF1 in cell = 1/cell;
  species IRF1_g in cell = 1/cell;
  species IRF1_rna in cell = 1/cell;
  species IRF3 in cell = 1/cell;
  species IRF3_g in cell = 1/cell;
  species IRF3_p in cell = 1/cell;
  species IRF3_rna in cell = 1/cell;
  species IRF8 in cell = 1/cell;
  species IRF8_g in cell = 1/cell;
  species IRF8_p in cell = 1/cell;
  species IRF8_rna in cell = 1/cell;
  species IRS2 in cell = 1/cell;
  species IRS2_g in cell = 1/cell;
  species IRS2_p in cell = 1/cell;
  species IRS2_rna in cell = 1/cell;
  species JAK1 in cell = 1/cell;
  species JAK1_g in cell = 1/cell;
  species JAK1_p in cell = 1/cell;
  species JAK1_rna in cell = 1/cell;
  species JAK2 in cell = 1/cell;
  species JAK2_g in cell = 1/cell;
  species JAK2_p in cell = 1/cell;
  species JAK2_rna in cell = 1/cell;
  species JUN in cell = 1/cell;
  species JUN_g in cell = 1/cell;
  species JUN_p in cell = 1/cell;
  species JUN_rna in cell = 1/cell;
  species KDM6B in cell = 1/cell;
  species KDM6B_g in cell = 1/cell;
  species KDM6B_rna in cell = 1/cell;
  species KLF9 in cell = 1/cell;
  species KLF9_g in cell = 1/cell;
  species KLF9_rna in cell = 1/cell;
  species LYN in cell = 1/cell;
  species LYN_g in cell = 1/cell;
  species LYN_p in cell = 1/cell;
  species LYN_rna in cell = 1/cell;
  species MAP3K5 in cell = 1/cell;
  species MAP3K5_g in cell = 1/cell;
  species MAP3K5_p in cell = 1/cell;
  species MAP3K5_rna in cell = 1/cell;
  species MAPK1 in cell = 1/cell;
  species MAPK1_g in cell = 1/cell;
  species MAPK1_p in cell = 1/cell;
  species MAPK1_rna in cell = 1/cell;
  species MAPK7 in cell = 1/cell;
  species MAPK7_g in cell = 1/cell;
  species MAPK7_p in cell = 1/cell;
  species MAPK7_rna in cell = 1/cell;
  species MAPK9 in cell = 1/cell;
  species MAPK9_g in cell = 1/cell;
  species MAPK9_p in cell = 1/cell;
  species MAPK9_rna in cell = 1/cell;
  species MDM2 in cell = 1/cell;
  species MDM2_g in cell = 1/cell;
  species MDM2_p in cell = 1/cell;
  species MDM2_rna in cell = 1/cell;
  species MECP2 in cell = 1/cell;
  species MECP2_g in cell = 1/cell;
  species MECP2_p in cell = 1/cell;
  species MECP2_rna in cell = 1/cell;
  species MFF in cell = 1/cell;
  species MFF_g in cell = 1/cell;
  species MFF_p in cell = 1/cell;
  species MFF_rna in cell = 1/cell;
  species MFN2 in cell = 1/cell;
  species MFN2_g in cell = 1/cell;
  species MFN2_p in cell = 1/cell;
  species MFN2_rna in cell = 1/cell;
  species NCF1 in cell = 1/cell;
  species NCF1_g in cell = 1/cell;
  species NCF1_p in cell = 1/cell;
  species NCF1_rna in cell = 1/cell;
  species NFE2L2 in cell = 1/cell;
  species NFE2L2_g in cell = 1/cell;
  species NFE2L2_p in cell = 1/cell;
  species NFE2L2_rna in cell = 1/cell;
  species NFKB1 in cell = 1/cell;
  species NFKB1_g in cell = 1/cell;
  species NFKB1_p in cell = 1/cell;
  species NFKB1_rna in cell = 1/cell;
  species NOTCH2 in cell = 1/cell;
  species NOTCH2_g in cell = 1/cell;
  species NOTCH2_rna in cell = 1/cell;
  species NR3C1 in cell = 1/cell;
  species NR3C1_g in cell = 1/cell;
  species NR3C1_p in cell = 1/cell;
  species NR3C1_rna in cell = 1/cell;
  species NR4A1 in cell = 1/cell;
  species NR4A1_g in cell = 1/cell;
  species NR4A1_p in cell = 1/cell;
  species NR4A1_rna in cell = 1/cell;
  species NUMB in cell = 1/cell;
  species NUMB_g in cell = 1/cell;
  species NUMB_rna in cell = 1/cell;
  species PARK7 in cell = 1/cell;
  species PARK7_g in cell = 1/cell;
  species PARK7_p in cell = 1/cell;
  species PARK7_rna in cell = 1/cell;
  species PARP1 in cell = 1/cell;
  species PARP1_g in cell = 1/cell;
  species PARP1_p in cell = 1/cell;
  species PARP1_rna in cell = 1/cell;
  species PDPK1 in cell = 1/cell;
  species PDPK1_g in cell = 1/cell;
  species PDPK1_p in cell = 1/cell;
  species PDPK1_rna in cell = 1/cell;
  species PIK3C3 in cell = 1/cell;
  species PIK3C3_g in cell = 1/cell;
  species PIK3C3_p in cell = 1/cell;
  species PIK3C3_rna in cell = 1/cell;
  species PIK3CA in cell = 1/cell;
  species PIK3CA_g in cell = 1/cell;
  species PIK3CA_p in cell = 1/cell;
  species PIK3CA_rna in cell = 1/cell;
  species PKM in cell = 1/cell;
  species PKM_g in cell = 1/cell;
  species PKM_p in cell = 1/cell;
  species PKM_rna in cell = 1/cell;
  species PKN1 in cell = 1/cell;
  species PKN1_g in cell = 1/cell;
  species PKN1_p in cell = 1/cell;
  species PKN1_rna in cell = 1/cell;
  species PRDX1 in cell = 1/cell;
  species PRDX1_g in cell = 1/cell;
  species PRDX1_p in cell = 1/cell;
  species PRDX1_rna in cell = 1/cell;
  species PRDX6 in cell = 1/cell;
  species PRDX6_g in cell = 1/cell;
  species PRDX6_p in cell = 1/cell;
  species PRDX6_rna in cell = 1/cell;
  species PRKAA1 in cell = 1/cell;
  species PRKAA1_g in cell = 1/cell;
  species PRKAA1_p in cell = 1/cell;
  species PRKAA1_rna in cell = 1/cell;
  species PRKCA in cell = 1/cell;
  species PRKCA_g in cell = 1/cell;
  species PRKCA_p in cell = 1/cell;
  species PRKCA_rna in cell = 1/cell;
  species PTEN in cell = 1/cell;
  species PTEN_g in cell = 1/cell;
  species PTEN_p in cell = 1/cell;
  species PTEN_rna in cell = 1/cell;
  species PTGS2 in cell = 1/cell;
  species PTGS2_g in cell = 1/cell;
  species PTGS2_p in cell = 1/cell;
  species PTGS2_rna in cell = 1/cell;
  species PTPN11 in cell = 1/cell;
  species PTPN11_g in cell = 1/cell;
  species PTPN11_p in cell = 1/cell;
  species PTPN11_rna in cell = 1/cell;
  species PTPN2 in cell = 1/cell;
  species PTPN2_g in cell = 1/cell;
  species PTPN2_rna in cell = 1/cell;
  species PTPN6 in cell = 1/cell;
  species PTPN6_g in cell = 1/cell;
  species PTPN6_p in cell = 1/cell;
  species PTPN6_rna in cell = 1/cell;
  species PTPRB in cell = 1/cell;
  species PTPRB_g in cell = 1/cell;
  species PTPRB_rna in cell = 1/cell;
  species PTPRJ in cell = 1/cell;
  species PTPRJ_g in cell = 1/cell;
  species PTPRJ_p in cell = 1/cell;
  species PTPRJ_rna in cell = 1/cell;
  species RAC1 in cell = 1/cell;
  species RAC1_g in cell = 1/cell;
  species RAC1_p in cell = 1/cell;
  species RAC1_rna in cell = 1/cell;
  species RCAN1 in cell = 1/cell;
  species RCAN1_g in cell = 1/cell;
  species RCAN1_p in cell = 1/cell;
  species RCAN1_rna in cell = 1/cell;
  species RELA in cell = 1/cell;
  species RELA_g in cell = 1/cell;
  species RELA_p in cell = 1/cell;
  species RELA_rna in cell = 1/cell;
  species RICTOR in cell = 1/cell;
  species RICTOR_g in cell = 1/cell;
  species RICTOR_p in cell = 1/cell;
  species RICTOR_rna in cell = 1/cell;
  species RNF7 in cell = 1/cell;
  species RNF7_g in cell = 1/cell;
  species RNF7_rna in cell = 1/cell;
  species ROCK1 in cell = 1/cell;
  species ROCK1_g in cell = 1/cell;
  species ROCK1_rna in cell = 1/cell;
  species ROCK2 in cell = 1/cell;
  species ROCK2_g in cell = 1/cell;
  species ROCK2_rna in cell = 1/cell;
  species RPS6KA3 in cell = 1/cell;
  species RPS6KA3_g in cell = 1/cell;
  species RPS6KA3_p in cell = 1/cell;
  species RPS6KA3_rna in cell = 1/cell;
  species RPS6KB1 in cell = 1/cell;
  species RPS6KB1_g in cell = 1/cell;
  species RPS6KB1_p in cell = 1/cell;
  species RPS6KB1_rna in cell = 1/cell;
  species SCO2 in cell = 1/cell;
  species SCO2_g in cell = 1/cell;
  species SCO2_rna in cell = 1/cell;
  species SGK1 in cell = 1/cell;
  species SGK1_g in cell = 1/cell;
  species SGK1_p in cell = 1/cell;
  species SGK1_rna in cell = 1/cell;
  species SIRT1 in cell = 1/cell;
  species SIRT1_g in cell = 1/cell;
  species SIRT1_p in cell = 1/cell;
  species SIRT1_rna in cell = 1/cell;
  species SIRT2 in cell = 1/cell;
  species SIRT2_g in cell = 1/cell;
  species SIRT2_p in cell = 1/cell;
  species SIRT2_rna in cell = 1/cell;
  species SIRT7 in cell = 1/cell;
  species SIRT7_g in cell = 1/cell;
  species SIRT7_p in cell = 1/cell;
  species SIRT7_rna in cell = 1/cell;
  species SMAD2 in cell = 1/cell;
  species SMAD2_g in cell = 1/cell;
  species SMAD2_p in cell = 1/cell;
  species SMAD2_rna in cell = 1/cell;
  species SMAD4 in cell = 1/cell;
  species SMAD4_g in cell = 1/cell;
  species SMAD4_p in cell = 1/cell;
  species SMAD4_rna in cell = 1/cell;
  species SOCS1 in cell = 1/cell;
  species SOCS1_g in cell = 1/cell;
  species SOCS1_p in cell = 1/cell;
  species SOCS1_rna in cell = 1/cell;
  species SOCS3 in cell = 1/cell;
  species SOCS3_g in cell = 1/cell;
  species SOCS3_rna in cell = 1/cell;
  species SOD1 in cell = 1/cell;
  species SOD1_g in cell = 1/cell;
  species SOD1_rna in cell = 1/cell;
  species SOD2 in cell = 1/cell;
  species SOD2_g in cell = 1/cell;
  species SOD2_rna in cell = 1/cell;
  species SP1 in cell = 1/cell;
  species SP1_g in cell = 1/cell;
  species SP1_p in cell = 1/cell;
  species SP1_rna in cell = 1/cell;
  species STAT1 in cell = 1/cell;
  species STAT1_g in cell = 1/cell;
  species STAT1_p in cell = 1/cell;
  species STAT1_rna in cell = 1/cell;
  species STAT3 in cell = 1/cell;
  species STAT3_g in cell = 1/cell;
  species STAT3_p in cell = 1/cell;
  species STAT3_rna in cell = 1/cell;
  species STAT5A in cell = 1/cell;
  species STAT5A_g in cell = 1/cell;
  species STAT5A_p in cell = 1/cell;
  species STAT5A_rna in cell = 1/cell;
  species STK11 in cell = 1/cell;
  species STK11_g in cell = 1/cell;
  species STK11_p in cell = 1/cell;
  species STK11_rna in cell = 1/cell;
  species STK4 in cell = 1/cell;
  species STK4_g in cell = 1/cell;
  species STK4_p in cell = 1/cell;
  species STK4_rna in cell = 1/cell;
  species TFEB in cell = 1/cell;
  species TFEB_g in cell = 1/cell;
  species TFEB_p in cell = 1/cell;
  species TFEB_rna in cell = 1/cell;
  species TGFB1 in cell = 1/cell;
  species TGFB1_g in cell = 1/cell;
  species TGFB1_rna in cell = 1/cell;
  species TGFBR1 in cell = 1/cell;
  species TGFBR1_g in cell = 1/cell;
  species TGFBR1_rna in cell = 1/cell;
  species TLR2 in cell = 1/cell;
  species TLR2_g in cell = 1/cell;
  species TLR2_rna in cell = 1/cell;
  species TLR4 in cell = 1/cell;
  species TLR4_g in cell = 1/cell;
  species TLR4_rna in cell = 1/cell;
  species TP53 in cell = 1/cell;
  species TP53_g in cell = 1/cell;
  species TP53_p in cell = 1/cell;
  species TP53_rna in cell = 1/cell;
  species TXNIP in cell = 1/cell;
  species TXNIP_g in cell = 1/cell;
  species TXNIP_p in cell = 1/cell;
  species TXNIP_rna in cell = 1/cell;
  species VCAN in cell = 1/cell;
  species VCAN_g in cell = 1/cell;
  species VCAN_rna in cell = 1/cell;
  species VEGFB in cell = 1/cell;
  species VEGFB_g in cell = 1/cell;
  species VEGFB_rna in cell = 1/cell;
  species VIM in cell = 1/cell;
  species VIM_g in cell = 1/cell;
  species VIM_p in cell = 1/cell;
  species VIM_rna in cell = 1/cell;
  species ZFP36 in cell = 1/cell;
  species ZFP36_g in cell = 1/cell;
  species ZFP36_p in cell = 1/cell;
  species ZFP36_rna in cell = 1/cell;

  // Reactions:
  // V(1) = K(1,1) * [SMAD2_p] * [SMAD4_p] -K(1,2) * [SIGNOR-C8];
  R1: SMAD2_p => SMAD4_p; 1;
  // V(2) = K(2,1) * [SMAD4_p] * [JUN_p] -K(2,2) * [SIGNOR-C10];
  R2: JUN_p => SMAD4_p; 1;
  // V(3) = K(3,1) * [NFKB1] * [RELA_p] -K(3,2) * [SIGNOR-C13];
  R3: NFKB1 => RELA_p; 1;
  // V(4) = K(4,1) * [STAT3_p] * [SP1_p] -K(4,2) * [SIGNOR-C74];
  R4: STAT3_p => SP1_p; 1;
  // V(5) = K(5,1) * [NR3C1_p] * [STAT5A_p] -K(5,2) * [SIGNOR-C84];
  R5: NR3C1_p => STAT5A_p; 1;
  // V(6) = K(6,1) * [STAT1_p] * [STAT3_p] -K(6,2) * [SIGNOR-C118];
  R6: STAT3_p => STAT1_p; 1;
  // V(7) = K(7,1) * [SIGNOR-C118_p] * [JAK1_p] -K(7,2) * [SIGNOR-C120];
  R7: JAK1_p => ; 1;
  // V(8) = K(8,1) * [FOS_p] * [JUN_p] * [JUN_p] * [FOS_p] * [JUN_p] * [FOS_p] * [FOS_p] * [JUN_p] -K(8,2) * [SIGNOR-C154];
  R8: JUN_p => FOS_p; 1;
  // V(9) = K(9,1) * [TGFBR1] * [SMAD2] -K(9,2) * [TGFBR1 |SMAD2];
  R9: TGFBR1 => SMAD2; 1;
  // V(10) = K(10,1) * [TGFBR1 |SMAD2];
  R10: TGFBR1 => SMAD2; 1;
  // V(11) = K(11,1) * [MAPK1_p] * [EP300] -K(11,2) * [MAPK1_p |EP300];
  R11: EP300 => MAPK1_p; 1;
  // V(12) = K(12,1) * [MAPK1_p |EP300];
  R12: EP300 => MAPK1_p; 1;
  // V(13) = K(13,1) * [MAPK1_p] * [HIF1A] -K(13,2) * [MAPK1_p |HIF1A];
  R13: HIF1A => MAPK1_p; 1;
  // V(14) = K(14,1) * [MAPK1_p |HIF1A];
  R14: HIF1A => MAPK1_p; 1;
  // V(15) = K(15,1) * [MAPK1_p] * [NR3C1] -K(15,2) * [MAPK1_p |NR3C1];
  R15: NR3C1 => MAPK1_p; 1;
  // V(16) = K(16,1) * [MAPK1_p |NR3C1];
  R16: NR3C1 => MAPK1_p; 1;
  // V(17) = K(17,1) * [MAPK1_p] * [RPS6KA3] -K(17,2) * [MAPK1_p |RPS6KA3];
  R17: RPS6KA3 => MAPK1_p; 1;
  // V(18) = K(18,1) * [MAPK1_p |RPS6KA3];
  R18: RPS6KA3 => MAPK1_p; 1;
  // V(19) = K(19,1) * [MAPK1_p] * [PRDX6] -K(19,2) * [MAPK1_p |PRDX6];
  R19: PRDX6 => MAPK1_p; 1;
  // V(20) = K(20,1) * [MAPK1_p |PRDX6];
  R20: PRDX6 => MAPK1_p; 1;
  // V(21) = K(21,1) * [FYN_p] * [STK11] -K(21,2) * [FYN_p |STK11];
  R21: FYN_p => STK11; 1;
  // V(22) = K(22,1) * [FYN_p |STK11];
  R22: FYN_p => STK11; 1;
  // V(23) = K(23,1) * [PRKCA_p] * [CTNNB1] -K(23,2) * [PRKCA_p |CTNNB1];
  R23: CTNNB1 => PRKCA_p; 1;
  // V(24) = K(24,1) * [PRKCA_p |CTNNB1];
  R24: CTNNB1 => PRKCA_p; 1;
  // V(25) = K(25,1) * [JAK2_p] * [STAT5A] -K(25,2) * [JAK2_p |STAT5A];
  R25: JAK2_p => STAT5A; 1;
  // V(26) = K(26,1) * [JAK2_p |STAT5A];
  R26: JAK2_p => STAT5A; 1;
  // V(27) = K(27,1) * [AKT1_p] * [MDM2] -K(27,2) * [AKT1_p |MDM2];
  R27: AKT1_p => MDM2; 1;
  // V(28) = K(28,1) * [AKT1_p |MDM2];
  R28: AKT1_p => MDM2; 1;
  // V(29) = K(29,1) * [MAPK1_p] * [RPS6KB1] -K(29,2) * [MAPK1_p |RPS6KB1];
  R29: RPS6KB1 => MAPK1_p; 1;
  // V(30) = K(30,1) * [MAPK1_p |RPS6KB1];
  R30: RPS6KB1 => MAPK1_p; 1;
  // V(31) = K(31,1) * [AKT1_p] * [PRKAA1] -K(31,2) * [AKT1_p |PRKAA1];
  R31: PRKAA1 => AKT1_p; 1;
  // V(32) = K(32,1) * [AKT1_p |PRKAA1];
  R32: PRKAA1 => AKT1_p; 1;
  // V(33) = K(33,1) * [IKBKB_p] * [IKBKB] -K(33,2) * [IKBKB_p |IKBKB];
  R33: IKBKB => IKBKB_p; 1;
  // V(34) = K(34,1) * [IKBKB_p |IKBKB];
  R34: IKBKB => IKBKB_p; 1;
  // V(35) = K(35,1) * [PRKCA_p] * [VIM] -K(35,2) * [PRKCA_p |VIM];
  R35: PRKCA_p => VIM; 1;
  // V(36) = K(36,1) * [PRKCA_p |VIM];
  R36: PRKCA_p => VIM; 1;
  // V(37) = K(37,1) * [JAK2_p] * [JAK2] -K(37,2) * [JAK2_p |JAK2];
  R37: JAK2_p => JAK2; 1;
  // V(38) = K(38,1) * [JAK2_p |JAK2];
  R38: JAK2_p => JAK2; 1;
  // V(39) = K(39,1) * [MAPK1_p] * [CDKN1B] -K(39,2) * [MAPK1_p |CDKN1B];
  R39: CDKN1B => MAPK1_p; 1;
  // V(40) = K(40,1) * [MAPK1_p |CDKN1B];
  R40: CDKN1B => MAPK1_p; 1;
  // V(41) = K(41,1) * [MAPK1_p] * [SMAD4] -K(41,2) * [MAPK1_p |SMAD4];
  R41: SMAD4 => MAPK1_p; 1;
  // V(42) = K(42,1) * [MAPK1_p |SMAD4];
  R42: SMAD4 => MAPK1_p; 1;
  // V(43) = K(43,1) * [PRKCA_p] * [PTPN6] -K(43,2) * [PRKCA_p |PTPN6];
  R43: PTPN6 => PRKCA_p; 1;
  // V(44) = K(44,1) * [PRKCA_p |PTPN6];
  R44: PTPN6 => PRKCA_p; 1;
  // V(45) = K(45,1) * [ROCK1] * [DNM1L] -K(45,2) * [ROCK1 |DNM1L];
  R45: ROCK1 => DNM1L; 1;
  // V(46) = K(46,1) * [ROCK1 |DNM1L];
  R46: ROCK1 => DNM1L; 1;
  // V(47) = K(47,1) * [MAPK1_p] * [STK11] -K(47,2) * [MAPK1_p |STK11];
  R47: STK11 => MAPK1_p; 1;
  // V(48) = K(48,1) * [MAPK1_p |STK11];
  R48: STK11 => MAPK1_p; 1;
  // V(49) = K(49,1) * [PDPK1_p] * [RPS6KB1] -K(49,2) * [PDPK1_p |RPS6KB1];
  R49: PDPK1_p => RPS6KB1; 1;
  // V(50) = K(50,1) * [PDPK1_p |RPS6KB1];
  R50: PDPK1_p => RPS6KB1; 1;
  // V(51) = K(51,1) * [MAPK1_p] * [JUN] -K(51,2) * [MAPK1_p |JUN];
  R51: JUN => MAPK1_p; 1;
  // V(52) = K(52,1) * [MAPK1_p |JUN];
  R52: JUN => MAPK1_p; 1;
  // V(53) = K(53,1) * [PRKCA_p] * [NCF1] -K(53,2) * [PRKCA_p |NCF1];
  R53: NCF1 => PRKCA_p; 1;
  // V(54) = K(54,1) * [PRKCA_p |NCF1];
  R54: NCF1 => PRKCA_p; 1;
  // V(55) = K(55,1) * [PDPK1_p] * [IKBKB] -K(55,2) * [PDPK1_p |IKBKB];
  R55: PDPK1_p => IKBKB; 1;
  // V(56) = K(56,1) * [PDPK1_p |IKBKB];
  R56: PDPK1_p => IKBKB; 1;
  // V(57) = K(57,1) * [AKT1_p] * [NR4A1] -K(57,2) * [AKT1_p |NR4A1];
  R57: NR4A1 => AKT1_p; 1;
  // V(58) = K(58,1) * [AKT1_p |NR4A1];
  R58: NR4A1 => AKT1_p; 1;
  // V(59) = K(59,1) * [JAK2_p] * [MAP3K5] -K(59,2) * [JAK2_p |MAP3K5];
  R59: JAK2_p => MAP3K5; 1;
  // V(60) = K(60,1) * [JAK2_p |MAP3K5];
  R60: JAK2_p => MAP3K5; 1;
  // V(61) = K(61,1) * [MAPK1_p] * [FOS] -K(61,2) * [MAPK1_p |FOS];
  R61: FOS => MAPK1_p; 1;
  // V(62) = K(62,1) * [MAPK1_p |FOS];
  R62: FOS => MAPK1_p; 1;
  // V(63) = K(63,1) * [STK11_p] * [STK11] -K(63,2) * [STK11_p |STK11];
  R63: STK11_p => STK11; 1;
  // V(64) = K(64,1) * [STK11_p |STK11];
  R64: STK11_p => STK11; 1;
  // V(65) = K(65,1) * [FYN_p] * [PTPN6] -K(65,2) * [FYN_p |PTPN6];
  R65: FYN_p => PTPN6; 1;
  // V(66) = K(66,1) * [FYN_p |PTPN6];
  R66: FYN_p => PTPN6; 1;
  // V(67) = K(67,1) * [MAPK9_p] * [TP53] -K(67,2) * [MAPK9_p |TP53];
  R67: TP53 => MAPK9_p; 1;
  // V(68) = K(68,1) * [MAPK9_p |TP53];
  R68: TP53 => MAPK9_p; 1;
  // V(69) = K(69,1) * [MAPK1_p] * [SMAD2] -K(69,2) * [MAPK1_p |SMAD2];
  R69: SMAD2 => MAPK1_p; 1;
  // V(70) = K(70,1) * [MAPK1_p |SMAD2];
  R70: SMAD2 => MAPK1_p; 1;
  // V(71) = K(71,1) * [MAPK9_p] * [JUN] -K(71,2) * [MAPK9_p |JUN];
  R71: JUN => MAPK9_p; 1;
  // V(72) = K(72,1) * [MAPK9_p |JUN];
  R72: JUN => MAPK9_p; 1;
  // V(73) = K(73,1) * [INSR_p] * [INSR] -K(73,2) * [INSR_p |INSR];
  R73: INSR_p => INSR; 1;
  // V(74) = K(74,1) * [INSR_p |INSR];
  R74: INSR_p => INSR; 1;
  // V(75) = K(75,1) * [AKT1_p] * [BAD] -K(75,2) * [AKT1_p |BAD];
  R75: BAD => AKT1_p; 1;
  // V(76) = K(76,1) * [AKT1_p |BAD];
  R76: BAD => AKT1_p; 1;
  // V(77) = K(77,1) * [MAPK1_p] * [NCF1] -K(77,2) * [MAPK1_p |NCF1];
  R77: NCF1 => MAPK1_p; 1;
  // V(78) = K(78,1) * [MAPK1_p |NCF1];
  R78: NCF1 => MAPK1_p; 1;
  // V(79) = K(79,1) * [IKBKB_p] * [SIGNOR-C13] -K(79,2) * [IKBKB_p |SIGNOR-C13];
  R79: IKBKB_p => ; 1;
  // V(80) = K(80,1) * [IKBKB_p |SIGNOR-C13];
  R80: IKBKB_p => ; 1;
  // V(81) = K(81,1) * [JAK1_p] * [STAT1] -K(81,2) * [JAK1_p |STAT1];
  R81: STAT1 => JAK1_p; 1;
  // V(82) = K(82,1) * [JAK1_p |STAT1];
  R82: STAT1 => JAK1_p; 1;
  // V(83) = K(83,1) * [MAPK1_p] * [DUSP1] -K(83,2) * [MAPK1_p |DUSP1];
  R83: DUSP1 => MAPK1_p; 1;
  // V(84) = K(84,1) * [MAPK1_p |DUSP1];
  R84: DUSP1 => MAPK1_p; 1;
  // V(85) = K(85,1) * [AKT1_p] * [HSPB1] -K(85,2) * [AKT1_p |HSPB1];
  R85: HSPB1 => AKT1_p; 1;
  // V(86) = K(86,1) * [AKT1_p |HSPB1];
  R86: HSPB1 => AKT1_p; 1;
  // V(87) = K(87,1) * [AKT1_p] * [NCF1] -K(87,2) * [AKT1_p |NCF1];
  R87: NCF1 => AKT1_p; 1;
  // V(88) = K(88,1) * [AKT1_p |NCF1];
  R88: NCF1 => AKT1_p; 1;
  // V(89) = K(89,1) * [PKN1_p] * [PKN1] -K(89,2) * [PKN1_p |PKN1];
  R89: PKN1 => PKN1_p; 1;
  // V(90) = K(90,1) * [PKN1_p |PKN1];
  R90: PKN1 => PKN1_p; 1;
  // V(91) = K(91,1) * [RPS6KB1_p] * [HSPB1] -K(91,2) * [RPS6KB1_p |HSPB1];
  R91: HSPB1 => RPS6KB1_p; 1;
  // V(92) = K(92,1) * [RPS6KB1_p |HSPB1];
  R92: HSPB1 => RPS6KB1_p; 1;
  // V(93) = K(93,1) * [AKT1_p] * [CDKN1A] -K(93,2) * [AKT1_p |CDKN1A];
  R93: AKT1_p => CDKN1A; 1;
  // V(94) = K(94,1) * [AKT1_p |CDKN1A];
  R94: AKT1_p => CDKN1A; 1;
  // V(95) = K(95,1) * [MAPK7_p] * [MAPK7] -K(95,2) * [MAPK7_p |MAPK7];
  R95: MAPK7 => MAPK7_p; 1;
  // V(96) = K(96,1) * [MAPK7_p |MAPK7];
  R96: MAPK7 => MAPK7_p; 1;
  // V(97) = K(97,1) * [MAPK9_p] * [MFN2] -K(97,2) * [MAPK9_p |MFN2];
  R97: MFN2 => MAPK9_p; 1;
  // V(98) = K(98,1) * [MAPK9_p |MFN2];
  R98: MFN2 => MAPK9_p; 1;
  // V(99) = K(99,1) * [ATR] * [PARP1] -K(99,2) * [ATR |PARP1];
  R99: PARP1 => ATR; 1;
  // V(100) = K(100,1) * [ATR |PARP1];
  R100: PARP1 => ATR; 1;
  // V(101) = K(101,1) * [JAK2_p] * [STAT1] -K(101,2) * [JAK2_p |STAT1];
  R101: JAK2_p => STAT1; 1;
  // V(102) = K(102,1) * [JAK2_p |STAT1];
  R102: JAK2_p => STAT1; 1;
  // V(103) = K(103,1) * [PRKCA_p] * [PRKCA] -K(103,2) * [PRKCA_p |PRKCA];
  R103: PRKCA => PRKCA_p; 1;
  // V(104) = K(104,1) * [PRKCA_p |PRKCA];
  R104: PRKCA => PRKCA_p; 1;
  // V(105) = K(105,1) * [MAPK1_p] * [TFEB] -K(105,2) * [MAPK1_p |TFEB];
  R105: TFEB => MAPK1_p; 1;
  // V(106) = K(106,1) * [MAPK1_p |TFEB];
  R106: TFEB => MAPK1_p; 1;
  // V(107) = K(107,1) * [PDPK1_p] * [SGK1] -K(107,2) * [PDPK1_p |SGK1];
  R107: PDPK1_p => SGK1; 1;
  // V(108) = K(108,1) * [PDPK1_p |SGK1];
  R108: PDPK1_p => SGK1; 1;
  // V(109) = K(109,1) * [INSR_p] * [CALM1] -K(109,2) * [INSR_p |CALM1];
  R109: INSR_p => CALM1; 1;
  // V(110) = K(110,1) * [INSR_p |CALM1];
  R110: INSR_p => CALM1; 1;
  // V(111) = K(111,1) * [PRKCA_p] * [CDKN1A] -K(111,2) * [PRKCA_p |CDKN1A];
  R111: PRKCA_p => CDKN1A; 1;
  // V(112) = K(112,1) * [PRKCA_p |CDKN1A];
  R112: PRKCA_p => CDKN1A; 1;
  // V(113) = K(113,1) * [RPS6KA3_p] * [MAP3K5] -K(113,2) * [RPS6KA3_p |MAP3K5];
  R113: RPS6KA3_p => MAP3K5; 1;
  // V(114) = K(114,1) * [RPS6KA3_p |MAP3K5];
  R114: RPS6KA3_p => MAP3K5; 1;
  // V(115) = K(115,1) * [AKT1_p] * [CDKN1B] -K(115,2) * [AKT1_p |CDKN1B];
  R115: CDKN1B => AKT1_p; 1;
  // V(116) = K(116,1) * [AKT1_p |CDKN1B];
  R116: CDKN1B => AKT1_p; 1;
  // V(117) = K(117,1) * [ATR] * [MDM2] -K(117,2) * [ATR |MDM2];
  R117: ATR => MDM2; 1;
  // V(118) = K(118,1) * [ATR |MDM2];
  R118: ATR => MDM2; 1;
  // V(119) = K(119,1) * [MAPK1_p] * [SIGNOR-C154] -K(119,2) * [MAPK1_p |SIGNOR-C154];
  R119: MAPK1_p => ; 1;
  // V(120) = K(120,1) * [MAPK1_p |SIGNOR-C154];
  R120: MAPK1_p => ; 1;
  // V(121) = K(121,1) * [RPS6KA3_p] * [BAD] -K(121,2) * [RPS6KA3_p |BAD];
  R121: RPS6KA3_p => BAD; 1;
  // V(122) = K(122,1) * [RPS6KA3_p |BAD];
  R122: RPS6KA3_p => BAD; 1;
  // V(123) = K(123,1) * [MAPK9_p] * [CTNNB1] -K(123,2) * [MAPK9_p |CTNNB1];
  R123: CTNNB1 => MAPK9_p; 1;
  // V(124) = K(124,1) * [MAPK9_p |CTNNB1];
  R124: CTNNB1 => MAPK9_p; 1;
  // V(125) = K(125,1) * [AKT1_p] * [RAC1] -K(125,2) * [AKT1_p |RAC1];
  R125: RAC1 => AKT1_p; 1;
  // V(126) = K(126,1) * [AKT1_p |RAC1];
  R126: RAC1 => AKT1_p; 1;
  // V(127) = K(127,1) * [PDPK1_p] * [AKT1] -K(127,2) * [PDPK1_p |AKT1];
  R127: PDPK1_p => AKT1; 1;
  // V(128) = K(128,1) * [PDPK1_p |AKT1];
  R128: PDPK1_p => AKT1; 1;
  // V(129) = K(129,1) * [STK4_p] * [STK4] -K(129,2) * [STK4_p |STK4];
  R129: STK4_p => STK4; 1;
  // V(130) = K(130,1) * [STK4_p |STK4];
  R130: STK4_p => STK4; 1;
  // V(131) = K(131,1) * [STK11_p] * [PTEN] -K(131,2) * [STK11_p |PTEN];
  R131: PTEN => STK11_p; 1;
  // V(132) = K(132,1) * [STK11_p |PTEN];
  R132: PTEN => STK11_p; 1;
  // V(133) = K(133,1) * [HIPK2_p] * [HIPK2] -K(133,2) * [HIPK2_p |HIPK2];
  R133: HIPK2_p => HIPK2; 1;
  // V(134) = K(134,1) * [HIPK2_p |HIPK2];
  R134: HIPK2_p => HIPK2; 1;
  // V(135) = K(135,1) * [JAK2_p] * [BECN1] -K(135,2) * [JAK2_p |BECN1];
  R135: JAK2_p => BECN1; 1;
  // V(136) = K(136,1) * [JAK2_p |BECN1];
  R136: JAK2_p => BECN1; 1;
  // V(137) = K(137,1) * [PRKCA_p] * [JAK2] -K(137,2) * [PRKCA_p |JAK2];
  R137: PRKCA_p => JAK2; 1;
  // V(138) = K(138,1) * [PRKCA_p |JAK2];
  R138: PRKCA_p => JAK2; 1;
  // V(139) = K(139,1) * [PDPK1_p] * [PDPK1] -K(139,2) * [PDPK1_p |PDPK1];
  R139: PDPK1_p => PDPK1; 1;
  // V(140) = K(140,1) * [PDPK1_p |PDPK1];
  R140: PDPK1_p => PDPK1; 1;
  // V(141) = K(141,1) * [SGK1_p] * [CDKN1B] -K(141,2) * [SGK1_p |CDKN1B];
  R141: CDKN1B => SGK1_p; 1;
  // V(142) = K(142,1) * [SGK1_p |CDKN1B];
  R142: CDKN1B => SGK1_p; 1;
  // V(143) = K(143,1) * [RPS6KA3_p] * [CREB1] -K(143,2) * [RPS6KA3_p |CREB1];
  R143: RPS6KA3_p => CREB1; 1;
  // V(144) = K(144,1) * [RPS6KA3_p |CREB1];
  R144: RPS6KA3_p => CREB1; 1;
  // V(145) = K(145,1) * [PRKCA_p] * [PRKAA1] -K(145,2) * [PRKCA_p |PRKAA1];
  R145: PRKAA1 => PRKCA_p; 1;
  // V(146) = K(146,1) * [PRKCA_p |PRKAA1];
  R146: PRKAA1 => PRKCA_p; 1;
  // V(147) = K(147,1) * [AKT1_p] * [EP300] -K(147,2) * [AKT1_p |EP300];
  R147: EP300 => AKT1_p; 1;
  // V(148) = K(148,1) * [AKT1_p |EP300];
  R148: EP300 => AKT1_p; 1;
  // V(149) = K(149,1) * [FYN_p] * [FYN] -K(149,2) * [FYN_p |FYN];
  R149: FYN_p => FYN; 1;
  // V(150) = K(150,1) * [FYN_p |FYN];
  R150: FYN_p => FYN; 1;
  // V(151) = K(151,1) * [IRAK1_p] * [IRAK1] -K(151,2) * [IRAK1_p |IRAK1];
  R151: IRAK1_p => IRAK1; 1;
  // V(152) = K(152,1) * [IRAK1_p |IRAK1];
  R152: IRAK1_p => IRAK1; 1;
  // V(153) = K(153,1) * [PRKCA_p] * [INSR] -K(153,2) * [PRKCA_p |INSR];
  R153: PRKCA_p => INSR; 1;
  // V(154) = K(154,1) * [PRKCA_p |INSR];
  R154: PRKCA_p => INSR; 1;
  // V(155) = K(155,1) * [MAP3K5_p] * [MAP3K5] -K(155,2) * [MAP3K5_p |MAP3K5];
  R155: MAP3K5 => MAP3K5_p; 1;
  // V(156) = K(156,1) * [MAP3K5_p |MAP3K5];
  R156: MAP3K5 => MAP3K5_p; 1;
  // V(157) = K(157,1) * [AKT1_p] * [VIM] -K(157,2) * [AKT1_p |VIM];
  R157: VIM => AKT1_p; 1;
  // V(158) = K(158,1) * [AKT1_p |VIM];
  R158: VIM => AKT1_p; 1;
  // V(159) = K(159,1) * [PRKAA1_p] * [SIRT7] -K(159,2) * [PRKAA1_p |SIRT7];
  R159: PRKAA1_p => SIRT7; 1;
  // V(160) = K(160,1) * [PRKAA1_p |SIRT7];
  R160: PRKAA1_p => SIRT7; 1;
  // V(161) = K(161,1) * [PRKAA1_p] * [DNMT1] -K(161,2) * [PRKAA1_p |DNMT1];
  R161: DNMT1 => PRKAA1_p; 1;
  // V(162) = K(162,1) * [PRKAA1_p |DNMT1];
  R162: DNMT1 => PRKAA1_p; 1;
  // V(163) = K(163,1) * [CDK5_p] * [TP53] -K(163,2) * [CDK5_p |TP53];
  R163: TP53 => CDK5_p; 1;
  // V(164) = K(164,1) * [CDK5_p |TP53];
  R164: TP53 => CDK5_p; 1;
  // V(165) = K(165,1) * [IKBKB_p] * [NFKB1] -K(165,2) * [IKBKB_p |NFKB1];
  R165: NFKB1 => IKBKB_p; 1;
  // V(166) = K(166,1) * [IKBKB_p |NFKB1];
  R166: NFKB1 => IKBKB_p; 1;
  // V(167) = K(167,1) * [ILK_p] * [AKT1] -K(167,2) * [ILK_p |AKT1];
  R167: ILK_p => AKT1; 1;
  // V(168) = K(168,1) * [ILK_p |AKT1];
  R168: ILK_p => AKT1; 1;
  // V(169) = K(169,1) * [AKT1_p] * [BTK] -K(169,2) * [AKT1_p |BTK];
  R169: BTK => AKT1_p; 1;
  // V(170) = K(170,1) * [AKT1_p |BTK];
  R170: BTK => AKT1_p; 1;
  // V(171) = K(171,1) * [MAPK1_p] * [SP1] -K(171,2) * [MAPK1_p |SP1];
  R171: SP1 => MAPK1_p; 1;
  // V(172) = K(172,1) * [MAPK1_p |SP1];
  R172: SP1 => MAPK1_p; 1;
  // V(173) = K(173,1) * [ROCK1] * [PTEN] -K(173,2) * [ROCK1 |PTEN];
  R173: PTEN => ROCK1; 1;
  // V(174) = K(174,1) * [ROCK1 |PTEN];
  R174: PTEN => ROCK1; 1;
  // V(175) = K(175,1) * [MAPK1_p] * [STAT5A] -K(175,2) * [MAPK1_p |STAT5A];
  R175: STAT5A => MAPK1_p; 1;
  // V(176) = K(176,1) * [MAPK1_p |STAT5A];
  R176: STAT5A => MAPK1_p; 1;
  // V(177) = K(177,1) * [MAPK1_p] * [BAD] -K(177,2) * [MAPK1_p |BAD];
  R177: BAD => MAPK1_p; 1;
  // V(178) = K(178,1) * [MAPK1_p |BAD];
  R178: BAD => MAPK1_p; 1;
  // V(179) = K(179,1) * [PDPK1_p] * [RPS6KA3] -K(179,2) * [PDPK1_p |RPS6KA3];
  R179: PDPK1_p => RPS6KA3; 1;
  // V(180) = K(180,1) * [PDPK1_p |RPS6KA3];
  R180: PDPK1_p => RPS6KA3; 1;
  // V(181) = K(181,1) * [MAPK1_p] * [CDKN1A] -K(181,2) * [MAPK1_p |CDKN1A];
  R181: CDKN1A => MAPK1_p; 1;
  // V(182) = K(182,1) * [MAPK1_p |CDKN1A];
  R182: CDKN1A => MAPK1_p; 1;
  // V(183) = K(183,1) * [IL6R] * [JAK2] -K(183,2) * [IL6R |JAK2];
  R183: IL6R => JAK2; 1;
  // V(184) = K(184,1) * [IL6R |JAK2];
  R184: IL6R => JAK2; 1;
  // V(185) = K(185,1) * [MAPK1_p] * [JAK2] -K(185,2) * [MAPK1_p |JAK2];
  R185: JAK2 => MAPK1_p; 1;
  // V(186) = K(186,1) * [MAPK1_p |JAK2];
  R186: JAK2 => MAPK1_p; 1;
  // V(187) = K(187,1) * [JAK1_p] * [STAT3] -K(187,2) * [JAK1_p |STAT3];
  R187: STAT3 => JAK1_p; 1;
  // V(188) = K(188,1) * [JAK1_p |STAT3];
  R188: STAT3 => JAK1_p; 1;
  // V(189) = K(189,1) * [MAPK1_p] * [PARP1] -K(189,2) * [MAPK1_p |PARP1];
  R189: PARP1 => MAPK1_p; 1;
  // V(190) = K(190,1) * [MAPK1_p |PARP1];
  R190: PARP1 => MAPK1_p; 1;
  // V(191) = K(191,1) * [AKT1_p] * [NR3C1] -K(191,2) * [AKT1_p |NR3C1];
  R191: AKT1_p => NR3C1; 1;
  // V(192) = K(192,1) * [AKT1_p |NR3C1];
  R192: AKT1_p => NR3C1; 1;
  // V(193) = K(193,1) * [PRKCA_p] * [HES1] -K(193,2) * [PRKCA_p |HES1];
  R193: PRKCA_p => HES1; 1;
  // V(194) = K(194,1) * [PRKCA_p |HES1];
  R194: PRKCA_p => HES1; 1;
  // V(195) = K(195,1) * [STK11_p] * [SMAD4] -K(195,2) * [STK11_p |SMAD4];
  R195: SMAD4 => STK11_p; 1;
  // V(196) = K(196,1) * [STK11_p |SMAD4];
  R196: SMAD4 => STK11_p; 1;
  // V(197) = K(197,1) * [FYN_p] * [PTGS2] -K(197,2) * [FYN_p |PTGS2];
  R197: FYN_p => PTGS2; 1;
  // V(198) = K(198,1) * [FYN_p |PTGS2];
  R198: FYN_p => PTGS2; 1;
  // V(199) = K(199,1) * [STK4_p] * [PIK3CA] -K(199,2) * [STK4_p |PIK3CA];
  R199: STK4_p => PIK3CA; 1;
  // V(200) = K(200,1) * [STK4_p |PIK3CA];
  R200: STK4_p => PIK3CA; 1;
  // V(201) = K(201,1) * [RPS6KB1_p] * [RICTOR] -K(201,2) * [RPS6KB1_p |RICTOR];
  R201: RICTOR => RPS6KB1_p; 1;
  // V(202) = K(202,1) * [RPS6KB1_p |RICTOR];
  R202: RICTOR => RPS6KB1_p; 1;
  // V(203) = K(203,1) * [CDK5_p] * [NR3C1] -K(203,2) * [CDK5_p |NR3C1];
  R203: CDK5_p => NR3C1; 1;
  // V(204) = K(204,1) * [CDK5_p |NR3C1];
  R204: CDK5_p => NR3C1; 1;
  // V(205) = K(205,1) * [BTK_p] * [STAT3] -K(205,2) * [BTK_p |STAT3];
  R205: BTK_p => STAT3; 1;
  // V(206) = K(206,1) * [BTK_p |STAT3];
  R206: BTK_p => STAT3; 1;
  // V(207) = K(207,1) * [STK4_p] * [IRF3] -K(207,2) * [STK4_p |IRF3];
  R207: STK4_p => IRF3; 1;
  // V(208) = K(208,1) * [STK4_p |IRF3];
  R208: STK4_p => IRF3; 1;
  // V(209) = K(209,1) * [JAK2_p] * [CDKN1B] -K(209,2) * [JAK2_p |CDKN1B];
  R209: JAK2_p => CDKN1B; 1;
  // V(210) = K(210,1) * [JAK2_p |CDKN1B];
  R210: JAK2_p => CDKN1B; 1;
  // V(211) = K(211,1) * [PRKCA_p] * [CD163] -K(211,2) * [PRKCA_p |CD163];
  R211: PRKCA_p => CD163; 1;
  // V(212) = K(212,1) * [PRKCA_p |CD163];
  R212: PRKCA_p => CD163; 1;
  // V(213) = K(213,1) * [RPS6KA3_p] * [FOS] -K(213,2) * [RPS6KA3_p |FOS];
  R213: RPS6KA3_p => FOS; 1;
  // V(214) = K(214,1) * [RPS6KA3_p |FOS];
  R214: RPS6KA3_p => FOS; 1;
  // V(215) = K(215,1) * [AKT1_p] * [RPS6KA3] -K(215,2) * [AKT1_p |RPS6KA3];
  R215: RPS6KA3 => AKT1_p; 1;
  // V(216) = K(216,1) * [AKT1_p |RPS6KA3];
  R216: RPS6KA3 => AKT1_p; 1;
  // V(217) = K(217,1) * [AKT1_p] * [DNMT1] -K(217,2) * [AKT1_p |DNMT1];
  R217: DNMT1 => AKT1_p; 1;
  // V(218) = K(218,1) * [AKT1_p |DNMT1];
  R218: DNMT1 => AKT1_p; 1;
  // V(219) = K(219,1) * [STK11_p] * [SIRT1] -K(219,2) * [STK11_p |SIRT1];
  R219: STK11_p => SIRT1; 1;
  // V(220) = K(220,1) * [STK11_p |SIRT1];
  R220: STK11_p => SIRT1; 1;
  // V(221) = K(221,1) * [RPS6KA3_p] * [RPS6KA3] -K(221,2) * [RPS6KA3_p |RPS6KA3];
  R221: RPS6KA3_p => RPS6KA3; 1;
  // V(222) = K(222,1) * [RPS6KA3_p |RPS6KA3];
  R222: RPS6KA3_p => RPS6KA3; 1;
  // V(223) = K(223,1) * [PRKAA1_p] * [EP300] -K(223,2) * [PRKAA1_p |EP300];
  R223: PRKAA1_p => EP300; 1;
  // V(224) = K(224,1) * [PRKAA1_p |EP300];
  R224: PRKAA1_p => EP300; 1;
  // V(225) = K(225,1) * [HIPK2_p] * [MECP2] -K(225,2) * [HIPK2_p |MECP2];
  R225: MECP2 => HIPK2_p; 1;
  // V(226) = K(226,1) * [HIPK2_p |MECP2];
  R226: MECP2 => HIPK2_p; 1;
  // V(227) = K(227,1) * [AKT1_p] * [CTNNB1] -K(227,2) * [AKT1_p |CTNNB1];
  R227: CTNNB1 => AKT1_p; 1;
  // V(228) = K(228,1) * [AKT1_p |CTNNB1];
  R228: CTNNB1 => AKT1_p; 1;
  // V(229) = K(229,1) * [PRKCA_p] * [CYBA] -K(229,2) * [PRKCA_p |CYBA];
  R229: PRKCA_p => CYBA; 1;
  // V(230) = K(230,1) * [PRKCA_p |CYBA];
  R230: PRKCA_p => CYBA; 1;
  // V(231) = K(231,1) * [AKT1_p] * [STK4] -K(231,2) * [AKT1_p |STK4];
  R231: STK4 => AKT1_p; 1;
  // V(232) = K(232,1) * [AKT1_p |STK4];
  R232: STK4 => AKT1_p; 1;
  // V(233) = K(233,1) * [RPS6KA3_p] * [NR4A1] -K(233,2) * [RPS6KA3_p |NR4A1];
  R233: NR4A1 => RPS6KA3_p; 1;
  // V(234) = K(234,1) * [RPS6KA3_p |NR4A1];
  R234: NR4A1 => RPS6KA3_p; 1;
  // V(235) = K(235,1) * [AKT1_p] * [IRAK1] -K(235,2) * [AKT1_p |IRAK1];
  R235: IRAK1 => AKT1_p; 1;
  // V(236) = K(236,1) * [AKT1_p |IRAK1];
  R236: IRAK1 => AKT1_p; 1;
  // V(237) = K(237,1) * [RPS6KB1_p] * [BAD] -K(237,2) * [RPS6KB1_p |BAD];
  R237: BAD => RPS6KB1_p; 1;
  // V(238) = K(238,1) * [RPS6KB1_p |BAD];
  R238: BAD => RPS6KB1_p; 1;
  // V(239) = K(239,1) * [PRKAA1_p] * [SIRT1] -K(239,2) * [PRKAA1_p |SIRT1];
  R239: PRKAA1_p => SIRT1; 1;
  // V(240) = K(240,1) * [PRKAA1_p |SIRT1];
  R240: PRKAA1_p => SIRT1; 1;
  // V(241) = K(241,1) * [PRKCA_p] * [BAD] -K(241,2) * [PRKCA_p |BAD];
  R241: PRKCA_p => BAD; 1;
  // V(242) = K(242,1) * [PRKCA_p |BAD];
  R242: PRKCA_p => BAD; 1;
  // V(243) = K(243,1) * [ROCK1] * [TP53] -K(243,2) * [ROCK1 |TP53];
  R243: TP53 => ROCK1; 1;
  // V(244) = K(244,1) * [ROCK1 |TP53];
  R244: TP53 => ROCK1; 1;
  // V(245) = K(245,1) * [STK4_p] * [PRKCA] -K(245,2) * [STK4_p |PRKCA];
  R245: STK4_p => PRKCA; 1;
  // V(246) = K(246,1) * [STK4_p |PRKCA];
  R246: STK4_p => PRKCA; 1;
  // V(247) = K(247,1) * [BTK_p] * [RELA] -K(247,2) * [BTK_p |RELA];
  R247: BTK_p => RELA; 1;
  // V(248) = K(248,1) * [BTK_p |RELA];
  R248: BTK_p => RELA; 1;
  // V(249) = K(249,1) * [MAPK1_p] * [MAPK1] -K(249,2) * [MAPK1_p |MAPK1];
  R249: MAPK1 => MAPK1_p; 1;
  // V(250) = K(250,1) * [MAPK1_p |MAPK1];
  R250: MAPK1 => MAPK1_p; 1;
  // V(251) = K(251,1) * [CDK5_p] * [PARP1] -K(251,2) * [CDK5_p |PARP1];
  R251: PARP1 => CDK5_p; 1;
  // V(252) = K(252,1) * [CDK5_p |PARP1];
  R252: PARP1 => CDK5_p; 1;
  // V(253) = K(253,1) * [BTK_p] * [BTK] -K(253,2) * [BTK_p |BTK];
  R253: BTK_p => BTK; 1;
  // V(254) = K(254,1) * [BTK_p |BTK];
  R254: BTK_p => BTK; 1;
  // V(255) = K(255,1) * [LYN_p] * [LYN] -K(255,2) * [LYN_p |LYN];
  R255: LYN => LYN_p; 1;
  // V(256) = K(256,1) * [LYN_p |LYN];
  R256: LYN => LYN_p; 1;
  // V(257) = K(257,1) * [MAPK1_p] * [ZFP36] -K(257,2) * [MAPK1_p |ZFP36];
  R257: ZFP36 => MAPK1_p; 1;
  // V(258) = K(258,1) * [MAPK1_p |ZFP36];
  R258: ZFP36 => MAPK1_p; 1;
  // V(259) = K(259,1) * [MAPK1_p] * [RCAN1] -K(259,2) * [MAPK1_p |RCAN1];
  R259: RCAN1 => MAPK1_p; 1;
  // V(260) = K(260,1) * [MAPK1_p |RCAN1];
  R260: RCAN1 => MAPK1_p; 1;
  // V(261) = K(261,1) * [AKT1_p] * [MAP3K5] -K(261,2) * [AKT1_p |MAP3K5];
  R261: MAP3K5 => AKT1_p; 1;
  // V(262) = K(262,1) * [AKT1_p |MAP3K5];
  R262: MAP3K5 => AKT1_p; 1;
  // V(263) = K(263,1) * [FYN_p] * [PTPRJ] -K(263,2) * [FYN_p |PTPRJ];
  R263: FYN_p => PTPRJ; 1;
  // V(264) = K(264,1) * [FYN_p |PTPRJ];
  R264: FYN_p => PTPRJ; 1;
  // V(265) = K(265,1) * [AKT1_p] * [PARK7] -K(265,2) * [AKT1_p |PARK7];
  R265: AKT1_p => PARK7; 1;
  // V(266) = K(266,1) * [AKT1_p |PARK7];
  R266: AKT1_p => PARK7; 1;
  // V(267) = K(267,1) * [SGK1_p] * [SP1] -K(267,2) * [SGK1_p |SP1];
  R267: SP1 => SGK1_p; 1;
  // V(268) = K(268,1) * [SGK1_p |SP1];
  R268: SP1 => SGK1_p; 1;
  // V(269) = K(269,1) * [PRKAA1_p] * [HIPK2] -K(269,2) * [PRKAA1_p |HIPK2];
  R269: PRKAA1_p => HIPK2; 1;
  // V(270) = K(270,1) * [PRKAA1_p |HIPK2];
  R270: PRKAA1_p => HIPK2; 1;
  // V(271) = K(271,1) * [PDPK1_p] * [PKN1] -K(271,2) * [PDPK1_p |PKN1];
  R271: PDPK1_p => PKN1; 1;
  // V(272) = K(272,1) * [PDPK1_p |PKN1];
  R272: PDPK1_p => PKN1; 1;
  // V(273) = K(273,1) * [AKT1_p] * [HMOX1] -K(273,2) * [AKT1_p |HMOX1];
  R273: HMOX1 => AKT1_p; 1;
  // V(274) = K(274,1) * [AKT1_p |HMOX1];
  R274: HMOX1 => AKT1_p; 1;
  // V(275) = K(275,1) * [MAPK1_p] * [DNM1L] -K(275,2) * [MAPK1_p |DNM1L];
  R275: DNM1L => MAPK1_p; 1;
  // V(276) = K(276,1) * [MAPK1_p |DNM1L];
  R276: DNM1L => MAPK1_p; 1;
  // V(277) = K(277,1) * [INSR_p] * [IRS2] -K(277,2) * [INSR_p |IRS2];
  R277: INSR_p => IRS2; 1;
  // V(278) = K(278,1) * [INSR_p |IRS2];
  R278: INSR_p => IRS2; 1;
  // V(279) = K(279,1) * [SGK1_p] * [MAPK1] -K(279,2) * [SGK1_p |MAPK1];
  R279: SGK1_p => MAPK1; 1;
  // V(280) = K(280,1) * [SGK1_p |MAPK1];
  R280: SGK1_p => MAPK1; 1;
  // V(281) = K(281,1) * [CDK5_p] * [MAPK7] -K(281,2) * [CDK5_p |MAPK7];
  R281: MAPK7 => CDK5_p; 1;
  // V(282) = K(282,1) * [CDK5_p |MAPK7];
  R282: MAPK7 => CDK5_p; 1;
  // V(283) = K(283,1) * [PRKAA1_p] * [DDIT3] -K(283,2) * [PRKAA1_p |DDIT3];
  R283: DDIT3 => PRKAA1_p; 1;
  // V(284) = K(284,1) * [PRKAA1_p |DDIT3];
  R284: DDIT3 => PRKAA1_p; 1;
  // V(285) = K(285,1) * [RPS6KA3_p] * [TP53] -K(285,2) * [RPS6KA3_p |TP53];
  R285: TP53 => RPS6KA3_p; 1;
  // V(286) = K(286,1) * [RPS6KA3_p |TP53];
  R286: TP53 => RPS6KA3_p; 1;
  // V(287) = K(287,1) * [ROCK1] * [BECN1] -K(287,2) * [ROCK1 |BECN1];
  R287: ROCK1 => BECN1; 1;
  // V(288) = K(288,1) * [ROCK1 |BECN1];
  R288: ROCK1 => BECN1; 1;
  // V(289) = K(289,1) * [CDK5_p] * [CREB1] -K(289,2) * [CDK5_p |CREB1];
  R289: CREB1 => CDK5_p; 1;
  // V(290) = K(290,1) * [CDK5_p |CREB1];
  R290: CREB1 => CDK5_p; 1;
  // V(291) = K(291,1) * [PIK3CA] * [BTK] -K(291,2) * [PIK3CA |BTK];
  R291: PIK3CA => BTK; 1;
  // V(292) = K(292,1) * [PIK3CA |BTK];
  R292: PIK3CA => BTK; 1;
  // V(293) = K(293,1) * [HIPK2_p] * [EP300] -K(293,2) * [HIPK2_p |EP300];
  R293: EP300 => HIPK2_p; 1;
  // V(294) = K(294,1) * [HIPK2_p |EP300];
  R294: EP300 => HIPK2_p; 1;
  // V(295) = K(295,1) * [SGK1_p] * [NR3C1] -K(295,2) * [SGK1_p |NR3C1];
  R295: SGK1_p => NR3C1; 1;
  // V(296) = K(296,1) * [SGK1_p |NR3C1];
  R296: SGK1_p => NR3C1; 1;
  // V(297) = K(297,1) * [PKM_p] * [STAT3] -K(297,2) * [PKM_p |STAT3];
  R297: PKM_p => STAT3; 1;
  // V(298) = K(298,1) * [PKM_p |STAT3];
  R298: PKM_p => STAT3; 1;
  // V(299) = K(299,1) * [CDK5_p] * [PIK3C3] -K(299,2) * [CDK5_p |PIK3C3];
  R299: PIK3C3 => CDK5_p; 1;
  // V(300) = K(300,1) * [CDK5_p |PIK3C3];
  R300: PIK3C3 => CDK5_p; 1;
  // V(301) = K(301,1) * [AKT1_p] * [AKT1] -K(301,2) * [AKT1_p |AKT1];
  R301: AKT1 => AKT1_p; 1;
  // V(302) = K(302,1) * [AKT1_p |AKT1];
  R302: AKT1 => AKT1_p; 1;
  // V(303) = K(303,1) * [INSR_p] * [PTPN6] -K(303,2) * [INSR_p |PTPN6];
  R303: PTPN6 => INSR_p; 1;
  // V(304) = K(304,1) * [INSR_p |PTPN6];
  R304: PTPN6 => INSR_p; 1;
  // V(305) = K(305,1) * [JAK1_p] * [PTPN11] -K(305,2) * [JAK1_p |PTPN11];
  R305: PTPN11 => JAK1_p; 1;
  // V(306) = K(306,1) * [JAK1_p |PTPN11];
  R306: PTPN11 => JAK1_p; 1;
  // V(307) = K(307,1) * [JAK2_p] * [STAT3] -K(307,2) * [JAK2_p |STAT3];
  R307: JAK2_p => STAT3; 1;
  // V(308) = K(308,1) * [JAK2_p |STAT3];
  R308: JAK2_p => STAT3; 1;
  // V(309) = K(309,1) * [INSR_p] * [PTEN] -K(309,2) * [INSR_p |PTEN];
  R309: PTEN => INSR_p; 1;
  // V(310) = K(310,1) * [INSR_p |PTEN];
  R310: PTEN => INSR_p; 1;
  // V(311) = K(311,1) * [STK11_p] * [TP53] -K(311,2) * [STK11_p |TP53];
  R311: TP53 => STK11_p; 1;
  // V(312) = K(312,1) * [STK11_p |TP53];
  R312: TP53 => STK11_p; 1;
  // V(313) = K(313,1) * [STK4_p] * [BECN1] -K(313,2) * [STK4_p |BECN1];
  R313: STK4_p => BECN1; 1;
  // V(314) = K(314,1) * [STK4_p |BECN1];
  R314: STK4_p => BECN1; 1;
  // V(315) = K(315,1) * [STK4_p] * [PRDX1] -K(315,2) * [STK4_p |PRDX1];
  R315: STK4_p => PRDX1; 1;
  // V(316) = K(316,1) * [STK4_p |PRDX1];
  R316: STK4_p => PRDX1; 1;
  // V(317) = K(317,1) * [PRKAA1_p] * [MFF] -K(317,2) * [PRKAA1_p |MFF];
  R317: PRKAA1_p => MFF; 1;
  // V(318) = K(318,1) * [PRKAA1_p |MFF];
  R318: PRKAA1_p => MFF; 1;
  // V(319) = K(319,1) * [LYN_p] * [GLO1] -K(319,2) * [LYN_p |GLO1];
  R319: GLO1 => LYN_p; 1;
  // V(320) = K(320,1) * [LYN_p |GLO1];
  R320: GLO1 => LYN_p; 1;
  // V(321) = K(321,1) * [PIK3CA] * [AKT1] -K(321,2) * [PIK3CA |AKT1];
  R321: PIK3CA => AKT1; 1;
  // V(322) = K(322,1) * [PIK3CA |AKT1];
  R322: PIK3CA => AKT1; 1;
  // V(323) = K(323,1) * [CDK5_p] * [STAT3] -K(323,2) * [CDK5_p |STAT3];
  R323: CDK5_p => STAT3; 1;
  // V(324) = K(324,1) * [CDK5_p |STAT3];
  R324: CDK5_p => STAT3; 1;
  // V(325) = K(325,1) * [AKT1_p] * [CREB1] -K(325,2) * [AKT1_p |CREB1];
  R325: CREB1 => AKT1_p; 1;
  // V(326) = K(326,1) * [AKT1_p |CREB1];
  R326: CREB1 => AKT1_p; 1;
  // V(327) = K(327,1) * [AKT1_p] * [MAPK1] -K(327,2) * [AKT1_p |MAPK1];
  R327: MAPK1 => AKT1_p; 1;
  // V(328) = K(328,1) * [AKT1_p |MAPK1];
  R328: MAPK1 => AKT1_p; 1;
  // V(329) = K(329,1) * [CDK5_p] * [DNM1L] -K(329,2) * [CDK5_p |DNM1L];
  R329: DNM1L => CDK5_p; 1;
  // V(330) = K(330,1) * [CDK5_p |DNM1L];
  R330: DNM1L => CDK5_p; 1;
  // V(331) = K(331,1) * [IKBKB_p] * [RELA] -K(331,2) * [IKBKB_p |RELA];
  R331: RELA => IKBKB_p; 1;
  // V(332) = K(332,1) * [IKBKB_p |RELA];
  R332: RELA => IKBKB_p; 1;
  // V(333) = K(333,1) * [ROCK1] * [VIM] -K(333,2) * [ROCK1 |VIM];
  R333: ROCK1 => VIM; 1;
  // V(334) = K(334,1) * [ROCK1 |VIM];
  R334: ROCK1 => VIM; 1;
  // V(335) = K(335,1) * [CDK5_p] * [DNMT1] -K(335,2) * [CDK5_p |DNMT1];
  R335: DNMT1 => CDK5_p; 1;
  // V(336) = K(336,1) * [CDK5_p |DNMT1];
  R336: DNMT1 => CDK5_p; 1;
  // V(337) = K(337,1) * [PRKCA_p] * [NFE2L2] -K(337,2) * [PRKCA_p |NFE2L2];
  R337: PRKCA_p => NFE2L2; 1;
  // V(338) = K(338,1) * [PRKCA_p |NFE2L2];
  R338: PRKCA_p => NFE2L2; 1;
  // V(339) = K(339,1) * [FYN_p] * [CDK5] -K(339,2) * [FYN_p |CDK5];
  R339: CDK5 => FYN_p; 1;
  // V(340) = K(340,1) * [FYN_p |CDK5];
  R340: CDK5 => FYN_p; 1;
  // V(341) = K(341,1) * [STK4_p] * [SIRT1] -K(341,2) * [STK4_p |SIRT1];
  R341: STK4_p => SIRT1; 1;
  // V(342) = K(342,1) * [STK4_p |SIRT1];
  R342: STK4_p => SIRT1; 1;
  // V(343) = K(343,1) * [LYN_p] * [CDKN1B] -K(343,2) * [LYN_p |CDKN1B];
  R343: CDKN1B => LYN_p; 1;
  // V(344) = K(344,1) * [LYN_p |CDKN1B];
  R344: CDKN1B => LYN_p; 1;
  // V(345) = K(345,1) * [IKBKB_p] * [TP53] -K(345,2) * [IKBKB_p |TP53];
  R345: TP53 => IKBKB_p; 1;
  // V(346) = K(346,1) * [IKBKB_p |TP53];
  R346: TP53 => IKBKB_p; 1;
  // V(347) = K(347,1) * [JAK2_p] * [PTPN11] -K(347,2) * [JAK2_p |PTPN11];
  R347: JAK2_p => PTPN11; 1;
  // V(348) = K(348,1) * [JAK2_p |PTPN11];
  R348: JAK2_p => PTPN11; 1;
  // V(349) = K(349,1) * [ATR] * [TP53] -K(349,2) * [ATR |TP53];
  R349: TP53 => ATR; 1;
  // V(350) = K(350,1) * [ATR |TP53];
  R350: TP53 => ATR; 1;
  // V(351) = K(351,1) * [ATR] * [CREB1] -K(351,2) * [ATR |CREB1];
  R351: ATR => CREB1; 1;
  // V(352) = K(352,1) * [ATR |CREB1];
  R352: ATR => CREB1; 1;
  // V(353) = K(353,1) * [LYN_p] * [PTGS2] -K(353,2) * [LYN_p |PTGS2];
  R353: PTGS2 => LYN_p; 1;
  // V(354) = K(354,1) * [LYN_p |PTGS2];
  R354: PTGS2 => LYN_p; 1;
  // V(355) = K(355,1) * [LYN_p] * [BTK] -K(355,2) * [LYN_p |BTK];
  R355: BTK => LYN_p; 1;
  // V(356) = K(356,1) * [LYN_p |BTK];
  R356: BTK => LYN_p; 1;
  // V(357) = K(357,1) * [STK11_p] * [PRKAA1] -K(357,2) * [STK11_p |PRKAA1];
  R357: PRKAA1 => STK11_p; 1;
  // V(358) = K(358,1) * [STK11_p |PRKAA1];
  R358: PRKAA1 => STK11_p; 1;
  // V(359) = K(359,1) * [FYN_p] * [CTNNB1] -K(359,2) * [FYN_p |CTNNB1];
  R359: FYN_p => CTNNB1; 1;
  // V(360) = K(360,1) * [FYN_p |CTNNB1];
  R360: FYN_p => CTNNB1; 1;
  // V(361) = K(361,1) * [PRKCA_p] * [PTPN11] -K(361,2) * [PRKCA_p |PTPN11];
  R361: PTPN11 => PRKCA_p; 1;
  // V(362) = K(362,1) * [PRKCA_p |PTPN11];
  R362: PTPN11 => PRKCA_p; 1;
  // V(363) = K(363,1) * [MAPK1_p] * [TP53] -K(363,2) * [MAPK1_p |TP53];
  R363: TP53 => MAPK1_p; 1;
  // V(364) = K(364,1) * [MAPK1_p |TP53];
  R364: TP53 => MAPK1_p; 1;
  // V(365) = K(365,1) * [LYN_p] * [STAT3] -K(365,2) * [LYN_p |STAT3];
  R365: STAT3 => LYN_p; 1;
  // V(366) = K(366,1) * [LYN_p |STAT3];
  R366: STAT3 => LYN_p; 1;
  // V(367) = K(367,1) * [PRKAA1_p] * [NFE2L2] -K(367,2) * [PRKAA1_p |NFE2L2];
  R367: PRKAA1_p => NFE2L2; 1;
  // V(368) = K(368,1) * [PRKAA1_p |NFE2L2];
  R368: PRKAA1_p => NFE2L2; 1;
  // V(369) = K(369,1) * [HIPK2_p] * [CDKN1B] -K(369,2) * [HIPK2_p |CDKN1B];
  R369: CDKN1B => HIPK2_p; 1;
  // V(370) = K(370,1) * [HIPK2_p |CDKN1B];
  R370: CDKN1B => HIPK2_p; 1;
  // V(371) = K(371,1) * [HIPK2_p] * [TP53] -K(371,2) * [HIPK2_p |TP53];
  R371: TP53 => HIPK2_p; 1;
  // V(372) = K(372,1) * [HIPK2_p |TP53];
  R372: TP53 => HIPK2_p; 1;
  // V(373) = K(373,1) * [PRKAA1_p] * [PRKAA1] -K(373,2) * [PRKAA1_p |PRKAA1];
  R373: PRKAA1 => PRKAA1_p; 1;
  // V(374) = K(374,1) * [PRKAA1_p |PRKAA1];
  R374: PRKAA1 => PRKAA1_p; 1;
  // V(375) = K(375,1) * [RPS6KA3_p] * [STK11] -K(375,2) * [RPS6KA3_p |STK11];
  R375: RPS6KA3_p => STK11; 1;
  // V(376) = K(376,1) * [RPS6KA3_p |STK11];
  R376: RPS6KA3_p => STK11; 1;
  // V(377) = K(377,1) * [SGK1_p] * [STAT1] -K(377,2) * [SGK1_p |STAT1];
  R377: SGK1_p => STAT1; 1;
  // V(378) = K(378,1) * [SGK1_p |STAT1];
  R378: SGK1_p => STAT1; 1;
  // V(379) = K(379,1) * [TLR4] * [MAPK1] -K(379,2) * [TLR4 |MAPK1];
  R379: MAPK1 => TLR4; 1;
  // V(380) = K(380,1) * [TLR4 |MAPK1];
  R380: MAPK1 => TLR4; 1;
  // V(381) = K(381,1) * [MAPK7_p] * [SGK1] -K(381,2) * [MAPK7_p |SGK1];
  R381: SGK1 => MAPK7_p; 1;
  // V(382) = K(382,1) * [MAPK7_p |SGK1];
  R382: SGK1 => MAPK7_p; 1;
  // V(383) = K(383,1) * [PDPK1_p] * [PRKCA] -K(383,2) * [PDPK1_p |PRKCA];
  R383: PDPK1_p => PRKCA; 1;
  // V(384) = K(384,1) * [PDPK1_p |PRKCA];
  R384: PDPK1_p => PRKCA; 1;
  // V(385) = K(385,1) * [CDK5_p] * [CDKN1B] -K(385,2) * [CDK5_p |CDKN1B];
  R385: CDKN1B => CDK5_p; 1;
  // V(386) = K(386,1) * [CDK5_p |CDKN1B];
  R386: CDKN1B => CDK5_p; 1;
  // V(387) = K(387,1) * [FYN_p] * [RPS6KA3] -K(387,2) * [FYN_p |RPS6KA3];
  R387: FYN_p => RPS6KA3; 1;
  // V(388) = K(388,1) * [FYN_p |RPS6KA3];
  R388: FYN_p => RPS6KA3; 1;
  // V(389) = K(389,1) * [ILK_p] * [ILK] -K(389,2) * [ILK_p |ILK];
  R389: ILK_p => ILK; 1;
  // V(390) = K(390,1) * [ILK_p |ILK];
  R390: ILK_p => ILK; 1;
  // V(391) = K(391,1) * [LYN_p] * [SOCS1] -K(391,2) * [LYN_p |SOCS1];
  R391: SOCS1 => LYN_p; 1;
  // V(392) = K(392,1) * [LYN_p |SOCS1];
  R392: SOCS1 => LYN_p; 1;
  // V(393) = K(393,1) * [CDK5_p] * [VIM] -K(393,2) * [CDK5_p |VIM];
  R393: VIM => CDK5_p; 1;
  // V(394) = K(394,1) * [CDK5_p |VIM];
  R394: VIM => CDK5_p; 1;
  // V(395) = K(395,1) * [CDK5_p] * [HIF1A] -K(395,2) * [CDK5_p |HIF1A];
  R395: HIF1A => CDK5_p; 1;
  // V(396) = K(396,1) * [CDK5_p |HIF1A];
  R396: HIF1A => CDK5_p; 1;
  // V(397) = K(397,1) * [FYN_p] * [NFE2L2] -K(397,2) * [FYN_p |NFE2L2];
  R397: FYN_p => NFE2L2; 1;
  // V(398) = K(398,1) * [FYN_p |NFE2L2];
  R398: FYN_p => NFE2L2; 1;
  // V(399) = K(399,1) * [JAK2_p] * [BTK] -K(399,2) * [JAK2_p |BTK];
  R399: JAK2_p => BTK; 1;
  // V(400) = K(400,1) * [JAK2_p |BTK];
  R400: JAK2_p => BTK; 1;
  // V(401) = K(401,1) * [MAP3K5_p] * [CDKN1A] -K(401,2) * [MAP3K5_p |CDKN1A];
  R401: MAP3K5_p => CDKN1A; 1;
  // V(402) = K(402,1) * [MAP3K5_p |CDKN1A];
  R402: MAP3K5_p => CDKN1A; 1;
  // V(403) = K(403,1) * [MAPK7_p] * [RPS6KA3] -K(403,2) * [MAPK7_p |RPS6KA3];
  R403: RPS6KA3 => MAPK7_p; 1;
  // V(404) = K(404,1) * [MAPK7_p |RPS6KA3];
  R404: RPS6KA3 => MAPK7_p; 1;
  // V(405) = K(405,1) * [HIPK2_p] * [MDM2] -K(405,2) * [HIPK2_p |MDM2];
  R405: HIPK2_p => MDM2; 1;
  // V(406) = K(406,1) * [HIPK2_p |MDM2];
  R406: HIPK2_p => MDM2; 1;
  // V(407) = K(407,1) * [ROCK2] * [EP300] -K(407,2) * [ROCK2 |EP300];
  R407: EP300 => ROCK2; 1;
  // V(408) = K(408,1) * [ROCK2 |EP300];
  R408: EP300 => ROCK2; 1;
  // V(409) = K(409,1) * [CDK5_p] * [CTNNB1] -K(409,2) * [CDK5_p |CTNNB1];
  R409: CTNNB1 => CDK5_p; 1;
  // V(410) = K(410,1) * [CDK5_p |CTNNB1];
  R410: CTNNB1 => CDK5_p; 1;
  // V(411) = K(411,1) * [MAPK1_p] * [STAT3] -K(411,2) * [MAPK1_p |STAT3];
  R411: STAT3 => MAPK1_p; 1;
  // V(412) = K(412,1) * [MAPK1_p |STAT3];
  R412: STAT3 => MAPK1_p; 1;
  // V(413) = K(413,1) * [BTK_p] * [STAT5A] -K(413,2) * [BTK_p |STAT5A];
  R413: BTK_p => STAT5A; 1;
  // V(414) = K(414,1) * [BTK_p |STAT5A];
  R414: BTK_p => STAT5A; 1;
  // V(415) = K(415,1) * [AKT1_p] * [BECN1] -K(415,2) * [AKT1_p |BECN1];
  R415: BECN1 => AKT1_p; 1;
  // V(416) = K(416,1) * [AKT1_p |BECN1];
  R416: BECN1 => AKT1_p; 1;
  // V(417) = K(417,1) * [CDK5_p] * [SIRT2] -K(417,2) * [CDK5_p |SIRT2];
  R417: SIRT2 => CDK5_p; 1;
  // V(418) = K(418,1) * [CDK5_p |SIRT2];
  R418: SIRT2 => CDK5_p; 1;
  // V(419) = K(419,1) * [ROCK1] * [PDPK1] -K(419,2) * [ROCK1 |PDPK1];
  R419: ROCK1 => PDPK1; 1;
  // V(420) = K(420,1) * [ROCK1 |PDPK1];
  R420: ROCK1 => PDPK1; 1;
  // V(421) = K(421,1) * [IRAK1_p] * [STAT3] -K(421,2) * [IRAK1_p |STAT3];
  R421: IRAK1_p => STAT3; 1;
  // V(422) = K(422,1) * [IRAK1_p |STAT3];
  R422: IRAK1_p => STAT3; 1;
  // V(423) = K(423,1) * [RPS6KB1_p] * [PDPK1] -K(423,2) * [RPS6KB1_p |PDPK1];
  R423: PDPK1 => RPS6KB1_p; 1;
  // V(424) = K(424,1) * [RPS6KB1_p |PDPK1];
  R424: PDPK1 => RPS6KB1_p; 1;
  // V(425) = K(425,1) * [MAPK1_p] * [NR4A1] -K(425,2) * [MAPK1_p |NR4A1];
  R425: NR4A1 => MAPK1_p; 1;
  // V(426) = K(426,1) * [MAPK1_p |NR4A1];
  R426: NR4A1 => MAPK1_p; 1;
  // V(427) = K(427,1) * [IKBKB_p] * [BAD] -K(427,2) * [IKBKB_p |BAD];
  R427: BAD => IKBKB_p; 1;
  // V(428) = K(428,1) * [IKBKB_p |BAD];
  R428: BAD => IKBKB_p; 1;
  // V(429) = K(429,1) * [BTK_p] * [MDM2] -K(429,2) * [BTK_p |MDM2];
  R429: BTK_p => MDM2; 1;
  // V(430) = K(430,1) * [BTK_p |MDM2];
  R430: BTK_p => MDM2; 1;
  // V(431) = K(431,1) * [MAPK1_p] * [TXNIP] -K(431,2) * [MAPK1_p |TXNIP];
  R431: TXNIP => MAPK1_p; 1;
  // V(432) = K(432,1) * [MAPK1_p |TXNIP];
  R432: TXNIP => MAPK1_p; 1;
  // V(433) = K(433,1) * [STK11_p] * [CDKN1A] -K(433,2) * [STK11_p |CDKN1A];
  R433: STK11_p => CDKN1A; 1;
  // V(434) = K(434,1) * [STK11_p |CDKN1A];
  R434: STK11_p => CDKN1A; 1;
  // V(435) = K(435,1) * [MAPK9_p] * [STAT3] -K(435,2) * [MAPK9_p |STAT3];
  R435: STAT3 => MAPK9_p; 1;
  // V(436) = K(436,1) * [MAPK9_p |STAT3];
  R436: STAT3 => MAPK9_p; 1;
  // V(437) = K(437,1) * [PRKCA_p] * [TP53] -K(437,2) * [PRKCA_p |TP53];
  R437: TP53 => PRKCA_p; 1;
  // V(438) = K(438,1) * [PRKCA_p |TP53];
  R438: TP53 => PRKCA_p; 1;
  // V(439) = K(439,1) * [TLR4] * [MAPK9] -K(439,2) * [TLR4 |MAPK9];
  R439: MAPK9 => TLR4; 1;
  // V(440) = K(440,1) * [TLR4 |MAPK9];
  R440: MAPK9 => TLR4; 1;
  // V(441) = K(441,1) * [AKT1_p] * [BAX] -K(441,2) * [AKT1_p |BAX];
  R441: AKT1_p => BAX; 1;
  // V(442) = K(442,1) * [AKT1_p |BAX];
  R442: AKT1_p => BAX; 1;
  // V(443) = K(443,1) * [JAK2_p] * [SIGNOR-C118] -K(443,2) * [JAK2_p |SIGNOR-C118];
  R443: JAK2_p => ; 1;
  // V(444) = K(444,1) * [JAK2_p |SIGNOR-C118];
  R444: JAK2_p => ; 1;
  // V(445) = K(445,1) * [LYN_p] * [PTPN6] -K(445,2) * [LYN_p |PTPN6];
  R445: PTPN6 => LYN_p; 1;
  // V(446) = K(446,1) * [LYN_p |PTPN6];
  R446: PTPN6 => LYN_p; 1;
  // V(447) = K(447,1) * [PRKAA1_p] * [CDKN1B] -K(447,2) * [PRKAA1_p |CDKN1B];
  R447: CDKN1B => PRKAA1_p; 1;
  // V(448) = K(448,1) * [PRKAA1_p |CDKN1B];
  R448: CDKN1B => PRKAA1_p; 1;
  // V(449) = K(449,1) * [HIPK2_p] * [CREB1] -K(449,2) * [HIPK2_p |CREB1];
  R449: CREB1 => HIPK2_p; 1;
  // V(450) = K(450,1) * [HIPK2_p |CREB1];
  R450: CREB1 => HIPK2_p; 1;
  // V(451) = K(451,1) * [PRKAA1_p] * [TP53] -K(451,2) * [PRKAA1_p |TP53];
  R451: TP53 => PRKAA1_p; 1;
  // V(452) = K(452,1) * [PRKAA1_p |TP53];
  R452: TP53 => PRKAA1_p; 1;
  // V(453) = K(453,1) * [PTPRJ_p] * [INSR_p] -K(453,2) * [PTPRJ_p |INSR_p];
  R453: PTPRJ_p => INSR_p; 1;
  // V(454) = K(454,1) * [PTPRJ_p |INSR_p];
  R454: PTPRJ_p => INSR_p; 1;
  // V(455) = K(455,1) * [PTPRJ_p] * [MAPK1_p] -K(455,2) * [PTPRJ_p |MAPK1_p];
  R455: PTPRJ_p => MAPK1_p; 1;
  // V(456) = K(456,1) * [PTPRJ_p |MAPK1_p];
  R456: PTPRJ_p => MAPK1_p; 1;
  // V(457) = K(457,1) * [PTPN6_p] * [JAK2_p] -K(457,2) * [PTPN6_p |JAK2_p];
  R457: PTPN6_p => JAK2_p; 1;
  // V(458) = K(458,1) * [PTPN6_p |JAK2_p];
  R458: PTPN6_p => JAK2_p; 1;
  // V(459) = K(459,1) * [PTPRJ_p] * [CTNNB1_p] -K(459,2) * [PTPRJ_p |CTNNB1_p];
  R459: PTPRJ_p => CTNNB1_p; 1;
  // V(460) = K(460,1) * [PTPRJ_p |CTNNB1_p];
  R460: PTPRJ_p => CTNNB1_p; 1;
  // V(461) = K(461,1) * [PTEN_p] * [RPS6KB1_p] -K(461,2) * [PTEN_p |RPS6KB1_p];
  R461: PTEN_p => RPS6KB1_p; 1;
  // V(462) = K(462,1) * [PTEN_p |RPS6KB1_p];
  R462: PTEN_p => RPS6KB1_p; 1;
  // V(463) = K(463,1) * [PTPN2] * [INSR_p] -K(463,2) * [PTPN2 |INSR_p];
  R463: INSR_p => PTPN2; 1;
  // V(464) = K(464,1) * [PTPN2 |INSR_p];
  R464: INSR_p => PTPN2; 1;
  // V(465) = K(465,1) * [DUSP1_p] * [MAPK9_p] -K(465,2) * [DUSP1_p |MAPK9_p];
  R465: DUSP1_p => MAPK9_p; 1;
  // V(466) = K(466,1) * [DUSP1_p |MAPK9_p];
  R466: DUSP1_p => MAPK9_p; 1;
  // V(467) = K(467,1) * [PTPN2] * [FYN_p] -K(467,2) * [PTPN2 |FYN_p];
  R467: FYN_p => PTPN2; 1;
  // V(468) = K(468,1) * [PTPN2 |FYN_p];
  R468: FYN_p => PTPN2; 1;
  // V(469) = K(469,1) * [PTPN6_p] * [PKM_p] -K(469,2) * [PTPN6_p |PKM_p];
  R469: PTPN6_p => PKM_p; 1;
  // V(470) = K(470,1) * [PTPN6_p |PKM_p];
  R470: PTPN6_p => PKM_p; 1;
  // V(471) = K(471,1) * [PTPN6_p] * [INSR_p] -K(471,2) * [PTPN6_p |INSR_p];
  R471: PTPN6_p => INSR_p; 1;
  // V(472) = K(472,1) * [PTPN6_p |INSR_p];
  R472: PTPN6_p => INSR_p; 1;
  // V(473) = K(473,1) * [DUSP1_p] * [MAPK1_p] -K(473,2) * [DUSP1_p |MAPK1_p];
  R473: DUSP1_p => MAPK1_p; 1;
  // V(474) = K(474,1) * [DUSP1_p |MAPK1_p];
  R474: DUSP1_p => MAPK1_p; 1;
  // V(475) = K(475,1) * [PTPN2] * [JAK1_p] -K(475,2) * [PTPN2 |JAK1_p];
  R475: PTPN2 => JAK1_p; 1;
  // V(476) = K(476,1) * [PTPN2 |JAK1_p];
  R476: PTPN2 => JAK1_p; 1;
  // V(477) = K(477,1) * [PTPN11_p] * [IRF8_p] -K(477,2) * [PTPN11_p |IRF8_p];
  R477: IRF8_p => PTPN11_p; 1;
  // V(478) = K(478,1) * [PTPN11_p |IRF8_p];
  R478: IRF8_p => PTPN11_p; 1;
  // V(479) = K(479,1) * [PTPN6_p] * [JAK1_p] -K(479,2) * [PTPN6_p |JAK1_p];
  R479: PTPN6_p => JAK1_p; 1;
  // V(480) = K(480,1) * [PTPN6_p |JAK1_p];
  R480: PTPN6_p => JAK1_p; 1;
  // V(481) = K(481,1) * [PTPRB] * [INSR_p] -K(481,2) * [PTPRB |INSR_p];
  R481: INSR_p => PTPRB; 1;
  // V(482) = K(482,1) * [PTPRB |INSR_p];
  R482: INSR_p => PTPRB; 1;
  // V(483) = K(483,1) * [PTPN11_p] * [MAP3K5_p] -K(483,2) * [PTPN11_p |MAP3K5_p];
  R483: PTPN11_p => MAP3K5_p; 1;
  // V(484) = K(484,1) * [PTPN11_p |MAP3K5_p];
  R484: PTPN11_p => MAP3K5_p; 1;
  // V(485) = K(485,1) * [PTEN_p] * [SP1_p] -K(485,2) * [PTEN_p |SP1_p];
  R485: PTEN_p => SP1_p; 1;
  // V(486) = K(486,1) * [PTEN_p |SP1_p];
  R486: PTEN_p => SP1_p; 1;
  // V(487) = K(487,1) * [PTPN2] * [STAT3_p] -K(487,2) * [PTPN2 |STAT3_p];
  R487: STAT3_p => PTPN2; 1;
  // V(488) = K(488,1) * [PTPN2 |STAT3_p];
  R488: STAT3_p => PTPN2; 1;
  // V(489) = K(489,1) * [PTPN11_p] * [JAK2_p] -K(489,2) * [PTPN11_p |JAK2_p];
  R489: JAK2_p => PTPN11_p; 1;
  // V(490) = K(490,1) * [PTPN11_p |JAK2_p];
  R490: JAK2_p => PTPN11_p; 1;
  // V(491) = K(491,1) * [PTPRB] * [MAPK1_p] -K(491,2) * [PTPRB |MAPK1_p];
  R491: PTPRB => MAPK1_p; 1;
  // V(492) = K(492,1) * [PTPRB |MAPK1_p];
  R492: PTPRB => MAPK1_p; 1;
  // V(493) = K(493,1) * [PTEN_p] * [PTEN_p] -K(493,2) * [PTEN_p |PTEN_p];
  R493: PTEN_p => ; 1;
  // V(494) = K(494,1) * [PTEN_p |PTEN_p];
  R494: PTEN_p => ; 1;
  // V(495) = K(495,1) * [PTPRJ_p] * [JAK2_p] -K(495,2) * [PTPRJ_p |JAK2_p];
  R495: PTPRJ_p => JAK2_p; 1;
  // V(496) = K(496,1) * [PTPRJ_p |JAK2_p];
  R496: PTPRJ_p => JAK2_p; 1;
  // V(497) = K(497,1) * [PTPN2] * [STAT1_p] -K(497,2) * [PTPN2 |STAT1_p];
  R497: STAT1_p => PTPN2; 1;
  // V(498) = K(498,1) * [PTPN2 |STAT1_p];
  R498: STAT1_p => PTPN2; 1;
  // V(499) = K(499,1) * [PTPN11_p] * [CDKN1B_p] -K(499,2) * [PTPN11_p |CDKN1B_p];
  R499: PTPN11_p => CDKN1B_p; 1;
  // V(500) = K(500,1) * [PTPN11_p |CDKN1B_p];
  R500: PTPN11_p => CDKN1B_p; 1;
  // V(501) = K(501,1) * [PTPN6_p] * [STAT3_p] -K(501,2) * [PTPN6_p |STAT3_p];
  R501: PTPN6_p => STAT3_p; 1;
  // V(502) = K(502,1) * [PTPN6_p |STAT3_p];
  R502: PTPN6_p => STAT3_p; 1;
  // V(503) = K(503,1) * [PTEN_p] * [IRF3_p] -K(503,2) * [PTEN_p |IRF3_p];
  R503: PTEN_p => IRF3_p; 1;
  // V(504) = K(504,1) * [PTEN_p |IRF3_p];
  R504: PTEN_p => IRF3_p; 1;
  // V(505) = K(505,1) * [PTEN_p] * [STAT5A_p] -K(505,2) * [PTEN_p |STAT5A_p];
  R505: PTEN_p => STAT5A_p; 1;
  // V(506) = K(506,1) * [PTEN_p |STAT5A_p];
  R506: PTEN_p => STAT5A_p; 1;
  // V(507) = K(507,1) * [PTPN11_p] * [STAT1_p] -K(507,2) * [PTPN11_p |STAT1_p];
  R507: STAT1_p => PTPN11_p; 1;
  // V(508) = K(508,1) * [PTPN11_p |STAT1_p];
  R508: STAT1_p => PTPN11_p; 1;
  // V(509) = K(509,1) * [PTEN_p] * [CREB1_p] -K(509,2) * [PTEN_p |CREB1_p];
  R509: PTEN_p => CREB1_p; 1;
  // V(510) = K(510,1) * [PTEN_p |CREB1_p];
  R510: PTEN_p => CREB1_p; 1;
  // V(511) = K(511,1) * [DUSP1_p] * [JUN_p] -K(511,2) * [DUSP1_p |JUN_p];
  R511: JUN_p => DUSP1_p; 1;
  // V(512) = K(512,1) * [DUSP1_p |JUN_p];
  R512: JUN_p => DUSP1_p; 1;
  // V(513) = K(513,1) * [PTPN6_p] * [CTNNB1_p] -K(513,2) * [PTPN6_p |CTNNB1_p];
  R513: PTPN6_p => CTNNB1_p; 1;
  // V(514) = K(514,1) * [PTPN6_p |CTNNB1_p];
  R514: PTPN6_p => CTNNB1_p; 1;
  // V(515) = K(515,1) * [PTPN11_p] * [STAT3_p] -K(515,2) * [PTPN11_p |STAT3_p];
  R515: STAT3_p => PTPN11_p; 1;
  // V(516) = K(516,1) * [PTPN11_p |STAT3_p];
  R516: STAT3_p => PTPN11_p; 1;
  // V(517) = K(517,1) * [PTPN2] * [STAT5A_p] -K(517,2) * [PTPN2 |STAT5A_p];
  R517: STAT5A_p => PTPN2; 1;
  // V(518) = K(518,1) * [PTPN2 |STAT5A_p];
  R518: STAT5A_p => PTPN2; 1;
  // V(519) = K(519,1) * [PTPN6_p] * [LYN_p] -K(519,2) * [PTPN6_p |LYN_p];
  R519: PTPN6_p => LYN_p; 1;
  // V(520) = K(520,1) * [PTPN6_p |LYN_p];
  R520: PTPN6_p => LYN_p; 1;
  // V(521) = K(521,1) * [MDM2_p] * [IRF1] -K(521,2) * [MDM2_p |IRF1];
  R521: IRF1 => MDM2_p; 1;
  // V(522) = K(522,1) * [MDM2_p |IRF1];
  R522: IRF1 => MDM2_p; 1;
  // V(523) = K(523,1) * [MDM2_p] * [HIF1A] -K(523,2) * [MDM2_p |HIF1A];
  R523: HIF1A => MDM2_p; 1;
  // V(524) = K(524,1) * [MDM2_p |HIF1A];
  R524: HIF1A => MDM2_p; 1;
  // V(525) = K(525,1) * [RNF7] * [HIF1A] -K(525,2) * [RNF7 |HIF1A];
  R525: HIF1A => RNF7; 1;
  // V(526) = K(526,1) * [RNF7 |HIF1A];
  R526: HIF1A => RNF7; 1;
  // V(527) = K(527,1) * [MDM2_p] * [NUMB] -K(527,2) * [MDM2_p |NUMB];
  R527: MDM2_p => NUMB; 1;
  // V(528) = K(528,1) * [MDM2_p |NUMB];
  R528: MDM2_p => NUMB; 1;
  // V(529) = K(529,1) * [SOCS1] * [JAK2] -K(529,2) * [SOCS1 |JAK2];
  R529: JAK2 => SOCS1; 1;
  // V(530) = K(530,1) * [SOCS1 |JAK2];
  R530: JAK2 => SOCS1; 1;
  // V(531) = K(531,1) * [RNF7] * [CDKN1B] -K(531,2) * [RNF7 |CDKN1B];
  R531: CDKN1B => RNF7; 1;
  // V(532) = K(532,1) * [RNF7 |CDKN1B];
  R532: CDKN1B => RNF7; 1;
  // V(533) = K(533,1) * [MDM2_p] * [TP53] -K(533,2) * [MDM2_p |TP53];
  R533: TP53 => MDM2_p; 1;
  // V(534) = K(534,1) * [MDM2_p |TP53];
  R534: TP53 => MDM2_p; 1;
  // V(535) = K(535,1) * [MDM2_p] * [HDAC1] -K(535,2) * [MDM2_p |HDAC1];
  R535: MDM2_p => HDAC1; 1;
  // V(536) = K(536,1) * [MDM2_p |HDAC1];
  R536: MDM2_p => HDAC1; 1;
  // V(537) = K(537,1) * [RNF7] * [JUN] -K(537,2) * [RNF7 |JUN];
  R537: JUN => RNF7; 1;
  // V(538) = K(538,1) * [RNF7 |JUN];
  R538: JUN => RNF7; 1;
  // V(539) = K(539,1) * [RNF7] * [CASP3] -K(539,2) * [RNF7 |CASP3];
  R539: RNF7 => CASP3; 1;
  // V(540) = K(540,1) * [RNF7 |CASP3];
  R540: RNF7 => CASP3; 1;
  // V(541) = K(541,1) * [JUN_p] * [SP1_p] * [TGFB1_g] -K(541,2) * [JUN_p |SP1_p |TGFB1_g];
  R541: SP1_p => TGFB1_g; 1;
  // V(542) = K(542,1) * [JUN_p |SP1_p |TGFB1_g];
  R542: SP1_p => TGFB1_g; 1;
  // V(543) = K(543,1) * [TGFB1_rna];
  R543: TGFB1_rna => ; 1;
  // V(544) = K(544,1) * [TP53_p] * [VCAN_g] -K(544,2) * [TP53_p |VCAN_g];
  R544: VCAN_g => TP53_p; 1;
  // V(545) = K(545,1) * [TP53_p |VCAN_g];
  R545: VCAN_g => TP53_p; 1;
  // V(546) = K(546,1) * [VCAN_rna];
  R546: VCAN_rna => ; 1;
  // V(547) = K(547,1) * [TP53_p] * [CDKN1A_g] -K(547,2) * [TP53_p |CDKN1A_g];
  R547: CDKN1A_g => TP53_p; 1;
  // V(548) = K(548,1) * [TP53_p |CDKN1A_g];
  R548: CDKN1A_g => TP53_p; 1;
  // V(549) = K(549,1) * [CDKN1A_rna];
  R549: CDKN1A_rna => ; 1;
  // V(550) = K(550,1) * [NFE2L2_p] * [SOD1_g] -K(550,2) * [NFE2L2_p |SOD1_g];
  R550: SOD1_g => NFE2L2_p; 1;
  // V(551) = K(551,1) * [NFE2L2_p |SOD1_g];
  R551: SOD1_g => NFE2L2_p; 1;
  // V(552) = K(552,1) * [SOD1_rna];
  R552: SOD1_rna => ; 1;
  // V(553) = K(553,1) * [STAT3_p] * [STAT1_p] * [SIGNOR-C13] * [STAT5A_p] * [SOCS3_g] -K(553,2) * [STAT3_p |STAT1_p |SIGNOR-C13 |STAT5A_p |SOCS3_g];
  R553: STAT3_p => STAT5A_p; 1;
  // V(554) = K(554,1) * [STAT3_p |STAT1_p |SIGNOR-C13 |STAT5A_p |SOCS3_g];
  R554: STAT3_p => STAT5A_p; 1;
  // V(555) = K(555,1) * [SOCS3_rna];
  R555: SOCS3_rna => ; 1;
  // V(556) = K(556,1) * [TP53_p] * [BAX_g] -K(556,2) * [TP53_p |BAX_g];
  R556: BAX_g => TP53_p; 1;
  // V(557) = K(557,1) * [TP53_p |BAX_g];
  R557: BAX_g => TP53_p; 1;
  // V(558) = K(558,1) * [BAX_rna];
  R558: BAX_rna => ; 1;
  // V(559) = K(559,1) * [NFE2L2_p] * [CAT_g] -K(559,2) * [NFE2L2_p |CAT_g];
  R559: CAT_g => NFE2L2_p; 1;
  // V(560) = K(560,1) * [NFE2L2_p |CAT_g];
  R560: CAT_g => NFE2L2_p; 1;
  // V(561) = K(561,1) * [CAT_rna];
  R561: CAT_rna => ; 1;
  // V(562) = K(562,1) * [NFE2L2_p] * [GCLC_g] -K(562,2) * [NFE2L2_p |GCLC_g];
  R562: GCLC_g => NFE2L2_p; 1;
  // V(563) = K(563,1) * [NFE2L2_p |GCLC_g];
  R563: GCLC_g => NFE2L2_p; 1;
  // V(564) = K(564,1) * [GCLC_rna];
  R564: GCLC_rna => ; 1;
  // V(565) = K(565,1) * [HIF1A_p] * [KDM6B_g] -K(565,2) * [HIF1A_p |KDM6B_g];
  R565: KDM6B_g => HIF1A_p; 1;
  // V(566) = K(566,1) * [HIF1A_p |KDM6B_g];
  R566: KDM6B_g => HIF1A_p; 1;
  // V(567) = K(567,1) * [KDM6B_rna];
  R567: KDM6B_rna => ; 1;
  // V(568) = K(568,1) * [NR3C1_p] * [KLF9_g] -K(568,2) * [NR3C1_p |KLF9_g];
  R568: KLF9_g => NR3C1_p; 1;
  // V(569) = K(569,1) * [NR3C1_p |KLF9_g];
  R569: KLF9_g => NR3C1_p; 1;
  // V(570) = K(570,1) * [KLF9_rna];
  R570: KLF9_rna => ; 1;
  // V(571) = K(571,1) * [CREB1_p] * [IRS2_g] -K(571,2) * [CREB1_p |IRS2_g];
  R571: CREB1_p => IRS2_g; 1;
  // V(572) = K(572,1) * [CREB1_p |IRS2_g];
  R572: CREB1_p => IRS2_g; 1;
  // V(573) = K(573,1) * [IRS2_rna];
  R573: IRS2_rna => ; 1;
  // V(574) = K(574,1) * [NFE2L2_p] * [GPX4_g] -K(574,2) * [NFE2L2_p |GPX4_g];
  R574: GPX4_g => NFE2L2_p; 1;
  // V(575) = K(575,1) * [NFE2L2_p |GPX4_g];
  R575: GPX4_g => NFE2L2_p; 1;
  // V(576) = K(576,1) * [GPX4_rna];
  R576: GPX4_rna => ; 1;
  // V(577) = K(577,1) * [NFE2L2_p] * [HMOX1_g] -K(577,2) * [NFE2L2_p |HMOX1_g];
  R577: HMOX1_g => NFE2L2_p; 1;
  // V(578) = K(578,1) * [NFE2L2_p |HMOX1_g];
  R578: HMOX1_g => NFE2L2_p; 1;
  // V(579) = K(579,1) * [HMOX1_rna];
  R579: HMOX1_rna => ; 1;
  // V(580) = K(580,1) * [NFE2L2_p] * [SOD2_g] -K(580,2) * [NFE2L2_p |SOD2_g];
  R580: SOD2_g => NFE2L2_p; 1;
  // V(581) = K(581,1) * [NFE2L2_p |SOD2_g];
  R581: SOD2_g => NFE2L2_p; 1;
  // V(582) = K(582,1) * [SOD2_rna];
  R582: SOD2_rna => ; 1;
  // V(583) = K(583,1) * [TP53_p] * [SCO2_g] -K(583,2) * [TP53_p |SCO2_g];
  R583: SCO2_g => TP53_p; 1;
  // V(584) = K(584,1) * [TP53_p |SCO2_g];
  R584: SCO2_g => TP53_p; 1;
  // V(585) = K(585,1) * [SCO2_rna];
  R585: SCO2_rna => ; 1;
  // V(586) = K(586,1) * [TFEB] * [BECN1_g] -K(586,2) * [TFEB |BECN1_g];
  R586: TFEB => BECN1_g; 1;
  // V(587) = K(587,1) * [TFEB |BECN1_g];
  R587: TFEB => BECN1_g; 1;
  // V(588) = K(588,1) * [BECN1_rna];
  R588: BECN1_rna => ; 1;
  // V(589) = K(589,1) * [STAT3_p] * [STAT1_g] -K(589,2) * [STAT3_p |STAT1_g];
  R589: STAT3_p => STAT1_g; 1;
  // V(590) = K(590,1) * [STAT3_p |STAT1_g];
  R590: STAT3_p => STAT1_g; 1;
  // V(591) = K(591,1) * [STAT1_rna];
  R591: STAT1_rna => ; 1;
  // V(592) = K(592,1) * [HES1] * [NR3C1_g] -K(592,2) * [HES1 |NR3C1_g];
  R592: HES1 => NR3C1_g; 1;
  // V(593) = K(593,1) * [NR3C1_g];
  R593: NR3C1_g => ; 1;
  // V(594) = K(594,1) * [NR3C1_rna];
  R594: NR3C1_rna => ; 1;
  // V(595) = K(595,1) * [NR3C1_p] * [JUN_g] -K(595,2) * [NR3C1_p |JUN_g];
  R595: JUN_g => NR3C1_p; 1;
  // V(596) = K(596,1) * [JUN_g];
  R596: JUN_g => ; 1;
  // V(597) = K(597,1) * [JUN_rna];
  R597: JUN_rna => ; 1;
  // V(598) = K(598,1) * [MECP2_p] * [SGK1_g] -K(598,2) * [MECP2_p |SGK1_g];
  R598: MECP2_p => SGK1_g; 1;
  // V(599) = K(599,1) * [SGK1_g];
  R599: SGK1_g => ; 1;
  // V(600) = K(600,1) * [SGK1_rna];
  R600: SGK1_rna => ; 1;
  // V(601) = K(601,1) * [HES1] * [RCAN1_g] -K(601,2) * [HES1 |RCAN1_g];
  R601: HES1 => RCAN1_g; 1;
  // V(602) = K(602,1) * [RCAN1_g];
  R602: RCAN1_g => ; 1;
  // V(603) = K(603,1) * [RCAN1_rna];
  R603: RCAN1_rna => ; 1;
  // V(604) = K(604,1) * [NR3C1_p] * [NFKB1_g] -K(604,2) * [NR3C1_p |NFKB1_g];
  R604: NR3C1_p => NFKB1_g; 1;
  // V(605) = K(605,1) * [NFKB1_g];
  R605: NFKB1_g => ; 1;
  // V(606) = K(606,1) * [NFKB1_rna];
  R606: NFKB1_rna => ; 1;
  // V(607) = K(607,1) * [SGK1];
  R607: SGK1 => ; 1;
  // V(608) = K(608,1) * [TLR4];
  R608: TLR4 => ; 1;
  // V(609) = K(609,1) * [DNM1L];
  R609: DNM1L => ; 1;
  // V(610) = K(610,1) * [SOCS3];
  R610: SOCS3 => ; 1;
  // V(611) = K(611,1) * [IKBKB];
  R611: IKBKB => ; 1;
  // V(612) = K(612,1) * [KDM6B];
  R612: KDM6B => ; 1;
  // V(613) = K(613,1) * [SOCS1];
  R613: SOCS1 => ; 1;
  // V(614) = K(614,1) * [PDPK1];
  R614: PDPK1 => ; 1;
  // V(615) = K(615,1) * [SCO2];
  R615: SCO2 => ; 1;
  // V(616) = K(616,1) * [TLR2];
  R616: TLR2 => ; 1;
  // V(617) = K(617,1) * [JAK2];
  R617: JAK2 => ; 1;
  // V(618) = K(618,1) * [ROCK2];
  R618: ROCK2 => ; 1;
  // V(619) = K(619,1) * [MFN2];
  R619: MFN2 => ; 1;
  // V(620) = K(620,1) * [SOD1];
  R620: SOD1 => ; 1;
  // V(621) = K(621,1) * [FOS];
  R621: FOS => ; 1;
  // V(622) = K(622,1) * [TGFB1];
  R622: TGFB1 => ; 1;
  // V(623) = K(623,1) * [CAT];
  R623: CAT => ; 1;
  // V(624) = K(624,1) * [NR3C1];
  R624: NR3C1 => ; 1;
  // V(625) = K(625,1) * [SOD2];
  R625: SOD2 => ; 1;
  // V(626) = K(626,1) * [TP53];
  R626: TP53 => ; 1;
  // V(627) = K(627,1) * [HSPB1];
  R627: HSPB1 => ; 1;
  // V(628) = K(628,1) * [JUN];
  R628: JUN => ; 1;
  // V(629) = K(629,1) * [INSR];
  R629: INSR => ; 1;
  // V(630) = K(630,1) * [FYN];
  R630: FYN => ; 1;
  // V(631) = K(631,1) * [LYN];
  R631: LYN => ; 1;
  // V(632) = K(632,1) * [SP1];
  R632: SP1 => ; 1;
  // V(633) = K(633,1) * [VIM];
  R633: VIM => ; 1;
  // V(634) = K(634,1) * [IL6R];
  R634: IL6R => ; 1;
  // V(635) = K(635,1) * [HMOX1];
  R635: HMOX1 => ; 1;
  // V(636) = K(636,1) * [PARP1];
  R636: PARP1 => ; 1;
  // V(637) = K(637,1) * [CALM1];
  R637: CALM1 => ; 1;
  // V(638) = K(638,1) * [IRF1];
  R638: IRF1 => ; 1;
  // V(639) = K(639,1) * [CYBA];
  R639: CYBA => ; 1;
  // V(640) = K(640,1) * [VCAN];
  R640: VCAN => ; 1;
  // V(641) = K(641,1) * [NCF1];
  R641: NCF1 => ; 1;
  // V(642) = K(642,1) * [PKM];
  R642: PKM => ; 1;
  // V(643) = K(643,1) * [CREB1];
  R643: CREB1 => ; 1;
  // V(644) = K(644,1) * [PRKCA];
  R644: PRKCA => ; 1;
  // V(645) = K(645,1) * [PTPN2];
  R645: PTPN2 => ; 1;
  // V(646) = K(646,1) * [TFEB];
  R646: TFEB => ; 1;
  // V(647) = K(647,1) * [NFKB1];
  R647: NFKB1 => ; 1;
  // V(648) = K(648,1) * [NR4A1];
  R648: NR4A1 => ; 1;
  // V(649) = K(649,1) * [RPS6KB1];
  R649: RPS6KB1 => ; 1;
  // V(650) = K(650,1) * [JAK1];
  R650: JAK1 => ; 1;
  // V(651) = K(651,1) * [PTPRB];
  R651: PTPRB => ; 1;
  // V(652) = K(652,1) * [DNMT1];
  R652: DNMT1 => ; 1;
  // V(653) = K(653,1) * [ZFP36];
  R653: ZFP36 => ; 1;
  // V(654) = K(654,1) * [MAPK1];
  R654: MAPK1 => ; 1;
  // V(655) = K(655,1) * [DUSP1];
  R655: DUSP1 => ; 1;
  // V(656) = K(656,1) * [PTPN6];
  R656: PTPN6 => ; 1;
  // V(657) = K(657,1) * [PRDX6];
  R657: PRDX6 => ; 1;
  // V(658) = K(658,1) * [AKT1];
  R658: AKT1 => ; 1;
  // V(659) = K(659,1) * [CTNNB1];
  R659: CTNNB1 => ; 1;
  // V(660) = K(660,1) * [PTGS2];
  R660: PTGS2 => ; 1;
  // V(661) = K(661,1) * [DDIT3];
  R661: DDIT3 => ; 1;
  // V(662) = K(662,1) * [TGFBR1];
  R662: TGFBR1 => ; 1;
  // V(663) = K(663,1) * [GPX4];
  R663: GPX4 => ; 1;
  // V(664) = K(664,1) * [CDKN1A];
  R664: CDKN1A => ; 1;
  // V(665) = K(665,1) * [STAT3];
  R665: STAT3 => ; 1;
  // V(666) = K(666,1) * [STAT1];
  R666: STAT1 => ; 1;
  // V(667) = K(667,1) * [STAT5A];
  R667: STAT5A => ; 1;
  // V(668) = K(668,1) * [PIK3CA];
  R668: PIK3CA => ; 1;
  // V(669) = K(669,1) * [CASP3];
  R669: CASP3 => ; 1;
  // V(670) = K(670,1) * [MAPK9];
  R670: MAPK9 => ; 1;
  // V(671) = K(671,1) * [CDKN1B];
  R671: CDKN1B => ; 1;
  // V(672) = K(672,1) * [GCLC];
  R672: GCLC => ; 1;
  // V(673) = K(673,1) * [NUMB];
  R673: NUMB => ; 1;
  // V(674) = K(674,1) * [VEGFB];
  R674: VEGFB => ; 1;
  // V(675) = K(675,1) * [MECP2];
  R675: MECP2 => ; 1;
  // V(676) = K(676,1) * [IRAK1];
  R676: IRAK1 => ; 1;
  // V(677) = K(677,1) * [RPS6KA3];
  R677: RPS6KA3 => ; 1;
  // V(678) = K(678,1) * [RCAN1];
  R678: RCAN1 => ; 1;
  // V(679) = K(679,1) * [PTEN];
  R679: PTEN => ; 1;
  // V(680) = K(680,1) * [RAC1];
  R680: RAC1 => ; 1;
  // V(681) = K(681,1) * [CDK5];
  R681: CDK5 => ; 1;
  // V(682) = K(682,1) * [MDM2];
  R682: MDM2 => ; 1;
  // V(683) = K(683,1) * [IRF8];
  R683: IRF8 => ; 1;
  // V(684) = K(684,1) * [RELA];
  R684: RELA => ; 1;
  // V(685) = K(685,1) * [NOTCH2];
  R685: NOTCH2 => ; 1;
  // V(686) = K(686,1) * [GLO1];
  R686: GLO1 => ; 1;
  // V(687) = K(687,1) * [PTPN11];
  R687: PTPN11 => ; 1;
  // V(688) = K(688,1) * [BTK];
  R688: BTK => ; 1;
  // V(689) = K(689,1) * [PRDX1];
  R689: PRDX1 => ; 1;
  // V(690) = K(690,1) * [BAX];
  R690: BAX => ; 1;
  // V(691) = K(691,1) * [EP300];
  R691: EP300 => ; 1;
  // V(692) = K(692,1) * [PTPRJ];
  R692: PTPRJ => ; 1;
  // V(693) = K(693,1) * [STK4];
  R693: STK4 => ; 1;
  // V(694) = K(694,1) * [PRKAA1];
  R694: PRKAA1 => ; 1;
  // V(695) = K(695,1) * [MAPK7];
  R695: MAPK7 => ; 1;
  // V(696) = K(696,1) * [ILK];
  R696: ILK => ; 1;
  // V(697) = K(697,1) * [ROCK1];
  R697: ROCK1 => ; 1;
  // V(698) = K(698,1) * [SMAD4];
  R698: SMAD4 => ; 1;
  // V(699) = K(699,1) * [ATR];
  R699: ATR => ; 1;
  // V(700) = K(700,1) * [HDAC1];
  R700: HDAC1 => ; 1;
  // V(701) = K(701,1) * [KLF9];
  R701: KLF9 => ; 1;
  // V(702) = K(702,1) * [BECN1];
  R702: BECN1 => ; 1;
  // V(703) = K(703,1) * [HES1];
  R703: HES1 => ; 1;
  // V(704) = K(704,1) * [IRF3];
  R704: IRF3 => ; 1;
  // V(705) = K(705,1) * [SMAD2];
  R705: SMAD2 => ; 1;
  // V(706) = K(706,1) * [STK11];
  R706: STK11 => ; 1;
  // V(707) = K(707,1) * [NFE2L2];
  R707: NFE2L2 => ; 1;
  // V(708) = K(708,1) * [PKN1];
  R708: PKN1 => ; 1;
  // V(709) = K(709,1) * [HIF1A];
  R709: HIF1A => ; 1;
  // V(710) = K(710,1) * [RICTOR];
  R710: RICTOR => ; 1;
  // V(711) = K(711,1) * [CD163];
  R711: CD163 => ; 1;
  // V(712) = K(712,1) * [SIRT2];
  R712: SIRT2 => ; 1;
  // V(713) = K(713,1) * [PIK3C3];
  R713: PIK3C3 => ; 1;
  // V(714) = K(714,1) * [BAD];
  R714: BAD => ; 1;
  // V(715) = K(715,1) * [SIRT1];
  R715: SIRT1 => ; 1;
  // V(716) = K(716,1) * [PARK7];
  R716: PARK7 => ; 1;
  // V(717) = K(717,1) * [MAP3K5];
  R717: MAP3K5 => ; 1;
  // V(718) = K(718,1) * [MFF];
  R718: MFF => ; 1;
  // V(719) = K(719,1) * [HIPK2];
  R719: HIPK2 => ; 1;
  // V(720) = K(720,1) * [TXNIP];
  R720: TXNIP => ; 1;
  // V(721) = K(721,1) * [SIRT7];
  R721: SIRT7 => ; 1;
  // V(722) = K(722,1) * [RNF7];
  R722: RNF7 => ; 1;
  // V(723) = K(723,1) * [IRS2];
  R723: IRS2 => ; 1;
  // V(724) = K(724,1) * [SGK1_rna];
  R724: SGK1_rna => ; 1;
  // V(725) = K(725,1) * [SOCS3_rna];
  R725: SOCS3_rna => ; 1;
  // V(726) = K(726,1) * [KDM6B_rna];
  R726: KDM6B_rna => ; 1;
  // V(727) = K(727,1) * [SCO2_rna];
  R727: SCO2_rna => ; 1;
  // V(728) = K(728,1) * [SOD1_rna];
  R728: SOD1_rna => ; 1;
  // V(729) = K(729,1) * [TGFB1_rna];
  R729: TGFB1_rna => ; 1;
  // V(730) = K(730,1) * [CAT_rna];
  R730: CAT_rna => ; 1;
  // V(731) = K(731,1) * [NR3C1_rna];
  R731: NR3C1_rna => ; 1;
  // V(732) = K(732,1) * [SOD2_rna];
  R732: SOD2_rna => ; 1;
  // V(733) = K(733,1) * [JUN_rna];
  R733: JUN_rna => ; 1;
  // V(734) = K(734,1) * [HMOX1_rna];
  R734: HMOX1_rna => ; 1;
  // V(735) = K(735,1) * [VCAN_rna];
  R735: VCAN_rna => ; 1;
  // V(736) = K(736,1) * [NFKB1_rna];
  R736: NFKB1_rna => ; 1;
  // V(737) = K(737,1) * [GPX4_rna];
  R737: GPX4_rna => ; 1;
  // V(738) = K(738,1) * [CDKN1A_rna];
  R738: CDKN1A_rna => ; 1;
  // V(739) = K(739,1) * [STAT1_rna];
  R739: STAT1_rna => ; 1;
  // V(740) = K(740,1) * [GCLC_rna];
  R740: GCLC_rna => ; 1;
  // V(741) = K(741,1) * [RCAN1_rna];
  R741: RCAN1_rna => ; 1;
  // V(742) = K(742,1) * [BAX_rna];
  R742: BAX_rna => ; 1;
  // V(743) = K(743,1) * [KLF9_rna];
  R743: KLF9_rna => ; 1;
  // V(744) = K(744,1) * [BECN1_rna];
  R744: BECN1_rna => ; 1;
  // V(745) = K(745,1) * [IRS2_rna];
  R745: IRS2_rna => ; 1;
  // V(746) = K(746,1) * [TLR4_g];
  R746: TLR4_g => ; 1;
  // V(747) = K(747,1) * [TLR4_rna];
  R747: TLR4_rna => ; 1;
  // V(748) = K(748,1) * [DNM1L_g];
  R748: DNM1L_g => ; 1;
  // V(749) = K(749,1) * [DNM1L_rna];
  R749: DNM1L_rna => ; 1;
  // V(750) = K(750,1) * [IKBKB_g];
  R750: IKBKB_g => ; 1;
  // V(751) = K(751,1) * [IKBKB_rna];
  R751: IKBKB_rna => ; 1;
  // V(752) = K(752,1) * [SOCS1_g];
  R752: SOCS1_g => ; 1;
  // V(753) = K(753,1) * [SOCS1_rna];
  R753: SOCS1_rna => ; 1;
  // V(754) = K(754,1) * [PDPK1_g];
  R754: PDPK1_g => ; 1;
  // V(755) = K(755,1) * [PDPK1_rna];
  R755: PDPK1_rna => ; 1;
  // V(756) = K(756,1) * [TLR2_g];
  R756: TLR2_g => ; 1;
  // V(757) = K(757,1) * [TLR2_rna];
  R757: TLR2_rna => ; 1;
  // V(758) = K(758,1) * [JAK2_g];
  R758: JAK2_g => ; 1;
  // V(759) = K(759,1) * [JAK2_rna];
  R759: JAK2_rna => ; 1;
  // V(760) = K(760,1) * [ROCK2_g];
  R760: ROCK2_g => ; 1;
  // V(761) = K(761,1) * [ROCK2_rna];
  R761: ROCK2_rna => ; 1;
  // V(762) = K(762,1) * [MFN2_g];
  R762: MFN2_g => ; 1;
  // V(763) = K(763,1) * [MFN2_rna];
  R763: MFN2_rna => ; 1;
  // V(764) = K(764,1) * [FOS_g];
  R764: FOS_g => ; 1;
  // V(765) = K(765,1) * [FOS_rna];
  R765: FOS_rna => ; 1;
  // V(766) = K(766,1) * [TP53_g];
  R766: TP53_g => ; 1;
  // V(767) = K(767,1) * [TP53_rna];
  R767: TP53_rna => ; 1;
  // V(768) = K(768,1) * [HSPB1_g];
  R768: HSPB1_g => ; 1;
  // V(769) = K(769,1) * [HSPB1_rna];
  R769: HSPB1_rna => ; 1;
  // V(770) = K(770,1) * [INSR_g];
  R770: INSR_g => ; 1;
  // V(771) = K(771,1) * [INSR_rna];
  R771: INSR_rna => ; 1;
  // V(772) = K(772,1) * [FYN_g];
  R772: FYN_g => ; 1;
  // V(773) = K(773,1) * [FYN_rna];
  R773: FYN_rna => ; 1;
  // V(774) = K(774,1) * [LYN_g];
  R774: LYN_g => ; 1;
  // V(775) = K(775,1) * [LYN_rna];
  R775: LYN_rna => ; 1;
  // V(776) = K(776,1) * [SP1_g];
  R776: SP1_g => ; 1;
  // V(777) = K(777,1) * [SP1_rna];
  R777: SP1_rna => ; 1;
  // V(778) = K(778,1) * [VIM_g];
  R778: VIM_g => ; 1;
  // V(779) = K(779,1) * [VIM_rna];
  R779: VIM_rna => ; 1;
  // V(780) = K(780,1) * [IL6R_g];
  R780: IL6R_g => ; 1;
  // V(781) = K(781,1) * [IL6R_rna];
  R781: IL6R_rna => ; 1;
  // V(782) = K(782,1) * [PARP1_g];
  R782: PARP1_g => ; 1;
  // V(783) = K(783,1) * [PARP1_rna];
  R783: PARP1_rna => ; 1;
  // V(784) = K(784,1) * [CALM1_g];
  R784: CALM1_g => ; 1;
  // V(785) = K(785,1) * [CALM1_rna];
  R785: CALM1_rna => ; 1;
  // V(786) = K(786,1) * [IRF1_g];
  R786: IRF1_g => ; 1;
  // V(787) = K(787,1) * [IRF1_rna];
  R787: IRF1_rna => ; 1;
  // V(788) = K(788,1) * [CYBA_g];
  R788: CYBA_g => ; 1;
  // V(789) = K(789,1) * [CYBA_rna];
  R789: CYBA_rna => ; 1;
  // V(790) = K(790,1) * [NCF1_g];
  R790: NCF1_g => ; 1;
  // V(791) = K(791,1) * [NCF1_rna];
  R791: NCF1_rna => ; 1;
  // V(792) = K(792,1) * [PKM_g];
  R792: PKM_g => ; 1;
  // V(793) = K(793,1) * [PKM_rna];
  R793: PKM_rna => ; 1;
  // V(794) = K(794,1) * [CREB1_g];
  R794: CREB1_g => ; 1;
  // V(795) = K(795,1) * [CREB1_rna];
  R795: CREB1_rna => ; 1;
  // V(796) = K(796,1) * [PRKCA_g];
  R796: PRKCA_g => ; 1;
  // V(797) = K(797,1) * [PRKCA_rna];
  R797: PRKCA_rna => ; 1;
  // V(798) = K(798,1) * [PTPN2_g];
  R798: PTPN2_g => ; 1;
  // V(799) = K(799,1) * [PTPN2_rna];
  R799: PTPN2_rna => ; 1;
  // V(800) = K(800,1) * [TFEB_g];
  R800: TFEB_g => ; 1;
  // V(801) = K(801,1) * [TFEB_rna];
  R801: TFEB_rna => ; 1;
  // V(802) = K(802,1) * [NR4A1_g];
  R802: NR4A1_g => ; 1;
  // V(803) = K(803,1) * [NR4A1_rna];
  R803: NR4A1_rna => ; 1;
  // V(804) = K(804,1) * [RPS6KB1_g];
  R804: RPS6KB1_g => ; 1;
  // V(805) = K(805,1) * [RPS6KB1_rna];
  R805: RPS6KB1_rna => ; 1;
  // V(806) = K(806,1) * [JAK1_g];
  R806: JAK1_g => ; 1;
  // V(807) = K(807,1) * [JAK1_rna];
  R807: JAK1_rna => ; 1;
  // V(808) = K(808,1) * [PTPRB_g];
  R808: PTPRB_g => ; 1;
  // V(809) = K(809,1) * [PTPRB_rna];
  R809: PTPRB_rna => ; 1;
  // V(810) = K(810,1) * [DNMT1_g];
  R810: DNMT1_g => ; 1;
  // V(811) = K(811,1) * [DNMT1_rna];
  R811: DNMT1_rna => ; 1;
  // V(812) = K(812,1) * [ZFP36_g];
  R812: ZFP36_g => ; 1;
  // V(813) = K(813,1) * [ZFP36_rna];
  R813: ZFP36_rna => ; 1;
  // V(814) = K(814,1) * [MAPK1_g];
  R814: MAPK1_g => ; 1;
  // V(815) = K(815,1) * [MAPK1_rna];
  R815: MAPK1_rna => ; 1;
  // V(816) = K(816,1) * [DUSP1_g];
  R816: DUSP1_g => ; 1;
  // V(817) = K(817,1) * [DUSP1_rna];
  R817: DUSP1_rna => ; 1;
  // V(818) = K(818,1) * [PTPN6_g];
  R818: PTPN6_g => ; 1;
  // V(819) = K(819,1) * [PTPN6_rna];
  R819: PTPN6_rna => ; 1;
  // V(820) = K(820,1) * [PRDX6_g];
  R820: PRDX6_g => ; 1;
  // V(821) = K(821,1) * [PRDX6_rna];
  R821: PRDX6_rna => ; 1;
  // V(822) = K(822,1) * [AKT1_g];
  R822: AKT1_g => ; 1;
  // V(823) = K(823,1) * [AKT1_rna];
  R823: AKT1_rna => ; 1;
  // V(824) = K(824,1) * [CTNNB1_g];
  R824: CTNNB1_g => ; 1;
  // V(825) = K(825,1) * [CTNNB1_rna];
  R825: CTNNB1_rna => ; 1;
  // V(826) = K(826,1) * [PTGS2_g];
  R826: PTGS2_g => ; 1;
  // V(827) = K(827,1) * [PTGS2_rna];
  R827: PTGS2_rna => ; 1;
  // V(828) = K(828,1) * [DDIT3_g];
  R828: DDIT3_g => ; 1;
  // V(829) = K(829,1) * [DDIT3_rna];
  R829: DDIT3_rna => ; 1;
  // V(830) = K(830,1) * [TGFBR1_g];
  R830: TGFBR1_g => ; 1;
  // V(831) = K(831,1) * [TGFBR1_rna];
  R831: TGFBR1_rna => ; 1;
  // V(832) = K(832,1) * [STAT3_g];
  R832: STAT3_g => ; 1;
  // V(833) = K(833,1) * [STAT3_rna];
  R833: STAT3_rna => ; 1;
  // V(834) = K(834,1) * [STAT5A_g];
  R834: STAT5A_g => ; 1;
  // V(835) = K(835,1) * [STAT5A_rna];
  R835: STAT5A_rna => ; 1;
  // V(836) = K(836,1) * [PIK3CA_g];
  R836: PIK3CA_g => ; 1;
  // V(837) = K(837,1) * [PIK3CA_rna];
  R837: PIK3CA_rna => ; 1;
  // V(838) = K(838,1) * [CASP3_g];
  R838: CASP3_g => ; 1;
  // V(839) = K(839,1) * [CASP3_rna];
  R839: CASP3_rna => ; 1;
  // V(840) = K(840,1) * [MAPK9_g];
  R840: MAPK9_g => ; 1;
  // V(841) = K(841,1) * [MAPK9_rna];
  R841: MAPK9_rna => ; 1;
  // V(842) = K(842,1) * [CDKN1B_g];
  R842: CDKN1B_g => ; 1;
  // V(843) = K(843,1) * [CDKN1B_rna];
  R843: CDKN1B_rna => ; 1;
  // V(844) = K(844,1) * [NUMB_g];
  R844: NUMB_g => ; 1;
  // V(845) = K(845,1) * [NUMB_rna];
  R845: NUMB_rna => ; 1;
  // V(846) = K(846,1) * [VEGFB_g];
  R846: VEGFB_g => ; 1;
  // V(847) = K(847,1) * [VEGFB_rna];
  R847: VEGFB_rna => ; 1;
  // V(848) = K(848,1) * [MECP2_g];
  R848: MECP2_g => ; 1;
  // V(849) = K(849,1) * [MECP2_rna];
  R849: MECP2_rna => ; 1;
  // V(850) = K(850,1) * [IRAK1_g];
  R850: IRAK1_g => ; 1;
  // V(851) = K(851,1) * [IRAK1_rna];
  R851: IRAK1_rna => ; 1;
  // V(852) = K(852,1) * [RPS6KA3_g];
  R852: RPS6KA3_g => ; 1;
  // V(853) = K(853,1) * [RPS6KA3_rna];
  R853: RPS6KA3_rna => ; 1;
  // V(854) = K(854,1) * [PTEN_g];
  R854: PTEN_g => ; 1;
  // V(855) = K(855,1) * [PTEN_rna];
  R855: PTEN_rna => ; 1;
  // V(856) = K(856,1) * [RAC1_g];
  R856: RAC1_g => ; 1;
  // V(857) = K(857,1) * [RAC1_rna];
  R857: RAC1_rna => ; 1;
  // V(858) = K(858,1) * [CDK5_g];
  R858: CDK5_g => ; 1;
  // V(859) = K(859,1) * [CDK5_rna];
  R859: CDK5_rna => ; 1;
  // V(860) = K(860,1) * [MDM2_g];
  R860: MDM2_g => ; 1;
  // V(861) = K(861,1) * [MDM2_rna];
  R861: MDM2_rna => ; 1;
  // V(862) = K(862,1) * [IRF8_g];
  R862: IRF8_g => ; 1;
  // V(863) = K(863,1) * [IRF8_rna];
  R863: IRF8_rna => ; 1;
  // V(864) = K(864,1) * [RELA_g];
  R864: RELA_g => ; 1;
  // V(865) = K(865,1) * [RELA_rna];
  R865: RELA_rna => ; 1;
  // V(866) = K(866,1) * [NOTCH2_g];
  R866: NOTCH2_g => ; 1;
  // V(867) = K(867,1) * [NOTCH2_rna];
  R867: NOTCH2_rna => ; 1;
  // V(868) = K(868,1) * [GLO1_g];
  R868: GLO1_g => ; 1;
  // V(869) = K(869,1) * [GLO1_rna];
  R869: GLO1_rna => ; 1;
  // V(870) = K(870,1) * [PTPN11_g];
  R870: PTPN11_g => ; 1;
  // V(871) = K(871,1) * [PTPN11_rna];
  R871: PTPN11_rna => ; 1;
  // V(872) = K(872,1) * [BTK_g];
  R872: BTK_g => ; 1;
  // V(873) = K(873,1) * [BTK_rna];
  R873: BTK_rna => ; 1;
  // V(874) = K(874,1) * [PRDX1_g];
  R874: PRDX1_g => ; 1;
  // V(875) = K(875,1) * [PRDX1_rna];
  R875: PRDX1_rna => ; 1;
  // V(876) = K(876,1) * [EP300_g];
  R876: EP300_g => ; 1;
  // V(877) = K(877,1) * [EP300_rna];
  R877: EP300_rna => ; 1;
  // V(878) = K(878,1) * [PTPRJ_g];
  R878: PTPRJ_g => ; 1;
  // V(879) = K(879,1) * [PTPRJ_rna];
  R879: PTPRJ_rna => ; 1;
  // V(880) = K(880,1) * [STK4_g];
  R880: STK4_g => ; 1;
  // V(881) = K(881,1) * [STK4_rna];
  R881: STK4_rna => ; 1;
  // V(882) = K(882,1) * [PRKAA1_g];
  R882: PRKAA1_g => ; 1;
  // V(883) = K(883,1) * [PRKAA1_rna];
  R883: PRKAA1_rna => ; 1;
  // V(884) = K(884,1) * [MAPK7_g];
  R884: MAPK7_g => ; 1;
  // V(885) = K(885,1) * [MAPK7_rna];
  R885: MAPK7_rna => ; 1;
  // V(886) = K(886,1) * [ILK_g];
  R886: ILK_g => ; 1;
  // V(887) = K(887,1) * [ILK_rna];
  R887: ILK_rna => ; 1;
  // V(888) = K(888,1) * [ROCK1_g];
  R888: ROCK1_g => ; 1;
  // V(889) = K(889,1) * [ROCK1_rna];
  R889: ROCK1_rna => ; 1;
  // V(890) = K(890,1) * [SMAD4_g];
  R890: SMAD4_g => ; 1;
  // V(891) = K(891,1) * [SMAD4_rna];
  R891: SMAD4_rna => ; 1;
  // V(892) = K(892,1) * [ATR_g];
  R892: ATR_g => ; 1;
  // V(893) = K(893,1) * [ATR_rna];
  R893: ATR_rna => ; 1;
  // V(894) = K(894,1) * [HDAC1_g];
  R894: HDAC1_g => ; 1;
  // V(895) = K(895,1) * [HDAC1_rna];
  R895: HDAC1_rna => ; 1;
  // V(896) = K(896,1) * [HES1_g];
  R896: HES1_g => ; 1;
  // V(897) = K(897,1) * [HES1_rna];
  R897: HES1_rna => ; 1;
  // V(898) = K(898,1) * [IRF3_g];
  R898: IRF3_g => ; 1;
  // V(899) = K(899,1) * [IRF3_rna];
  R899: IRF3_rna => ; 1;
  // V(900) = K(900,1) * [SMAD2_g];
  R900: SMAD2_g => ; 1;
  // V(901) = K(901,1) * [SMAD2_rna];
  R901: SMAD2_rna => ; 1;
  // V(902) = K(902,1) * [STK11_g];
  R902: STK11_g => ; 1;
  // V(903) = K(903,1) * [STK11_rna];
  R903: STK11_rna => ; 1;
  // V(904) = K(904,1) * [NFE2L2_g];
  R904: NFE2L2_g => ; 1;
  // V(905) = K(905,1) * [NFE2L2_rna];
  R905: NFE2L2_rna => ; 1;
  // V(906) = K(906,1) * [PKN1_g];
  R906: PKN1_g => ; 1;
  // V(907) = K(907,1) * [PKN1_rna];
  R907: PKN1_rna => ; 1;
  // V(908) = K(908,1) * [HIF1A_g];
  R908: HIF1A_g => ; 1;
  // V(909) = K(909,1) * [HIF1A_rna];
  R909: HIF1A_rna => ; 1;
  // V(910) = K(910,1) * [RICTOR_g];
  R910: RICTOR_g => ; 1;
  // V(911) = K(911,1) * [RICTOR_rna];
  R911: RICTOR_rna => ; 1;
  // V(912) = K(912,1) * [CD163_g];
  R912: CD163_g => ; 1;
  // V(913) = K(913,1) * [CD163_rna];
  R913: CD163_rna => ; 1;
  // V(914) = K(914,1) * [SIRT2_g];
  R914: SIRT2_g => ; 1;
  // V(915) = K(915,1) * [SIRT2_rna];
  R915: SIRT2_rna => ; 1;
  // V(916) = K(916,1) * [PIK3C3_g];
  R916: PIK3C3_g => ; 1;
  // V(917) = K(917,1) * [PIK3C3_rna];
  R917: PIK3C3_rna => ; 1;
  // V(918) = K(918,1) * [BAD_g];
  R918: BAD_g => ; 1;
  // V(919) = K(919,1) * [BAD_rna];
  R919: BAD_rna => ; 1;
  // V(920) = K(920,1) * [SIRT1_g];
  R920: SIRT1_g => ; 1;
  // V(921) = K(921,1) * [SIRT1_rna];
  R921: SIRT1_rna => ; 1;
  // V(922) = K(922,1) * [PARK7_g];
  R922: PARK7_g => ; 1;
  // V(923) = K(923,1) * [PARK7_rna];
  R923: PARK7_rna => ; 1;
  // V(924) = K(924,1) * [MAP3K5_g];
  R924: MAP3K5_g => ; 1;
  // V(925) = K(925,1) * [MAP3K5_rna];
  R925: MAP3K5_rna => ; 1;
  // V(926) = K(926,1) * [MFF_g];
  R926: MFF_g => ; 1;
  // V(927) = K(927,1) * [MFF_rna];
  R927: MFF_rna => ; 1;
  // V(928) = K(928,1) * [HIPK2_g];
  R928: HIPK2_g => ; 1;
  // V(929) = K(929,1) * [HIPK2_rna];
  R929: HIPK2_rna => ; 1;
  // V(930) = K(930,1) * [TXNIP_g];
  R930: TXNIP_g => ; 1;
  // V(931) = K(931,1) * [TXNIP_rna];
  R931: TXNIP_rna => ; 1;
  // V(932) = K(932,1) * [SIRT7_g];
  R932: SIRT7_g => ; 1;
  // V(933) = K(933,1) * [SIRT7_rna];
  R933: SIRT7_rna => ; 1;
  // V(934) = K(934,1) * [RNF7_g];
  R934: RNF7_g => ; 1;
  // V(935) = K(935,1) * [RNF7_rna];
  R935: RNF7_rna => ; 1;
  // V(936) = K(936,1) * [SGK1_p];
  R936: SGK1_p => ; 1;
  // V(937) = K(937,1) * [DNM1L_p];
  R937: DNM1L_p => ; 1;
  // V(938) = K(938,1) * [IKBKB_p];
  R938: IKBKB_p => ; 1;
  // V(939) = K(939,1) * [SOCS1_p];
  R939: SOCS1_p => ; 1;
  // V(940) = K(940,1) * [PDPK1_p];
  R940: PDPK1_p => ; 1;
  // V(941) = K(941,1) * [JAK2_p];
  R941: JAK2_p => ; 1;
  // V(942) = K(942,1) * [MFN2_p];
  R942: MFN2_p => ; 1;
  // V(943) = K(943,1) * [FOS_p];
  R943: FOS_p => ; 1;
  // V(944) = K(944,1) * [NR3C1_p];
  R944: NR3C1_p => ; 1;
  // V(945) = K(945,1) * [TP53_p];
  R945: TP53_p => ; 1;
  // V(946) = K(946,1) * [HSPB1_p];
  R946: HSPB1_p => ; 1;
  // V(947) = K(947,1) * [JUN_p];
  R947: JUN_p => ; 1;
  // V(948) = K(948,1) * [INSR_p];
  R948: INSR_p => ; 1;
  // V(949) = K(949,1) * [FYN_p];
  R949: FYN_p => ; 1;
  // V(950) = K(950,1) * [LYN_p];
  R950: LYN_p => ; 1;
  // V(951) = K(951,1) * [SP1_p];
  R951: SP1_p => ; 1;
  // V(952) = K(952,1) * [VIM_p];
  R952: VIM_p => ; 1;
  // V(953) = K(953,1) * [HMOX1_p];
  R953: HMOX1_p => ; 1;
  // V(954) = K(954,1) * [PARP1_p];
  R954: PARP1_p => ; 1;
  // V(955) = K(955,1) * [CALM1_p];
  R955: CALM1_p => ; 1;
  // V(956) = K(956,1) * [CYBA_p];
  R956: CYBA_p => ; 1;
  // V(957) = K(957,1) * [NCF1_p];
  R957: NCF1_p => ; 1;
  // V(958) = K(958,1) * [PKM_p];
  R958: PKM_p => ; 1;
  // V(959) = K(959,1) * [CREB1_p];
  R959: CREB1_p => ; 1;
  // V(960) = K(960,1) * [PRKCA_p];
  R960: PRKCA_p => ; 1;
  // V(961) = K(961,1) * [TFEB_p];
  R961: TFEB_p => ; 1;
  // V(962) = K(962,1) * [NFKB1_p];
  R962: NFKB1_p => ; 1;
  // V(963) = K(963,1) * [NR4A1_p];
  R963: NR4A1_p => ; 1;
  // V(964) = K(964,1) * [RPS6KB1_p];
  R964: RPS6KB1_p => ; 1;
  // V(965) = K(965,1) * [JAK1_p];
  R965: JAK1_p => ; 1;
  // V(966) = K(966,1) * [DNMT1_p];
  R966: DNMT1_p => ; 1;
  // V(967) = K(967,1) * [ZFP36_p];
  R967: ZFP36_p => ; 1;
  // V(968) = K(968,1) * [MAPK1_p];
  R968: MAPK1_p => ; 1;
  // V(969) = K(969,1) * [DUSP1_p];
  R969: DUSP1_p => ; 1;
  // V(970) = K(970,1) * [PTPN6_p];
  R970: PTPN6_p => ; 1;
  // V(971) = K(971,1) * [PRDX6_p];
  R971: PRDX6_p => ; 1;
  // V(972) = K(972,1) * [AKT1_p];
  R972: AKT1_p => ; 1;
  // V(973) = K(973,1) * [CTNNB1_p];
  R973: CTNNB1_p => ; 1;
  // V(974) = K(974,1) * [PTGS2_p];
  R974: PTGS2_p => ; 1;
  // V(975) = K(975,1) * [DDIT3_p];
  R975: DDIT3_p => ; 1;
  // V(976) = K(976,1) * [CDKN1A_p];
  R976: CDKN1A_p => ; 1;
  // V(977) = K(977,1) * [STAT3_p];
  R977: STAT3_p => ; 1;
  // V(978) = K(978,1) * [STAT1_p];
  R978: STAT1_p => ; 1;
  // V(979) = K(979,1) * [STAT5A_p];
  R979: STAT5A_p => ; 1;
  // V(980) = K(980,1) * [PIK3CA_p];
  R980: PIK3CA_p => ; 1;
  // V(981) = K(981,1) * [MAPK9_p];
  R981: MAPK9_p => ; 1;
  // V(982) = K(982,1) * [CDKN1B_p];
  R982: CDKN1B_p => ; 1;
  // V(983) = K(983,1) * [MECP2_p];
  R983: MECP2_p => ; 1;
  // V(984) = K(984,1) * [IRAK1_p];
  R984: IRAK1_p => ; 1;
  // V(985) = K(985,1) * [RPS6KA3_p];
  R985: RPS6KA3_p => ; 1;
  // V(986) = K(986,1) * [RCAN1_p];
  R986: RCAN1_p => ; 1;
  // V(987) = K(987,1) * [PTEN_p];
  R987: PTEN_p => ; 1;
  // V(988) = K(988,1) * [RAC1_p];
  R988: RAC1_p => ; 1;
  // V(989) = K(989,1) * [CDK5_p];
  R989: CDK5_p => ; 1;
  // V(990) = K(990,1) * [MDM2_p];
  R990: MDM2_p => ; 1;
  // V(991) = K(991,1) * [IRF8_p];
  R991: IRF8_p => ; 1;
  // V(992) = K(992,1) * [RELA_p];
  R992: RELA_p => ; 1;
  // V(993) = K(993,1) * [GLO1_p];
  R993: GLO1_p => ; 1;
  // V(994) = K(994,1) * [PTPN11_p];
  R994: PTPN11_p => ; 1;
  // V(995) = K(995,1) * [BTK_p];
  R995: BTK_p => ; 1;
  // V(996) = K(996,1) * [PRDX1_p];
  R996: PRDX1_p => ; 1;
  // V(997) = K(997,1) * [BAX_p];
  R997: BAX_p => ; 1;
  // V(998) = K(998,1) * [EP300_p];
  R998: EP300_p => ; 1;
  // V(999) = K(999,1) * [PTPRJ_p];
  R999: PTPRJ_p => ; 1;
  // V(1000) = K(1000,1) * [STK4_p];
  R1000: STK4_p => ; 1;
  // V(1001) = K(1001,1) * [PRKAA1_p];
  R1001: PRKAA1_p => ; 1;
  // V(1002) = K(1002,1) * [MAPK7_p];
  R1002: MAPK7_p => ; 1;
  // V(1003) = K(1003,1) * [ILK_p];
  R1003: ILK_p => ; 1;
  // V(1004) = K(1004,1) * [SMAD4_p];
  R1004: SMAD4_p => ; 1;
  // V(1005) = K(1005,1) * [BECN1_p];
  R1005: BECN1_p => ; 1;
  // V(1006) = K(1006,1) * [HES1_p];
  R1006: HES1_p => ; 1;
  // V(1007) = K(1007,1) * [IRF3_p];
  R1007: IRF3_p => ; 1;
  // V(1008) = K(1008,1) * [SMAD2_p];
  R1008: SMAD2_p => ; 1;
  // V(1009) = K(1009,1) * [STK11_p];
  R1009: STK11_p => ; 1;
  // V(1010) = K(1010,1) * [NFE2L2_p];
  R1010: NFE2L2_p => ; 1;
  // V(1011) = K(1011,1) * [PKN1_p];
  R1011: PKN1_p => ; 1;
  // V(1012) = K(1012,1) * [HIF1A_p];
  R1012: HIF1A_p => ; 1;
  // V(1013) = K(1013,1) * [RICTOR_p];
  R1013: RICTOR_p => ; 1;
  // V(1014) = K(1014,1) * [CD163_p];
  R1014: CD163_p => ; 1;
  // V(1015) = K(1015,1) * [SIRT2_p];
  R1015: SIRT2_p => ; 1;
  // V(1016) = K(1016,1) * [PIK3C3_p];
  R1016: PIK3C3_p => ; 1;
  // V(1017) = K(1017,1) * [BAD_p];
  R1017: BAD_p => ; 1;
  // V(1018) = K(1018,1) * [SIRT1_p];
  R1018: SIRT1_p => ; 1;
  // V(1019) = K(1019,1) * [PARK7_p];
  R1019: PARK7_p => ; 1;
  // V(1020) = K(1020,1) * [MAP3K5_p];
  R1020: MAP3K5_p => ; 1;
  // V(1021) = K(1021,1) * [MFF_p];
  R1021: MFF_p => ; 1;
  // V(1022) = K(1022,1) * [HIPK2_p];
  R1022: HIPK2_p => ; 1;
  // V(1023) = K(1023,1) * [TXNIP_p];
  R1023: TXNIP_p => ; 1;
  // V(1024) = K(1024,1) * [SIRT7_p];
  R1024: SIRT7_p => ; 1;
  // V(1025) = K(1025,1) * [IRS2_p];
  R1025: IRS2_p => ; 1;
  // V(1026) = K(1026,1) * [SIGNOR-C118_p];
  R1026: => ; 1;
  // V(1027) = K(1027,1) * [SIGNOR-C13_p];
  R1027: => ; 1;
  // V(1028) = K(1028,1) * [SIGNOR-C154_p];
  R1028: => ; 1;
  // V(1029) = K(1029,1) * [TLR4_rna];
  R1029: TLR4_rna => ; 1;
  // V(1030) = K(1030,1) * [DNM1L_rna];
  R1030: DNM1L_rna => ; 1;
  // V(1031) = K(1031,1) * [IKBKB_rna];
  R1031: IKBKB_rna => ; 1;
  // V(1032) = K(1032,1) * [SOCS1_rna];
  R1032: SOCS1_rna => ; 1;
  // V(1033) = K(1033,1) * [PDPK1_rna];
  R1033: PDPK1_rna => ; 1;
  // V(1034) = K(1034,1) * [TLR2_rna];
  R1034: TLR2_rna => ; 1;
  // V(1035) = K(1035,1) * [JAK2_rna];
  R1035: JAK2_rna => ; 1;
  // V(1036) = K(1036,1) * [ROCK2_rna];
  R1036: ROCK2_rna => ; 1;
  // V(1037) = K(1037,1) * [MFN2_rna];
  R1037: MFN2_rna => ; 1;
  // V(1038) = K(1038,1) * [FOS_rna];
  R1038: FOS_rna => ; 1;
  // V(1039) = K(1039,1) * [TP53_rna];
  R1039: TP53_rna => ; 1;
  // V(1040) = K(1040,1) * [HSPB1_rna];
  R1040: HSPB1_rna => ; 1;
  // V(1041) = K(1041,1) * [INSR_rna];
  R1041: INSR_rna => ; 1;
  // V(1042) = K(1042,1) * [FYN_rna];
  R1042: FYN_rna => ; 1;
  // V(1043) = K(1043,1) * [LYN_rna];
  R1043: LYN_rna => ; 1;
  // V(1044) = K(1044,1) * [SP1_rna];
  R1044: SP1_rna => ; 1;
  // V(1045) = K(1045,1) * [VIM_rna];
  R1045: VIM_rna => ; 1;
  // V(1046) = K(1046,1) * [IL6R_rna];
  R1046: IL6R_rna => ; 1;
  // V(1047) = K(1047,1) * [PARP1_rna];
  R1047: PARP1_rna => ; 1;
  // V(1048) = K(1048,1) * [CALM1_rna];
  R1048: CALM1_rna => ; 1;
  // V(1049) = K(1049,1) * [IRF1_rna];
  R1049: IRF1_rna => ; 1;
  // V(1050) = K(1050,1) * [CYBA_rna];
  R1050: CYBA_rna => ; 1;
  // V(1051) = K(1051,1) * [NCF1_rna];
  R1051: NCF1_rna => ; 1;
  // V(1052) = K(1052,1) * [PKM_rna];
  R1052: PKM_rna => ; 1;
  // V(1053) = K(1053,1) * [CREB1_rna];
  R1053: CREB1_rna => ; 1;
  // V(1054) = K(1054,1) * [PRKCA_rna];
  R1054: PRKCA_rna => ; 1;
  // V(1055) = K(1055,1) * [PTPN2_rna];
  R1055: PTPN2_rna => ; 1;
  // V(1056) = K(1056,1) * [TFEB_rna];
  R1056: TFEB_rna => ; 1;
  // V(1057) = K(1057,1) * [NR4A1_rna];
  R1057: NR4A1_rna => ; 1;
  // V(1058) = K(1058,1) * [RPS6KB1_rna];
  R1058: RPS6KB1_rna => ; 1;
  // V(1059) = K(1059,1) * [JAK1_rna];
  R1059: JAK1_rna => ; 1;
  // V(1060) = K(1060,1) * [PTPRB_rna];
  R1060: PTPRB_rna => ; 1;
  // V(1061) = K(1061,1) * [DNMT1_rna];
  R1061: DNMT1_rna => ; 1;
  // V(1062) = K(1062,1) * [ZFP36_rna];
  R1062: ZFP36_rna => ; 1;
  // V(1063) = K(1063,1) * [MAPK1_rna];
  R1063: MAPK1_rna => ; 1;
  // V(1064) = K(1064,1) * [DUSP1_rna];
  R1064: DUSP1_rna => ; 1;
  // V(1065) = K(1065,1) * [PTPN6_rna];
  R1065: PTPN6_rna => ; 1;
  // V(1066) = K(1066,1) * [PRDX6_rna];
  R1066: PRDX6_rna => ; 1;
  // V(1067) = K(1067,1) * [AKT1_rna];
  R1067: AKT1_rna => ; 1;
  // V(1068) = K(1068,1) * [CTNNB1_rna];
  R1068: CTNNB1_rna => ; 1;
  // V(1069) = K(1069,1) * [PTGS2_rna];
  R1069: PTGS2_rna => ; 1;
  // V(1070) = K(1070,1) * [DDIT3_rna];
  R1070: DDIT3_rna => ; 1;
  // V(1071) = K(1071,1) * [TGFBR1_rna];
  R1071: TGFBR1_rna => ; 1;
  // V(1072) = K(1072,1) * [STAT3_rna];
  R1072: STAT3_rna => ; 1;
  // V(1073) = K(1073,1) * [STAT5A_rna];
  R1073: STAT5A_rna => ; 1;
  // V(1074) = K(1074,1) * [PIK3CA_rna];
  R1074: PIK3CA_rna => ; 1;
  // V(1075) = K(1075,1) * [CASP3_rna];
  R1075: CASP3_rna => ; 1;
  // V(1076) = K(1076,1) * [MAPK9_rna];
  R1076: MAPK9_rna => ; 1;
  // V(1077) = K(1077,1) * [CDKN1B_rna];
  R1077: CDKN1B_rna => ; 1;
  // V(1078) = K(1078,1) * [NUMB_rna];
  R1078: NUMB_rna => ; 1;
  // V(1079) = K(1079,1) * [VEGFB_rna];
  R1079: VEGFB_rna => ; 1;
  // V(1080) = K(1080,1) * [MECP2_rna];
  R1080: MECP2_rna => ; 1;
  // V(1081) = K(1081,1) * [IRAK1_rna];
  R1081: IRAK1_rna => ; 1;
  // V(1082) = K(1082,1) * [RPS6KA3_rna];
  R1082: RPS6KA3_rna => ; 1;
  // V(1083) = K(1083,1) * [PTEN_rna];
  R1083: PTEN_rna => ; 1;
  // V(1084) = K(1084,1) * [RAC1_rna];
  R1084: RAC1_rna => ; 1;
  // V(1085) = K(1085,1) * [CDK5_rna];
  R1085: CDK5_rna => ; 1;
  // V(1086) = K(1086,1) * [MDM2_rna];
  R1086: MDM2_rna => ; 1;
  // V(1087) = K(1087,1) * [IRF8_rna];
  R1087: IRF8_rna => ; 1;
  // V(1088) = K(1088,1) * [RELA_rna];
  R1088: RELA_rna => ; 1;
  // V(1089) = K(1089,1) * [NOTCH2_rna];
  R1089: NOTCH2_rna => ; 1;
  // V(1090) = K(1090,1) * [GLO1_rna];
  R1090: GLO1_rna => ; 1;
  // V(1091) = K(1091,1) * [PTPN11_rna];
  R1091: PTPN11_rna => ; 1;
  // V(1092) = K(1092,1) * [BTK_rna];
  R1092: BTK_rna => ; 1;
  // V(1093) = K(1093,1) * [PRDX1_rna];
  R1093: PRDX1_rna => ; 1;
  // V(1094) = K(1094,1) * [EP300_rna];
  R1094: EP300_rna => ; 1;
  // V(1095) = K(1095,1) * [PTPRJ_rna];
  R1095: PTPRJ_rna => ; 1;
  // V(1096) = K(1096,1) * [STK4_rna];
  R1096: STK4_rna => ; 1;
  // V(1097) = K(1097,1) * [PRKAA1_rna];
  R1097: PRKAA1_rna => ; 1;
  // V(1098) = K(1098,1) * [MAPK7_rna];
  R1098: MAPK7_rna => ; 1;
  // V(1099) = K(1099,1) * [ILK_rna];
  R1099: ILK_rna => ; 1;
  // V(1100) = K(1100,1) * [ROCK1_rna];
  R1100: ROCK1_rna => ; 1;
  // V(1101) = K(1101,1) * [SMAD4_rna];
  R1101: SMAD4_rna => ; 1;
  // V(1102) = K(1102,1) * [ATR_rna];
  R1102: ATR_rna => ; 1;
  // V(1103) = K(1103,1) * [HDAC1_rna];
  R1103: HDAC1_rna => ; 1;
  // V(1104) = K(1104,1) * [HES1_rna];
  R1104: HES1_rna => ; 1;
  // V(1105) = K(1105,1) * [IRF3_rna];
  R1105: IRF3_rna => ; 1;
  // V(1106) = K(1106,1) * [SMAD2_rna];
  R1106: SMAD2_rna => ; 1;
  // V(1107) = K(1107,1) * [STK11_rna];
  R1107: STK11_rna => ; 1;
  // V(1108) = K(1108,1) * [NFE2L2_rna];
  R1108: NFE2L2_rna => ; 1;
  // V(1109) = K(1109,1) * [PKN1_rna];
  R1109: PKN1_rna => ; 1;
  // V(1110) = K(1110,1) * [HIF1A_rna];
  R1110: HIF1A_rna => ; 1;
  // V(1111) = K(1111,1) * [RICTOR_rna];
  R1111: RICTOR_rna => ; 1;
  // V(1112) = K(1112,1) * [CD163_rna];
  R1112: CD163_rna => ; 1;
  // V(1113) = K(1113,1) * [SIRT2_rna];
  R1113: SIRT2_rna => ; 1;
  // V(1114) = K(1114,1) * [PIK3C3_rna];
  R1114: PIK3C3_rna => ; 1;
  // V(1115) = K(1115,1) * [BAD_rna];
  R1115: BAD_rna => ; 1;
  // V(1116) = K(1116,1) * [SIRT1_rna];
  R1116: SIRT1_rna => ; 1;
  // V(1117) = K(1117,1) * [PARK7_rna];
  R1117: PARK7_rna => ; 1;
  // V(1118) = K(1118,1) * [MAP3K5_rna];
  R1118: MAP3K5_rna => ; 1;
  // V(1119) = K(1119,1) * [MFF_rna];
  R1119: MFF_rna => ; 1;
  // V(1120) = K(1120,1) * [HIPK2_rna];
  R1120: HIPK2_rna => ; 1;
  // V(1121) = K(1121,1) * [TXNIP_rna];
  R1121: TXNIP_rna => ; 1;
  // V(1122) = K(1122,1) * [SIRT7_rna];
  R1122: SIRT7_rna => ; 1;
  // V(1123) = K(1123,1) * [RNF7_rna];
  R1123: RNF7_rna => ; 1;
end
