// SBML level 3 version 2

model Podocyte()

  // Compartments:
  compartment cell = 1;

  // Species:
  species ADD3 in cell = 1/cell;
  species ADD3_g in cell = 1/cell;
  species ADD3_p in cell = 1/cell;
  species ADD3_rna in cell = 1/cell;
  species AKT1 in cell = 1/cell;
  species AKT1_g in cell = 1/cell;
  species AKT1_p in cell = 1/cell;
  species AKT1_rna in cell = 1/cell;
  species ANXA1 in cell = 1/cell;
  species ANXA1_g in cell = 1/cell;
  species ANXA1_p in cell = 1/cell;
  species ANXA1_rna in cell = 1/cell;
  species AQP1 in cell = 1/cell;
  species AQP1_g in cell = 1/cell;
  species AQP1_p in cell = 1/cell;
  species AQP1_rna in cell = 1/cell;
  species AXL in cell = 1/cell;
  species AXL_g in cell = 1/cell;
  species AXL_p in cell = 1/cell;
  species AXL_rna in cell = 1/cell;
  species BAD in cell = 1/cell;
  species BAD_g in cell = 1/cell;
  species BAD_p in cell = 1/cell;
  species BAD_rna in cell = 1/cell;
  species BAX in cell = 1/cell;
  species BAX_g in cell = 1/cell;
  species BAX_p in cell = 1/cell;
  species BAX_rna in cell = 1/cell;
  species CALM1 in cell = 1/cell;
  species CALM1_g in cell = 1/cell;
  species CALM1_p in cell = 1/cell;
  species CALM1_rna in cell = 1/cell;
  species CCND1 in cell = 1/cell;
  species CCND1_g in cell = 1/cell;
  species CCND1_rna in cell = 1/cell;
  species CDKN1B in cell = 1/cell;
  species CDKN1B_g in cell = 1/cell;
  species CDKN1B_p in cell = 1/cell;
  species CDKN1B_rna in cell = 1/cell;
  species CREB1 in cell = 1/cell;
  species CREB1_g in cell = 1/cell;
  species CREB1_p in cell = 1/cell;
  species CREB1_rna in cell = 1/cell;
  species CTNNB1 in cell = 1/cell;
  species CTNNB1_g in cell = 1/cell;
  species CTNNB1_p in cell = 1/cell;
  species CTNNB1_rna in cell = 1/cell;
  species CUL3 in cell = 1/cell;
  species CUL3_g in cell = 1/cell;
  species CUL3_rna in cell = 1/cell;
  species CYBA in cell = 1/cell;
  species CYBA_g in cell = 1/cell;
  species CYBA_p in cell = 1/cell;
  species CYBA_rna in cell = 1/cell;
  species DDIT3 in cell = 1/cell;
  species DDIT3_g in cell = 1/cell;
  species DDIT3_p in cell = 1/cell;
  species DDIT3_rna in cell = 1/cell;
  species DNM1L in cell = 1/cell;
  species DNM1L_g in cell = 1/cell;
  species DNM1L_p in cell = 1/cell;
  species DNM1L_rna in cell = 1/cell;
  species DUSP1 in cell = 1/cell;
  species DUSP1_g in cell = 1/cell;
  species DUSP1_p in cell = 1/cell;
  species DUSP1_rna in cell = 1/cell;
  species EP300 in cell = 1/cell;
  species EP300_g in cell = 1/cell;
  species EP300_p in cell = 1/cell;
  species EP300_rna in cell = 1/cell;
  species F2R in cell = 1/cell;
  species F2R_g in cell = 1/cell;
  species F2R_p in cell = 1/cell;
  species F2R_rna in cell = 1/cell;
  species F3 in cell = 1/cell;
  species F3_g in cell = 1/cell;
  species F3_p in cell = 1/cell;
  species F3_rna in cell = 1/cell;
  species FGF1 in cell = 1/cell;
  species FGF1_g in cell = 1/cell;
  species FGF1_rna in cell = 1/cell;
  species FOS in cell = 1/cell;
  species FOS_g in cell = 1/cell;
  species FOS_p in cell = 1/cell;
  species FOS_rna in cell = 1/cell;
  species FYN in cell = 1/cell;
  species FYN_g in cell = 1/cell;
  species FYN_p in cell = 1/cell;
  species FYN_rna in cell = 1/cell;
  species GCLM in cell = 1/cell;
  species GCLM_g in cell = 1/cell;
  species GCLM_rna in cell = 1/cell;
  species GHR in cell = 1/cell;
  species GHR_g in cell = 1/cell;
  species GHR_p in cell = 1/cell;
  species GHR_rna in cell = 1/cell;
  species GJA1 in cell = 1/cell;
  species GJA1_g in cell = 1/cell;
  species GJA1_p in cell = 1/cell;
  species GJA1_rna in cell = 1/cell;
  species GPX4 in cell = 1/cell;
  species GPX4_g in cell = 1/cell;
  species GPX4_rna in cell = 1/cell;
  species HDAC1 in cell = 1/cell;
  species HDAC1_g in cell = 1/cell;
  species HDAC1_rna in cell = 1/cell;
  species HES1 in cell = 1/cell;
  species HES1_g in cell = 1/cell;
  species HES1_p in cell = 1/cell;
  species HES1_rna in cell = 1/cell;
  species HIF1A in cell = 1/cell;
  species HIF1A_g in cell = 1/cell;
  species HIF1A_p in cell = 1/cell;
  species HIF1A_rna in cell = 1/cell;
  species HIPK2 in cell = 1/cell;
  species HIPK2_g in cell = 1/cell;
  species HIPK2_p in cell = 1/cell;
  species HIPK2_rna in cell = 1/cell;
  species HMGN1 in cell = 1/cell;
  species HMGN1_g in cell = 1/cell;
  species HMGN1_p in cell = 1/cell;
  species HMGN1_rna in cell = 1/cell;
  species HSPB1 in cell = 1/cell;
  species HSPB1_g in cell = 1/cell;
  species HSPB1_p in cell = 1/cell;
  species HSPB1_rna in cell = 1/cell;
  species IGF1 in cell = 1/cell;
  species IGF1R in cell = 1/cell;
  species IGF1R_g in cell = 1/cell;
  species IGF1R_p in cell = 1/cell;
  species IGF1R_rna in cell = 1/cell;
  species IGF1_g in cell = 1/cell;
  species IGF1_rna in cell = 1/cell;
  species IL6R in cell = 1/cell;
  species IL6R_g in cell = 1/cell;
  species IL6R_rna in cell = 1/cell;
  species ILK in cell = 1/cell;
  species ILK_g in cell = 1/cell;
  species ILK_p in cell = 1/cell;
  species ILK_rna in cell = 1/cell;
  species INSR in cell = 1/cell;
  species INSR_g in cell = 1/cell;
  species INSR_p in cell = 1/cell;
  species INSR_rna in cell = 1/cell;
  species JAK1 in cell = 1/cell;
  species JAK1_g in cell = 1/cell;
  species JAK1_p in cell = 1/cell;
  species JAK1_rna in cell = 1/cell;
  species JAK2 in cell = 1/cell;
  species JAK2_g in cell = 1/cell;
  species JAK2_p in cell = 1/cell;
  species JAK2_rna in cell = 1/cell;
  species JUN in cell = 1/cell;
  species JUN_g in cell = 1/cell;
  species JUN_p in cell = 1/cell;
  species JUN_rna in cell = 1/cell;
  species KDR in cell = 1/cell;
  species KDR_g in cell = 1/cell;
  species KDR_p in cell = 1/cell;
  species KDR_rna in cell = 1/cell;
  species KLF9 in cell = 1/cell;
  species KLF9_g in cell = 1/cell;
  species KLF9_rna in cell = 1/cell;
  species LEPR in cell = 1/cell;
  species LEPR_g in cell = 1/cell;
  species LEPR_p in cell = 1/cell;
  species LEPR_rna in cell = 1/cell;
  species MAPK1 in cell = 1/cell;
  species MAPK1_g in cell = 1/cell;
  species MAPK1_p in cell = 1/cell;
  species MAPK1_rna in cell = 1/cell;
  species MAPK6 in cell = 1/cell;
  species MAPK6_g in cell = 1/cell;
  species MAPK6_p in cell = 1/cell;
  species MAPK6_rna in cell = 1/cell;
  species MAPKAP1 in cell = 1/cell;
  species MAPKAP1_g in cell = 1/cell;
  species MAPKAP1_p in cell = 1/cell;
  species MAPKAP1_rna in cell = 1/cell;
  species MDM2 in cell = 1/cell;
  species MDM2_g in cell = 1/cell;
  species MDM2_p in cell = 1/cell;
  species MDM2_rna in cell = 1/cell;
  species MECP2 in cell = 1/cell;
  species MECP2_g in cell = 1/cell;
  species MECP2_p in cell = 1/cell;
  species MECP2_rna in cell = 1/cell;
  species MFF in cell = 1/cell;
  species MFF_g in cell = 1/cell;
  species MFF_p in cell = 1/cell;
  species MFF_rna in cell = 1/cell;
  species MFN1 in cell = 1/cell;
  species MFN1_g in cell = 1/cell;
  species MFN1_p in cell = 1/cell;
  species MFN1_rna in cell = 1/cell;
  species MFN2 in cell = 1/cell;
  species MFN2_g in cell = 1/cell;
  species MFN2_p in cell = 1/cell;
  species MFN2_rna in cell = 1/cell;
  species MYLIP in cell = 1/cell;
  species MYLIP_g in cell = 1/cell;
  species MYLIP_rna in cell = 1/cell;
  species NFE2L2 in cell = 1/cell;
  species NFE2L2_g in cell = 1/cell;
  species NFE2L2_p in cell = 1/cell;
  species NFE2L2_rna in cell = 1/cell;
  species NOTCH2 in cell = 1/cell;
  species NOTCH2_g in cell = 1/cell;
  species NOTCH2_rna in cell = 1/cell;
  species NOX4 in cell = 1/cell;
  species NOX4_g in cell = 1/cell;
  species NOX4_p in cell = 1/cell;
  species NOX4_rna in cell = 1/cell;
  species NPHS1 in cell = 1/cell;
  species NPHS1_g in cell = 1/cell;
  species NPHS1_p in cell = 1/cell;
  species NPHS1_rna in cell = 1/cell;
  species NR3C1 in cell = 1/cell;
  species NR3C1_g in cell = 1/cell;
  species NR3C1_p in cell = 1/cell;
  species NR3C1_rna in cell = 1/cell;
  species NR3C2 in cell = 1/cell;
  species NR3C2_g in cell = 1/cell;
  species NR3C2_p in cell = 1/cell;
  species NR3C2_rna in cell = 1/cell;
  species NR4A1 in cell = 1/cell;
  species NR4A1_g in cell = 1/cell;
  species NR4A1_p in cell = 1/cell;
  species NR4A1_rna in cell = 1/cell;
  species NUMB in cell = 1/cell;
  species NUMB_g in cell = 1/cell;
  species NUMB_rna in cell = 1/cell;
  species PARK7 in cell = 1/cell;
  species PARK7_g in cell = 1/cell;
  species PARK7_p in cell = 1/cell;
  species PARK7_rna in cell = 1/cell;
  species PARP1 in cell = 1/cell;
  species PARP1_g in cell = 1/cell;
  species PARP1_p in cell = 1/cell;
  species PARP1_rna in cell = 1/cell;
  species PIK3CA in cell = 1/cell;
  species PIK3CA_g in cell = 1/cell;
  species PIK3CA_rna in cell = 1/cell;
  species PIK3R1 in cell = 1/cell;
  species PIK3R1_g in cell = 1/cell;
  species PIK3R1_p in cell = 1/cell;
  species PIK3R1_rna in cell = 1/cell;
  species PINK1 in cell = 1/cell;
  species PINK1_g in cell = 1/cell;
  species PINK1_rna in cell = 1/cell;
  species PKM in cell = 1/cell;
  species PKM_g in cell = 1/cell;
  species PKM_rna in cell = 1/cell;
  species PKN1 in cell = 1/cell;
  species PKN1_g in cell = 1/cell;
  species PKN1_p in cell = 1/cell;
  species PKN1_rna in cell = 1/cell;
  species PODXL in cell = 1/cell;
  species PODXL_g in cell = 1/cell;
  species PODXL_rna in cell = 1/cell;
  species PRDX6 in cell = 1/cell;
  species PRDX6_g in cell = 1/cell;
  species PRDX6_p in cell = 1/cell;
  species PRDX6_rna in cell = 1/cell;
  species PRKAA1 in cell = 1/cell;
  species PRKAA1_g in cell = 1/cell;
  species PRKAA1_p in cell = 1/cell;
  species PRKAA1_rna in cell = 1/cell;
  species PRKCA in cell = 1/cell;
  species PRKCA_g in cell = 1/cell;
  species PRKCA_p in cell = 1/cell;
  species PRKCA_rna in cell = 1/cell;
  species PTEN in cell = 1/cell;
  species PTEN_g in cell = 1/cell;
  species PTEN_p in cell = 1/cell;
  species PTEN_rna in cell = 1/cell;
  species PTPN11 in cell = 1/cell;
  species PTPN11_g in cell = 1/cell;
  species PTPN11_p in cell = 1/cell;
  species PTPN11_rna in cell = 1/cell;
  species PTPN2 in cell = 1/cell;
  species PTPN2_g in cell = 1/cell;
  species PTPN2_rna in cell = 1/cell;
  species PTPRB in cell = 1/cell;
  species PTPRB_g in cell = 1/cell;
  species PTPRB_rna in cell = 1/cell;
  species RAC1 in cell = 1/cell;
  species RAC1_g in cell = 1/cell;
  species RAC1_p in cell = 1/cell;
  species RAC1_rna in cell = 1/cell;
  species RCAN1 in cell = 1/cell;
  species RCAN1_g in cell = 1/cell;
  species RCAN1_p in cell = 1/cell;
  species RCAN1_rna in cell = 1/cell;
  species RHOA in cell = 1/cell;
  species RHOA_g in cell = 1/cell;
  species RHOA_p in cell = 1/cell;
  species RHOA_rna in cell = 1/cell;
  species RNF7 in cell = 1/cell;
  species RNF7_g in cell = 1/cell;
  species RNF7_rna in cell = 1/cell;
  species ROCK1 in cell = 1/cell;
  species ROCK1_g in cell = 1/cell;
  species ROCK1_rna in cell = 1/cell;
  species ROCK2 in cell = 1/cell;
  species ROCK2_g in cell = 1/cell;
  species ROCK2_rna in cell = 1/cell;
  species SGK1 in cell = 1/cell;
  species SGK1_g in cell = 1/cell;
  species SGK1_rna in cell = 1/cell;
  species SMAD1 in cell = 1/cell;
  species SMAD1_g in cell = 1/cell;
  species SMAD1_p in cell = 1/cell;
  species SMAD1_rna in cell = 1/cell;
  species SMAD2 in cell = 1/cell;
  species SMAD2_g in cell = 1/cell;
  species SMAD2_p in cell = 1/cell;
  species SMAD2_rna in cell = 1/cell;
  species SMAD4 in cell = 1/cell;
  species SMAD4_g in cell = 1/cell;
  species SMAD4_p in cell = 1/cell;
  species SMAD4_rna in cell = 1/cell;
  species SOCS3 in cell = 1/cell;
  species SOCS3_g in cell = 1/cell;
  species SOCS3_rna in cell = 1/cell;
  species SOD1 in cell = 1/cell;
  species SOD1_g in cell = 1/cell;
  species SOD1_rna in cell = 1/cell;
  species SOD2 in cell = 1/cell;
  species SOD2_g in cell = 1/cell;
  species SOD2_rna in cell = 1/cell;
  species SP1 in cell = 1/cell;
  species SP1_g in cell = 1/cell;
  species SP1_p in cell = 1/cell;
  species SP1_rna in cell = 1/cell;
  species SREBF1 in cell = 1/cell;
  species SREBF1_g in cell = 1/cell;
  species SREBF1_p in cell = 1/cell;
  species SREBF1_rna in cell = 1/cell;
  species STAT1 in cell = 1/cell;
  species STAT1_g in cell = 1/cell;
  species STAT1_p in cell = 1/cell;
  species STAT1_rna in cell = 1/cell;
  species STAT3 in cell = 1/cell;
  species STAT3_g in cell = 1/cell;
  species STAT3_p in cell = 1/cell;
  species STAT3_rna in cell = 1/cell;
  species STAT6 in cell = 1/cell;
  species STAT6_g in cell = 1/cell;
  species STAT6_p in cell = 1/cell;
  species STAT6_rna in cell = 1/cell;
  species STK11 in cell = 1/cell;
  species STK11_g in cell = 1/cell;
  species STK11_p in cell = 1/cell;
  species STK11_rna in cell = 1/cell;
  species TGFB1 in cell = 1/cell;
  species TGFB1_g in cell = 1/cell;
  species TGFB1_rna in cell = 1/cell;
  species TRPC6 in cell = 1/cell;
  species TRPC6_g in cell = 1/cell;
  species TRPC6_p in cell = 1/cell;
  species TRPC6_rna in cell = 1/cell;
  species TSC2 in cell = 1/cell;
  species TSC2_g in cell = 1/cell;
  species TSC2_p in cell = 1/cell;
  species TSC2_rna in cell = 1/cell;
  species TXNIP in cell = 1/cell;
  species TXNIP_g in cell = 1/cell;
  species TXNIP_p in cell = 1/cell;
  species TXNIP_rna in cell = 1/cell;
  species UBC in cell = 1/cell;
  species UBC_g in cell = 1/cell;
  species UBC_p in cell = 1/cell;
  species UBC_rna in cell = 1/cell;
  species VEGFA in cell = 1/cell;
  species VEGFA_g in cell = 1/cell;
  species VEGFA_rna in cell = 1/cell;
  species VIM in cell = 1/cell;
  species VIM_g in cell = 1/cell;
  species VIM_p in cell = 1/cell;
  species VIM_rna in cell = 1/cell;
  species VLDLR in cell = 1/cell;
  species VLDLR_g in cell = 1/cell;
  species VLDLR_rna in cell = 1/cell;
  species WT1 in cell = 1/cell;
  species WT1_g in cell = 1/cell;
  species WT1_rna in cell = 1/cell;
  species YAP1 in cell = 1/cell;
  species YAP1_g in cell = 1/cell;
  species YAP1_p in cell = 1/cell;
  species YAP1_rna in cell = 1/cell;
  species ZFP36 in cell = 1/cell;
  species ZFP36_g in cell = 1/cell;
  species ZFP36_p in cell = 1/cell;
  species ZFP36_rna in cell = 1/cell;

  // Reactions:
  // V(1) = K(1,1) * [SMAD2_p] * [SMAD4_p] -K(1,2) * [SIGNOR-C8];
  R1: SMAD2_p => SMAD4_p; 1;
  // V(2) = K(2,1) * [SMAD4_p] * [JUN_p] -K(2,2) * [SIGNOR-C10];
  R2: JUN_p => SMAD4_p; 1;
  // V(3) = K(3,1) * [STAT3_p] * [SP1_p] -K(3,2) * [SIGNOR-C74];
  R3: STAT3_p => SP1_p; 1;
  // V(4) = K(4,1) * [SMAD4_p] * [SMAD1] * [SMAD1] -K(4,2) * [SIGNOR-C85];
  R4: SMAD1 => SMAD4_p; 1;
  // V(5) = K(5,1) * [STAT1_p] * [STAT3_p] -K(5,2) * [SIGNOR-C118];
  R5: STAT3_p => STAT1_p; 1;
  // V(6) = K(6,1) * [SIGNOR-C118_p] * [JAK1_p] -K(6,2) * [SIGNOR-C120];
  R6: JAK1_p => ; 1;
  // V(7) = K(7,1) * [FOS_p] * [JUN_p] * [JUN_p] * [FOS_p] * [JUN_p] * [FOS_p] * [FOS_p] * [JUN_p] -K(7,2) * [SIGNOR-C154];
  R7: JUN_p => FOS_p; 1;
  // V(8) = K(8,1) * [PIK3R1_p] * [PIK3CA] -K(8,2) * [SIGNOR-C156];
  R8: PIK3CA => PIK3R1_p; 1;
  // V(9) = K(9,1) * [MAPK1_p] * [EP300] -K(9,2) * [MAPK1_p |EP300];
  R9: EP300 => MAPK1_p; 1;
  // V(10) = K(10,1) * [MAPK1_p |EP300];
  R10: EP300 => MAPK1_p; 1;
  // V(11) = K(11,1) * [MAPK1_p] * [HIF1A] -K(11,2) * [MAPK1_p |HIF1A];
  R11: HIF1A => MAPK1_p; 1;
  // V(12) = K(12,1) * [MAPK1_p |HIF1A];
  R12: HIF1A => MAPK1_p; 1;
  // V(13) = K(13,1) * [MAPK1_p] * [NR3C1] -K(13,2) * [MAPK1_p |NR3C1];
  R13: NR3C1 => MAPK1_p; 1;
  // V(14) = K(14,1) * [MAPK1_p |NR3C1];
  R14: NR3C1 => MAPK1_p; 1;
  // V(15) = K(15,1) * [MAPK1_p] * [PRDX6] -K(15,2) * [MAPK1_p |PRDX6];
  R15: PRDX6 => MAPK1_p; 1;
  // V(16) = K(16,1) * [MAPK1_p |PRDX6];
  R16: PRDX6 => MAPK1_p; 1;
  // V(17) = K(17,1) * [FYN_p] * [STK11] -K(17,2) * [FYN_p |STK11];
  R17: FYN_p => STK11; 1;
  // V(18) = K(18,1) * [FYN_p |STK11];
  R18: FYN_p => STK11; 1;
  // V(19) = K(19,1) * [PRKCA_p] * [CTNNB1] -K(19,2) * [PRKCA_p |CTNNB1];
  R19: CTNNB1 => PRKCA_p; 1;
  // V(20) = K(20,1) * [PRKCA_p |CTNNB1];
  R20: CTNNB1 => PRKCA_p; 1;
  // V(21) = K(21,1) * [MAPK1_p] * [SMAD1] -K(21,2) * [MAPK1_p |SMAD1];
  R21: SMAD1 => MAPK1_p; 1;
  // V(22) = K(22,1) * [MAPK1_p |SMAD1];
  R22: SMAD1 => MAPK1_p; 1;
  // V(23) = K(23,1) * [AKT1_p] * [MDM2] -K(23,2) * [AKT1_p |MDM2];
  R23: AKT1_p => MDM2; 1;
  // V(24) = K(24,1) * [AKT1_p |MDM2];
  R24: AKT1_p => MDM2; 1;
  // V(25) = K(25,1) * [AKT1_p] * [PRKAA1] -K(25,2) * [AKT1_p |PRKAA1];
  R25: PRKAA1 => AKT1_p; 1;
  // V(26) = K(26,1) * [AKT1_p |PRKAA1];
  R26: PRKAA1 => AKT1_p; 1;
  // V(27) = K(27,1) * [PRKCA_p] * [VIM] -K(27,2) * [PRKCA_p |VIM];
  R27: PRKCA_p => VIM; 1;
  // V(28) = K(28,1) * [PRKCA_p |VIM];
  R28: PRKCA_p => VIM; 1;
  // V(29) = K(29,1) * [JAK2_p] * [JAK2] -K(29,2) * [JAK2_p |JAK2];
  R29: JAK2_p => JAK2; 1;
  // V(30) = K(30,1) * [JAK2_p |JAK2];
  R30: JAK2_p => JAK2; 1;
  // V(31) = K(31,1) * [MAPK1_p] * [CDKN1B] -K(31,2) * [MAPK1_p |CDKN1B];
  R31: CDKN1B => MAPK1_p; 1;
  // V(32) = K(32,1) * [MAPK1_p |CDKN1B];
  R32: CDKN1B => MAPK1_p; 1;
  // V(33) = K(33,1) * [MAPK1_p] * [SMAD4] -K(33,2) * [MAPK1_p |SMAD4];
  R33: SMAD4 => MAPK1_p; 1;
  // V(34) = K(34,1) * [MAPK1_p |SMAD4];
  R34: SMAD4 => MAPK1_p; 1;
  // V(35) = K(35,1) * [ROCK1] * [DNM1L] -K(35,2) * [ROCK1 |DNM1L];
  R35: ROCK1 => DNM1L; 1;
  // V(36) = K(36,1) * [ROCK1 |DNM1L];
  R36: ROCK1 => DNM1L; 1;
  // V(37) = K(37,1) * [MAPK1_p] * [STK11] -K(37,2) * [MAPK1_p |STK11];
  R37: STK11 => MAPK1_p; 1;
  // V(38) = K(38,1) * [MAPK1_p |STK11];
  R38: STK11 => MAPK1_p; 1;
  // V(39) = K(39,1) * [MAPK1_p] * [JUN] -K(39,2) * [MAPK1_p |JUN];
  R39: JUN => MAPK1_p; 1;
  // V(40) = K(40,1) * [MAPK1_p |JUN];
  R40: JUN => MAPK1_p; 1;
  // V(41) = K(41,1) * [AKT1_p] * [NR4A1] -K(41,2) * [AKT1_p |NR4A1];
  R41: NR4A1 => AKT1_p; 1;
  // V(42) = K(42,1) * [AKT1_p |NR4A1];
  R42: NR4A1 => AKT1_p; 1;
  // V(43) = K(43,1) * [MAPK1_p] * [FOS] -K(43,2) * [MAPK1_p |FOS];
  R43: FOS => MAPK1_p; 1;
  // V(44) = K(44,1) * [MAPK1_p |FOS];
  R44: FOS => MAPK1_p; 1;
  // V(45) = K(45,1) * [STK11_p] * [STK11] -K(45,2) * [STK11_p |STK11];
  R45: STK11_p => STK11; 1;
  // V(46) = K(46,1) * [STK11_p |STK11];
  R46: STK11_p => STK11; 1;
  // V(47) = K(47,1) * [KDR_p] * [KDR] -K(47,2) * [KDR_p |KDR];
  R47: KDR => KDR_p; 1;
  // V(48) = K(48,1) * [KDR_p |KDR];
  R48: KDR => KDR_p; 1;
  // V(49) = K(49,1) * [MAPK1_p] * [SMAD2] -K(49,2) * [MAPK1_p |SMAD2];
  R49: SMAD2 => MAPK1_p; 1;
  // V(50) = K(50,1) * [MAPK1_p |SMAD2];
  R50: SMAD2 => MAPK1_p; 1;
  // V(51) = K(51,1) * [PRKCA_p] * [F3] -K(51,2) * [PRKCA_p |F3];
  R51: PRKCA_p => F3; 1;
  // V(52) = K(52,1) * [PRKCA_p |F3];
  R52: PRKCA_p => F3; 1;
  // V(53) = K(53,1) * [INSR_p] * [INSR] -K(53,2) * [INSR_p |INSR];
  R53: INSR_p => INSR; 1;
  // V(54) = K(54,1) * [INSR_p |INSR];
  R54: INSR_p => INSR; 1;
  // V(55) = K(55,1) * [AKT1_p] * [BAD] -K(55,2) * [AKT1_p |BAD];
  R55: BAD => AKT1_p; 1;
  // V(56) = K(56,1) * [AKT1_p |BAD];
  R56: BAD => AKT1_p; 1;
  // V(57) = K(57,1) * [MAPK1_p] * [GJA1] -K(57,2) * [MAPK1_p |GJA1];
  R57: GJA1 => MAPK1_p; 1;
  // V(58) = K(58,1) * [MAPK1_p |GJA1];
  R58: GJA1 => MAPK1_p; 1;
  // V(59) = K(59,1) * [MAPK1_p] * [SREBF1] -K(59,2) * [MAPK1_p |SREBF1];
  R59: SREBF1 => MAPK1_p; 1;
  // V(60) = K(60,1) * [MAPK1_p |SREBF1];
  R60: SREBF1 => MAPK1_p; 1;
  // V(61) = K(61,1) * [JAK1_p] * [STAT1] -K(61,2) * [JAK1_p |STAT1];
  R61: STAT1 => JAK1_p; 1;
  // V(62) = K(62,1) * [JAK1_p |STAT1];
  R62: STAT1 => JAK1_p; 1;
  // V(63) = K(63,1) * [MAPK1_p] * [DUSP1] -K(63,2) * [MAPK1_p |DUSP1];
  R63: DUSP1 => MAPK1_p; 1;
  // V(64) = K(64,1) * [MAPK1_p |DUSP1];
  R64: DUSP1 => MAPK1_p; 1;
  // V(65) = K(65,1) * [AKT1_p] * [HSPB1] -K(65,2) * [AKT1_p |HSPB1];
  R65: HSPB1 => AKT1_p; 1;
  // V(66) = K(66,1) * [AKT1_p |HSPB1];
  R66: HSPB1 => AKT1_p; 1;
  // V(67) = K(67,1) * [MAPK1_p] * [NR3C2] -K(67,2) * [MAPK1_p |NR3C2];
  R67: NR3C2 => MAPK1_p; 1;
  // V(68) = K(68,1) * [MAPK1_p |NR3C2];
  R68: NR3C2 => MAPK1_p; 1;
  // V(69) = K(69,1) * [PKN1_p] * [PKN1] -K(69,2) * [PKN1_p |PKN1];
  R69: PKN1 => PKN1_p; 1;
  // V(70) = K(70,1) * [PKN1_p |PKN1];
  R70: PKN1 => PKN1_p; 1;
  // V(71) = K(71,1) * [PRKCA_p] * [AQP1] -K(71,2) * [PRKCA_p |AQP1];
  R71: PRKCA_p => AQP1; 1;
  // V(72) = K(72,1) * [PRKCA_p |AQP1];
  R72: PRKCA_p => AQP1; 1;
  // V(73) = K(73,1) * [MAPK1_p] * [TSC2] -K(73,2) * [MAPK1_p |TSC2];
  R73: TSC2 => MAPK1_p; 1;
  // V(74) = K(74,1) * [MAPK1_p |TSC2];
  R74: TSC2 => MAPK1_p; 1;
  // V(75) = K(75,1) * [INSR_p] * [SIGNOR-C156] -K(75,2) * [INSR_p |SIGNOR-C156];
  R75: INSR_p => ; 1;
  // V(76) = K(76,1) * [INSR_p |SIGNOR-C156];
  R76: INSR_p => ; 1;
  // V(77) = K(77,1) * [MAPK1_p] * [RHOA] -K(77,2) * [MAPK1_p |RHOA];
  R77: RHOA => MAPK1_p; 1;
  // V(78) = K(78,1) * [MAPK1_p |RHOA];
  R78: RHOA => MAPK1_p; 1;
  // V(79) = K(79,1) * [JAK2_p] * [STAT1] -K(79,2) * [JAK2_p |STAT1];
  R79: JAK2_p => STAT1; 1;
  // V(80) = K(80,1) * [JAK2_p |STAT1];
  R80: JAK2_p => STAT1; 1;
  // V(81) = K(81,1) * [PRKCA_p] * [PRKCA] -K(81,2) * [PRKCA_p |PRKCA];
  R81: PRKCA => PRKCA_p; 1;
  // V(82) = K(82,1) * [PRKCA_p |PRKCA];
  R82: PRKCA => PRKCA_p; 1;
  // V(83) = K(83,1) * [PRKCA_p] * [HMGN1] -K(83,2) * [PRKCA_p |HMGN1];
  R83: HMGN1 => PRKCA_p; 1;
  // V(84) = K(84,1) * [PRKCA_p |HMGN1];
  R84: HMGN1 => PRKCA_p; 1;
  // V(85) = K(85,1) * [INSR_p] * [CALM1] -K(85,2) * [INSR_p |CALM1];
  R85: INSR_p => CALM1; 1;
  // V(86) = K(86,1) * [INSR_p |CALM1];
  R86: INSR_p => CALM1; 1;
  // V(87) = K(87,1) * [PRKCA_p] * [GJA1] -K(87,2) * [PRKCA_p |GJA1];
  R87: GJA1 => PRKCA_p; 1;
  // V(88) = K(88,1) * [PRKCA_p |GJA1];
  R88: GJA1 => PRKCA_p; 1;
  // V(89) = K(89,1) * [AKT1_p] * [CDKN1B] -K(89,2) * [AKT1_p |CDKN1B];
  R89: CDKN1B => AKT1_p; 1;
  // V(90) = K(90,1) * [AKT1_p |CDKN1B];
  R90: CDKN1B => AKT1_p; 1;
  // V(91) = K(91,1) * [MAPK1_p] * [SIGNOR-C154] -K(91,2) * [MAPK1_p |SIGNOR-C154];
  R91: MAPK1_p => ; 1;
  // V(92) = K(92,1) * [MAPK1_p |SIGNOR-C154];
  R92: MAPK1_p => ; 1;
  // V(93) = K(93,1) * [PINK1] * [UBC] -K(93,2) * [PINK1 |UBC];
  R93: PINK1 => UBC; 1;
  // V(94) = K(94,1) * [PINK1 |UBC];
  R94: PINK1 => UBC; 1;
  // V(95) = K(95,1) * [AKT1_p] * [RAC1] -K(95,2) * [AKT1_p |RAC1];
  R95: RAC1 => AKT1_p; 1;
  // V(96) = K(96,1) * [AKT1_p |RAC1];
  R96: RAC1 => AKT1_p; 1;
  // V(97) = K(97,1) * [IGF1R_p] * [IGF1R] -K(97,2) * [IGF1R_p |IGF1R];
  R97: IGF1R_p => IGF1R; 1;
  // V(98) = K(98,1) * [IGF1R_p |IGF1R];
  R98: IGF1R_p => IGF1R; 1;
  // V(99) = K(99,1) * [STK11_p] * [PTEN] -K(99,2) * [STK11_p |PTEN];
  R99: PTEN => STK11_p; 1;
  // V(100) = K(100,1) * [STK11_p |PTEN];
  R100: PTEN => STK11_p; 1;
  // V(101) = K(101,1) * [HIPK2_p] * [HIPK2] -K(101,2) * [HIPK2_p |HIPK2];
  R101: HIPK2_p => HIPK2; 1;
  // V(102) = K(102,1) * [HIPK2_p |HIPK2];
  R102: HIPK2_p => HIPK2; 1;
  // V(103) = K(103,1) * [PRKCA_p] * [JAK2] -K(103,2) * [PRKCA_p |JAK2];
  R103: PRKCA_p => JAK2; 1;
  // V(104) = K(104,1) * [PRKCA_p |JAK2];
  R104: PRKCA_p => JAK2; 1;
  // V(105) = K(105,1) * [SGK1] * [CDKN1B] -K(105,2) * [SGK1 |CDKN1B];
  R105: CDKN1B => SGK1; 1;
  // V(106) = K(106,1) * [SGK1 |CDKN1B];
  R106: CDKN1B => SGK1; 1;
  // V(107) = K(107,1) * [AKT1_p] * [TSC2] -K(107,2) * [AKT1_p |TSC2];
  R107: TSC2 => AKT1_p; 1;
  // V(108) = K(108,1) * [AKT1_p |TSC2];
  R108: TSC2 => AKT1_p; 1;
  // V(109) = K(109,1) * [PRKCA_p] * [PRKAA1] -K(109,2) * [PRKCA_p |PRKAA1];
  R109: PRKAA1 => PRKCA_p; 1;
  // V(110) = K(110,1) * [PRKCA_p |PRKAA1];
  R110: PRKAA1 => PRKCA_p; 1;
  // V(111) = K(111,1) * [AKT1_p] * [EP300] -K(111,2) * [AKT1_p |EP300];
  R111: EP300 => AKT1_p; 1;
  // V(112) = K(112,1) * [AKT1_p |EP300];
  R112: EP300 => AKT1_p; 1;
  // V(113) = K(113,1) * [FYN_p] * [FYN] -K(113,2) * [FYN_p |FYN];
  R113: FYN_p => FYN; 1;
  // V(114) = K(114,1) * [FYN_p |FYN];
  R114: FYN_p => FYN; 1;
  // V(115) = K(115,1) * [PRKCA_p] * [INSR] -K(115,2) * [PRKCA_p |INSR];
  R115: PRKCA_p => INSR; 1;
  // V(116) = K(116,1) * [PRKCA_p |INSR];
  R116: PRKCA_p => INSR; 1;
  // V(117) = K(117,1) * [SIGNOR-C156_p] * [BAD] -K(117,2) * [SIGNOR-C156_p |BAD];
  R117: BAD => ; 1;
  // V(118) = K(118,1) * [SIGNOR-C156_p |BAD];
  R118: BAD => ; 1;
  // V(119) = K(119,1) * [AKT1_p] * [VIM] -K(119,2) * [AKT1_p |VIM];
  R119: VIM => AKT1_p; 1;
  // V(120) = K(120,1) * [AKT1_p |VIM];
  R120: VIM => AKT1_p; 1;
  // V(121) = K(121,1) * [AXL_p] * [AXL] -K(121,2) * [AXL_p |AXL];
  R121: AXL => AXL_p; 1;
  // V(122) = K(122,1) * [AXL_p |AXL];
  R122: AXL => AXL_p; 1;
  // V(123) = K(123,1) * [ILK_p] * [AKT1] -K(123,2) * [ILK_p |AKT1];
  R123: ILK_p => AKT1; 1;
  // V(124) = K(124,1) * [ILK_p |AKT1];
  R124: ILK_p => AKT1; 1;
  // V(125) = K(125,1) * [MAPK1_p] * [SP1] -K(125,2) * [MAPK1_p |SP1];
  R125: SP1 => MAPK1_p; 1;
  // V(126) = K(126,1) * [MAPK1_p |SP1];
  R126: SP1 => MAPK1_p; 1;
  // V(127) = K(127,1) * [ROCK1] * [PTEN] -K(127,2) * [ROCK1 |PTEN];
  R127: PTEN => ROCK1; 1;
  // V(128) = K(128,1) * [ROCK1 |PTEN];
  R128: PTEN => ROCK1; 1;
  // V(129) = K(129,1) * [MAPK1_p] * [BAD] -K(129,2) * [MAPK1_p |BAD];
  R129: BAD => MAPK1_p; 1;
  // V(130) = K(130,1) * [MAPK1_p |BAD];
  R130: BAD => MAPK1_p; 1;
  // V(131) = K(131,1) * [IL6R] * [JAK2] -K(131,2) * [IL6R |JAK2];
  R131: IL6R => JAK2; 1;
  // V(132) = K(132,1) * [IL6R |JAK2];
  R132: IL6R => JAK2; 1;
  // V(133) = K(133,1) * [MAPK1_p] * [JAK2] -K(133,2) * [MAPK1_p |JAK2];
  R133: JAK2 => MAPK1_p; 1;
  // V(134) = K(134,1) * [MAPK1_p |JAK2];
  R134: JAK2 => MAPK1_p; 1;
  // V(135) = K(135,1) * [FYN_p] * [NOX4] -K(135,2) * [FYN_p |NOX4];
  R135: FYN_p => NOX4; 1;
  // V(136) = K(136,1) * [FYN_p |NOX4];
  R136: FYN_p => NOX4; 1;
  // V(137) = K(137,1) * [JAK1_p] * [STAT3] -K(137,2) * [JAK1_p |STAT3];
  R137: STAT3 => JAK1_p; 1;
  // V(138) = K(138,1) * [JAK1_p |STAT3];
  R138: STAT3 => JAK1_p; 1;
  // V(139) = K(139,1) * [MAPK1_p] * [PARP1] -K(139,2) * [MAPK1_p |PARP1];
  R139: PARP1 => MAPK1_p; 1;
  // V(140) = K(140,1) * [MAPK1_p |PARP1];
  R140: PARP1 => MAPK1_p; 1;
  // V(141) = K(141,1) * [AKT1_p] * [NR3C1] -K(141,2) * [AKT1_p |NR3C1];
  R141: AKT1_p => NR3C1; 1;
  // V(142) = K(142,1) * [AKT1_p |NR3C1];
  R142: AKT1_p => NR3C1; 1;
  // V(143) = K(143,1) * [PRKCA_p] * [HES1] -K(143,2) * [PRKCA_p |HES1];
  R143: PRKCA_p => HES1; 1;
  // V(144) = K(144,1) * [PRKCA_p |HES1];
  R144: PRKCA_p => HES1; 1;
  // V(145) = K(145,1) * [STK11_p] * [SMAD4] -K(145,2) * [STK11_p |SMAD4];
  R145: SMAD4 => STK11_p; 1;
  // V(146) = K(146,1) * [STK11_p |SMAD4];
  R146: SMAD4 => STK11_p; 1;
  // V(147) = K(147,1) * [PRKCA_p] * [ANXA1] -K(147,2) * [PRKCA_p |ANXA1];
  R147: PRKCA_p => ANXA1; 1;
  // V(148) = K(148,1) * [PRKCA_p |ANXA1];
  R148: PRKCA_p => ANXA1; 1;
  // V(149) = K(149,1) * [JAK2_p] * [STAT6] -K(149,2) * [JAK2_p |STAT6];
  R149: STAT6 => JAK2_p; 1;
  // V(150) = K(150,1) * [JAK2_p |STAT6];
  R150: STAT6 => JAK2_p; 1;
  // V(151) = K(151,1) * [JAK1_p] * [STAT6] -K(151,2) * [JAK1_p |STAT6];
  R151: STAT6 => JAK1_p; 1;
  // V(152) = K(152,1) * [JAK1_p |STAT6];
  R152: STAT6 => JAK1_p; 1;
  // V(153) = K(153,1) * [SGK1] * [TSC2] -K(153,2) * [SGK1 |TSC2];
  R153: TSC2 => SGK1; 1;
  // V(154) = K(154,1) * [SGK1 |TSC2];
  R154: TSC2 => SGK1; 1;
  // V(155) = K(155,1) * [AKT1_p] * [YAP1] -K(155,2) * [AKT1_p |YAP1];
  R155: YAP1 => AKT1_p; 1;
  // V(156) = K(156,1) * [AKT1_p |YAP1];
  R156: YAP1 => AKT1_p; 1;
  // V(157) = K(157,1) * [SIGNOR-C156_p] * [AKT1] -K(157,2) * [SIGNOR-C156_p |AKT1];
  R157: AKT1 => ; 1;
  // V(158) = K(158,1) * [SIGNOR-C156_p |AKT1];
  R158: AKT1 => ; 1;
  // V(159) = K(159,1) * [JAK2_p] * [CDKN1B] -K(159,2) * [JAK2_p |CDKN1B];
  R159: JAK2_p => CDKN1B; 1;
  // V(160) = K(160,1) * [JAK2_p |CDKN1B];
  R160: JAK2_p => CDKN1B; 1;
  // V(161) = K(161,1) * [SMAD1] * [SMAD4] -K(161,2) * [SMAD1 |SMAD4];
  R161: SMAD4 => SMAD1; 1;
  // V(162) = K(162,1) * [SMAD1 |SMAD4];
  R162: SMAD4 => SMAD1; 1;
  // V(163) = K(163,1) * [PRKAA1_p] * [EP300] -K(163,2) * [PRKAA1_p |EP300];
  R163: PRKAA1_p => EP300; 1;
  // V(164) = K(164,1) * [PRKAA1_p |EP300];
  R164: PRKAA1_p => EP300; 1;
  // V(165) = K(165,1) * [HIPK2_p] * [MECP2] -K(165,2) * [HIPK2_p |MECP2];
  R165: MECP2 => HIPK2_p; 1;
  // V(166) = K(166,1) * [HIPK2_p |MECP2];
  R166: MECP2 => HIPK2_p; 1;
  // V(167) = K(167,1) * [AKT1_p] * [CTNNB1] -K(167,2) * [AKT1_p |CTNNB1];
  R167: CTNNB1 => AKT1_p; 1;
  // V(168) = K(168,1) * [AKT1_p |CTNNB1];
  R168: CTNNB1 => AKT1_p; 1;
  // V(169) = K(169,1) * [PRKCA_p] * [NPHS1] -K(169,2) * [PRKCA_p |NPHS1];
  R169: NPHS1 => PRKCA_p; 1;
  // V(170) = K(170,1) * [PRKCA_p |NPHS1];
  R170: NPHS1 => PRKCA_p; 1;
  // V(171) = K(171,1) * [PRKCA_p] * [CYBA] -K(171,2) * [PRKCA_p |CYBA];
  R171: PRKCA_p => CYBA; 1;
  // V(172) = K(172,1) * [PRKCA_p |CYBA];
  R172: PRKCA_p => CYBA; 1;
  // V(173) = K(173,1) * [PRKAA1_p] * [SREBF1] -K(173,2) * [PRKAA1_p |SREBF1];
  R173: SREBF1 => PRKAA1_p; 1;
  // V(174) = K(174,1) * [PRKAA1_p |SREBF1];
  R174: SREBF1 => PRKAA1_p; 1;
  // V(175) = K(175,1) * [PRKCA_p] * [BAD] -K(175,2) * [PRKCA_p |BAD];
  R175: PRKCA_p => BAD; 1;
  // V(176) = K(176,1) * [PRKCA_p |BAD];
  R176: PRKCA_p => BAD; 1;
  // V(177) = K(177,1) * [STK11_p] * [YAP1] -K(177,2) * [STK11_p |YAP1];
  R177: YAP1 => STK11_p; 1;
  // V(178) = K(178,1) * [STK11_p |YAP1];
  R178: YAP1 => STK11_p; 1;
  // V(179) = K(179,1) * [MAPK1_p] * [MAPK1] -K(179,2) * [MAPK1_p |MAPK1];
  R179: MAPK1 => MAPK1_p; 1;
  // V(180) = K(180,1) * [MAPK1_p |MAPK1];
  R180: MAPK1 => MAPK1_p; 1;
  // V(181) = K(181,1) * [PRKAA1_p] * [TSC2] -K(181,2) * [PRKAA1_p |TSC2];
  R181: PRKAA1_p => TSC2; 1;
  // V(182) = K(182,1) * [PRKAA1_p |TSC2];
  R182: PRKAA1_p => TSC2; 1;
  // V(183) = K(183,1) * [MAPK1_p] * [ZFP36] -K(183,2) * [MAPK1_p |ZFP36];
  R183: ZFP36 => MAPK1_p; 1;
  // V(184) = K(184,1) * [MAPK1_p |ZFP36];
  R184: ZFP36 => MAPK1_p; 1;
  // V(185) = K(185,1) * [AKT1_p] * [MAPKAP1] -K(185,2) * [AKT1_p |MAPKAP1];
  R185: MAPKAP1 => AKT1_p; 1;
  // V(186) = K(186,1) * [AKT1_p |MAPKAP1];
  R186: MAPKAP1 => AKT1_p; 1;
  // V(187) = K(187,1) * [MAPK1_p] * [RCAN1] -K(187,2) * [MAPK1_p |RCAN1];
  R187: RCAN1 => MAPK1_p; 1;
  // V(188) = K(188,1) * [MAPK1_p |RCAN1];
  R188: RCAN1 => MAPK1_p; 1;
  // V(189) = K(189,1) * [AKT1_p] * [PARK7] -K(189,2) * [AKT1_p |PARK7];
  R189: AKT1_p => PARK7; 1;
  // V(190) = K(190,1) * [AKT1_p |PARK7];
  R190: AKT1_p => PARK7; 1;
  // V(191) = K(191,1) * [FYN_p] * [TRPC6] -K(191,2) * [FYN_p |TRPC6];
  R191: FYN_p => TRPC6; 1;
  // V(192) = K(192,1) * [FYN_p |TRPC6];
  R192: FYN_p => TRPC6; 1;
  // V(193) = K(193,1) * [SGK1] * [SP1] -K(193,2) * [SGK1 |SP1];
  R193: SP1 => SGK1; 1;
  // V(194) = K(194,1) * [SGK1 |SP1];
  R194: SP1 => SGK1; 1;
  // V(195) = K(195,1) * [PRKAA1_p] * [HIPK2] -K(195,2) * [PRKAA1_p |HIPK2];
  R195: PRKAA1_p => HIPK2; 1;
  // V(196) = K(196,1) * [PRKAA1_p |HIPK2];
  R196: PRKAA1_p => HIPK2; 1;
  // V(197) = K(197,1) * [MAPK1_p] * [DNM1L] -K(197,2) * [MAPK1_p |DNM1L];
  R197: DNM1L => MAPK1_p; 1;
  // V(198) = K(198,1) * [MAPK1_p |DNM1L];
  R198: DNM1L => MAPK1_p; 1;
  // V(199) = K(199,1) * [SGK1] * [MAPK1] -K(199,2) * [SGK1 |MAPK1];
  R199: MAPK1 => SGK1; 1;
  // V(200) = K(200,1) * [SGK1 |MAPK1];
  R200: MAPK1 => SGK1; 1;
  // V(201) = K(201,1) * [JAK2_p] * [GHR] -K(201,2) * [JAK2_p |GHR];
  R201: JAK2_p => GHR; 1;
  // V(202) = K(202,1) * [JAK2_p |GHR];
  R202: JAK2_p => GHR; 1;
  // V(203) = K(203,1) * [PRKAA1_p] * [DDIT3] -K(203,2) * [PRKAA1_p |DDIT3];
  R203: DDIT3 => PRKAA1_p; 1;
  // V(204) = K(204,1) * [PRKAA1_p |DDIT3];
  R204: DDIT3 => PRKAA1_p; 1;
  // V(205) = K(205,1) * [FYN_p] * [NPHS1] -K(205,2) * [FYN_p |NPHS1];
  R205: FYN_p => NPHS1; 1;
  // V(206) = K(206,1) * [FYN_p |NPHS1];
  R206: FYN_p => NPHS1; 1;
  // V(207) = K(207,1) * [HIPK2_p] * [EP300] -K(207,2) * [HIPK2_p |EP300];
  R207: EP300 => HIPK2_p; 1;
  // V(208) = K(208,1) * [HIPK2_p |EP300];
  R208: EP300 => HIPK2_p; 1;
  // V(209) = K(209,1) * [SGK1] * [NR3C1] -K(209,2) * [SGK1 |NR3C1];
  R209: SGK1 => NR3C1; 1;
  // V(210) = K(210,1) * [SGK1 |NR3C1];
  R210: SGK1 => NR3C1; 1;
  // V(211) = K(211,1) * [PKM] * [STAT3] -K(211,2) * [PKM |STAT3];
  R211: PKM => STAT3; 1;
  // V(212) = K(212,1) * [PKM |STAT3];
  R212: PKM => STAT3; 1;
  // V(213) = K(213,1) * [JAK2_p] * [LEPR] -K(213,2) * [JAK2_p |LEPR];
  R213: JAK2_p => LEPR; 1;
  // V(214) = K(214,1) * [JAK2_p |LEPR];
  R214: JAK2_p => LEPR; 1;
  // V(215) = K(215,1) * [AKT1_p] * [AKT1] -K(215,2) * [AKT1_p |AKT1];
  R215: AKT1 => AKT1_p; 1;
  // V(216) = K(216,1) * [AKT1_p |AKT1];
  R216: AKT1 => AKT1_p; 1;
  // V(217) = K(217,1) * [JAK1_p] * [PTPN11] -K(217,2) * [JAK1_p |PTPN11];
  R217: PTPN11 => JAK1_p; 1;
  // V(218) = K(218,1) * [JAK1_p |PTPN11];
  R218: PTPN11 => JAK1_p; 1;
  // V(219) = K(219,1) * [JAK2_p] * [STAT3] -K(219,2) * [JAK2_p |STAT3];
  R219: JAK2_p => STAT3; 1;
  // V(220) = K(220,1) * [JAK2_p |STAT3];
  R220: JAK2_p => STAT3; 1;
  // V(221) = K(221,1) * [INSR_p] * [PTEN] -K(221,2) * [INSR_p |PTEN];
  R221: PTEN => INSR_p; 1;
  // V(222) = K(222,1) * [INSR_p |PTEN];
  R222: PTEN => INSR_p; 1;
  // V(223) = K(223,1) * [INSR_p] * [PIK3R1] -K(223,2) * [INSR_p |PIK3R1];
  R223: PIK3R1 => INSR_p; 1;
  // V(224) = K(224,1) * [INSR_p |PIK3R1];
  R224: PIK3R1 => INSR_p; 1;
  // V(225) = K(225,1) * [PRKAA1_p] * [MFF] -K(225,2) * [PRKAA1_p |MFF];
  R225: PRKAA1_p => MFF; 1;
  // V(226) = K(226,1) * [PRKAA1_p |MFF];
  R226: PRKAA1_p => MFF; 1;
  // V(227) = K(227,1) * [PRKCA_p] * [ADD3] -K(227,2) * [PRKCA_p |ADD3];
  R227: ADD3 => PRKCA_p; 1;
  // V(228) = K(228,1) * [PRKCA_p |ADD3];
  R228: ADD3 => PRKCA_p; 1;
  // V(229) = K(229,1) * [PIK3CA] * [AKT1] -K(229,2) * [PIK3CA |AKT1];
  R229: PIK3CA => AKT1; 1;
  // V(230) = K(230,1) * [PIK3CA |AKT1];
  R230: PIK3CA => AKT1; 1;
  // V(231) = K(231,1) * [AKT1_p] * [CREB1] -K(231,2) * [AKT1_p |CREB1];
  R231: CREB1 => AKT1_p; 1;
  // V(232) = K(232,1) * [AKT1_p |CREB1];
  R232: CREB1 => AKT1_p; 1;
  // V(233) = K(233,1) * [AKT1_p] * [MAPK1] -K(233,2) * [AKT1_p |MAPK1];
  R233: MAPK1 => AKT1_p; 1;
  // V(234) = K(234,1) * [AKT1_p |MAPK1];
  R234: MAPK1 => AKT1_p; 1;
  // V(235) = K(235,1) * [PINK1] * [MFN2] -K(235,2) * [PINK1 |MFN2];
  R235: PINK1 => MFN2; 1;
  // V(236) = K(236,1) * [PINK1 |MFN2];
  R236: PINK1 => MFN2; 1;
  // V(237) = K(237,1) * [ROCK1] * [VIM] -K(237,2) * [ROCK1 |VIM];
  R237: ROCK1 => VIM; 1;
  // V(238) = K(238,1) * [ROCK1 |VIM];
  R238: ROCK1 => VIM; 1;
  // V(239) = K(239,1) * [PRKCA_p] * [NFE2L2] -K(239,2) * [PRKCA_p |NFE2L2];
  R239: PRKCA_p => NFE2L2; 1;
  // V(240) = K(240,1) * [PRKCA_p |NFE2L2];
  R240: PRKCA_p => NFE2L2; 1;
  // V(241) = K(241,1) * [STK11_p] * [F2R] -K(241,2) * [STK11_p |F2R];
  R241: F2R => STK11_p; 1;
  // V(242) = K(242,1) * [STK11_p |F2R];
  R242: F2R => STK11_p; 1;
  // V(243) = K(243,1) * [JAK2_p] * [PTPN11] -K(243,2) * [JAK2_p |PTPN11];
  R243: JAK2_p => PTPN11; 1;
  // V(244) = K(244,1) * [JAK2_p |PTPN11];
  R244: JAK2_p => PTPN11; 1;
  // V(245) = K(245,1) * [STK11_p] * [PRKAA1] -K(245,2) * [STK11_p |PRKAA1];
  R245: PRKAA1 => STK11_p; 1;
  // V(246) = K(246,1) * [STK11_p |PRKAA1];
  R246: PRKAA1 => STK11_p; 1;
  // V(247) = K(247,1) * [FYN_p] * [CTNNB1] -K(247,2) * [FYN_p |CTNNB1];
  R247: FYN_p => CTNNB1; 1;
  // V(248) = K(248,1) * [FYN_p |CTNNB1];
  R248: FYN_p => CTNNB1; 1;
  // V(249) = K(249,1) * [MAPK1_p] * [MFN1] -K(249,2) * [MAPK1_p |MFN1];
  R249: MFN1 => MAPK1_p; 1;
  // V(250) = K(250,1) * [MAPK1_p |MFN1];
  R250: MFN1 => MAPK1_p; 1;
  // V(251) = K(251,1) * [PRKCA_p] * [PTPN11] -K(251,2) * [PRKCA_p |PTPN11];
  R251: PTPN11 => PRKCA_p; 1;
  // V(252) = K(252,1) * [PRKCA_p |PTPN11];
  R252: PTPN11 => PRKCA_p; 1;
  // V(253) = K(253,1) * [PRKAA1_p] * [NFE2L2] -K(253,2) * [PRKAA1_p |NFE2L2];
  R253: PRKAA1_p => NFE2L2; 1;
  // V(254) = K(254,1) * [PRKAA1_p |NFE2L2];
  R254: PRKAA1_p => NFE2L2; 1;
  // V(255) = K(255,1) * [HIPK2_p] * [CDKN1B] -K(255,2) * [HIPK2_p |CDKN1B];
  R255: CDKN1B => HIPK2_p; 1;
  // V(256) = K(256,1) * [HIPK2_p |CDKN1B];
  R256: CDKN1B => HIPK2_p; 1;
  // V(257) = K(257,1) * [PRKAA1_p] * [PRKAA1] -K(257,2) * [PRKAA1_p |PRKAA1];
  R257: PRKAA1 => PRKAA1_p; 1;
  // V(258) = K(258,1) * [PRKAA1_p |PRKAA1];
  R258: PRKAA1 => PRKAA1_p; 1;
  // V(259) = K(259,1) * [SGK1] * [STAT1] -K(259,2) * [SGK1 |STAT1];
  R259: STAT1 => SGK1; 1;
  // V(260) = K(260,1) * [SGK1 |STAT1];
  R260: STAT1 => SGK1; 1;
  // V(261) = K(261,1) * [PINK1] * [DNM1L] -K(261,2) * [PINK1 |DNM1L];
  R261: DNM1L => PINK1; 1;
  // V(262) = K(262,1) * [PINK1 |DNM1L];
  R262: DNM1L => PINK1; 1;
  // V(263) = K(263,1) * [LEPR_p] * [STAT3] -K(263,2) * [LEPR_p |STAT3];
  R263: LEPR_p => STAT3; 1;
  // V(264) = K(264,1) * [LEPR_p |STAT3];
  R264: LEPR_p => STAT3; 1;
  // V(265) = K(265,1) * [ILK_p] * [ILK] -K(265,2) * [ILK_p |ILK];
  R265: ILK_p => ILK; 1;
  // V(266) = K(266,1) * [ILK_p |ILK];
  R266: ILK_p => ILK; 1;
  // V(267) = K(267,1) * [FYN_p] * [NFE2L2] -K(267,2) * [FYN_p |NFE2L2];
  R267: FYN_p => NFE2L2; 1;
  // V(268) = K(268,1) * [FYN_p |NFE2L2];
  R268: FYN_p => NFE2L2; 1;
  // V(269) = K(269,1) * [HIPK2_p] * [MDM2] -K(269,2) * [HIPK2_p |MDM2];
  R269: HIPK2_p => MDM2; 1;
  // V(270) = K(270,1) * [HIPK2_p |MDM2];
  R270: HIPK2_p => MDM2; 1;
  // V(271) = K(271,1) * [ROCK2] * [EP300] -K(271,2) * [ROCK2 |EP300];
  R271: EP300 => ROCK2; 1;
  // V(272) = K(272,1) * [ROCK2 |EP300];
  R272: EP300 => ROCK2; 1;
  // V(273) = K(273,1) * [MAPK1_p] * [STAT3] -K(273,2) * [MAPK1_p |STAT3];
  R273: STAT3 => MAPK1_p; 1;
  // V(274) = K(274,1) * [MAPK1_p |STAT3];
  R274: STAT3 => MAPK1_p; 1;
  // V(275) = K(275,1) * [MAPK6_p] * [MAPK6] -K(275,2) * [MAPK6_p |MAPK6];
  R275: MAPK6_p => MAPK6; 1;
  // V(276) = K(276,1) * [MAPK6_p |MAPK6];
  R276: MAPK6_p => MAPK6; 1;
  // V(277) = K(277,1) * [MAPK1_p] * [NR4A1] -K(277,2) * [MAPK1_p |NR4A1];
  R277: NR4A1 => MAPK1_p; 1;
  // V(278) = K(278,1) * [MAPK1_p |NR4A1];
  R278: NR4A1 => MAPK1_p; 1;
  // V(279) = K(279,1) * [PINK1] * [PTEN] -K(279,2) * [PINK1 |PTEN];
  R279: PTEN => PINK1; 1;
  // V(280) = K(280,1) * [PINK1 |PTEN];
  R280: PTEN => PINK1; 1;
  // V(281) = K(281,1) * [MAPK1_p] * [TXNIP] -K(281,2) * [MAPK1_p |TXNIP];
  R281: TXNIP => MAPK1_p; 1;
  // V(282) = K(282,1) * [MAPK1_p |TXNIP];
  R282: TXNIP => MAPK1_p; 1;
  // V(283) = K(283,1) * [PIK3CA] * [PIK3R1] -K(283,2) * [PIK3CA |PIK3R1];
  R283: PIK3CA => PIK3R1; 1;
  // V(284) = K(284,1) * [PIK3CA |PIK3R1];
  R284: PIK3CA => PIK3R1; 1;
  // V(285) = K(285,1) * [AKT1_p] * [BAX] -K(285,2) * [AKT1_p |BAX];
  R285: AKT1_p => BAX; 1;
  // V(286) = K(286,1) * [AKT1_p |BAX];
  R286: AKT1_p => BAX; 1;
  // V(287) = K(287,1) * [JAK2_p] * [SIGNOR-C118] -K(287,2) * [JAK2_p |SIGNOR-C118];
  R287: JAK2_p => ; 1;
  // V(288) = K(288,1) * [JAK2_p |SIGNOR-C118];
  R288: JAK2_p => ; 1;
  // V(289) = K(289,1) * [PRKAA1_p] * [CDKN1B] -K(289,2) * [PRKAA1_p |CDKN1B];
  R289: CDKN1B => PRKAA1_p; 1;
  // V(290) = K(290,1) * [PRKAA1_p |CDKN1B];
  R290: CDKN1B => PRKAA1_p; 1;
  // V(291) = K(291,1) * [HIPK2_p] * [CREB1] -K(291,2) * [HIPK2_p |CREB1];
  R291: CREB1 => HIPK2_p; 1;
  // V(292) = K(292,1) * [HIPK2_p |CREB1];
  R292: CREB1 => HIPK2_p; 1;
  // V(293) = K(293,1) * [PTPN2] * [KDR_p] -K(293,2) * [PTPN2 |KDR_p];
  R293: PTPN2 => KDR_p; 1;
  // V(294) = K(294,1) * [PTPN2 |KDR_p];
  R294: PTPN2 => KDR_p; 1;
  // V(295) = K(295,1) * [PTPN2] * [GHR_p] -K(295,2) * [PTPN2 |GHR_p];
  R295: GHR_p => PTPN2; 1;
  // V(296) = K(296,1) * [PTPN2 |GHR_p];
  R296: GHR_p => PTPN2; 1;
  // V(297) = K(297,1) * [PTPRB] * [GHR_p] -K(297,2) * [PTPRB |GHR_p];
  R297: GHR_p => PTPRB; 1;
  // V(298) = K(298,1) * [PTPRB |GHR_p];
  R298: GHR_p => PTPRB; 1;
  // V(299) = K(299,1) * [PTPN2] * [INSR_p] -K(299,2) * [PTPN2 |INSR_p];
  R299: INSR_p => PTPN2; 1;
  // V(300) = K(300,1) * [PTPN2 |INSR_p];
  R300: INSR_p => PTPN2; 1;
  // V(301) = K(301,1) * [PTPN2] * [FYN_p] -K(301,2) * [PTPN2 |FYN_p];
  R301: FYN_p => PTPN2; 1;
  // V(302) = K(302,1) * [PTPN2 |FYN_p];
  R302: FYN_p => PTPN2; 1;
  // V(303) = K(303,1) * [DUSP1_p] * [MAPK1_p] -K(303,2) * [DUSP1_p |MAPK1_p];
  R303: DUSP1_p => MAPK1_p; 1;
  // V(304) = K(304,1) * [DUSP1_p |MAPK1_p];
  R304: DUSP1_p => MAPK1_p; 1;
  // V(305) = K(305,1) * [PTPN2] * [JAK1_p] -K(305,2) * [PTPN2 |JAK1_p];
  R305: PTPN2 => JAK1_p; 1;
  // V(306) = K(306,1) * [PTPN2 |JAK1_p];
  R306: PTPN2 => JAK1_p; 1;
  // V(307) = K(307,1) * [PTPRB] * [INSR_p] -K(307,2) * [PTPRB |INSR_p];
  R307: INSR_p => PTPRB; 1;
  // V(308) = K(308,1) * [PTPRB |INSR_p];
  R308: INSR_p => PTPRB; 1;
  // V(309) = K(309,1) * [PTEN_p] * [SP1_p] -K(309,2) * [PTEN_p |SP1_p];
  R309: PTEN_p => SP1_p; 1;
  // V(310) = K(310,1) * [PTEN_p |SP1_p];
  R310: PTEN_p => SP1_p; 1;
  // V(311) = K(311,1) * [PTPN2] * [STAT3_p] -K(311,2) * [PTPN2 |STAT3_p];
  R311: STAT3_p => PTPN2; 1;
  // V(312) = K(312,1) * [PTPN2 |STAT3_p];
  R312: STAT3_p => PTPN2; 1;
  // V(313) = K(313,1) * [PTPN2] * [STAT6_p] -K(313,2) * [PTPN2 |STAT6_p];
  R313: STAT6_p => PTPN2; 1;
  // V(314) = K(314,1) * [PTPN2 |STAT6_p];
  R314: STAT6_p => PTPN2; 1;
  // V(315) = K(315,1) * [PTPN11_p] * [JAK2_p] -K(315,2) * [PTPN11_p |JAK2_p];
  R315: JAK2_p => PTPN11_p; 1;
  // V(316) = K(316,1) * [PTPN11_p |JAK2_p];
  R316: JAK2_p => PTPN11_p; 1;
  // V(317) = K(317,1) * [PTPRB] * [MAPK1_p] -K(317,2) * [PTPRB |MAPK1_p];
  R317: PTPRB => MAPK1_p; 1;
  // V(318) = K(318,1) * [PTPRB |MAPK1_p];
  R318: PTPRB => MAPK1_p; 1;
  // V(319) = K(319,1) * [PTEN_p] * [PTEN_p] -K(319,2) * [PTEN_p |PTEN_p];
  R319: PTEN_p => ; 1;
  // V(320) = K(320,1) * [PTEN_p |PTEN_p];
  R320: PTEN_p => ; 1;
  // V(321) = K(321,1) * [PTPN2] * [GJA1_p] -K(321,2) * [PTPN2 |GJA1_p];
  R321: PTPN2 => GJA1_p; 1;
  // V(322) = K(322,1) * [PTPN2 |GJA1_p];
  R322: PTPN2 => GJA1_p; 1;
  // V(323) = K(323,1) * [PTPN2] * [STAT1_p] -K(323,2) * [PTPN2 |STAT1_p];
  R323: STAT1_p => PTPN2; 1;
  // V(324) = K(324,1) * [PTPN2 |STAT1_p];
  R324: STAT1_p => PTPN2; 1;
  // V(325) = K(325,1) * [PTPN11_p] * [CDKN1B_p] -K(325,2) * [PTPN11_p |CDKN1B_p];
  R325: PTPN11_p => CDKN1B_p; 1;
  // V(326) = K(326,1) * [PTPN11_p |CDKN1B_p];
  R326: PTPN11_p => CDKN1B_p; 1;
  // V(327) = K(327,1) * [PTPRB] * [KDR_p] -K(327,2) * [PTPRB |KDR_p];
  R327: PTPRB => KDR_p; 1;
  // V(328) = K(328,1) * [PTPRB |KDR_p];
  R328: PTPRB => KDR_p; 1;
  // V(329) = K(329,1) * [PTPN11_p] * [STAT1_p] -K(329,2) * [PTPN11_p |STAT1_p];
  R329: STAT1_p => PTPN11_p; 1;
  // V(330) = K(330,1) * [PTPN11_p |STAT1_p];
  R330: STAT1_p => PTPN11_p; 1;
  // V(331) = K(331,1) * [PTEN_p] * [CREB1_p] -K(331,2) * [PTEN_p |CREB1_p];
  R331: PTEN_p => CREB1_p; 1;
  // V(332) = K(332,1) * [PTEN_p |CREB1_p];
  R332: PTEN_p => CREB1_p; 1;
  // V(333) = K(333,1) * [DUSP1_p] * [JUN_p] -K(333,2) * [DUSP1_p |JUN_p];
  R333: JUN_p => DUSP1_p; 1;
  // V(334) = K(334,1) * [DUSP1_p |JUN_p];
  R334: JUN_p => DUSP1_p; 1;
  // V(335) = K(335,1) * [PTPN11_p] * [STAT3_p] -K(335,2) * [PTPN11_p |STAT3_p];
  R335: STAT3_p => PTPN11_p; 1;
  // V(336) = K(336,1) * [PTPN11_p |STAT3_p];
  R336: STAT3_p => PTPN11_p; 1;
  // V(337) = K(337,1) * [MYLIP] * [VLDLR] -K(337,2) * [MYLIP |VLDLR];
  R337: VLDLR => MYLIP; 1;
  // V(338) = K(338,1) * [MYLIP |VLDLR];
  R338: VLDLR => MYLIP; 1;
  // V(339) = K(339,1) * [MDM2_p] * [HIF1A] -K(339,2) * [MDM2_p |HIF1A];
  R339: HIF1A => MDM2_p; 1;
  // V(340) = K(340,1) * [MDM2_p |HIF1A];
  R340: HIF1A => MDM2_p; 1;
  // V(341) = K(341,1) * [RNF7] * [HIF1A] -K(341,2) * [RNF7 |HIF1A];
  R341: HIF1A => RNF7; 1;
  // V(342) = K(342,1) * [RNF7 |HIF1A];
  R342: HIF1A => RNF7; 1;
  // V(343) = K(343,1) * [MDM2_p] * [NUMB] -K(343,2) * [MDM2_p |NUMB];
  R343: MDM2_p => NUMB; 1;
  // V(344) = K(344,1) * [MDM2_p |NUMB];
  R344: MDM2_p => NUMB; 1;
  // V(345) = K(345,1) * [RNF7] * [CDKN1B] -K(345,2) * [RNF7 |CDKN1B];
  R345: CDKN1B => RNF7; 1;
  // V(346) = K(346,1) * [RNF7 |CDKN1B];
  R346: CDKN1B => RNF7; 1;
  // V(347) = K(347,1) * [MDM2_p] * [HDAC1] -K(347,2) * [MDM2_p |HDAC1];
  R347: MDM2_p => HDAC1; 1;
  // V(348) = K(348,1) * [MDM2_p |HDAC1];
  R348: MDM2_p => HDAC1; 1;
  // V(349) = K(349,1) * [PINK1 |MFN2];
  R349: PINK1 => MFN2; 1;
  // V(350) = K(350,1) * [MYLIP] * [MYLIP] -K(350,2) * [MYLIP |MYLIP];
  R350: MYLIP => ; 1;
  // V(351) = K(351,1) * [MYLIP |MYLIP];
  R351: MYLIP => ; 1;
  // V(352) = K(352,1) * [MDM2_p] * [IGF1R] -K(352,2) * [MDM2_p |IGF1R];
  R352: MDM2_p => IGF1R; 1;
  // V(353) = K(353,1) * [MDM2_p |IGF1R];
  R353: MDM2_p => IGF1R; 1;
  // V(354) = K(354,1) * [PINK1] * [MFN1] -K(354,2) * [PINK1 |MFN1];
  R354: PINK1 => MFN1; 1;
  // V(355) = K(355,1) * [PINK1 |MFN1];
  R355: PINK1 => MFN1; 1;
  // V(356) = K(356,1) * [CUL3] * [RHOA] -K(356,2) * [CUL3 |RHOA];
  R356: RHOA => CUL3; 1;
  // V(357) = K(357,1) * [CUL3 |RHOA];
  R357: RHOA => CUL3; 1;
  // V(358) = K(358,1) * [RNF7] * [JUN] -K(358,2) * [RNF7 |JUN];
  R358: JUN => RNF7; 1;
  // V(359) = K(359,1) * [RNF7 |JUN];
  R359: JUN => RNF7; 1;
  // V(360) = K(360,1) * [JUN_p] * [SP1_p] * [TGFB1_g] -K(360,2) * [JUN_p |SP1_p |TGFB1_g];
  R360: SP1_p => TGFB1_g; 1;
  // V(361) = K(361,1) * [JUN_p |SP1_p |TGFB1_g];
  R361: SP1_p => TGFB1_g; 1;
  // V(362) = K(362,1) * [TGFB1_rna];
  R362: TGFB1_rna => ; 1;
  // V(363) = K(363,1) * [NFE2L2_p] * [WT1] * [SOD1_g] -K(363,2) * [NFE2L2_p |WT1 |SOD1_g];
  R363: WT1 => NFE2L2_p; 1;
  // V(364) = K(364,1) * [NFE2L2_p |WT1 |SOD1_g];
  R364: WT1 => NFE2L2_p; 1;
  // V(365) = K(365,1) * [SOD1_rna];
  R365: SOD1_rna => ; 1;
  // V(366) = K(366,1) * [STAT3_p] * [STAT1_p] * [SOCS3_g] -K(366,2) * [STAT3_p |STAT1_p |SOCS3_g];
  R366: STAT3_p => STAT1_p; 1;
  // V(367) = K(367,1) * [STAT3_p |STAT1_p |SOCS3_g];
  R367: STAT3_p => STAT1_p; 1;
  // V(368) = K(368,1) * [SOCS3_rna];
  R368: SOCS3_rna => ; 1;
  // V(369) = K(369,1) * [SREBF1_p] * [PKM_g] -K(369,2) * [SREBF1_p |PKM_g];
  R369: PKM_g => SREBF1_p; 1;
  // V(370) = K(370,1) * [SREBF1_p |PKM_g];
  R370: PKM_g => SREBF1_p; 1;
  // V(371) = K(371,1) * [PKM_rna];
  R371: PKM_rna => ; 1;
  // V(372) = K(372,1) * [CTNNB1_p] * [CCND1_g] -K(372,2) * [CTNNB1_p |CCND1_g];
  R372: CTNNB1_p => CCND1_g; 1;
  // V(373) = K(373,1) * [CTNNB1_p |CCND1_g];
  R373: CTNNB1_p => CCND1_g; 1;
  // V(374) = K(374,1) * [CCND1_rna];
  R374: CCND1_rna => ; 1;
  // V(375) = K(375,1) * [HIF1A_p] * [STAT3_p] * [VEGFA_g] -K(375,2) * [HIF1A_p |STAT3_p |VEGFA_g];
  R375: STAT3_p => HIF1A_p; 1;
  // V(376) = K(376,1) * [HIF1A_p |STAT3_p |VEGFA_g];
  R376: STAT3_p => HIF1A_p; 1;
  // V(377) = K(377,1) * [VEGFA_rna];
  R377: VEGFA_rna => ; 1;
  // V(378) = K(378,1) * [WT1] * [PODXL_g] -K(378,2) * [WT1 |PODXL_g];
  R378: PODXL_g => WT1; 1;
  // V(379) = K(379,1) * [WT1 |PODXL_g];
  R379: PODXL_g => WT1; 1;
  // V(380) = K(380,1) * [PODXL_rna];
  R380: PODXL_rna => ; 1;
  // V(381) = K(381,1) * [NR3C1_p] * [KLF9_g] -K(381,2) * [NR3C1_p |KLF9_g];
  R381: KLF9_g => NR3C1_p; 1;
  // V(382) = K(382,1) * [NR3C1_p |KLF9_g];
  R382: KLF9_g => NR3C1_p; 1;
  // V(383) = K(383,1) * [KLF9_rna];
  R383: KLF9_rna => ; 1;
  // V(384) = K(384,1) * [NFE2L2_p] * [GPX4_g] -K(384,2) * [NFE2L2_p |GPX4_g];
  R384: GPX4_g => NFE2L2_p; 1;
  // V(385) = K(385,1) * [NFE2L2_p |GPX4_g];
  R385: GPX4_g => NFE2L2_p; 1;
  // V(386) = K(386,1) * [GPX4_rna];
  R386: GPX4_rna => ; 1;
  // V(387) = K(387,1) * [NFE2L2_p] * [GCLM_g] -K(387,2) * [NFE2L2_p |GCLM_g];
  R387: GCLM_g => NFE2L2_p; 1;
  // V(388) = K(388,1) * [NFE2L2_p |GCLM_g];
  R388: GCLM_g => NFE2L2_p; 1;
  // V(389) = K(389,1) * [GCLM_rna];
  R389: GCLM_rna => ; 1;
  // V(390) = K(390,1) * [NFE2L2_p] * [SOD2_g] -K(390,2) * [NFE2L2_p |SOD2_g];
  R390: SOD2_g => NFE2L2_p; 1;
  // V(391) = K(391,1) * [NFE2L2_p |SOD2_g];
  R391: SOD2_g => NFE2L2_p; 1;
  // V(392) = K(392,1) * [SOD2_rna];
  R392: SOD2_rna => ; 1;
  // V(393) = K(393,1) * [STAT3_p] * [STAT1_g] -K(393,2) * [STAT3_p |STAT1_g];
  R393: STAT3_p => STAT1_g; 1;
  // V(394) = K(394,1) * [STAT3_p |STAT1_g];
  R394: STAT3_p => STAT1_g; 1;
  // V(395) = K(395,1) * [STAT1_rna];
  R395: STAT1_rna => ; 1;
  // V(396) = K(396,1) * [WT1] * [NPHS1_g] -K(396,2) * [WT1 |NPHS1_g];
  R396: NPHS1_g => WT1; 1;
  // V(397) = K(397,1) * [WT1 |NPHS1_g];
  R397: NPHS1_g => WT1; 1;
  // V(398) = K(398,1) * [NPHS1_rna];
  R398: NPHS1_rna => ; 1;
  // V(399) = K(399,1) * [HES1] * [NR3C1_g] -K(399,2) * [HES1 |NR3C1_g];
  R399: HES1 => NR3C1_g; 1;
  // V(400) = K(400,1) * [NR3C1_g];
  R400: NR3C1_g => ; 1;
  // V(401) = K(401,1) * [NR3C1_rna];
  R401: NR3C1_rna => ; 1;
  // V(402) = K(402,1) * [NR3C1_p] * [JUN_g] -K(402,2) * [NR3C1_p |JUN_g];
  R402: JUN_g => NR3C1_p; 1;
  // V(403) = K(403,1) * [JUN_g];
  R403: JUN_g => ; 1;
  // V(404) = K(404,1) * [JUN_rna];
  R404: JUN_rna => ; 1;
  // V(405) = K(405,1) * [MECP2_p] * [SGK1_g] -K(405,2) * [MECP2_p |SGK1_g];
  R405: MECP2_p => SGK1_g; 1;
  // V(406) = K(406,1) * [SGK1_g];
  R406: SGK1_g => ; 1;
  // V(407) = K(407,1) * [SGK1_rna];
  R407: SGK1_rna => ; 1;
  // V(408) = K(408,1) * [HES1] * [RCAN1_g] -K(408,2) * [HES1 |RCAN1_g];
  R408: HES1 => RCAN1_g; 1;
  // V(409) = K(409,1) * [RCAN1_g];
  R409: RCAN1_g => ; 1;
  // V(410) = K(410,1) * [RCAN1_rna];
  R410: RCAN1_rna => ; 1;
  // V(411) = K(411,1) * [SGK1];
  R411: SGK1 => ; 1;
  // V(412) = K(412,1) * [DNM1L];
  R412: DNM1L => ; 1;
  // V(413) = K(413,1) * [PODXL];
  R413: PODXL => ; 1;
  // V(414) = K(414,1) * [SOCS3];
  R414: SOCS3 => ; 1;
  // V(415) = K(415,1) * [NPHS1];
  R415: NPHS1 => ; 1;
  // V(416) = K(416,1) * [JAK2];
  R416: JAK2 => ; 1;
  // V(417) = K(417,1) * [ROCK2];
  R417: ROCK2 => ; 1;
  // V(418) = K(418,1) * [MFN2];
  R418: MFN2 => ; 1;
  // V(419) = K(419,1) * [SOD1];
  R419: SOD1 => ; 1;
  // V(420) = K(420,1) * [FOS];
  R420: FOS => ; 1;
  // V(421) = K(421,1) * [TGFB1];
  R421: TGFB1 => ; 1;
  // V(422) = K(422,1) * [ANXA1];
  R422: ANXA1 => ; 1;
  // V(423) = K(423,1) * [NR3C1];
  R423: NR3C1 => ; 1;
  // V(424) = K(424,1) * [SOD2];
  R424: SOD2 => ; 1;
  // V(425) = K(425,1) * [HSPB1];
  R425: HSPB1 => ; 1;
  // V(426) = K(426,1) * [IGF1];
  R426: IGF1 => ; 1;
  // V(427) = K(427,1) * [HMGN1];
  R427: HMGN1 => ; 1;
  // V(428) = K(428,1) * [FGF1];
  R428: FGF1 => ; 1;
  // V(429) = K(429,1) * [JUN];
  R429: JUN => ; 1;
  // V(430) = K(430,1) * [INSR];
  R430: INSR => ; 1;
  // V(431) = K(431,1) * [FYN];
  R431: FYN => ; 1;
  // V(432) = K(432,1) * [SP1];
  R432: SP1 => ; 1;
  // V(433) = K(433,1) * [IGF1R];
  R433: IGF1R => ; 1;
  // V(434) = K(434,1) * [NR3C2];
  R434: NR3C2 => ; 1;
  // V(435) = K(435,1) * [VIM];
  R435: VIM => ; 1;
  // V(436) = K(436,1) * [IL6R];
  R436: IL6R => ; 1;
  // V(437) = K(437,1) * [PARP1];
  R437: PARP1 => ; 1;
  // V(438) = K(438,1) * [UBC];
  R438: UBC => ; 1;
  // V(439) = K(439,1) * [CALM1];
  R439: CALM1 => ; 1;
  // V(440) = K(440,1) * [GHR];
  R440: GHR => ; 1;
  // V(441) = K(441,1) * [CYBA];
  R441: CYBA => ; 1;
  // V(442) = K(442,1) * [F3];
  R442: F3 => ; 1;
  // V(443) = K(443,1) * [PKM];
  R443: PKM => ; 1;
  // V(444) = K(444,1) * [VEGFA];
  R444: VEGFA => ; 1;
  // V(445) = K(445,1) * [CREB1];
  R445: CREB1 => ; 1;
  // V(446) = K(446,1) * [PRKCA];
  R446: PRKCA => ; 1;
  // V(447) = K(447,1) * [GJA1];
  R447: GJA1 => ; 1;
  // V(448) = K(448,1) * [PTPN2];
  R448: PTPN2 => ; 1;
  // V(449) = K(449,1) * [WT1];
  R449: WT1 => ; 1;
  // V(450) = K(450,1) * [NR4A1];
  R450: NR4A1 => ; 1;
  // V(451) = K(451,1) * [JAK1];
  R451: JAK1 => ; 1;
  // V(452) = K(452,1) * [PTPRB];
  R452: PTPRB => ; 1;
  // V(453) = K(453,1) * [CCND1];
  R453: CCND1 => ; 1;
  // V(454) = K(454,1) * [F2R];
  R454: F2R => ; 1;
  // V(455) = K(455,1) * [ZFP36];
  R455: ZFP36 => ; 1;
  // V(456) = K(456,1) * [PIK3R1];
  R456: PIK3R1 => ; 1;
  // V(457) = K(457,1) * [MAPK1];
  R457: MAPK1 => ; 1;
  // V(458) = K(458,1) * [DUSP1];
  R458: DUSP1 => ; 1;
  // V(459) = K(459,1) * [AQP1];
  R459: AQP1 => ; 1;
  // V(460) = K(460,1) * [PRDX6];
  R460: PRDX6 => ; 1;
  // V(461) = K(461,1) * [AXL];
  R461: AXL => ; 1;
  // V(462) = K(462,1) * [AKT1];
  R462: AKT1 => ; 1;
  // V(463) = K(463,1) * [CTNNB1];
  R463: CTNNB1 => ; 1;
  // V(464) = K(464,1) * [DDIT3];
  R464: DDIT3 => ; 1;
  // V(465) = K(465,1) * [KDR];
  R465: KDR => ; 1;
  // V(466) = K(466,1) * [SREBF1];
  R466: SREBF1 => ; 1;
  // V(467) = K(467,1) * [GPX4];
  R467: GPX4 => ; 1;
  // V(468) = K(468,1) * [STAT3];
  R468: STAT3 => ; 1;
  // V(469) = K(469,1) * [STAT1];
  R469: STAT1 => ; 1;
  // V(470) = K(470,1) * [STAT6];
  R470: STAT6 => ; 1;
  // V(471) = K(471,1) * [PIK3CA];
  R471: PIK3CA => ; 1;
  // V(472) = K(472,1) * [CDKN1B];
  R472: CDKN1B => ; 1;
  // V(473) = K(473,1) * [YAP1];
  R473: YAP1 => ; 1;
  // V(474) = K(474,1) * [LEPR];
  R474: LEPR => ; 1;
  // V(475) = K(475,1) * [GCLM];
  R475: GCLM => ; 1;
  // V(476) = K(476,1) * [NUMB];
  R476: NUMB => ; 1;
  // V(477) = K(477,1) * [TSC2];
  R477: TSC2 => ; 1;
  // V(478) = K(478,1) * [MECP2];
  R478: MECP2 => ; 1;
  // V(479) = K(479,1) * [RCAN1];
  R479: RCAN1 => ; 1;
  // V(480) = K(480,1) * [PTEN];
  R480: PTEN => ; 1;
  // V(481) = K(481,1) * [RHOA];
  R481: RHOA => ; 1;
  // V(482) = K(482,1) * [RAC1];
  R482: RAC1 => ; 1;
  // V(483) = K(483,1) * [VLDLR];
  R483: VLDLR => ; 1;
  // V(484) = K(484,1) * [MDM2];
  R484: MDM2 => ; 1;
  // V(485) = K(485,1) * [NOTCH2];
  R485: NOTCH2 => ; 1;
  // V(486) = K(486,1) * [PTPN11];
  R486: PTPN11 => ; 1;
  // V(487) = K(487,1) * [BAX];
  R487: BAX => ; 1;
  // V(488) = K(488,1) * [EP300];
  R488: EP300 => ; 1;
  // V(489) = K(489,1) * [PRKAA1];
  R489: PRKAA1 => ; 1;
  // V(490) = K(490,1) * [ILK];
  R490: ILK => ; 1;
  // V(491) = K(491,1) * [ROCK1];
  R491: ROCK1 => ; 1;
  // V(492) = K(492,1) * [SMAD4];
  R492: SMAD4 => ; 1;
  // V(493) = K(493,1) * [HDAC1];
  R493: HDAC1 => ; 1;
  // V(494) = K(494,1) * [CUL3];
  R494: CUL3 => ; 1;
  // V(495) = K(495,1) * [KLF9];
  R495: KLF9 => ; 1;
  // V(496) = K(496,1) * [HES1];
  R496: HES1 => ; 1;
  // V(497) = K(497,1) * [SMAD2];
  R497: SMAD2 => ; 1;
  // V(498) = K(498,1) * [SMAD1];
  R498: SMAD1 => ; 1;
  // V(499) = K(499,1) * [STK11];
  R499: STK11 => ; 1;
  // V(500) = K(500,1) * [NFE2L2];
  R500: NFE2L2 => ; 1;
  // V(501) = K(501,1) * [PKN1];
  R501: PKN1 => ; 1;
  // V(502) = K(502,1) * [MAPK6];
  R502: MAPK6 => ; 1;
  // V(503) = K(503,1) * [HIF1A];
  R503: HIF1A => ; 1;
  // V(504) = K(504,1) * [MFN1];
  R504: MFN1 => ; 1;
  // V(505) = K(505,1) * [MYLIP];
  R505: MYLIP => ; 1;
  // V(506) = K(506,1) * [BAD];
  R506: BAD => ; 1;
  // V(507) = K(507,1) * [PARK7];
  R507: PARK7 => ; 1;
  // V(508) = K(508,1) * [MAPKAP1];
  R508: MAPKAP1 => ; 1;
  // V(509) = K(509,1) * [PINK1];
  R509: PINK1 => ; 1;
  // V(510) = K(510,1) * [MFF];
  R510: MFF => ; 1;
  // V(511) = K(511,1) * [HIPK2];
  R511: HIPK2 => ; 1;
  // V(512) = K(512,1) * [TXNIP];
  R512: TXNIP => ; 1;
  // V(513) = K(513,1) * [NOX4];
  R513: NOX4 => ; 1;
  // V(514) = K(514,1) * [RNF7];
  R514: RNF7 => ; 1;
  // V(515) = K(515,1) * [ADD3];
  R515: ADD3 => ; 1;
  // V(516) = K(516,1) * [TRPC6];
  R516: TRPC6 => ; 1;
  // V(517) = K(517,1) * [SGK1_rna];
  R517: SGK1_rna => ; 1;
  // V(518) = K(518,1) * [PODXL_rna];
  R518: PODXL_rna => ; 1;
  // V(519) = K(519,1) * [SOCS3_rna];
  R519: SOCS3_rna => ; 1;
  // V(520) = K(520,1) * [NPHS1_rna];
  R520: NPHS1_rna => ; 1;
  // V(521) = K(521,1) * [SOD1_rna];
  R521: SOD1_rna => ; 1;
  // V(522) = K(522,1) * [TGFB1_rna];
  R522: TGFB1_rna => ; 1;
  // V(523) = K(523,1) * [NR3C1_rna];
  R523: NR3C1_rna => ; 1;
  // V(524) = K(524,1) * [SOD2_rna];
  R524: SOD2_rna => ; 1;
  // V(525) = K(525,1) * [JUN_rna];
  R525: JUN_rna => ; 1;
  // V(526) = K(526,1) * [PKM_rna];
  R526: PKM_rna => ; 1;
  // V(527) = K(527,1) * [VEGFA_rna];
  R527: VEGFA_rna => ; 1;
  // V(528) = K(528,1) * [CCND1_rna];
  R528: CCND1_rna => ; 1;
  // V(529) = K(529,1) * [GPX4_rna];
  R529: GPX4_rna => ; 1;
  // V(530) = K(530,1) * [STAT1_rna];
  R530: STAT1_rna => ; 1;
  // V(531) = K(531,1) * [GCLM_rna];
  R531: GCLM_rna => ; 1;
  // V(532) = K(532,1) * [RCAN1_rna];
  R532: RCAN1_rna => ; 1;
  // V(533) = K(533,1) * [KLF9_rna];
  R533: KLF9_rna => ; 1;
  // V(534) = K(534,1) * [DNM1L_g];
  R534: DNM1L_g => ; 1;
  // V(535) = K(535,1) * [DNM1L_rna];
  R535: DNM1L_rna => ; 1;
  // V(536) = K(536,1) * [JAK2_g];
  R536: JAK2_g => ; 1;
  // V(537) = K(537,1) * [JAK2_rna];
  R537: JAK2_rna => ; 1;
  // V(538) = K(538,1) * [ROCK2_g];
  R538: ROCK2_g => ; 1;
  // V(539) = K(539,1) * [ROCK2_rna];
  R539: ROCK2_rna => ; 1;
  // V(540) = K(540,1) * [MFN2_g];
  R540: MFN2_g => ; 1;
  // V(541) = K(541,1) * [MFN2_rna];
  R541: MFN2_rna => ; 1;
  // V(542) = K(542,1) * [FOS_g];
  R542: FOS_g => ; 1;
  // V(543) = K(543,1) * [FOS_rna];
  R543: FOS_rna => ; 1;
  // V(544) = K(544,1) * [ANXA1_g];
  R544: ANXA1_g => ; 1;
  // V(545) = K(545,1) * [ANXA1_rna];
  R545: ANXA1_rna => ; 1;
  // V(546) = K(546,1) * [HSPB1_g];
  R546: HSPB1_g => ; 1;
  // V(547) = K(547,1) * [HSPB1_rna];
  R547: HSPB1_rna => ; 1;
  // V(548) = K(548,1) * [IGF1_g];
  R548: IGF1_g => ; 1;
  // V(549) = K(549,1) * [IGF1_rna];
  R549: IGF1_rna => ; 1;
  // V(550) = K(550,1) * [HMGN1_g];
  R550: HMGN1_g => ; 1;
  // V(551) = K(551,1) * [HMGN1_rna];
  R551: HMGN1_rna => ; 1;
  // V(552) = K(552,1) * [FGF1_g];
  R552: FGF1_g => ; 1;
  // V(553) = K(553,1) * [FGF1_rna];
  R553: FGF1_rna => ; 1;
  // V(554) = K(554,1) * [INSR_g];
  R554: INSR_g => ; 1;
  // V(555) = K(555,1) * [INSR_rna];
  R555: INSR_rna => ; 1;
  // V(556) = K(556,1) * [FYN_g];
  R556: FYN_g => ; 1;
  // V(557) = K(557,1) * [FYN_rna];
  R557: FYN_rna => ; 1;
  // V(558) = K(558,1) * [SP1_g];
  R558: SP1_g => ; 1;
  // V(559) = K(559,1) * [SP1_rna];
  R559: SP1_rna => ; 1;
  // V(560) = K(560,1) * [IGF1R_g];
  R560: IGF1R_g => ; 1;
  // V(561) = K(561,1) * [IGF1R_rna];
  R561: IGF1R_rna => ; 1;
  // V(562) = K(562,1) * [NR3C2_g];
  R562: NR3C2_g => ; 1;
  // V(563) = K(563,1) * [NR3C2_rna];
  R563: NR3C2_rna => ; 1;
  // V(564) = K(564,1) * [VIM_g];
  R564: VIM_g => ; 1;
  // V(565) = K(565,1) * [VIM_rna];
  R565: VIM_rna => ; 1;
  // V(566) = K(566,1) * [IL6R_g];
  R566: IL6R_g => ; 1;
  // V(567) = K(567,1) * [IL6R_rna];
  R567: IL6R_rna => ; 1;
  // V(568) = K(568,1) * [PARP1_g];
  R568: PARP1_g => ; 1;
  // V(569) = K(569,1) * [PARP1_rna];
  R569: PARP1_rna => ; 1;
  // V(570) = K(570,1) * [UBC_g];
  R570: UBC_g => ; 1;
  // V(571) = K(571,1) * [UBC_rna];
  R571: UBC_rna => ; 1;
  // V(572) = K(572,1) * [CALM1_g];
  R572: CALM1_g => ; 1;
  // V(573) = K(573,1) * [CALM1_rna];
  R573: CALM1_rna => ; 1;
  // V(574) = K(574,1) * [GHR_g];
  R574: GHR_g => ; 1;
  // V(575) = K(575,1) * [GHR_rna];
  R575: GHR_rna => ; 1;
  // V(576) = K(576,1) * [CYBA_g];
  R576: CYBA_g => ; 1;
  // V(577) = K(577,1) * [CYBA_rna];
  R577: CYBA_rna => ; 1;
  // V(578) = K(578,1) * [F3_g];
  R578: F3_g => ; 1;
  // V(579) = K(579,1) * [F3_rna];
  R579: F3_rna => ; 1;
  // V(580) = K(580,1) * [CREB1_g];
  R580: CREB1_g => ; 1;
  // V(581) = K(581,1) * [CREB1_rna];
  R581: CREB1_rna => ; 1;
  // V(582) = K(582,1) * [PRKCA_g];
  R582: PRKCA_g => ; 1;
  // V(583) = K(583,1) * [PRKCA_rna];
  R583: PRKCA_rna => ; 1;
  // V(584) = K(584,1) * [GJA1_g];
  R584: GJA1_g => ; 1;
  // V(585) = K(585,1) * [GJA1_rna];
  R585: GJA1_rna => ; 1;
  // V(586) = K(586,1) * [PTPN2_g];
  R586: PTPN2_g => ; 1;
  // V(587) = K(587,1) * [PTPN2_rna];
  R587: PTPN2_rna => ; 1;
  // V(588) = K(588,1) * [WT1_g];
  R588: WT1_g => ; 1;
  // V(589) = K(589,1) * [WT1_rna];
  R589: WT1_rna => ; 1;
  // V(590) = K(590,1) * [NR4A1_g];
  R590: NR4A1_g => ; 1;
  // V(591) = K(591,1) * [NR4A1_rna];
  R591: NR4A1_rna => ; 1;
  // V(592) = K(592,1) * [JAK1_g];
  R592: JAK1_g => ; 1;
  // V(593) = K(593,1) * [JAK1_rna];
  R593: JAK1_rna => ; 1;
  // V(594) = K(594,1) * [PTPRB_g];
  R594: PTPRB_g => ; 1;
  // V(595) = K(595,1) * [PTPRB_rna];
  R595: PTPRB_rna => ; 1;
  // V(596) = K(596,1) * [F2R_g];
  R596: F2R_g => ; 1;
  // V(597) = K(597,1) * [F2R_rna];
  R597: F2R_rna => ; 1;
  // V(598) = K(598,1) * [ZFP36_g];
  R598: ZFP36_g => ; 1;
  // V(599) = K(599,1) * [ZFP36_rna];
  R599: ZFP36_rna => ; 1;
  // V(600) = K(600,1) * [PIK3R1_g];
  R600: PIK3R1_g => ; 1;
  // V(601) = K(601,1) * [PIK3R1_rna];
  R601: PIK3R1_rna => ; 1;
  // V(602) = K(602,1) * [MAPK1_g];
  R602: MAPK1_g => ; 1;
  // V(603) = K(603,1) * [MAPK1_rna];
  R603: MAPK1_rna => ; 1;
  // V(604) = K(604,1) * [DUSP1_g];
  R604: DUSP1_g => ; 1;
  // V(605) = K(605,1) * [DUSP1_rna];
  R605: DUSP1_rna => ; 1;
  // V(606) = K(606,1) * [AQP1_g];
  R606: AQP1_g => ; 1;
  // V(607) = K(607,1) * [AQP1_rna];
  R607: AQP1_rna => ; 1;
  // V(608) = K(608,1) * [PRDX6_g];
  R608: PRDX6_g => ; 1;
  // V(609) = K(609,1) * [PRDX6_rna];
  R609: PRDX6_rna => ; 1;
  // V(610) = K(610,1) * [AXL_g];
  R610: AXL_g => ; 1;
  // V(611) = K(611,1) * [AXL_rna];
  R611: AXL_rna => ; 1;
  // V(612) = K(612,1) * [AKT1_g];
  R612: AKT1_g => ; 1;
  // V(613) = K(613,1) * [AKT1_rna];
  R613: AKT1_rna => ; 1;
  // V(614) = K(614,1) * [CTNNB1_g];
  R614: CTNNB1_g => ; 1;
  // V(615) = K(615,1) * [CTNNB1_rna];
  R615: CTNNB1_rna => ; 1;
  // V(616) = K(616,1) * [DDIT3_g];
  R616: DDIT3_g => ; 1;
  // V(617) = K(617,1) * [DDIT3_rna];
  R617: DDIT3_rna => ; 1;
  // V(618) = K(618,1) * [KDR_g];
  R618: KDR_g => ; 1;
  // V(619) = K(619,1) * [KDR_rna];
  R619: KDR_rna => ; 1;
  // V(620) = K(620,1) * [SREBF1_g];
  R620: SREBF1_g => ; 1;
  // V(621) = K(621,1) * [SREBF1_rna];
  R621: SREBF1_rna => ; 1;
  // V(622) = K(622,1) * [STAT3_g];
  R622: STAT3_g => ; 1;
  // V(623) = K(623,1) * [STAT3_rna];
  R623: STAT3_rna => ; 1;
  // V(624) = K(624,1) * [STAT6_g];
  R624: STAT6_g => ; 1;
  // V(625) = K(625,1) * [STAT6_rna];
  R625: STAT6_rna => ; 1;
  // V(626) = K(626,1) * [PIK3CA_g];
  R626: PIK3CA_g => ; 1;
  // V(627) = K(627,1) * [PIK3CA_rna];
  R627: PIK3CA_rna => ; 1;
  // V(628) = K(628,1) * [CDKN1B_g];
  R628: CDKN1B_g => ; 1;
  // V(629) = K(629,1) * [CDKN1B_rna];
  R629: CDKN1B_rna => ; 1;
  // V(630) = K(630,1) * [YAP1_g];
  R630: YAP1_g => ; 1;
  // V(631) = K(631,1) * [YAP1_rna];
  R631: YAP1_rna => ; 1;
  // V(632) = K(632,1) * [LEPR_g];
  R632: LEPR_g => ; 1;
  // V(633) = K(633,1) * [LEPR_rna];
  R633: LEPR_rna => ; 1;
  // V(634) = K(634,1) * [NUMB_g];
  R634: NUMB_g => ; 1;
  // V(635) = K(635,1) * [NUMB_rna];
  R635: NUMB_rna => ; 1;
  // V(636) = K(636,1) * [TSC2_g];
  R636: TSC2_g => ; 1;
  // V(637) = K(637,1) * [TSC2_rna];
  R637: TSC2_rna => ; 1;
  // V(638) = K(638,1) * [MECP2_g];
  R638: MECP2_g => ; 1;
  // V(639) = K(639,1) * [MECP2_rna];
  R639: MECP2_rna => ; 1;
  // V(640) = K(640,1) * [PTEN_g];
  R640: PTEN_g => ; 1;
  // V(641) = K(641,1) * [PTEN_rna];
  R641: PTEN_rna => ; 1;
  // V(642) = K(642,1) * [RHOA_g];
  R642: RHOA_g => ; 1;
  // V(643) = K(643,1) * [RHOA_rna];
  R643: RHOA_rna => ; 1;
  // V(644) = K(644,1) * [RAC1_g];
  R644: RAC1_g => ; 1;
  // V(645) = K(645,1) * [RAC1_rna];
  R645: RAC1_rna => ; 1;
  // V(646) = K(646,1) * [VLDLR_g];
  R646: VLDLR_g => ; 1;
  // V(647) = K(647,1) * [VLDLR_rna];
  R647: VLDLR_rna => ; 1;
  // V(648) = K(648,1) * [MDM2_g];
  R648: MDM2_g => ; 1;
  // V(649) = K(649,1) * [MDM2_rna];
  R649: MDM2_rna => ; 1;
  // V(650) = K(650,1) * [NOTCH2_g];
  R650: NOTCH2_g => ; 1;
  // V(651) = K(651,1) * [NOTCH2_rna];
  R651: NOTCH2_rna => ; 1;
  // V(652) = K(652,1) * [PTPN11_g];
  R652: PTPN11_g => ; 1;
  // V(653) = K(653,1) * [PTPN11_rna];
  R653: PTPN11_rna => ; 1;
  // V(654) = K(654,1) * [BAX_g];
  R654: BAX_g => ; 1;
  // V(655) = K(655,1) * [BAX_rna];
  R655: BAX_rna => ; 1;
  // V(656) = K(656,1) * [EP300_g];
  R656: EP300_g => ; 1;
  // V(657) = K(657,1) * [EP300_rna];
  R657: EP300_rna => ; 1;
  // V(658) = K(658,1) * [PRKAA1_g];
  R658: PRKAA1_g => ; 1;
  // V(659) = K(659,1) * [PRKAA1_rna];
  R659: PRKAA1_rna => ; 1;
  // V(660) = K(660,1) * [ILK_g];
  R660: ILK_g => ; 1;
  // V(661) = K(661,1) * [ILK_rna];
  R661: ILK_rna => ; 1;
  // V(662) = K(662,1) * [ROCK1_g];
  R662: ROCK1_g => ; 1;
  // V(663) = K(663,1) * [ROCK1_rna];
  R663: ROCK1_rna => ; 1;
  // V(664) = K(664,1) * [SMAD4_g];
  R664: SMAD4_g => ; 1;
  // V(665) = K(665,1) * [SMAD4_rna];
  R665: SMAD4_rna => ; 1;
  // V(666) = K(666,1) * [HDAC1_g];
  R666: HDAC1_g => ; 1;
  // V(667) = K(667,1) * [HDAC1_rna];
  R667: HDAC1_rna => ; 1;
  // V(668) = K(668,1) * [CUL3_g];
  R668: CUL3_g => ; 1;
  // V(669) = K(669,1) * [CUL3_rna];
  R669: CUL3_rna => ; 1;
  // V(670) = K(670,1) * [HES1_g];
  R670: HES1_g => ; 1;
  // V(671) = K(671,1) * [HES1_rna];
  R671: HES1_rna => ; 1;
  // V(672) = K(672,1) * [SMAD2_g];
  R672: SMAD2_g => ; 1;
  // V(673) = K(673,1) * [SMAD2_rna];
  R673: SMAD2_rna => ; 1;
  // V(674) = K(674,1) * [SMAD1_g];
  R674: SMAD1_g => ; 1;
  // V(675) = K(675,1) * [SMAD1_rna];
  R675: SMAD1_rna => ; 1;
  // V(676) = K(676,1) * [STK11_g];
  R676: STK11_g => ; 1;
  // V(677) = K(677,1) * [STK11_rna];
  R677: STK11_rna => ; 1;
  // V(678) = K(678,1) * [NFE2L2_g];
  R678: NFE2L2_g => ; 1;
  // V(679) = K(679,1) * [NFE2L2_rna];
  R679: NFE2L2_rna => ; 1;
  // V(680) = K(680,1) * [PKN1_g];
  R680: PKN1_g => ; 1;
  // V(681) = K(681,1) * [PKN1_rna];
  R681: PKN1_rna => ; 1;
  // V(682) = K(682,1) * [MAPK6_g];
  R682: MAPK6_g => ; 1;
  // V(683) = K(683,1) * [MAPK6_rna];
  R683: MAPK6_rna => ; 1;
  // V(684) = K(684,1) * [HIF1A_g];
  R684: HIF1A_g => ; 1;
  // V(685) = K(685,1) * [HIF1A_rna];
  R685: HIF1A_rna => ; 1;
  // V(686) = K(686,1) * [MFN1_g];
  R686: MFN1_g => ; 1;
  // V(687) = K(687,1) * [MFN1_rna];
  R687: MFN1_rna => ; 1;
  // V(688) = K(688,1) * [MYLIP_g];
  R688: MYLIP_g => ; 1;
  // V(689) = K(689,1) * [MYLIP_rna];
  R689: MYLIP_rna => ; 1;
  // V(690) = K(690,1) * [BAD_g];
  R690: BAD_g => ; 1;
  // V(691) = K(691,1) * [BAD_rna];
  R691: BAD_rna => ; 1;
  // V(692) = K(692,1) * [PARK7_g];
  R692: PARK7_g => ; 1;
  // V(693) = K(693,1) * [PARK7_rna];
  R693: PARK7_rna => ; 1;
  // V(694) = K(694,1) * [MAPKAP1_g];
  R694: MAPKAP1_g => ; 1;
  // V(695) = K(695,1) * [MAPKAP1_rna];
  R695: MAPKAP1_rna => ; 1;
  // V(696) = K(696,1) * [PINK1_g];
  R696: PINK1_g => ; 1;
  // V(697) = K(697,1) * [PINK1_rna];
  R697: PINK1_rna => ; 1;
  // V(698) = K(698,1) * [MFF_g];
  R698: MFF_g => ; 1;
  // V(699) = K(699,1) * [MFF_rna];
  R699: MFF_rna => ; 1;
  // V(700) = K(700,1) * [HIPK2_g];
  R700: HIPK2_g => ; 1;
  // V(701) = K(701,1) * [HIPK2_rna];
  R701: HIPK2_rna => ; 1;
  // V(702) = K(702,1) * [TXNIP_g];
  R702: TXNIP_g => ; 1;
  // V(703) = K(703,1) * [TXNIP_rna];
  R703: TXNIP_rna => ; 1;
  // V(704) = K(704,1) * [NOX4_g];
  R704: NOX4_g => ; 1;
  // V(705) = K(705,1) * [NOX4_rna];
  R705: NOX4_rna => ; 1;
  // V(706) = K(706,1) * [RNF7_g];
  R706: RNF7_g => ; 1;
  // V(707) = K(707,1) * [RNF7_rna];
  R707: RNF7_rna => ; 1;
  // V(708) = K(708,1) * [ADD3_g];
  R708: ADD3_g => ; 1;
  // V(709) = K(709,1) * [ADD3_rna];
  R709: ADD3_rna => ; 1;
  // V(710) = K(710,1) * [TRPC6_g];
  R710: TRPC6_g => ; 1;
  // V(711) = K(711,1) * [TRPC6_rna];
  R711: TRPC6_rna => ; 1;
  // V(712) = K(712,1) * [DNM1L_p];
  R712: DNM1L_p => ; 1;
  // V(713) = K(713,1) * [NPHS1_p];
  R713: NPHS1_p => ; 1;
  // V(714) = K(714,1) * [JAK2_p];
  R714: JAK2_p => ; 1;
  // V(715) = K(715,1) * [MFN2_p];
  R715: MFN2_p => ; 1;
  // V(716) = K(716,1) * [FOS_p];
  R716: FOS_p => ; 1;
  // V(717) = K(717,1) * [ANXA1_p];
  R717: ANXA1_p => ; 1;
  // V(718) = K(718,1) * [NR3C1_p];
  R718: NR3C1_p => ; 1;
  // V(719) = K(719,1) * [HSPB1_p];
  R719: HSPB1_p => ; 1;
  // V(720) = K(720,1) * [HMGN1_p];
  R720: HMGN1_p => ; 1;
  // V(721) = K(721,1) * [JUN_p];
  R721: JUN_p => ; 1;
  // V(722) = K(722,1) * [INSR_p];
  R722: INSR_p => ; 1;
  // V(723) = K(723,1) * [FYN_p];
  R723: FYN_p => ; 1;
  // V(724) = K(724,1) * [SP1_p];
  R724: SP1_p => ; 1;
  // V(725) = K(725,1) * [IGF1R_p];
  R725: IGF1R_p => ; 1;
  // V(726) = K(726,1) * [NR3C2_p];
  R726: NR3C2_p => ; 1;
  // V(727) = K(727,1) * [VIM_p];
  R727: VIM_p => ; 1;
  // V(728) = K(728,1) * [PARP1_p];
  R728: PARP1_p => ; 1;
  // V(729) = K(729,1) * [UBC_p];
  R729: UBC_p => ; 1;
  // V(730) = K(730,1) * [CALM1_p];
  R730: CALM1_p => ; 1;
  // V(731) = K(731,1) * [GHR_p];
  R731: GHR_p => ; 1;
  // V(732) = K(732,1) * [CYBA_p];
  R732: CYBA_p => ; 1;
  // V(733) = K(733,1) * [F3_p];
  R733: F3_p => ; 1;
  // V(734) = K(734,1) * [CREB1_p];
  R734: CREB1_p => ; 1;
  // V(735) = K(735,1) * [PRKCA_p];
  R735: PRKCA_p => ; 1;
  // V(736) = K(736,1) * [GJA1_p];
  R736: GJA1_p => ; 1;
  // V(737) = K(737,1) * [NR4A1_p];
  R737: NR4A1_p => ; 1;
  // V(738) = K(738,1) * [JAK1_p];
  R738: JAK1_p => ; 1;
  // V(739) = K(739,1) * [F2R_p];
  R739: F2R_p => ; 1;
  // V(740) = K(740,1) * [ZFP36_p];
  R740: ZFP36_p => ; 1;
  // V(741) = K(741,1) * [PIK3R1_p];
  R741: PIK3R1_p => ; 1;
  // V(742) = K(742,1) * [MAPK1_p];
  R742: MAPK1_p => ; 1;
  // V(743) = K(743,1) * [DUSP1_p];
  R743: DUSP1_p => ; 1;
  // V(744) = K(744,1) * [AQP1_p];
  R744: AQP1_p => ; 1;
  // V(745) = K(745,1) * [PRDX6_p];
  R745: PRDX6_p => ; 1;
  // V(746) = K(746,1) * [AXL_p];
  R746: AXL_p => ; 1;
  // V(747) = K(747,1) * [AKT1_p];
  R747: AKT1_p => ; 1;
  // V(748) = K(748,1) * [CTNNB1_p];
  R748: CTNNB1_p => ; 1;
  // V(749) = K(749,1) * [DDIT3_p];
  R749: DDIT3_p => ; 1;
  // V(750) = K(750,1) * [KDR_p];
  R750: KDR_p => ; 1;
  // V(751) = K(751,1) * [SREBF1_p];
  R751: SREBF1_p => ; 1;
  // V(752) = K(752,1) * [STAT3_p];
  R752: STAT3_p => ; 1;
  // V(753) = K(753,1) * [STAT1_p];
  R753: STAT1_p => ; 1;
  // V(754) = K(754,1) * [STAT6_p];
  R754: STAT6_p => ; 1;
  // V(755) = K(755,1) * [CDKN1B_p];
  R755: CDKN1B_p => ; 1;
  // V(756) = K(756,1) * [YAP1_p];
  R756: YAP1_p => ; 1;
  // V(757) = K(757,1) * [LEPR_p];
  R757: LEPR_p => ; 1;
  // V(758) = K(758,1) * [TSC2_p];
  R758: TSC2_p => ; 1;
  // V(759) = K(759,1) * [MECP2_p];
  R759: MECP2_p => ; 1;
  // V(760) = K(760,1) * [RCAN1_p];
  R760: RCAN1_p => ; 1;
  // V(761) = K(761,1) * [PTEN_p];
  R761: PTEN_p => ; 1;
  // V(762) = K(762,1) * [RHOA_p];
  R762: RHOA_p => ; 1;
  // V(763) = K(763,1) * [RAC1_p];
  R763: RAC1_p => ; 1;
  // V(764) = K(764,1) * [MDM2_p];
  R764: MDM2_p => ; 1;
  // V(765) = K(765,1) * [PTPN11_p];
  R765: PTPN11_p => ; 1;
  // V(766) = K(766,1) * [BAX_p];
  R766: BAX_p => ; 1;
  // V(767) = K(767,1) * [EP300_p];
  R767: EP300_p => ; 1;
  // V(768) = K(768,1) * [PRKAA1_p];
  R768: PRKAA1_p => ; 1;
  // V(769) = K(769,1) * [ILK_p];
  R769: ILK_p => ; 1;
  // V(770) = K(770,1) * [SMAD4_p];
  R770: SMAD4_p => ; 1;
  // V(771) = K(771,1) * [HES1_p];
  R771: HES1_p => ; 1;
  // V(772) = K(772,1) * [SMAD2_p];
  R772: SMAD2_p => ; 1;
  // V(773) = K(773,1) * [SMAD1_p];
  R773: SMAD1_p => ; 1;
  // V(774) = K(774,1) * [STK11_p];
  R774: STK11_p => ; 1;
  // V(775) = K(775,1) * [NFE2L2_p];
  R775: NFE2L2_p => ; 1;
  // V(776) = K(776,1) * [PKN1_p];
  R776: PKN1_p => ; 1;
  // V(777) = K(777,1) * [MAPK6_p];
  R777: MAPK6_p => ; 1;
  // V(778) = K(778,1) * [HIF1A_p];
  R778: HIF1A_p => ; 1;
  // V(779) = K(779,1) * [MFN1_p];
  R779: MFN1_p => ; 1;
  // V(780) = K(780,1) * [BAD_p];
  R780: BAD_p => ; 1;
  // V(781) = K(781,1) * [PARK7_p];
  R781: PARK7_p => ; 1;
  // V(782) = K(782,1) * [MAPKAP1_p];
  R782: MAPKAP1_p => ; 1;
  // V(783) = K(783,1) * [MFF_p];
  R783: MFF_p => ; 1;
  // V(784) = K(784,1) * [HIPK2_p];
  R784: HIPK2_p => ; 1;
  // V(785) = K(785,1) * [TXNIP_p];
  R785: TXNIP_p => ; 1;
  // V(786) = K(786,1) * [NOX4_p];
  R786: NOX4_p => ; 1;
  // V(787) = K(787,1) * [ADD3_p];
  R787: ADD3_p => ; 1;
  // V(788) = K(788,1) * [TRPC6_p];
  R788: TRPC6_p => ; 1;
  // V(789) = K(789,1) * [SIGNOR-C118_p];
  R789: => ; 1;
  // V(790) = K(790,1) * [SIGNOR-C154_p];
  R790: => ; 1;
  // V(791) = K(791,1) * [SIGNOR-C156_p];
  R791: => ; 1;
  // V(792) = K(792,1) * [DNM1L_rna];
  R792: DNM1L_rna => ; 1;
  // V(793) = K(793,1) * [JAK2_rna];
  R793: JAK2_rna => ; 1;
  // V(794) = K(794,1) * [ROCK2_rna];
  R794: ROCK2_rna => ; 1;
  // V(795) = K(795,1) * [MFN2_rna];
  R795: MFN2_rna => ; 1;
  // V(796) = K(796,1) * [FOS_rna];
  R796: FOS_rna => ; 1;
  // V(797) = K(797,1) * [ANXA1_rna];
  R797: ANXA1_rna => ; 1;
  // V(798) = K(798,1) * [HSPB1_rna];
  R798: HSPB1_rna => ; 1;
  // V(799) = K(799,1) * [IGF1_rna];
  R799: IGF1_rna => ; 1;
  // V(800) = K(800,1) * [HMGN1_rna];
  R800: HMGN1_rna => ; 1;
  // V(801) = K(801,1) * [FGF1_rna];
  R801: FGF1_rna => ; 1;
  // V(802) = K(802,1) * [INSR_rna];
  R802: INSR_rna => ; 1;
  // V(803) = K(803,1) * [FYN_rna];
  R803: FYN_rna => ; 1;
  // V(804) = K(804,1) * [SP1_rna];
  R804: SP1_rna => ; 1;
  // V(805) = K(805,1) * [IGF1R_rna];
  R805: IGF1R_rna => ; 1;
  // V(806) = K(806,1) * [NR3C2_rna];
  R806: NR3C2_rna => ; 1;
  // V(807) = K(807,1) * [VIM_rna];
  R807: VIM_rna => ; 1;
  // V(808) = K(808,1) * [IL6R_rna];
  R808: IL6R_rna => ; 1;
  // V(809) = K(809,1) * [PARP1_rna];
  R809: PARP1_rna => ; 1;
  // V(810) = K(810,1) * [UBC_rna];
  R810: UBC_rna => ; 1;
  // V(811) = K(811,1) * [CALM1_rna];
  R811: CALM1_rna => ; 1;
  // V(812) = K(812,1) * [GHR_rna];
  R812: GHR_rna => ; 1;
  // V(813) = K(813,1) * [CYBA_rna];
  R813: CYBA_rna => ; 1;
  // V(814) = K(814,1) * [F3_rna];
  R814: F3_rna => ; 1;
  // V(815) = K(815,1) * [CREB1_rna];
  R815: CREB1_rna => ; 1;
  // V(816) = K(816,1) * [PRKCA_rna];
  R816: PRKCA_rna => ; 1;
  // V(817) = K(817,1) * [GJA1_rna];
  R817: GJA1_rna => ; 1;
  // V(818) = K(818,1) * [PTPN2_rna];
  R818: PTPN2_rna => ; 1;
  // V(819) = K(819,1) * [WT1_rna];
  R819: WT1_rna => ; 1;
  // V(820) = K(820,1) * [NR4A1_rna];
  R820: NR4A1_rna => ; 1;
  // V(821) = K(821,1) * [JAK1_rna];
  R821: JAK1_rna => ; 1;
  // V(822) = K(822,1) * [PTPRB_rna];
  R822: PTPRB_rna => ; 1;
  // V(823) = K(823,1) * [F2R_rna];
  R823: F2R_rna => ; 1;
  // V(824) = K(824,1) * [ZFP36_rna];
  R824: ZFP36_rna => ; 1;
  // V(825) = K(825,1) * [PIK3R1_rna];
  R825: PIK3R1_rna => ; 1;
  // V(826) = K(826,1) * [MAPK1_rna];
  R826: MAPK1_rna => ; 1;
  // V(827) = K(827,1) * [DUSP1_rna];
  R827: DUSP1_rna => ; 1;
  // V(828) = K(828,1) * [AQP1_rna];
  R828: AQP1_rna => ; 1;
  // V(829) = K(829,1) * [PRDX6_rna];
  R829: PRDX6_rna => ; 1;
  // V(830) = K(830,1) * [AXL_rna];
  R830: AXL_rna => ; 1;
  // V(831) = K(831,1) * [AKT1_rna];
  R831: AKT1_rna => ; 1;
  // V(832) = K(832,1) * [CTNNB1_rna];
  R832: CTNNB1_rna => ; 1;
  // V(833) = K(833,1) * [DDIT3_rna];
  R833: DDIT3_rna => ; 1;
  // V(834) = K(834,1) * [KDR_rna];
  R834: KDR_rna => ; 1;
  // V(835) = K(835,1) * [SREBF1_rna];
  R835: SREBF1_rna => ; 1;
  // V(836) = K(836,1) * [STAT3_rna];
  R836: STAT3_rna => ; 1;
  // V(837) = K(837,1) * [STAT6_rna];
  R837: STAT6_rna => ; 1;
  // V(838) = K(838,1) * [PIK3CA_rna];
  R838: PIK3CA_rna => ; 1;
  // V(839) = K(839,1) * [CDKN1B_rna];
  R839: CDKN1B_rna => ; 1;
  // V(840) = K(840,1) * [YAP1_rna];
  R840: YAP1_rna => ; 1;
  // V(841) = K(841,1) * [LEPR_rna];
  R841: LEPR_rna => ; 1;
  // V(842) = K(842,1) * [NUMB_rna];
  R842: NUMB_rna => ; 1;
  // V(843) = K(843,1) * [TSC2_rna];
  R843: TSC2_rna => ; 1;
  // V(844) = K(844,1) * [MECP2_rna];
  R844: MECP2_rna => ; 1;
  // V(845) = K(845,1) * [PTEN_rna];
  R845: PTEN_rna => ; 1;
  // V(846) = K(846,1) * [RHOA_rna];
  R846: RHOA_rna => ; 1;
  // V(847) = K(847,1) * [RAC1_rna];
  R847: RAC1_rna => ; 1;
  // V(848) = K(848,1) * [VLDLR_rna];
  R848: VLDLR_rna => ; 1;
  // V(849) = K(849,1) * [MDM2_rna];
  R849: MDM2_rna => ; 1;
  // V(850) = K(850,1) * [NOTCH2_rna];
  R850: NOTCH2_rna => ; 1;
  // V(851) = K(851,1) * [PTPN11_rna];
  R851: PTPN11_rna => ; 1;
  // V(852) = K(852,1) * [BAX_rna];
  R852: BAX_rna => ; 1;
  // V(853) = K(853,1) * [EP300_rna];
  R853: EP300_rna => ; 1;
  // V(854) = K(854,1) * [PRKAA1_rna];
  R854: PRKAA1_rna => ; 1;
  // V(855) = K(855,1) * [ILK_rna];
  R855: ILK_rna => ; 1;
  // V(856) = K(856,1) * [ROCK1_rna];
  R856: ROCK1_rna => ; 1;
  // V(857) = K(857,1) * [SMAD4_rna];
  R857: SMAD4_rna => ; 1;
  // V(858) = K(858,1) * [HDAC1_rna];
  R858: HDAC1_rna => ; 1;
  // V(859) = K(859,1) * [CUL3_rna];
  R859: CUL3_rna => ; 1;
  // V(860) = K(860,1) * [HES1_rna];
  R860: HES1_rna => ; 1;
  // V(861) = K(861,1) * [SMAD2_rna];
  R861: SMAD2_rna => ; 1;
  // V(862) = K(862,1) * [SMAD1_rna];
  R862: SMAD1_rna => ; 1;
  // V(863) = K(863,1) * [STK11_rna];
  R863: STK11_rna => ; 1;
  // V(864) = K(864,1) * [NFE2L2_rna];
  R864: NFE2L2_rna => ; 1;
  // V(865) = K(865,1) * [PKN1_rna];
  R865: PKN1_rna => ; 1;
  // V(866) = K(866,1) * [MAPK6_rna];
  R866: MAPK6_rna => ; 1;
  // V(867) = K(867,1) * [HIF1A_rna];
  R867: HIF1A_rna => ; 1;
  // V(868) = K(868,1) * [MFN1_rna];
  R868: MFN1_rna => ; 1;
  // V(869) = K(869,1) * [MYLIP_rna];
  R869: MYLIP_rna => ; 1;
  // V(870) = K(870,1) * [BAD_rna];
  R870: BAD_rna => ; 1;
  // V(871) = K(871,1) * [PARK7_rna];
  R871: PARK7_rna => ; 1;
  // V(872) = K(872,1) * [MAPKAP1_rna];
  R872: MAPKAP1_rna => ; 1;
  // V(873) = K(873,1) * [PINK1_rna];
  R873: PINK1_rna => ; 1;
  // V(874) = K(874,1) * [MFF_rna];
  R874: MFF_rna => ; 1;
  // V(875) = K(875,1) * [HIPK2_rna];
  R875: HIPK2_rna => ; 1;
  // V(876) = K(876,1) * [TXNIP_rna];
  R876: TXNIP_rna => ; 1;
  // V(877) = K(877,1) * [NOX4_rna];
  R877: NOX4_rna => ; 1;
  // V(878) = K(878,1) * [RNF7_rna];
  R878: RNF7_rna => ; 1;
  // V(879) = K(879,1) * [ADD3_rna];
  R879: ADD3_rna => ; 1;
  // V(880) = K(880,1) * [TRPC6_rna];
  R880: TRPC6_rna => ; 1;
end
