// SBML level 3 version 2

model PrincipalCell()

  // Compartments:
  compartment cell = 1;

  // Species:
  species ABCA1 in cell = 1/cell;
  species ABCA1_g in cell = 1/cell;
  species ABCA1_p in cell = 1/cell;
  species ABCA1_rna in cell = 1/cell;
  species AKT1 in cell = 1/cell;
  species AKT1_g in cell = 1/cell;
  species AKT1_p in cell = 1/cell;
  species AKT1_rna in cell = 1/cell;
  species ATF3 in cell = 1/cell;
  species ATF3_g in cell = 1/cell;
  species ATF3_rna in cell = 1/cell;
  species ATR in cell = 1/cell;
  species ATR_g in cell = 1/cell;
  species ATR_rna in cell = 1/cell;
  species CASP9 in cell = 1/cell;
  species CASP9_g in cell = 1/cell;
  species CASP9_p in cell = 1/cell;
  species CASP9_rna in cell = 1/cell;
  species CDH1 in cell = 1/cell;
  species CDH1_g in cell = 1/cell;
  species CDH1_p in cell = 1/cell;
  species CDH1_rna in cell = 1/cell;
  species CDKN1A in cell = 1/cell;
  species CDKN1A_g in cell = 1/cell;
  species CDKN1A_p in cell = 1/cell;
  species CDKN1A_rna in cell = 1/cell;
  species CDKN1B in cell = 1/cell;
  species CDKN1B_g in cell = 1/cell;
  species CDKN1B_p in cell = 1/cell;
  species CDKN1B_rna in cell = 1/cell;
  species CLTC in cell = 1/cell;
  species CLTC_g in cell = 1/cell;
  species CLTC_p in cell = 1/cell;
  species CLTC_rna in cell = 1/cell;
  species COL1A1 in cell = 1/cell;
  species COL1A1_g in cell = 1/cell;
  species COL1A1_rna in cell = 1/cell;
  species CREB1 in cell = 1/cell;
  species CREB1_g in cell = 1/cell;
  species CREB1_p in cell = 1/cell;
  species CREB1_rna in cell = 1/cell;
  species CTNNB1 in cell = 1/cell;
  species CTNNB1_g in cell = 1/cell;
  species CTNNB1_p in cell = 1/cell;
  species CTNNB1_rna in cell = 1/cell;
  species DDIT3 in cell = 1/cell;
  species DDIT3_g in cell = 1/cell;
  species DDIT3_p in cell = 1/cell;
  species DDIT3_rna in cell = 1/cell;
  species DEPTOR in cell = 1/cell;
  species DEPTOR_g in cell = 1/cell;
  species DEPTOR_p in cell = 1/cell;
  species DEPTOR_rna in cell = 1/cell;
  species DUSP1 in cell = 1/cell;
  species DUSP1_g in cell = 1/cell;
  species DUSP1_p in cell = 1/cell;
  species DUSP1_rna in cell = 1/cell;
  species EGFR in cell = 1/cell;
  species EGFR_g in cell = 1/cell;
  species EGFR_p in cell = 1/cell;
  species EGFR_rna in cell = 1/cell;
  species EGR1 in cell = 1/cell;
  species EGR1_g in cell = 1/cell;
  species EGR1_rna in cell = 1/cell;
  species EIF2AK3 in cell = 1/cell;
  species EIF2AK3_g in cell = 1/cell;
  species EIF2AK3_p in cell = 1/cell;
  species EIF2AK3_rna in cell = 1/cell;
  species ENG in cell = 1/cell;
  species ENG_g in cell = 1/cell;
  species ENG_p in cell = 1/cell;
  species ENG_rna in cell = 1/cell;
  species EP300 in cell = 1/cell;
  species EP300_g in cell = 1/cell;
  species EP300_p in cell = 1/cell;
  species EP300_rna in cell = 1/cell;
  species EPOR in cell = 1/cell;
  species EPOR_g in cell = 1/cell;
  species EPOR_p in cell = 1/cell;
  species EPOR_rna in cell = 1/cell;
  species ETS1 in cell = 1/cell;
  species ETS1_g in cell = 1/cell;
  species ETS1_rna in cell = 1/cell;
  species FAS in cell = 1/cell;
  species FAS_g in cell = 1/cell;
  species FAS_rna in cell = 1/cell;
  species FGF2 in cell = 1/cell;
  species FGF2_g in cell = 1/cell;
  species FGF2_rna in cell = 1/cell;
  species FOS in cell = 1/cell;
  species FOS_g in cell = 1/cell;
  species FOS_p in cell = 1/cell;
  species FOS_rna in cell = 1/cell;
  species FOXO1 in cell = 1/cell;
  species FOXO1_g in cell = 1/cell;
  species FOXO1_p in cell = 1/cell;
  species FOXO1_rna in cell = 1/cell;
  species GDF15 in cell = 1/cell;
  species GDF15_g in cell = 1/cell;
  species GDF15_rna in cell = 1/cell;
  species GHR in cell = 1/cell;
  species GHR_g in cell = 1/cell;
  species GHR_p in cell = 1/cell;
  species GHR_rna in cell = 1/cell;
  species HDAC4 in cell = 1/cell;
  species HDAC4_g in cell = 1/cell;
  species HDAC4_p in cell = 1/cell;
  species HDAC4_rna in cell = 1/cell;
  species HIF1A in cell = 1/cell;
  species HIF1A_g in cell = 1/cell;
  species HIF1A_p in cell = 1/cell;
  species HIF1A_rna in cell = 1/cell;
  species HIPK2 in cell = 1/cell;
  species HIPK2_g in cell = 1/cell;
  species HIPK2_p in cell = 1/cell;
  species HIPK2_rna in cell = 1/cell;
  species HMGN1 in cell = 1/cell;
  species HMGN1_g in cell = 1/cell;
  species HMGN1_p in cell = 1/cell;
  species HMGN1_rna in cell = 1/cell;
  species IKBKB in cell = 1/cell;
  species IKBKB_g in cell = 1/cell;
  species IKBKB_p in cell = 1/cell;
  species IKBKB_rna in cell = 1/cell;
  species IL6R in cell = 1/cell;
  species IL6R_g in cell = 1/cell;
  species IL6R_rna in cell = 1/cell;
  species INSR in cell = 1/cell;
  species INSR_g in cell = 1/cell;
  species INSR_p in cell = 1/cell;
  species INSR_rna in cell = 1/cell;
  species IRF1 in cell = 1/cell;
  species IRF1_g in cell = 1/cell;
  species IRF1_rna in cell = 1/cell;
  species IRS2 in cell = 1/cell;
  species IRS2_g in cell = 1/cell;
  species IRS2_p in cell = 1/cell;
  species IRS2_rna in cell = 1/cell;
  species JAK1 in cell = 1/cell;
  species JAK1_g in cell = 1/cell;
  species JAK1_p in cell = 1/cell;
  species JAK1_rna in cell = 1/cell;
  species JAK2 in cell = 1/cell;
  species JAK2_g in cell = 1/cell;
  species JAK2_p in cell = 1/cell;
  species JAK2_rna in cell = 1/cell;
  species JUN in cell = 1/cell;
  species JUN_g in cell = 1/cell;
  species JUN_p in cell = 1/cell;
  species JUN_rna in cell = 1/cell;
  species KDM6B in cell = 1/cell;
  species KDM6B_g in cell = 1/cell;
  species KDM6B_rna in cell = 1/cell;
  species LDLR in cell = 1/cell;
  species LDLR_g in cell = 1/cell;
  species LDLR_rna in cell = 1/cell;
  species LEPR in cell = 1/cell;
  species LEPR_g in cell = 1/cell;
  species LEPR_p in cell = 1/cell;
  species LEPR_rna in cell = 1/cell;
  species MAP3K5 in cell = 1/cell;
  species MAP3K5_g in cell = 1/cell;
  species MAP3K5_p in cell = 1/cell;
  species MAP3K5_rna in cell = 1/cell;
  species MAPK1 in cell = 1/cell;
  species MAPK1_g in cell = 1/cell;
  species MAPK1_p in cell = 1/cell;
  species MAPK1_rna in cell = 1/cell;
  species MAPK9 in cell = 1/cell;
  species MAPK9_g in cell = 1/cell;
  species MAPK9_p in cell = 1/cell;
  species MAPK9_rna in cell = 1/cell;
  species MDM2 in cell = 1/cell;
  species MDM2_g in cell = 1/cell;
  species MDM2_p in cell = 1/cell;
  species MDM2_rna in cell = 1/cell;
  species MYLIP in cell = 1/cell;
  species MYLIP_g in cell = 1/cell;
  species MYLIP_rna in cell = 1/cell;
  species NFKB2 in cell = 1/cell;
  species NFKB2_g in cell = 1/cell;
  species NFKB2_rna in cell = 1/cell;
  species NOTCH1 in cell = 1/cell;
  species NOTCH1_g in cell = 1/cell;
  species NOTCH1_rna in cell = 1/cell;
  species NR3C1 in cell = 1/cell;
  species NR3C1_g in cell = 1/cell;
  species NR3C1_p in cell = 1/cell;
  species NR3C1_rna in cell = 1/cell;
  species NR3C2 in cell = 1/cell;
  species NR3C2_g in cell = 1/cell;
  species NR3C2_p in cell = 1/cell;
  species NR3C2_rna in cell = 1/cell;
  species NR4A1 in cell = 1/cell;
  species NR4A1_g in cell = 1/cell;
  species NR4A1_p in cell = 1/cell;
  species NR4A1_rna in cell = 1/cell;
  species NRG4 in cell = 1/cell;
  species NRG4_g in cell = 1/cell;
  species NRG4_rna in cell = 1/cell;
  species NUMB in cell = 1/cell;
  species NUMB_g in cell = 1/cell;
  species NUMB_rna in cell = 1/cell;
  species PANX1 in cell = 1/cell;
  species PANX1_g in cell = 1/cell;
  species PANX1_p in cell = 1/cell;
  species PANX1_rna in cell = 1/cell;
  species PARK7 in cell = 1/cell;
  species PARK7_g in cell = 1/cell;
  species PARK7_p in cell = 1/cell;
  species PARK7_rna in cell = 1/cell;
  species PARP1 in cell = 1/cell;
  species PARP1_g in cell = 1/cell;
  species PARP1_p in cell = 1/cell;
  species PARP1_rna in cell = 1/cell;
  species PIK3C3 in cell = 1/cell;
  species PIK3C3_g in cell = 1/cell;
  species PIK3C3_p in cell = 1/cell;
  species PIK3C3_rna in cell = 1/cell;
  species PIK3CA in cell = 1/cell;
  species PIK3CA_g in cell = 1/cell;
  species PIK3CA_p in cell = 1/cell;
  species PIK3CA_rna in cell = 1/cell;
  species PIK3R1 in cell = 1/cell;
  species PIK3R1_g in cell = 1/cell;
  species PIK3R1_p in cell = 1/cell;
  species PIK3R1_rna in cell = 1/cell;
  species PKM in cell = 1/cell;
  species PKM_g in cell = 1/cell;
  species PKM_p in cell = 1/cell;
  species PKM_rna in cell = 1/cell;
  species PKN1 in cell = 1/cell;
  species PKN1_g in cell = 1/cell;
  species PKN1_p in cell = 1/cell;
  species PKN1_rna in cell = 1/cell;
  species PLK2 in cell = 1/cell;
  species PLK2_g in cell = 1/cell;
  species PLK2_rna in cell = 1/cell;
  species PPARG in cell = 1/cell;
  species PPARG_g in cell = 1/cell;
  species PPARG_p in cell = 1/cell;
  species PPARG_rna in cell = 1/cell;
  species PRDX6 in cell = 1/cell;
  species PRDX6_g in cell = 1/cell;
  species PRDX6_p in cell = 1/cell;
  species PRDX6_rna in cell = 1/cell;
  species PRKAA1 in cell = 1/cell;
  species PRKAA1_g in cell = 1/cell;
  species PRKAA1_p in cell = 1/cell;
  species PRKAA1_rna in cell = 1/cell;
  species PROM1 in cell = 1/cell;
  species PROM1_g in cell = 1/cell;
  species PROM1_p in cell = 1/cell;
  species PROM1_rna in cell = 1/cell;
  species PTEN in cell = 1/cell;
  species PTEN_g in cell = 1/cell;
  species PTEN_p in cell = 1/cell;
  species PTEN_rna in cell = 1/cell;
  species PTPN6 in cell = 1/cell;
  species PTPN6_g in cell = 1/cell;
  species PTPN6_p in cell = 1/cell;
  species PTPN6_rna in cell = 1/cell;
  species RAPGEF1 in cell = 1/cell;
  species RAPGEF1_g in cell = 1/cell;
  species RAPGEF1_p in cell = 1/cell;
  species RAPGEF1_rna in cell = 1/cell;
  species RCAN1 in cell = 1/cell;
  species RCAN1_g in cell = 1/cell;
  species RCAN1_p in cell = 1/cell;
  species RCAN1_rna in cell = 1/cell;
  species RICTOR in cell = 1/cell;
  species RICTOR_g in cell = 1/cell;
  species RICTOR_p in cell = 1/cell;
  species RICTOR_rna in cell = 1/cell;
  species RNF7 in cell = 1/cell;
  species RNF7_g in cell = 1/cell;
  species RNF7_rna in cell = 1/cell;
  species ROCK1 in cell = 1/cell;
  species ROCK1_g in cell = 1/cell;
  species ROCK1_rna in cell = 1/cell;
  species ROCK2 in cell = 1/cell;
  species ROCK2_g in cell = 1/cell;
  species ROCK2_rna in cell = 1/cell;
  species RPS6KA3 in cell = 1/cell;
  species RPS6KA3_g in cell = 1/cell;
  species RPS6KA3_p in cell = 1/cell;
  species RPS6KA3_rna in cell = 1/cell;
  species RPS6KB1 in cell = 1/cell;
  species RPS6KB1_g in cell = 1/cell;
  species RPS6KB1_p in cell = 1/cell;
  species RPS6KB1_rna in cell = 1/cell;
  species SGK1 in cell = 1/cell;
  species SGK1_g in cell = 1/cell;
  species SGK1_rna in cell = 1/cell;
  species SIRT1 in cell = 1/cell;
  species SIRT1_g in cell = 1/cell;
  species SIRT1_p in cell = 1/cell;
  species SIRT1_rna in cell = 1/cell;
  species SIRT2 in cell = 1/cell;
  species SIRT2_g in cell = 1/cell;
  species SIRT2_p in cell = 1/cell;
  species SIRT2_rna in cell = 1/cell;
  species SIRT7 in cell = 1/cell;
  species SIRT7_g in cell = 1/cell;
  species SIRT7_p in cell = 1/cell;
  species SIRT7_rna in cell = 1/cell;
  species SLC2A1 in cell = 1/cell;
  species SLC2A1_g in cell = 1/cell;
  species SLC2A1_rna in cell = 1/cell;
  species SMAD1 in cell = 1/cell;
  species SMAD1_g in cell = 1/cell;
  species SMAD1_p in cell = 1/cell;
  species SMAD1_rna in cell = 1/cell;
  species SMAD2 in cell = 1/cell;
  species SMAD2_g in cell = 1/cell;
  species SMAD2_p in cell = 1/cell;
  species SMAD2_rna in cell = 1/cell;
  species SMAD3 in cell = 1/cell;
  species SMAD3_g in cell = 1/cell;
  species SMAD3_p in cell = 1/cell;
  species SMAD3_rna in cell = 1/cell;
  species SMAD4 in cell = 1/cell;
  species SMAD4_g in cell = 1/cell;
  species SMAD4_p in cell = 1/cell;
  species SMAD4_rna in cell = 1/cell;
  species SOCS1 in cell = 1/cell;
  species SOCS1_g in cell = 1/cell;
  species SOCS1_p in cell = 1/cell;
  species SOCS1_rna in cell = 1/cell;
  species SOCS3 in cell = 1/cell;
  species SOCS3_g in cell = 1/cell;
  species SOCS3_rna in cell = 1/cell;
  species SP1 in cell = 1/cell;
  species SP1_g in cell = 1/cell;
  species SP1_p in cell = 1/cell;
  species SP1_rna in cell = 1/cell;
  species SRC in cell = 1/cell;
  species SRC_g in cell = 1/cell;
  species SRC_p in cell = 1/cell;
  species SRC_rna in cell = 1/cell;
  species STAT1 in cell = 1/cell;
  species STAT1_g in cell = 1/cell;
  species STAT1_p in cell = 1/cell;
  species STAT1_rna in cell = 1/cell;
  species STAT6 in cell = 1/cell;
  species STAT6_g in cell = 1/cell;
  species STAT6_p in cell = 1/cell;
  species STAT6_rna in cell = 1/cell;
  species STK4 in cell = 1/cell;
  species STK4_g in cell = 1/cell;
  species STK4_p in cell = 1/cell;
  species STK4_rna in cell = 1/cell;
  species TGFA in cell = 1/cell;
  species TGFA_g in cell = 1/cell;
  species TGFA_rna in cell = 1/cell;
  species TGFB1 in cell = 1/cell;
  species TGFB1_g in cell = 1/cell;
  species TGFB1_rna in cell = 1/cell;
  species TLR3 in cell = 1/cell;
  species TLR3_g in cell = 1/cell;
  species TLR3_p in cell = 1/cell;
  species TLR3_rna in cell = 1/cell;
  species TP53 in cell = 1/cell;
  species TP53_g in cell = 1/cell;
  species TP53_p in cell = 1/cell;
  species TP53_rna in cell = 1/cell;
  species TRIM23 in cell = 1/cell;
  species TRIM23_g in cell = 1/cell;
  species TRIM23_p in cell = 1/cell;
  species TRIM23_rna in cell = 1/cell;
  species TSC2 in cell = 1/cell;
  species TSC2_g in cell = 1/cell;
  species TSC2_p in cell = 1/cell;
  species TSC2_rna in cell = 1/cell;
  species TXNIP in cell = 1/cell;
  species TXNIP_g in cell = 1/cell;
  species TXNIP_p in cell = 1/cell;
  species TXNIP_rna in cell = 1/cell;
  species VLDLR in cell = 1/cell;
  species VLDLR_g in cell = 1/cell;
  species VLDLR_rna in cell = 1/cell;
  species WNT4 in cell = 1/cell;
  species WNT4_g in cell = 1/cell;
  species WNT4_rna in cell = 1/cell;
  species YAP1 in cell = 1/cell;
  species YAP1_g in cell = 1/cell;
  species YAP1_p in cell = 1/cell;
  species YAP1_rna in cell = 1/cell;
  species ZFP36 in cell = 1/cell;
  species ZFP36_g in cell = 1/cell;
  species ZFP36_p in cell = 1/cell;
  species ZFP36_rna in cell = 1/cell;

  // Reactions:
  // V(1) = K(1,1) * [SMAD2_p] * [SMAD4_p] -K(1,2) * [SIGNOR-C8];
  R1: SMAD2_p => SMAD4_p; 1;
  // V(2) = K(2,1) * [SMAD4_p] * [SMAD3_p] -K(2,2) * [SIGNOR-C9];
  R2: SMAD4_p => SMAD3_p; 1;
  // V(3) = K(3,1) * [SMAD4_p] * [JUN_p] -K(3,2) * [SIGNOR-C10];
  R3: JUN_p => SMAD4_p; 1;
  // V(4) = K(4,1) * [SMAD4_p] * [SMAD1] * [SMAD1] -K(4,2) * [SIGNOR-C85];
  R4: SMAD1 => SMAD4_p; 1;
  // V(5) = K(5,1) * [JUN_p] * [SMAD3_p] -K(5,2) * [SIGNOR-C86];
  R5: JUN_p => SMAD3_p; 1;
  // V(6) = K(6,1) * [FOS_p] * [JUN_p] * [JUN_p] * [FOS_p] * [JUN_p] * [FOS_p] * [FOS_p] * [JUN_p] -K(6,2) * [SIGNOR-C154];
  R6: JUN_p => FOS_p; 1;
  // V(7) = K(7,1) * [PIK3R1_p] * [PIK3CA] -K(7,2) * [SIGNOR-C156];
  R7: PIK3CA => PIK3R1_p; 1;
  // V(8) = K(8,1) * [MAPK1_p] * [EP300] -K(8,2) * [MAPK1_p |EP300];
  R8: EP300 => MAPK1_p; 1;
  // V(9) = K(9,1) * [MAPK1_p |EP300];
  R9: EP300 => MAPK1_p; 1;
  // V(10) = K(10,1) * [MAPK1_p] * [HIF1A] -K(10,2) * [MAPK1_p |HIF1A];
  R10: HIF1A => MAPK1_p; 1;
  // V(11) = K(11,1) * [MAPK1_p |HIF1A];
  R11: HIF1A => MAPK1_p; 1;
  // V(12) = K(12,1) * [MAPK1_p] * [NR3C1] -K(12,2) * [MAPK1_p |NR3C1];
  R12: NR3C1 => MAPK1_p; 1;
  // V(13) = K(13,1) * [MAPK1_p |NR3C1];
  R13: NR3C1 => MAPK1_p; 1;
  // V(14) = K(14,1) * [MAPK1_p] * [RPS6KA3] -K(14,2) * [MAPK1_p |RPS6KA3];
  R14: RPS6KA3 => MAPK1_p; 1;
  // V(15) = K(15,1) * [MAPK1_p |RPS6KA3];
  R15: RPS6KA3 => MAPK1_p; 1;
  // V(16) = K(16,1) * [AKT1_p] * [FOXO1] -K(16,2) * [AKT1_p |FOXO1];
  R16: FOXO1 => AKT1_p; 1;
  // V(17) = K(17,1) * [AKT1_p |FOXO1];
  R17: FOXO1 => AKT1_p; 1;
  // V(18) = K(18,1) * [MAPK1_p] * [PRDX6] -K(18,2) * [MAPK1_p |PRDX6];
  R18: PRDX6 => MAPK1_p; 1;
  // V(19) = K(19,1) * [MAPK1_p |PRDX6];
  R19: PRDX6 => MAPK1_p; 1;
  // V(20) = K(20,1) * [SRC_p] * [RPS6KA3] -K(20,2) * [SRC_p |RPS6KA3];
  R20: SRC_p => RPS6KA3; 1;
  // V(21) = K(21,1) * [SRC_p |RPS6KA3];
  R21: SRC_p => RPS6KA3; 1;
  // V(22) = K(22,1) * [MAPK1_p] * [SMAD1] -K(22,2) * [MAPK1_p |SMAD1];
  R22: SMAD1 => MAPK1_p; 1;
  // V(23) = K(23,1) * [MAPK1_p |SMAD1];
  R23: SMAD1 => MAPK1_p; 1;
  // V(24) = K(24,1) * [AKT1_p] * [MDM2] -K(24,2) * [AKT1_p |MDM2];
  R24: AKT1_p => MDM2; 1;
  // V(25) = K(25,1) * [AKT1_p |MDM2];
  R25: AKT1_p => MDM2; 1;
  // V(26) = K(26,1) * [MAPK1_p] * [RPS6KB1] -K(26,2) * [MAPK1_p |RPS6KB1];
  R26: RPS6KB1 => MAPK1_p; 1;
  // V(27) = K(27,1) * [MAPK1_p |RPS6KB1];
  R27: RPS6KB1 => MAPK1_p; 1;
  // V(28) = K(28,1) * [SRC_p] * [PANX1] -K(28,2) * [SRC_p |PANX1];
  R28: PANX1 => SRC_p; 1;
  // V(29) = K(29,1) * [SRC_p |PANX1];
  R29: PANX1 => SRC_p; 1;
  // V(30) = K(30,1) * [SRC_p] * [TP53] -K(30,2) * [SRC_p |TP53];
  R30: TP53 => SRC_p; 1;
  // V(31) = K(31,1) * [SRC_p |TP53];
  R31: TP53 => SRC_p; 1;
  // V(32) = K(32,1) * [AKT1_p] * [PRKAA1] -K(32,2) * [AKT1_p |PRKAA1];
  R32: PRKAA1 => AKT1_p; 1;
  // V(33) = K(33,1) * [AKT1_p |PRKAA1];
  R33: PRKAA1 => AKT1_p; 1;
  // V(34) = K(34,1) * [EGFR_p] * [EGFR] -K(34,2) * [EGFR_p |EGFR];
  R34: EGFR_p => EGFR; 1;
  // V(35) = K(35,1) * [EGFR_p |EGFR];
  R35: EGFR_p => EGFR; 1;
  // V(36) = K(36,1) * [IKBKB_p] * [IKBKB] -K(36,2) * [IKBKB_p |IKBKB];
  R36: IKBKB => IKBKB_p; 1;
  // V(37) = K(37,1) * [IKBKB_p |IKBKB];
  R37: IKBKB => IKBKB_p; 1;
  // V(38) = K(38,1) * [JAK2_p] * [JAK2] -K(38,2) * [JAK2_p |JAK2];
  R38: JAK2_p => JAK2; 1;
  // V(39) = K(39,1) * [JAK2_p |JAK2];
  R39: JAK2_p => JAK2; 1;
  // V(40) = K(40,1) * [MAPK1_p] * [CDKN1B] -K(40,2) * [MAPK1_p |CDKN1B];
  R40: CDKN1B => MAPK1_p; 1;
  // V(41) = K(41,1) * [MAPK1_p |CDKN1B];
  R41: CDKN1B => MAPK1_p; 1;
  // V(42) = K(42,1) * [MAPK1_p] * [SMAD4] -K(42,2) * [MAPK1_p |SMAD4];
  R42: SMAD4 => MAPK1_p; 1;
  // V(43) = K(43,1) * [MAPK1_p |SMAD4];
  R43: SMAD4 => MAPK1_p; 1;
  // V(44) = K(44,1) * [MAPK1_p] * [JUN] -K(44,2) * [MAPK1_p |JUN];
  R44: JUN => MAPK1_p; 1;
  // V(45) = K(45,1) * [MAPK1_p |JUN];
  R45: JUN => MAPK1_p; 1;
  // V(46) = K(46,1) * [AKT1_p] * [NR4A1] -K(46,2) * [AKT1_p |NR4A1];
  R46: NR4A1 => AKT1_p; 1;
  // V(47) = K(47,1) * [AKT1_p |NR4A1];
  R47: NR4A1 => AKT1_p; 1;
  // V(48) = K(48,1) * [SRC_p] * [SIRT2] -K(48,2) * [SRC_p |SIRT2];
  R48: SIRT2 => SRC_p; 1;
  // V(49) = K(49,1) * [SRC_p |SIRT2];
  R49: SIRT2 => SRC_p; 1;
  // V(50) = K(50,1) * [JAK2_p] * [MAP3K5] -K(50,2) * [JAK2_p |MAP3K5];
  R50: JAK2_p => MAP3K5; 1;
  // V(51) = K(51,1) * [JAK2_p |MAP3K5];
  R51: JAK2_p => MAP3K5; 1;
  // V(52) = K(52,1) * [MAPK1_p] * [FOS] -K(52,2) * [MAPK1_p |FOS];
  R52: FOS => MAPK1_p; 1;
  // V(53) = K(53,1) * [MAPK1_p |FOS];
  R53: FOS => MAPK1_p; 1;
  // V(54) = K(54,1) * [SRC_p] * [SRC] -K(54,2) * [SRC_p |SRC];
  R54: SRC => SRC_p; 1;
  // V(55) = K(55,1) * [SRC_p |SRC];
  R55: SRC => SRC_p; 1;
  // V(56) = K(56,1) * [SRC_p] * [TLR3] -K(56,2) * [SRC_p |TLR3];
  R56: TLR3 => SRC_p; 1;
  // V(57) = K(57,1) * [SRC_p |TLR3];
  R57: TLR3 => SRC_p; 1;
  // V(58) = K(58,1) * [MAPK9_p] * [TP53] -K(58,2) * [MAPK9_p |TP53];
  R58: TP53 => MAPK9_p; 1;
  // V(59) = K(59,1) * [MAPK9_p |TP53];
  R59: TP53 => MAPK9_p; 1;
  // V(60) = K(60,1) * [MAPK1_p] * [SMAD2] -K(60,2) * [MAPK1_p |SMAD2];
  R60: SMAD2 => MAPK1_p; 1;
  // V(61) = K(61,1) * [MAPK1_p |SMAD2];
  R61: SMAD2 => MAPK1_p; 1;
  // V(62) = K(62,1) * [MAPK9_p] * [JUN] -K(62,2) * [MAPK9_p |JUN];
  R62: JUN => MAPK9_p; 1;
  // V(63) = K(63,1) * [MAPK9_p |JUN];
  R63: JUN => MAPK9_p; 1;
  // V(64) = K(64,1) * [INSR_p] * [INSR] -K(64,2) * [INSR_p |INSR];
  R64: INSR_p => INSR; 1;
  // V(65) = K(65,1) * [INSR_p |INSR];
  R65: INSR_p => INSR; 1;
  // V(66) = K(66,1) * [JAK1_p] * [STAT1] -K(66,2) * [JAK1_p |STAT1];
  R66: STAT1 => JAK1_p; 1;
  // V(67) = K(67,1) * [JAK1_p |STAT1];
  R67: STAT1 => JAK1_p; 1;
  // V(68) = K(68,1) * [MAPK1_p] * [DUSP1] -K(68,2) * [MAPK1_p |DUSP1];
  R68: DUSP1 => MAPK1_p; 1;
  // V(69) = K(69,1) * [MAPK1_p |DUSP1];
  R69: DUSP1 => MAPK1_p; 1;
  // V(70) = K(70,1) * [MAPK1_p] * [NR3C2] -K(70,2) * [MAPK1_p |NR3C2];
  R70: NR3C2 => MAPK1_p; 1;
  // V(71) = K(71,1) * [MAPK1_p |NR3C2];
  R71: NR3C2 => MAPK1_p; 1;
  // V(72) = K(72,1) * [RPS6KA3_p] * [HMGN1] -K(72,2) * [RPS6KA3_p |HMGN1];
  R72: HMGN1 => RPS6KA3_p; 1;
  // V(73) = K(73,1) * [RPS6KA3_p |HMGN1];
  R73: HMGN1 => RPS6KA3_p; 1;
  // V(74) = K(74,1) * [PKN1_p] * [PKN1] -K(74,2) * [PKN1_p |PKN1];
  R74: PKN1 => PKN1_p; 1;
  // V(75) = K(75,1) * [PKN1_p |PKN1];
  R75: PKN1 => PKN1_p; 1;
  // V(76) = K(76,1) * [AKT1_p] * [CDKN1A] -K(76,2) * [AKT1_p |CDKN1A];
  R76: AKT1_p => CDKN1A; 1;
  // V(77) = K(77,1) * [AKT1_p |CDKN1A];
  R77: AKT1_p => CDKN1A; 1;
  // V(78) = K(78,1) * [SRC_p] * [AKT1] -K(78,2) * [SRC_p |AKT1];
  R78: AKT1 => SRC_p; 1;
  // V(79) = K(79,1) * [SRC_p |AKT1];
  R79: AKT1 => SRC_p; 1;
  // V(80) = K(80,1) * [JAK1_p] * [EIF2AK3] -K(80,2) * [JAK1_p |EIF2AK3];
  R80: EIF2AK3 => JAK1_p; 1;
  // V(81) = K(81,1) * [JAK1_p |EIF2AK3];
  R81: EIF2AK3 => JAK1_p; 1;
  // V(82) = K(82,1) * [STK4_p] * [FOXO1] -K(82,2) * [STK4_p |FOXO1];
  R82: STK4_p => FOXO1; 1;
  // V(83) = K(83,1) * [STK4_p |FOXO1];
  R83: STK4_p => FOXO1; 1;
  // V(84) = K(84,1) * [MAPK1_p] * [TSC2] -K(84,2) * [MAPK1_p |TSC2];
  R84: TSC2 => MAPK1_p; 1;
  // V(85) = K(85,1) * [MAPK1_p |TSC2];
  R85: TSC2 => MAPK1_p; 1;
  // V(86) = K(86,1) * [INSR_p] * [SIGNOR-C156] -K(86,2) * [INSR_p |SIGNOR-C156];
  R86: INSR_p => ; 1;
  // V(87) = K(87,1) * [INSR_p |SIGNOR-C156];
  R87: INSR_p => ; 1;
  // V(88) = K(88,1) * [JAK2_p] * [EPOR] -K(88,2) * [JAK2_p |EPOR];
  R88: JAK2_p => EPOR; 1;
  // V(89) = K(89,1) * [JAK2_p |EPOR];
  R89: JAK2_p => EPOR; 1;
  // V(90) = K(90,1) * [MAPK1_p] * [FOXO1] -K(90,2) * [MAPK1_p |FOXO1];
  R90: FOXO1 => MAPK1_p; 1;
  // V(91) = K(91,1) * [MAPK1_p |FOXO1];
  R91: FOXO1 => MAPK1_p; 1;
  // V(92) = K(92,1) * [ATR] * [PARP1] -K(92,2) * [ATR |PARP1];
  R92: PARP1 => ATR; 1;
  // V(93) = K(93,1) * [ATR |PARP1];
  R93: PARP1 => ATR; 1;
  // V(94) = K(94,1) * [JAK2_p] * [STAT1] -K(94,2) * [JAK2_p |STAT1];
  R94: JAK2_p => STAT1; 1;
  // V(95) = K(95,1) * [JAK2_p |STAT1];
  R95: JAK2_p => STAT1; 1;
  // V(96) = K(96,1) * [SRC_p] * [EGFR] -K(96,2) * [SRC_p |EGFR];
  R96: EGFR => SRC_p; 1;
  // V(97) = K(97,1) * [SRC_p |EGFR];
  R97: EGFR => SRC_p; 1;
  // V(98) = K(98,1) * [MAPK1_p] * [PPARG] -K(98,2) * [MAPK1_p |PPARG];
  R98: PPARG => MAPK1_p; 1;
  // V(99) = K(99,1) * [MAPK1_p |PPARG];
  R99: PPARG => MAPK1_p; 1;
  // V(100) = K(100,1) * [SRC_p] * [STAT1] -K(100,2) * [SRC_p |STAT1];
  R100: STAT1 => SRC_p; 1;
  // V(101) = K(101,1) * [SRC_p |STAT1];
  R101: STAT1 => SRC_p; 1;
  // V(102) = K(102,1) * [MAPK1_p] * [SMAD3] -K(102,2) * [MAPK1_p |SMAD3];
  R102: SMAD3 => MAPK1_p; 1;
  // V(103) = K(103,1) * [MAPK1_p |SMAD3];
  R103: SMAD3 => MAPK1_p; 1;
  // V(104) = K(104,1) * [RPS6KA3_p] * [DEPTOR] -K(104,2) * [RPS6KA3_p |DEPTOR];
  R104: DEPTOR => RPS6KA3_p; 1;
  // V(105) = K(105,1) * [RPS6KA3_p |DEPTOR];
  R105: DEPTOR => RPS6KA3_p; 1;
  // V(106) = K(106,1) * [RPS6KA3_p] * [MAP3K5] -K(106,2) * [RPS6KA3_p |MAP3K5];
  R106: RPS6KA3_p => MAP3K5; 1;
  // V(107) = K(107,1) * [RPS6KA3_p |MAP3K5];
  R107: RPS6KA3_p => MAP3K5; 1;
  // V(108) = K(108,1) * [AKT1_p] * [CDKN1B] -K(108,2) * [AKT1_p |CDKN1B];
  R108: CDKN1B => AKT1_p; 1;
  // V(109) = K(109,1) * [AKT1_p |CDKN1B];
  R109: CDKN1B => AKT1_p; 1;
  // V(110) = K(110,1) * [ATR] * [MDM2] -K(110,2) * [ATR |MDM2];
  R110: ATR => MDM2; 1;
  // V(111) = K(111,1) * [ATR |MDM2];
  R111: ATR => MDM2; 1;
  // V(112) = K(112,1) * [MAPK1_p] * [SIGNOR-C154] -K(112,2) * [MAPK1_p |SIGNOR-C154];
  R112: MAPK1_p => ; 1;
  // V(113) = K(113,1) * [MAPK1_p |SIGNOR-C154];
  R113: MAPK1_p => ; 1;
  // V(114) = K(114,1) * [MAPK9_p] * [CTNNB1] -K(114,2) * [MAPK9_p |CTNNB1];
  R114: CTNNB1 => MAPK9_p; 1;
  // V(115) = K(115,1) * [MAPK9_p |CTNNB1];
  R115: CTNNB1 => MAPK9_p; 1;
  // V(116) = K(116,1) * [STK4_p] * [STK4] -K(116,2) * [STK4_p |STK4];
  R116: STK4_p => STK4; 1;
  // V(117) = K(117,1) * [STK4_p |STK4];
  R117: STK4_p => STK4; 1;
  // V(118) = K(118,1) * [SGK1] * [FOXO1] -K(118,2) * [SGK1 |FOXO1];
  R118: FOXO1 => SGK1; 1;
  // V(119) = K(119,1) * [SGK1 |FOXO1];
  R119: FOXO1 => SGK1; 1;
  // V(120) = K(120,1) * [HIPK2_p] * [HIPK2] -K(120,2) * [HIPK2_p |HIPK2];
  R120: HIPK2_p => HIPK2; 1;
  // V(121) = K(121,1) * [HIPK2_p |HIPK2];
  R121: HIPK2_p => HIPK2; 1;
  // V(122) = K(122,1) * [MAPK9_p] * [FOXO1] -K(122,2) * [MAPK9_p |FOXO1];
  R122: FOXO1 => MAPK9_p; 1;
  // V(123) = K(123,1) * [MAPK9_p |FOXO1];
  R123: FOXO1 => MAPK9_p; 1;
  // V(124) = K(124,1) * [RPS6KB1_p] * [DEPTOR] -K(124,2) * [RPS6KB1_p |DEPTOR];
  R124: DEPTOR => RPS6KB1_p; 1;
  // V(125) = K(125,1) * [RPS6KB1_p |DEPTOR];
  R125: DEPTOR => RPS6KB1_p; 1;
  // V(126) = K(126,1) * [SGK1] * [CDKN1B] -K(126,2) * [SGK1 |CDKN1B];
  R126: CDKN1B => SGK1; 1;
  // V(127) = K(127,1) * [SGK1 |CDKN1B];
  R127: CDKN1B => SGK1; 1;
  // V(128) = K(128,1) * [RPS6KA3_p] * [CREB1] -K(128,2) * [RPS6KA3_p |CREB1];
  R128: RPS6KA3_p => CREB1; 1;
  // V(129) = K(129,1) * [RPS6KA3_p |CREB1];
  R129: RPS6KA3_p => CREB1; 1;
  // V(130) = K(130,1) * [AKT1_p] * [TSC2] -K(130,2) * [AKT1_p |TSC2];
  R130: TSC2 => AKT1_p; 1;
  // V(131) = K(131,1) * [AKT1_p |TSC2];
  R131: TSC2 => AKT1_p; 1;
  // V(132) = K(132,1) * [AKT1_p] * [EP300] -K(132,2) * [AKT1_p |EP300];
  R132: EP300 => AKT1_p; 1;
  // V(133) = K(133,1) * [AKT1_p |EP300];
  R133: EP300 => AKT1_p; 1;
  // V(134) = K(134,1) * [IKBKB_p] * [FOXO1] -K(134,2) * [IKBKB_p |FOXO1];
  R134: FOXO1 => IKBKB_p; 1;
  // V(135) = K(135,1) * [IKBKB_p |FOXO1];
  R135: FOXO1 => IKBKB_p; 1;
  // V(136) = K(136,1) * [MAPK1_p] * [EGFR] -K(136,2) * [MAPK1_p |EGFR];
  R136: EGFR => MAPK1_p; 1;
  // V(137) = K(137,1) * [MAPK1_p |EGFR];
  R137: EGFR => MAPK1_p; 1;
  // V(138) = K(138,1) * [SRC_p] * [PTEN] -K(138,2) * [SRC_p |PTEN];
  R138: PTEN => SRC_p; 1;
  // V(139) = K(139,1) * [SRC_p |PTEN];
  R139: PTEN => SRC_p; 1;
  // V(140) = K(140,1) * [EIF2AK3_p] * [EIF2AK3] -K(140,2) * [EIF2AK3_p |EIF2AK3];
  R140: EIF2AK3_p => EIF2AK3; 1;
  // V(141) = K(141,1) * [EIF2AK3_p |EIF2AK3];
  R141: EIF2AK3_p => EIF2AK3; 1;
  // V(142) = K(142,1) * [MAP3K5_p] * [MAP3K5] -K(142,2) * [MAP3K5_p |MAP3K5];
  R142: MAP3K5 => MAP3K5_p; 1;
  // V(143) = K(143,1) * [MAP3K5_p |MAP3K5];
  R143: MAP3K5 => MAP3K5_p; 1;
  // V(144) = K(144,1) * [PRKAA1] * [SIRT7] -K(144,2) * [PRKAA1 |SIRT7];
  R144: PRKAA1 => SIRT7; 1;
  // V(145) = K(145,1) * [PRKAA1 |SIRT7];
  R145: PRKAA1 => SIRT7; 1;
  // V(146) = K(146,1) * [MAPK1_p] * [SP1] -K(146,2) * [MAPK1_p |SP1];
  R146: SP1 => MAPK1_p; 1;
  // V(147) = K(147,1) * [MAPK1_p |SP1];
  R147: SP1 => MAPK1_p; 1;
  // V(148) = K(148,1) * [ROCK1] * [PTEN] -K(148,2) * [ROCK1 |PTEN];
  R148: PTEN => ROCK1; 1;
  // V(149) = K(149,1) * [ROCK1 |PTEN];
  R149: PTEN => ROCK1; 1;
  // V(150) = K(150,1) * [MAPK1_p] * [CDKN1A] -K(150,2) * [MAPK1_p |CDKN1A];
  R150: CDKN1A => MAPK1_p; 1;
  // V(151) = K(151,1) * [MAPK1_p |CDKN1A];
  R151: CDKN1A => MAPK1_p; 1;
  // V(152) = K(152,1) * [PRKAA1] * [FOXO1] -K(152,2) * [PRKAA1 |FOXO1];
  R152: PRKAA1 => FOXO1; 1;
  // V(153) = K(153,1) * [PRKAA1 |FOXO1];
  R153: PRKAA1 => FOXO1; 1;
  // V(154) = K(154,1) * [IL6R] * [JAK2] -K(154,2) * [IL6R |JAK2];
  R154: IL6R => JAK2; 1;
  // V(155) = K(155,1) * [IL6R |JAK2];
  R155: IL6R => JAK2; 1;
  // V(156) = K(156,1) * [MAPK1_p] * [JAK2] -K(156,2) * [MAPK1_p |JAK2];
  R156: JAK2 => MAPK1_p; 1;
  // V(157) = K(157,1) * [MAPK1_p |JAK2];
  R157: JAK2 => MAPK1_p; 1;
  // V(158) = K(158,1) * [SRC_p] * [RAPGEF1] -K(158,2) * [SRC_p |RAPGEF1];
  R158: SRC_p => RAPGEF1; 1;
  // V(159) = K(159,1) * [SRC_p |RAPGEF1];
  R159: SRC_p => RAPGEF1; 1;
  // V(160) = K(160,1) * [AKT1_p] * [CASP9] -K(160,2) * [AKT1_p |CASP9];
  R160: CASP9 => AKT1_p; 1;
  // V(161) = K(161,1) * [AKT1_p |CASP9];
  R161: CASP9 => AKT1_p; 1;
  // V(162) = K(162,1) * [MAPK1_p] * [PARP1] -K(162,2) * [MAPK1_p |PARP1];
  R162: PARP1 => MAPK1_p; 1;
  // V(163) = K(163,1) * [MAPK1_p |PARP1];
  R163: PARP1 => MAPK1_p; 1;
  // V(164) = K(164,1) * [AKT1_p] * [NR3C1] -K(164,2) * [AKT1_p |NR3C1];
  R164: AKT1_p => NR3C1; 1;
  // V(165) = K(165,1) * [AKT1_p |NR3C1];
  R165: AKT1_p => NR3C1; 1;
  // V(166) = K(166,1) * [MAPK9_p] * [YAP1] -K(166,2) * [MAPK9_p |YAP1];
  R166: YAP1 => MAPK9_p; 1;
  // V(167) = K(167,1) * [MAPK9_p |YAP1];
  R167: YAP1 => MAPK9_p; 1;
  // V(168) = K(168,1) * [SRC_p] * [CLTC] -K(168,2) * [SRC_p |CLTC];
  R168: SRC_p => CLTC; 1;
  // V(169) = K(169,1) * [SRC_p |CLTC];
  R169: SRC_p => CLTC; 1;
  // V(170) = K(170,1) * [JAK2_p] * [STAT6] -K(170,2) * [JAK2_p |STAT6];
  R170: STAT6 => JAK2_p; 1;
  // V(171) = K(171,1) * [JAK2_p |STAT6];
  R171: STAT6 => JAK2_p; 1;
  // V(172) = K(172,1) * [PKN1_p] * [FOXO1] -K(172,2) * [PKN1_p |FOXO1];
  R172: FOXO1 => PKN1_p; 1;
  // V(173) = K(173,1) * [PKN1_p |FOXO1];
  R173: FOXO1 => PKN1_p; 1;
  // V(174) = K(174,1) * [EGFR_p] * [PPARG] -K(174,2) * [EGFR_p |PPARG];
  R174: EGFR_p => PPARG; 1;
  // V(175) = K(175,1) * [EGFR_p |PPARG];
  R175: EGFR_p => PPARG; 1;
  // V(176) = K(176,1) * [MAPK1_p] * [CASP9] -K(176,2) * [MAPK1_p |CASP9];
  R176: CASP9 => MAPK1_p; 1;
  // V(177) = K(177,1) * [MAPK1_p |CASP9];
  R177: CASP9 => MAPK1_p; 1;
  // V(178) = K(178,1) * [STK4_p] * [PIK3CA] -K(178,2) * [STK4_p |PIK3CA];
  R178: STK4_p => PIK3CA; 1;
  // V(179) = K(179,1) * [STK4_p |PIK3CA];
  R179: STK4_p => PIK3CA; 1;
  // V(180) = K(180,1) * [SRC_p] * [IKBKB] -K(180,2) * [SRC_p |IKBKB];
  R180: SRC_p => IKBKB; 1;
  // V(181) = K(181,1) * [SRC_p |IKBKB];
  R181: SRC_p => IKBKB; 1;
  // V(182) = K(182,1) * [RPS6KB1_p] * [RICTOR] -K(182,2) * [RPS6KB1_p |RICTOR];
  R182: RICTOR => RPS6KB1_p; 1;
  // V(183) = K(183,1) * [RPS6KB1_p |RICTOR];
  R183: RICTOR => RPS6KB1_p; 1;
  // V(184) = K(184,1) * [PLK2] * [TP53] -K(184,2) * [PLK2 |TP53];
  R184: TP53 => PLK2; 1;
  // V(185) = K(185,1) * [PLK2 |TP53];
  R185: TP53 => PLK2; 1;
  // V(186) = K(186,1) * [JAK1_p] * [STAT6] -K(186,2) * [JAK1_p |STAT6];
  R186: STAT6 => JAK1_p; 1;
  // V(187) = K(187,1) * [JAK1_p |STAT6];
  R187: STAT6 => JAK1_p; 1;
  // V(188) = K(188,1) * [SGK1] * [TSC2] -K(188,2) * [SGK1 |TSC2];
  R188: TSC2 => SGK1; 1;
  // V(189) = K(189,1) * [SGK1 |TSC2];
  R189: TSC2 => SGK1; 1;
  // V(190) = K(190,1) * [AKT1_p] * [YAP1] -K(190,2) * [AKT1_p |YAP1];
  R190: YAP1 => AKT1_p; 1;
  // V(191) = K(191,1) * [AKT1_p |YAP1];
  R191: YAP1 => AKT1_p; 1;
  // V(192) = K(192,1) * [SIGNOR-C156_p] * [AKT1] -K(192,2) * [SIGNOR-C156_p |AKT1];
  R192: AKT1 => ; 1;
  // V(193) = K(193,1) * [SIGNOR-C156_p |AKT1];
  R193: AKT1 => ; 1;
  // V(194) = K(194,1) * [JAK2_p] * [CDKN1B] -K(194,2) * [JAK2_p |CDKN1B];
  R194: JAK2_p => CDKN1B; 1;
  // V(195) = K(195,1) * [JAK2_p |CDKN1B];
  R195: JAK2_p => CDKN1B; 1;
  // V(196) = K(196,1) * [SMAD1] * [SMAD4] -K(196,2) * [SMAD1 |SMAD4];
  R196: SMAD4 => SMAD1; 1;
  // V(197) = K(197,1) * [SMAD1 |SMAD4];
  R197: SMAD4 => SMAD1; 1;
  // V(198) = K(198,1) * [RPS6KA3_p] * [FOS] -K(198,2) * [RPS6KA3_p |FOS];
  R198: RPS6KA3_p => FOS; 1;
  // V(199) = K(199,1) * [RPS6KA3_p |FOS];
  R199: RPS6KA3_p => FOS; 1;
  // V(200) = K(200,1) * [AKT1_p] * [RPS6KA3] -K(200,2) * [AKT1_p |RPS6KA3];
  R200: RPS6KA3 => AKT1_p; 1;
  // V(201) = K(201,1) * [AKT1_p |RPS6KA3];
  R201: RPS6KA3 => AKT1_p; 1;
  // V(202) = K(202,1) * [RPS6KA3_p] * [RPS6KA3] -K(202,2) * [RPS6KA3_p |RPS6KA3];
  R202: RPS6KA3_p => RPS6KA3; 1;
  // V(203) = K(203,1) * [RPS6KA3_p |RPS6KA3];
  R203: RPS6KA3_p => RPS6KA3; 1;
  // V(204) = K(204,1) * [PRKAA1] * [EP300] -K(204,2) * [PRKAA1 |EP300];
  R204: PRKAA1 => EP300; 1;
  // V(205) = K(205,1) * [PRKAA1 |EP300];
  R205: PRKAA1 => EP300; 1;
  // V(206) = K(206,1) * [PRKAA1] * [HDAC4] -K(206,2) * [PRKAA1 |HDAC4];
  R206: PRKAA1 => HDAC4; 1;
  // V(207) = K(207,1) * [PRKAA1 |HDAC4];
  R207: PRKAA1 => HDAC4; 1;
  // V(208) = K(208,1) * [AKT1_p] * [CTNNB1] -K(208,2) * [AKT1_p |CTNNB1];
  R208: CTNNB1 => AKT1_p; 1;
  // V(209) = K(209,1) * [AKT1_p |CTNNB1];
  R209: CTNNB1 => AKT1_p; 1;
  // V(210) = K(210,1) * [AKT1_p] * [STK4] -K(210,2) * [AKT1_p |STK4];
  R210: STK4 => AKT1_p; 1;
  // V(211) = K(211,1) * [AKT1_p |STK4];
  R211: STK4 => AKT1_p; 1;
  // V(212) = K(212,1) * [RPS6KA3_p] * [NR4A1] -K(212,2) * [RPS6KA3_p |NR4A1];
  R212: NR4A1 => RPS6KA3_p; 1;
  // V(213) = K(213,1) * [RPS6KA3_p |NR4A1];
  R213: NR4A1 => RPS6KA3_p; 1;
  // V(214) = K(214,1) * [PRKAA1] * [SIRT1] -K(214,2) * [PRKAA1 |SIRT1];
  R214: PRKAA1 => SIRT1; 1;
  // V(215) = K(215,1) * [PRKAA1 |SIRT1];
  R215: PRKAA1 => SIRT1; 1;
  // V(216) = K(216,1) * [ROCK1] * [TP53] -K(216,2) * [ROCK1 |TP53];
  R216: TP53 => ROCK1; 1;
  // V(217) = K(217,1) * [ROCK1 |TP53];
  R217: TP53 => ROCK1; 1;
  // V(218) = K(218,1) * [MAPK1_p] * [MAPK1] -K(218,2) * [MAPK1_p |MAPK1];
  R218: MAPK1 => MAPK1_p; 1;
  // V(219) = K(219,1) * [MAPK1_p |MAPK1];
  R219: MAPK1 => MAPK1_p; 1;
  // V(220) = K(220,1) * [MAPK9_p] * [SMAD3] -K(220,2) * [MAPK9_p |SMAD3];
  R220: SMAD3 => MAPK9_p; 1;
  // V(221) = K(221,1) * [MAPK9_p |SMAD3];
  R221: SMAD3 => MAPK9_p; 1;
  // V(222) = K(222,1) * [SRC_p] * [CDH1] -K(222,2) * [SRC_p |CDH1];
  R222: CDH1 => SRC_p; 1;
  // V(223) = K(223,1) * [SRC_p |CDH1];
  R223: CDH1 => SRC_p; 1;
  // V(224) = K(224,1) * [PRKAA1] * [TSC2] -K(224,2) * [PRKAA1 |TSC2];
  R224: PRKAA1 => TSC2; 1;
  // V(225) = K(225,1) * [PRKAA1 |TSC2];
  R225: PRKAA1 => TSC2; 1;
  // V(226) = K(226,1) * [MAPK1_p] * [ZFP36] -K(226,2) * [MAPK1_p |ZFP36];
  R226: ZFP36 => MAPK1_p; 1;
  // V(227) = K(227,1) * [MAPK1_p |ZFP36];
  R227: ZFP36 => MAPK1_p; 1;
  // V(228) = K(228,1) * [MAPK1_p] * [RCAN1] -K(228,2) * [MAPK1_p |RCAN1];
  R228: RCAN1 => MAPK1_p; 1;
  // V(229) = K(229,1) * [MAPK1_p |RCAN1];
  R229: RCAN1 => MAPK1_p; 1;
  // V(230) = K(230,1) * [JAK2_p] * [EGFR] -K(230,2) * [JAK2_p |EGFR];
  R230: EGFR => JAK2_p; 1;
  // V(231) = K(231,1) * [JAK2_p |EGFR];
  R231: EGFR => JAK2_p; 1;
  // V(232) = K(232,1) * [PKN1_p] * [EGFR] -K(232,2) * [PKN1_p |EGFR];
  R232: EGFR => PKN1_p; 1;
  // V(233) = K(233,1) * [PKN1_p |EGFR];
  R233: EGFR => PKN1_p; 1;
  // V(234) = K(234,1) * [AKT1_p] * [MAP3K5] -K(234,2) * [AKT1_p |MAP3K5];
  R234: MAP3K5 => AKT1_p; 1;
  // V(235) = K(235,1) * [AKT1_p |MAP3K5];
  R235: MAP3K5 => AKT1_p; 1;
  // V(236) = K(236,1) * [AKT1_p] * [PARK7] -K(236,2) * [AKT1_p |PARK7];
  R236: AKT1_p => PARK7; 1;
  // V(237) = K(237,1) * [AKT1_p |PARK7];
  R237: AKT1_p => PARK7; 1;
  // V(238) = K(238,1) * [SGK1] * [SP1] -K(238,2) * [SGK1 |SP1];
  R238: SP1 => SGK1; 1;
  // V(239) = K(239,1) * [SGK1 |SP1];
  R239: SP1 => SGK1; 1;
  // V(240) = K(240,1) * [PRKAA1] * [HIPK2] -K(240,2) * [PRKAA1 |HIPK2];
  R240: PRKAA1 => HIPK2; 1;
  // V(241) = K(241,1) * [PRKAA1 |HIPK2];
  R241: PRKAA1 => HIPK2; 1;
  // V(242) = K(242,1) * [SRC_p] * [PROM1] -K(242,2) * [SRC_p |PROM1];
  R242: PROM1 => SRC_p; 1;
  // V(243) = K(243,1) * [SRC_p |PROM1];
  R243: PROM1 => SRC_p; 1;
  // V(244) = K(244,1) * [SRC_p] * [CTNNB1] -K(244,2) * [SRC_p |CTNNB1];
  R244: CTNNB1 => SRC_p; 1;
  // V(245) = K(245,1) * [SRC_p |CTNNB1];
  R245: CTNNB1 => SRC_p; 1;
  // V(246) = K(246,1) * [INSR_p] * [IRS2] -K(246,2) * [INSR_p |IRS2];
  R246: INSR_p => IRS2; 1;
  // V(247) = K(247,1) * [INSR_p |IRS2];
  R247: INSR_p => IRS2; 1;
  // V(248) = K(248,1) * [SGK1] * [MAPK1] -K(248,2) * [SGK1 |MAPK1];
  R248: MAPK1 => SGK1; 1;
  // V(249) = K(249,1) * [SGK1 |MAPK1];
  R249: MAPK1 => SGK1; 1;
  // V(250) = K(250,1) * [JAK2_p] * [GHR] -K(250,2) * [JAK2_p |GHR];
  R250: JAK2_p => GHR; 1;
  // V(251) = K(251,1) * [JAK2_p |GHR];
  R251: JAK2_p => GHR; 1;
  // V(252) = K(252,1) * [PRKAA1] * [DDIT3] -K(252,2) * [PRKAA1 |DDIT3];
  R252: PRKAA1 => DDIT3; 1;
  // V(253) = K(253,1) * [PRKAA1 |DDIT3];
  R253: PRKAA1 => DDIT3; 1;
  // V(254) = K(254,1) * [RPS6KA3_p] * [TP53] -K(254,2) * [RPS6KA3_p |TP53];
  R254: TP53 => RPS6KA3_p; 1;
  // V(255) = K(255,1) * [RPS6KA3_p |TP53];
  R255: TP53 => RPS6KA3_p; 1;
  // V(256) = K(256,1) * [HIPK2_p] * [EP300] -K(256,2) * [HIPK2_p |EP300];
  R256: EP300 => HIPK2_p; 1;
  // V(257) = K(257,1) * [HIPK2_p |EP300];
  R257: EP300 => HIPK2_p; 1;
  // V(258) = K(258,1) * [SGK1] * [NR3C1] -K(258,2) * [SGK1 |NR3C1];
  R258: SGK1 => NR3C1; 1;
  // V(259) = K(259,1) * [SGK1 |NR3C1];
  R259: SGK1 => NR3C1; 1;
  // V(260) = K(260,1) * [JAK2_p] * [LEPR] -K(260,2) * [JAK2_p |LEPR];
  R260: JAK2_p => LEPR; 1;
  // V(261) = K(261,1) * [JAK2_p |LEPR];
  R261: JAK2_p => LEPR; 1;
  // V(262) = K(262,1) * [AKT1_p] * [AKT1] -K(262,2) * [AKT1_p |AKT1];
  R262: AKT1 => AKT1_p; 1;
  // V(263) = K(263,1) * [AKT1_p |AKT1];
  R263: AKT1 => AKT1_p; 1;
  // V(264) = K(264,1) * [INSR_p] * [PTPN6] -K(264,2) * [INSR_p |PTPN6];
  R264: PTPN6 => INSR_p; 1;
  // V(265) = K(265,1) * [INSR_p |PTPN6];
  R265: PTPN6 => INSR_p; 1;
  // V(266) = K(266,1) * [EGFR_p] * [STAT1] -K(266,2) * [EGFR_p |STAT1];
  R266: EGFR_p => STAT1; 1;
  // V(267) = K(267,1) * [EGFR_p |STAT1];
  R267: EGFR_p => STAT1; 1;
  // V(268) = K(268,1) * [INSR_p] * [PTEN] -K(268,2) * [INSR_p |PTEN];
  R268: PTEN => INSR_p; 1;
  // V(269) = K(269,1) * [INSR_p |PTEN];
  R269: PTEN => INSR_p; 1;
  // V(270) = K(270,1) * [INSR_p] * [PIK3R1] -K(270,2) * [INSR_p |PIK3R1];
  R270: PIK3R1 => INSR_p; 1;
  // V(271) = K(271,1) * [INSR_p |PIK3R1];
  R271: PIK3R1 => INSR_p; 1;
  // V(272) = K(272,1) * [PIK3CA] * [AKT1] -K(272,2) * [PIK3CA |AKT1];
  R272: PIK3CA => AKT1; 1;
  // V(273) = K(273,1) * [PIK3CA |AKT1];
  R273: PIK3CA => AKT1; 1;
  // V(274) = K(274,1) * [SRC_p] * [CDKN1B] -K(274,2) * [SRC_p |CDKN1B];
  R274: CDKN1B => SRC_p; 1;
  // V(275) = K(275,1) * [SRC_p |CDKN1B];
  R275: CDKN1B => SRC_p; 1;
  // V(276) = K(276,1) * [AKT1_p] * [CREB1] -K(276,2) * [AKT1_p |CREB1];
  R276: CREB1 => AKT1_p; 1;
  // V(277) = K(277,1) * [AKT1_p |CREB1];
  R277: CREB1 => AKT1_p; 1;
  // V(278) = K(278,1) * [AKT1_p] * [MAPK1] -K(278,2) * [AKT1_p |MAPK1];
  R278: MAPK1 => AKT1_p; 1;
  // V(279) = K(279,1) * [AKT1_p |MAPK1];
  R279: MAPK1 => AKT1_p; 1;
  // V(280) = K(280,1) * [EGFR_p] * [PARP1] -K(280,2) * [EGFR_p |PARP1];
  R280: EGFR_p => PARP1; 1;
  // V(281) = K(281,1) * [EGFR_p |PARP1];
  R281: EGFR_p => PARP1; 1;
  // V(282) = K(282,1) * [STK4_p] * [SIRT1] -K(282,2) * [STK4_p |SIRT1];
  R282: STK4_p => SIRT1; 1;
  // V(283) = K(283,1) * [STK4_p |SIRT1];
  R283: STK4_p => SIRT1; 1;
  // V(284) = K(284,1) * [IKBKB_p] * [TP53] -K(284,2) * [IKBKB_p |TP53];
  R284: TP53 => IKBKB_p; 1;
  // V(285) = K(285,1) * [IKBKB_p |TP53];
  R285: TP53 => IKBKB_p; 1;
  // V(286) = K(286,1) * [SRC_p] * [HIPK2] -K(286,2) * [SRC_p |HIPK2];
  R286: SRC_p => HIPK2; 1;
  // V(287) = K(287,1) * [SRC_p |HIPK2];
  R287: SRC_p => HIPK2; 1;
  // V(288) = K(288,1) * [ATR] * [TP53] -K(288,2) * [ATR |TP53];
  R288: TP53 => ATR; 1;
  // V(289) = K(289,1) * [ATR |TP53];
  R289: TP53 => ATR; 1;
  // V(290) = K(290,1) * [SRC_p] * [SOCS1] -K(290,2) * [SRC_p |SOCS1];
  R290: SRC_p => SOCS1; 1;
  // V(291) = K(291,1) * [SRC_p |SOCS1];
  R291: SRC_p => SOCS1; 1;
  // V(292) = K(292,1) * [ATR] * [CREB1] -K(292,2) * [ATR |CREB1];
  R292: ATR => CREB1; 1;
  // V(293) = K(293,1) * [ATR |CREB1];
  R293: ATR => CREB1; 1;
  // V(294) = K(294,1) * [EGFR_p] * [TLR3] -K(294,2) * [EGFR_p |TLR3];
  R294: EGFR_p => TLR3; 1;
  // V(295) = K(295,1) * [EGFR_p |TLR3];
  R295: EGFR_p => TLR3; 1;
  // V(296) = K(296,1) * [RPS6KA3_p] * [TSC2] -K(296,2) * [RPS6KA3_p |TSC2];
  R296: RPS6KA3_p => TSC2; 1;
  // V(297) = K(297,1) * [RPS6KA3_p |TSC2];
  R297: RPS6KA3_p => TSC2; 1;
  // V(298) = K(298,1) * [MAPK1_p] * [TP53] -K(298,2) * [MAPK1_p |TP53];
  R298: TP53 => MAPK1_p; 1;
  // V(299) = K(299,1) * [MAPK1_p |TP53];
  R299: TP53 => MAPK1_p; 1;
  // V(300) = K(300,1) * [HIPK2_p] * [CDKN1B] -K(300,2) * [HIPK2_p |CDKN1B];
  R300: CDKN1B => HIPK2_p; 1;
  // V(301) = K(301,1) * [HIPK2_p |CDKN1B];
  R301: CDKN1B => HIPK2_p; 1;
  // V(302) = K(302,1) * [HIPK2_p] * [TP53] -K(302,2) * [HIPK2_p |TP53];
  R302: TP53 => HIPK2_p; 1;
  // V(303) = K(303,1) * [HIPK2_p |TP53];
  R303: TP53 => HIPK2_p; 1;
  // V(304) = K(304,1) * [PRKAA1] * [PRKAA1] -K(304,2) * [PRKAA1 |PRKAA1];
  R304: PRKAA1 => ; 1;
  // V(305) = K(305,1) * [PRKAA1 |PRKAA1];
  R305: PRKAA1 => ; 1;
  // V(306) = K(306,1) * [SGK1] * [STAT1] -K(306,2) * [SGK1 |STAT1];
  R306: STAT1 => SGK1; 1;
  // V(307) = K(307,1) * [SGK1 |STAT1];
  R307: STAT1 => SGK1; 1;
  // V(308) = K(308,1) * [IKBKB_p] * [TRIM23] -K(308,2) * [IKBKB_p |TRIM23];
  R308: TRIM23 => IKBKB_p; 1;
  // V(309) = K(309,1) * [IKBKB_p |TRIM23];
  R309: TRIM23 => IKBKB_p; 1;
  // V(310) = K(310,1) * [MAPK9_p] * [SRC] -K(310,2) * [MAPK9_p |SRC];
  R310: SRC => MAPK9_p; 1;
  // V(311) = K(311,1) * [MAPK9_p |SRC];
  R311: SRC => MAPK9_p; 1;
  // V(312) = K(312,1) * [SRC_p] * [ENG] -K(312,2) * [SRC_p |ENG];
  R312: ENG => SRC_p; 1;
  // V(313) = K(313,1) * [SRC_p |ENG];
  R313: ENG => SRC_p; 1;
  // V(314) = K(314,1) * [MAP3K5_p] * [CDKN1A] -K(314,2) * [MAP3K5_p |CDKN1A];
  R314: MAP3K5_p => CDKN1A; 1;
  // V(315) = K(315,1) * [MAP3K5_p |CDKN1A];
  R315: MAP3K5_p => CDKN1A; 1;
  // V(316) = K(316,1) * [EGFR_p] * [CTNNB1] -K(316,2) * [EGFR_p |CTNNB1];
  R316: EGFR_p => CTNNB1; 1;
  // V(317) = K(317,1) * [EGFR_p |CTNNB1];
  R317: EGFR_p => CTNNB1; 1;
  // V(318) = K(318,1) * [SRC_p] * [SMAD3] -K(318,2) * [SRC_p |SMAD3];
  R318: SRC_p => SMAD3; 1;
  // V(319) = K(319,1) * [SRC_p |SMAD3];
  R319: SRC_p => SMAD3; 1;
  // V(320) = K(320,1) * [SRC_p] * [PIK3C3] -K(320,2) * [SRC_p |PIK3C3];
  R320: PIK3C3 => SRC_p; 1;
  // V(321) = K(321,1) * [SRC_p |PIK3C3];
  R321: PIK3C3 => SRC_p; 1;
  // V(322) = K(322,1) * [HIPK2_p] * [MDM2] -K(322,2) * [HIPK2_p |MDM2];
  R322: HIPK2_p => MDM2; 1;
  // V(323) = K(323,1) * [HIPK2_p |MDM2];
  R323: HIPK2_p => MDM2; 1;
  // V(324) = K(324,1) * [ROCK2] * [EP300] -K(324,2) * [ROCK2 |EP300];
  R324: EP300 => ROCK2; 1;
  // V(325) = K(325,1) * [ROCK2 |EP300];
  R325: EP300 => ROCK2; 1;
  // V(326) = K(326,1) * [SRC_p] * [CASP9] -K(326,2) * [SRC_p |CASP9];
  R326: SRC_p => CASP9; 1;
  // V(327) = K(327,1) * [SRC_p |CASP9];
  R327: SRC_p => CASP9; 1;
  // V(328) = K(328,1) * [MAPK1_p] * [NR4A1] -K(328,2) * [MAPK1_p |NR4A1];
  R328: NR4A1 => MAPK1_p; 1;
  // V(329) = K(329,1) * [MAPK1_p |NR4A1];
  R329: NR4A1 => MAPK1_p; 1;
  // V(330) = K(330,1) * [SRC_p] * [PTPN6] -K(330,2) * [SRC_p |PTPN6];
  R330: PTPN6 => SRC_p; 1;
  // V(331) = K(331,1) * [SRC_p |PTPN6];
  R331: PTPN6 => SRC_p; 1;
  // V(332) = K(332,1) * [EGFR_p] * [ABCA1] -K(332,2) * [EGFR_p |ABCA1];
  R332: EGFR_p => ABCA1; 1;
  // V(333) = K(333,1) * [EGFR_p |ABCA1];
  R333: EGFR_p => ABCA1; 1;
  // V(334) = K(334,1) * [MAPK1_p] * [TXNIP] -K(334,2) * [MAPK1_p |TXNIP];
  R334: TXNIP => MAPK1_p; 1;
  // V(335) = K(335,1) * [MAPK1_p |TXNIP];
  R335: TXNIP => MAPK1_p; 1;
  // V(336) = K(336,1) * [EGFR_p] * [PKM] -K(336,2) * [EGFR_p |PKM];
  R336: EGFR_p => PKM; 1;
  // V(337) = K(337,1) * [EGFR_p |PKM];
  R337: EGFR_p => PKM; 1;
  // V(338) = K(338,1) * [PIK3CA] * [PIK3R1] -K(338,2) * [PIK3CA |PIK3R1];
  R338: PIK3CA => PIK3R1; 1;
  // V(339) = K(339,1) * [PIK3CA |PIK3R1];
  R339: PIK3CA => PIK3R1; 1;
  // V(340) = K(340,1) * [PRKAA1] * [CDKN1B] -K(340,2) * [PRKAA1 |CDKN1B];
  R340: PRKAA1 => CDKN1B; 1;
  // V(341) = K(341,1) * [PRKAA1 |CDKN1B];
  R341: PRKAA1 => CDKN1B; 1;
  // V(342) = K(342,1) * [HIPK2_p] * [CREB1] -K(342,2) * [HIPK2_p |CREB1];
  R342: CREB1 => HIPK2_p; 1;
  // V(343) = K(343,1) * [HIPK2_p |CREB1];
  R343: CREB1 => HIPK2_p; 1;
  // V(344) = K(344,1) * [PRKAA1] * [TP53] -K(344,2) * [PRKAA1 |TP53];
  R344: TP53 => PRKAA1; 1;
  // V(345) = K(345,1) * [PRKAA1 |TP53];
  R345: TP53 => PRKAA1; 1;
  // V(346) = K(346,1) * [PTPN6_p] * [JAK2_p] -K(346,2) * [PTPN6_p |JAK2_p];
  R346: PTPN6_p => JAK2_p; 1;
  // V(347) = K(347,1) * [PTPN6_p |JAK2_p];
  R347: PTPN6_p => JAK2_p; 1;
  // V(348) = K(348,1) * [PTPN6_p] * [EGFR_p] -K(348,2) * [PTPN6_p |EGFR_p];
  R348: PTPN6_p => EGFR_p; 1;
  // V(349) = K(349,1) * [PTPN6_p |EGFR_p];
  R349: PTPN6_p => EGFR_p; 1;
  // V(350) = K(350,1) * [PTEN_p] * [RPS6KB1_p] -K(350,2) * [PTEN_p |RPS6KB1_p];
  R350: PTEN_p => RPS6KB1_p; 1;
  // V(351) = K(351,1) * [PTEN_p |RPS6KB1_p];
  R351: PTEN_p => RPS6KB1_p; 1;
  // V(352) = K(352,1) * [DUSP1_p] * [MAPK9_p] -K(352,2) * [DUSP1_p |MAPK9_p];
  R352: DUSP1_p => MAPK9_p; 1;
  // V(353) = K(353,1) * [DUSP1_p |MAPK9_p];
  R353: DUSP1_p => MAPK9_p; 1;
  // V(354) = K(354,1) * [PTEN_p] * [SRC_p] -K(354,2) * [PTEN_p |SRC_p];
  R354: PTEN_p => SRC_p; 1;
  // V(355) = K(355,1) * [PTEN_p |SRC_p];
  R355: PTEN_p => SRC_p; 1;
  // V(356) = K(356,1) * [PTPN6_p] * [PKM_p] -K(356,2) * [PTPN6_p |PKM_p];
  R356: PTPN6_p => PKM_p; 1;
  // V(357) = K(357,1) * [PTPN6_p |PKM_p];
  R357: PTPN6_p => PKM_p; 1;
  // V(358) = K(358,1) * [PTPN6_p] * [INSR_p] -K(358,2) * [PTPN6_p |INSR_p];
  R358: PTPN6_p => INSR_p; 1;
  // V(359) = K(359,1) * [PTPN6_p |INSR_p];
  R359: PTPN6_p => INSR_p; 1;
  // V(360) = K(360,1) * [DUSP1_p] * [MAPK1_p] -K(360,2) * [DUSP1_p |MAPK1_p];
  R360: DUSP1_p => MAPK1_p; 1;
  // V(361) = K(361,1) * [DUSP1_p |MAPK1_p];
  R361: DUSP1_p => MAPK1_p; 1;
  // V(362) = K(362,1) * [PTPN6_p] * [SRC_p] -K(362,2) * [PTPN6_p |SRC_p];
  R362: PTPN6_p => SRC_p; 1;
  // V(363) = K(363,1) * [PTPN6_p |SRC_p];
  R363: PTPN6_p => SRC_p; 1;
  // V(364) = K(364,1) * [PTPN6_p] * [JAK1_p] -K(364,2) * [PTPN6_p |JAK1_p];
  R364: PTPN6_p => JAK1_p; 1;
  // V(365) = K(365,1) * [PTPN6_p |JAK1_p];
  R365: PTPN6_p => JAK1_p; 1;
  // V(366) = K(366,1) * [PTEN_p] * [SP1_p] -K(366,2) * [PTEN_p |SP1_p];
  R366: PTEN_p => SP1_p; 1;
  // V(367) = K(367,1) * [PTEN_p |SP1_p];
  R367: PTEN_p => SP1_p; 1;
  // V(368) = K(368,1) * [PTEN_p] * [PTEN_p] -K(368,2) * [PTEN_p |PTEN_p];
  R368: PTEN_p => ; 1;
  // V(369) = K(369,1) * [PTEN_p |PTEN_p];
  R369: PTEN_p => ; 1;
  // V(370) = K(370,1) * [PTEN_p] * [CREB1_p] -K(370,2) * [PTEN_p |CREB1_p];
  R370: PTEN_p => CREB1_p; 1;
  // V(371) = K(371,1) * [PTEN_p |CREB1_p];
  R371: PTEN_p => CREB1_p; 1;
  // V(372) = K(372,1) * [DUSP1_p] * [JUN_p] -K(372,2) * [DUSP1_p |JUN_p];
  R372: JUN_p => DUSP1_p; 1;
  // V(373) = K(373,1) * [DUSP1_p |JUN_p];
  R373: JUN_p => DUSP1_p; 1;
  // V(374) = K(374,1) * [PTPN6_p] * [CTNNB1_p] -K(374,2) * [PTPN6_p |CTNNB1_p];
  R374: PTPN6_p => CTNNB1_p; 1;
  // V(375) = K(375,1) * [PTPN6_p |CTNNB1_p];
  R375: PTPN6_p => CTNNB1_p; 1;
  // V(376) = K(376,1) * [MDM2_p] * [IRF1] -K(376,2) * [MDM2_p |IRF1];
  R376: IRF1 => MDM2_p; 1;
  // V(377) = K(377,1) * [MDM2_p |IRF1];
  R377: IRF1 => MDM2_p; 1;
  // V(378) = K(378,1) * [MYLIP] * [LDLR] -K(378,2) * [MYLIP |LDLR];
  R378: MYLIP => LDLR; 1;
  // V(379) = K(379,1) * [MYLIP |LDLR];
  R379: MYLIP => LDLR; 1;
  // V(380) = K(380,1) * [MYLIP] * [VLDLR] -K(380,2) * [MYLIP |VLDLR];
  R380: VLDLR => MYLIP; 1;
  // V(381) = K(381,1) * [MYLIP |VLDLR];
  R381: VLDLR => MYLIP; 1;
  // V(382) = K(382,1) * [MDM2_p] * [HIF1A] -K(382,2) * [MDM2_p |HIF1A];
  R382: HIF1A => MDM2_p; 1;
  // V(383) = K(383,1) * [MDM2_p |HIF1A];
  R383: HIF1A => MDM2_p; 1;
  // V(384) = K(384,1) * [MDM2_p] * [NOTCH1] -K(384,2) * [MDM2_p |NOTCH1];
  R384: MDM2_p => NOTCH1; 1;
  // V(385) = K(385,1) * [MDM2_p |NOTCH1];
  R385: MDM2_p => NOTCH1; 1;
  // V(386) = K(386,1) * [RNF7] * [HIF1A] -K(386,2) * [RNF7 |HIF1A];
  R386: HIF1A => RNF7; 1;
  // V(387) = K(387,1) * [RNF7 |HIF1A];
  R387: HIF1A => RNF7; 1;
  // V(388) = K(388,1) * [MDM2_p] * [NUMB] -K(388,2) * [MDM2_p |NUMB];
  R388: MDM2_p => NUMB; 1;
  // V(389) = K(389,1) * [MDM2_p |NUMB];
  R389: MDM2_p => NUMB; 1;
  // V(390) = K(390,1) * [RNF7] * [DEPTOR] -K(390,2) * [RNF7 |DEPTOR];
  R390: DEPTOR => RNF7; 1;
  // V(391) = K(391,1) * [RNF7 |DEPTOR];
  R391: DEPTOR => RNF7; 1;
  // V(392) = K(392,1) * [SOCS1] * [JAK2] -K(392,2) * [SOCS1 |JAK2];
  R392: JAK2 => SOCS1; 1;
  // V(393) = K(393,1) * [SOCS1 |JAK2];
  R393: JAK2 => SOCS1; 1;
  // V(394) = K(394,1) * [RNF7] * [CDKN1B] -K(394,2) * [RNF7 |CDKN1B];
  R394: CDKN1B => RNF7; 1;
  // V(395) = K(395,1) * [RNF7 |CDKN1B];
  R395: CDKN1B => RNF7; 1;
  // V(396) = K(396,1) * [MDM2_p] * [TP53] -K(396,2) * [MDM2_p |TP53];
  R396: TP53 => MDM2_p; 1;
  // V(397) = K(397,1) * [MDM2_p |TP53];
  R397: TP53 => MDM2_p; 1;
  // V(398) = K(398,1) * [MDM2_p] * [PPARG] -K(398,2) * [MDM2_p |PPARG];
  R398: PPARG => MDM2_p; 1;
  // V(399) = K(399,1) * [MDM2_p |PPARG];
  R399: PPARG => MDM2_p; 1;
  // V(400) = K(400,1) * [MYLIP] * [MYLIP] -K(400,2) * [MYLIP |MYLIP];
  R400: MYLIP => ; 1;
  // V(401) = K(401,1) * [MYLIP |MYLIP];
  R401: MYLIP => ; 1;
  // V(402) = K(402,1) * [RNF7] * [JUN] -K(402,2) * [RNF7 |JUN];
  R402: JUN => RNF7; 1;
  // V(403) = K(403,1) * [RNF7 |JUN];
  R403: JUN => RNF7; 1;
  // V(404) = K(404,1) * [NUMB] * [NOTCH1] -K(404,2) * [NUMB |NOTCH1];
  R404: NOTCH1 => NUMB; 1;
  // V(405) = K(405,1) * [NUMB |NOTCH1];
  R405: NOTCH1 => NUMB; 1;
  // V(406) = K(406,1) * [TRIM23] * [PPARG] -K(406,2) * [TRIM23 |PPARG];
  R406: PPARG => TRIM23; 1;
  // V(407) = K(407,1) * [TRIM23 |PPARG];
  R407: PPARG => TRIM23; 1;
  // V(408) = K(408,1) * [JUN_p] * [SP1_p] * [TGFB1_g] -K(408,2) * [JUN_p |SP1_p |TGFB1_g];
  R408: SP1_p => TGFB1_g; 1;
  // V(409) = K(409,1) * [JUN_p |SP1_p |TGFB1_g];
  R409: SP1_p => TGFB1_g; 1;
  // V(410) = K(410,1) * [TGFB1_rna];
  R410: TGFB1_rna => ; 1;
  // V(411) = K(411,1) * [TP53_p] * [CDKN1A_g] -K(411,2) * [TP53_p |CDKN1A_g];
  R411: CDKN1A_g => TP53_p; 1;
  // V(412) = K(412,1) * [TP53_p |CDKN1A_g];
  R412: CDKN1A_g => TP53_p; 1;
  // V(413) = K(413,1) * [CDKN1A_rna];
  R413: CDKN1A_rna => ; 1;
  // V(414) = K(414,1) * [ATF3] * [GDF15_g] -K(414,2) * [ATF3 |GDF15_g];
  R414: GDF15_g => ATF3; 1;
  // V(415) = K(415,1) * [ATF3 |GDF15_g];
  R415: GDF15_g => ATF3; 1;
  // V(416) = K(416,1) * [GDF15_rna];
  R416: GDF15_rna => ; 1;
  // V(417) = K(417,1) * [STAT1_p] * [SOCS3_g] -K(417,2) * [STAT1_p |SOCS3_g];
  R417: SOCS3_g => STAT1_p; 1;
  // V(418) = K(418,1) * [STAT1_p |SOCS3_g];
  R418: SOCS3_g => STAT1_p; 1;
  // V(419) = K(419,1) * [SOCS3_rna];
  R419: SOCS3_rna => ; 1;
  // V(420) = K(420,1) * [FOXO1_p] * [CDKN1B_g] -K(420,2) * [FOXO1_p |CDKN1B_g];
  R420: FOXO1_p => CDKN1B_g; 1;
  // V(421) = K(421,1) * [FOXO1_p |CDKN1B_g];
  R421: FOXO1_p => CDKN1B_g; 1;
  // V(422) = K(422,1) * [CDKN1B_rna];
  R422: CDKN1B_rna => ; 1;
  // V(423) = K(423,1) * [TP53_p] * [FAS_g] -K(423,2) * [TP53_p |FAS_g];
  R423: FAS_g => TP53_p; 1;
  // V(424) = K(424,1) * [TP53_p |FAS_g];
  R424: FAS_g => TP53_p; 1;
  // V(425) = K(425,1) * [FAS_rna];
  R425: FAS_rna => ; 1;
  // V(426) = K(426,1) * [HIF1A_p] * [KDM6B_g] -K(426,2) * [HIF1A_p |KDM6B_g];
  R426: KDM6B_g => HIF1A_p; 1;
  // V(427) = K(427,1) * [HIF1A_p |KDM6B_g];
  R427: KDM6B_g => HIF1A_p; 1;
  // V(428) = K(428,1) * [KDM6B_rna];
  R428: KDM6B_rna => ; 1;
  // V(429) = K(429,1) * [CREB1_p] * [IRS2_g] -K(429,2) * [CREB1_p |IRS2_g];
  R429: CREB1_p => IRS2_g; 1;
  // V(430) = K(430,1) * [CREB1_p |IRS2_g];
  R430: CREB1_p => IRS2_g; 1;
  // V(431) = K(431,1) * [IRS2_rna];
  R431: IRS2_rna => ; 1;
  // V(432) = K(432,1) * [STAT6_p] * [SOCS1_g] -K(432,2) * [STAT6_p |SOCS1_g];
  R432: STAT6_p => SOCS1_g; 1;
  // V(433) = K(433,1) * [STAT6_p |SOCS1_g];
  R433: STAT6_p => SOCS1_g; 1;
  // V(434) = K(434,1) * [SOCS1_rna];
  R434: SOCS1_rna => ; 1;
  // V(435) = K(435,1) * [TGFB1] * [COL1A1_g] -K(435,2) * [TGFB1 |COL1A1_g];
  R435: TGFB1 => COL1A1_g; 1;
  // V(436) = K(436,1) * [TGFB1 |COL1A1_g];
  R436: TGFB1 => COL1A1_g; 1;
  // V(437) = K(437,1) * [COL1A1_rna];
  R437: COL1A1_rna => ; 1;
  // V(438) = K(438,1) * [ETS1] * [FOS_g] -K(438,2) * [ETS1 |FOS_g];
  R438: FOS_g => ETS1; 1;
  // V(439) = K(439,1) * [ETS1 |FOS_g];
  R439: FOS_g => ETS1; 1;
  // V(440) = K(440,1) * [FOS_rna];
  R440: FOS_rna => ; 1;
  // V(441) = K(441,1) * [EGR1] * [SIRT1] * [PPARG_g] -K(441,2) * [EGR1 |SIRT1 |PPARG_g];
  R441: EGR1 => SIRT1; 1;
  // V(442) = K(442,1) * [PPARG_g];
  R442: PPARG_g => ; 1;
  // V(443) = K(443,1) * [PPARG_rna];
  R443: PPARG_rna => ; 1;
  // V(444) = K(444,1) * [NR3C1_p] * [JUN_g] -K(444,2) * [NR3C1_p |JUN_g];
  R444: JUN_g => NR3C1_p; 1;
  // V(445) = K(445,1) * [JUN_g];
  R445: JUN_g => ; 1;
  // V(446) = K(446,1) * [JUN_rna];
  R446: JUN_rna => ; 1;
  // V(447) = K(447,1) * [HDAC4] * [CDH1_g] -K(447,2) * [HDAC4 |CDH1_g];
  R447: CDH1_g => HDAC4; 1;
  // V(448) = K(448,1) * [CDH1_g];
  R448: CDH1_g => ; 1;
  // V(449) = K(449,1) * [CDH1_rna];
  R449: CDH1_rna => ; 1;
  // V(450) = K(450,1) * [TP53_p] * [SLC2A1_g] -K(450,2) * [TP53_p |SLC2A1_g];
  R450: SLC2A1_g => TP53_p; 1;
  // V(451) = K(451,1) * [SLC2A1_g];
  R451: SLC2A1_g => ; 1;
  // V(452) = K(452,1) * [SLC2A1_rna];
  R452: SLC2A1_rna => ; 1;
  // V(453) = K(453,1) * [SGK1];
  R453: SGK1 => ; 1;
  // V(454) = K(454,1) * [SOCS3];
  R454: SOCS3 => ; 1;
  // V(455) = K(455,1) * [IKBKB];
  R455: IKBKB => ; 1;
  // V(456) = K(456,1) * [KDM6B];
  R456: KDM6B => ; 1;
  // V(457) = K(457,1) * [TLR3];
  R457: TLR3 => ; 1;
  // V(458) = K(458,1) * [SOCS1];
  R458: SOCS1 => ; 1;
  // V(459) = K(459,1) * [PROM1];
  R459: PROM1 => ; 1;
  // V(460) = K(460,1) * [JAK2];
  R460: JAK2 => ; 1;
  // V(461) = K(461,1) * [ROCK2];
  R461: ROCK2 => ; 1;
  // V(462) = K(462,1) * [ABCA1];
  R462: ABCA1 => ; 1;
  // V(463) = K(463,1) * [EGFR];
  R463: EGFR => ; 1;
  // V(464) = K(464,1) * [FOS];
  R464: FOS => ; 1;
  // V(465) = K(465,1) * [LDLR];
  R465: LDLR => ; 1;
  // V(466) = K(466,1) * [TGFA];
  R466: TGFA => ; 1;
  // V(467) = K(467,1) * [TGFB1];
  R467: TGFB1 => ; 1;
  // V(468) = K(468,1) * [COL1A1];
  R468: COL1A1 => ; 1;
  // V(469) = K(469,1) * [NR3C1];
  R469: NR3C1 => ; 1;
  // V(470) = K(470,1) * [TP53];
  R470: TP53 => ; 1;
  // V(471) = K(471,1) * [HMGN1];
  R471: HMGN1 => ; 1;
  // V(472) = K(472,1) * [JUN];
  R472: JUN => ; 1;
  // V(473) = K(473,1) * [INSR];
  R473: INSR => ; 1;
  // V(474) = K(474,1) * [SP1];
  R474: SP1 => ; 1;
  // V(475) = K(475,1) * [NR3C2];
  R475: NR3C2 => ; 1;
  // V(476) = K(476,1) * [IL6R];
  R476: IL6R => ; 1;
  // V(477) = K(477,1) * [FGF2];
  R477: FGF2 => ; 1;
  // V(478) = K(478,1) * [PARP1];
  R478: PARP1 => ; 1;
  // V(479) = K(479,1) * [GHR];
  R479: GHR => ; 1;
  // V(480) = K(480,1) * [IRF1];
  R480: IRF1 => ; 1;
  // V(481) = K(481,1) * [SLC2A1];
  R481: SLC2A1 => ; 1;
  // V(482) = K(482,1) * [CDH1];
  R482: CDH1 => ; 1;
  // V(483) = K(483,1) * [SRC];
  R483: SRC => ; 1;
  // V(484) = K(484,1) * [PKM];
  R484: PKM => ; 1;
  // V(485) = K(485,1) * [ETS1];
  R485: ETS1 => ; 1;
  // V(486) = K(486,1) * [CREB1];
  R486: CREB1 => ; 1;
  // V(487) = K(487,1) * [ENG];
  R487: ENG => ; 1;
  // V(488) = K(488,1) * [EGR1];
  R488: EGR1 => ; 1;
  // V(489) = K(489,1) * [ATF3];
  R489: ATF3 => ; 1;
  // V(490) = K(490,1) * [EPOR];
  R490: EPOR => ; 1;
  // V(491) = K(491,1) * [NR4A1];
  R491: NR4A1 => ; 1;
  // V(492) = K(492,1) * [RPS6KB1];
  R492: RPS6KB1 => ; 1;
  // V(493) = K(493,1) * [JAK1];
  R493: JAK1 => ; 1;
  // V(494) = K(494,1) * [FAS];
  R494: FAS => ; 1;
  // V(495) = K(495,1) * [ZFP36];
  R495: ZFP36 => ; 1;
  // V(496) = K(496,1) * [PIK3R1];
  R496: PIK3R1 => ; 1;
  // V(497) = K(497,1) * [MAPK1];
  R497: MAPK1 => ; 1;
  // V(498) = K(498,1) * [DUSP1];
  R498: DUSP1 => ; 1;
  // V(499) = K(499,1) * [PTPN6];
  R499: PTPN6 => ; 1;
  // V(500) = K(500,1) * [PRDX6];
  R500: PRDX6 => ; 1;
  // V(501) = K(501,1) * [AKT1];
  R501: AKT1 => ; 1;
  // V(502) = K(502,1) * [CTNNB1];
  R502: CTNNB1 => ; 1;
  // V(503) = K(503,1) * [DDIT3];
  R503: DDIT3 => ; 1;
  // V(504) = K(504,1) * [TRIM23];
  R504: TRIM23 => ; 1;
  // V(505) = K(505,1) * [PPARG];
  R505: PPARG => ; 1;
  // V(506) = K(506,1) * [CDKN1A];
  R506: CDKN1A => ; 1;
  // V(507) = K(507,1) * [STAT1];
  R507: STAT1 => ; 1;
  // V(508) = K(508,1) * [STAT6];
  R508: STAT6 => ; 1;
  // V(509) = K(509,1) * [PIK3CA];
  R509: PIK3CA => ; 1;
  // V(510) = K(510,1) * [MAPK9];
  R510: MAPK9 => ; 1;
  // V(511) = K(511,1) * [CDKN1B];
  R511: CDKN1B => ; 1;
  // V(512) = K(512,1) * [NOTCH1];
  R512: NOTCH1 => ; 1;
  // V(513) = K(513,1) * [YAP1];
  R513: YAP1 => ; 1;
  // V(514) = K(514,1) * [LEPR];
  R514: LEPR => ; 1;
  // V(515) = K(515,1) * [NUMB];
  R515: NUMB => ; 1;
  // V(516) = K(516,1) * [TSC2];
  R516: TSC2 => ; 1;
  // V(517) = K(517,1) * [RPS6KA3];
  R517: RPS6KA3 => ; 1;
  // V(518) = K(518,1) * [RCAN1];
  R518: RCAN1 => ; 1;
  // V(519) = K(519,1) * [CASP9];
  R519: CASP9 => ; 1;
  // V(520) = K(520,1) * [HDAC4];
  R520: HDAC4 => ; 1;
  // V(521) = K(521,1) * [WNT4];
  R521: WNT4 => ; 1;
  // V(522) = K(522,1) * [PTEN];
  R522: PTEN => ; 1;
  // V(523) = K(523,1) * [SMAD3];
  R523: SMAD3 => ; 1;
  // V(524) = K(524,1) * [VLDLR];
  R524: VLDLR => ; 1;
  // V(525) = K(525,1) * [CLTC];
  R525: CLTC => ; 1;
  // V(526) = K(526,1) * [NFKB2];
  R526: NFKB2 => ; 1;
  // V(527) = K(527,1) * [MDM2];
  R527: MDM2 => ; 1;
  // V(528) = K(528,1) * [EP300];
  R528: EP300 => ; 1;
  // V(529) = K(529,1) * [FOXO1];
  R529: FOXO1 => ; 1;
  // V(530) = K(530,1) * [STK4];
  R530: STK4 => ; 1;
  // V(531) = K(531,1) * [PRKAA1];
  R531: PRKAA1 => ; 1;
  // V(532) = K(532,1) * [ROCK1];
  R532: ROCK1 => ; 1;
  // V(533) = K(533,1) * [SMAD4];
  R533: SMAD4 => ; 1;
  // V(534) = K(534,1) * [ATR];
  R534: ATR => ; 1;
  // V(535) = K(535,1) * [RAPGEF1];
  R535: RAPGEF1 => ; 1;
  // V(536) = K(536,1) * [SMAD2];
  R536: SMAD2 => ; 1;
  // V(537) = K(537,1) * [SMAD1];
  R537: SMAD1 => ; 1;
  // V(538) = K(538,1) * [PKN1];
  R538: PKN1 => ; 1;
  // V(539) = K(539,1) * [HIF1A];
  R539: HIF1A => ; 1;
  // V(540) = K(540,1) * [RICTOR];
  R540: RICTOR => ; 1;
  // V(541) = K(541,1) * [SIRT2];
  R541: SIRT2 => ; 1;
  // V(542) = K(542,1) * [PIK3C3];
  R542: PIK3C3 => ; 1;
  // V(543) = K(543,1) * [DEPTOR];
  R543: DEPTOR => ; 1;
  // V(544) = K(544,1) * [NRG4];
  R544: NRG4 => ; 1;
  // V(545) = K(545,1) * [MYLIP];
  R545: MYLIP => ; 1;
  // V(546) = K(546,1) * [SIRT1];
  R546: SIRT1 => ; 1;
  // V(547) = K(547,1) * [PANX1];
  R547: PANX1 => ; 1;
  // V(548) = K(548,1) * [PARK7];
  R548: PARK7 => ; 1;
  // V(549) = K(549,1) * [MAP3K5];
  R549: MAP3K5 => ; 1;
  // V(550) = K(550,1) * [GDF15];
  R550: GDF15 => ; 1;
  // V(551) = K(551,1) * [HIPK2];
  R551: HIPK2 => ; 1;
  // V(552) = K(552,1) * [TXNIP];
  R552: TXNIP => ; 1;
  // V(553) = K(553,1) * [SIRT7];
  R553: SIRT7 => ; 1;
  // V(554) = K(554,1) * [PLK2];
  R554: PLK2 => ; 1;
  // V(555) = K(555,1) * [EIF2AK3];
  R555: EIF2AK3 => ; 1;
  // V(556) = K(556,1) * [RNF7];
  R556: RNF7 => ; 1;
  // V(557) = K(557,1) * [IRS2];
  R557: IRS2 => ; 1;
  // V(558) = K(558,1) * [SOCS3_rna];
  R558: SOCS3_rna => ; 1;
  // V(559) = K(559,1) * [KDM6B_rna];
  R559: KDM6B_rna => ; 1;
  // V(560) = K(560,1) * [SOCS1_rna];
  R560: SOCS1_rna => ; 1;
  // V(561) = K(561,1) * [FOS_rna];
  R561: FOS_rna => ; 1;
  // V(562) = K(562,1) * [TGFB1_rna];
  R562: TGFB1_rna => ; 1;
  // V(563) = K(563,1) * [COL1A1_rna];
  R563: COL1A1_rna => ; 1;
  // V(564) = K(564,1) * [JUN_rna];
  R564: JUN_rna => ; 1;
  // V(565) = K(565,1) * [SLC2A1_rna];
  R565: SLC2A1_rna => ; 1;
  // V(566) = K(566,1) * [CDH1_rna];
  R566: CDH1_rna => ; 1;
  // V(567) = K(567,1) * [FAS_rna];
  R567: FAS_rna => ; 1;
  // V(568) = K(568,1) * [PPARG_rna];
  R568: PPARG_rna => ; 1;
  // V(569) = K(569,1) * [CDKN1A_rna];
  R569: CDKN1A_rna => ; 1;
  // V(570) = K(570,1) * [CDKN1B_rna];
  R570: CDKN1B_rna => ; 1;
  // V(571) = K(571,1) * [GDF15_rna];
  R571: GDF15_rna => ; 1;
  // V(572) = K(572,1) * [IRS2_rna];
  R572: IRS2_rna => ; 1;
  // V(573) = K(573,1) * [SGK1_g];
  R573: SGK1_g => ; 1;
  // V(574) = K(574,1) * [SGK1_rna];
  R574: SGK1_rna => ; 1;
  // V(575) = K(575,1) * [IKBKB_g];
  R575: IKBKB_g => ; 1;
  // V(576) = K(576,1) * [IKBKB_rna];
  R576: IKBKB_rna => ; 1;
  // V(577) = K(577,1) * [TLR3_g];
  R577: TLR3_g => ; 1;
  // V(578) = K(578,1) * [TLR3_rna];
  R578: TLR3_rna => ; 1;
  // V(579) = K(579,1) * [PROM1_g];
  R579: PROM1_g => ; 1;
  // V(580) = K(580,1) * [PROM1_rna];
  R580: PROM1_rna => ; 1;
  // V(581) = K(581,1) * [JAK2_g];
  R581: JAK2_g => ; 1;
  // V(582) = K(582,1) * [JAK2_rna];
  R582: JAK2_rna => ; 1;
  // V(583) = K(583,1) * [ROCK2_g];
  R583: ROCK2_g => ; 1;
  // V(584) = K(584,1) * [ROCK2_rna];
  R584: ROCK2_rna => ; 1;
  // V(585) = K(585,1) * [ABCA1_g];
  R585: ABCA1_g => ; 1;
  // V(586) = K(586,1) * [ABCA1_rna];
  R586: ABCA1_rna => ; 1;
  // V(587) = K(587,1) * [EGFR_g];
  R587: EGFR_g => ; 1;
  // V(588) = K(588,1) * [EGFR_rna];
  R588: EGFR_rna => ; 1;
  // V(589) = K(589,1) * [LDLR_g];
  R589: LDLR_g => ; 1;
  // V(590) = K(590,1) * [LDLR_rna];
  R590: LDLR_rna => ; 1;
  // V(591) = K(591,1) * [TGFA_g];
  R591: TGFA_g => ; 1;
  // V(592) = K(592,1) * [TGFA_rna];
  R592: TGFA_rna => ; 1;
  // V(593) = K(593,1) * [NR3C1_g];
  R593: NR3C1_g => ; 1;
  // V(594) = K(594,1) * [NR3C1_rna];
  R594: NR3C1_rna => ; 1;
  // V(595) = K(595,1) * [TP53_g];
  R595: TP53_g => ; 1;
  // V(596) = K(596,1) * [TP53_rna];
  R596: TP53_rna => ; 1;
  // V(597) = K(597,1) * [HMGN1_g];
  R597: HMGN1_g => ; 1;
  // V(598) = K(598,1) * [HMGN1_rna];
  R598: HMGN1_rna => ; 1;
  // V(599) = K(599,1) * [INSR_g];
  R599: INSR_g => ; 1;
  // V(600) = K(600,1) * [INSR_rna];
  R600: INSR_rna => ; 1;
  // V(601) = K(601,1) * [SP1_g];
  R601: SP1_g => ; 1;
  // V(602) = K(602,1) * [SP1_rna];
  R602: SP1_rna => ; 1;
  // V(603) = K(603,1) * [NR3C2_g];
  R603: NR3C2_g => ; 1;
  // V(604) = K(604,1) * [NR3C2_rna];
  R604: NR3C2_rna => ; 1;
  // V(605) = K(605,1) * [IL6R_g];
  R605: IL6R_g => ; 1;
  // V(606) = K(606,1) * [IL6R_rna];
  R606: IL6R_rna => ; 1;
  // V(607) = K(607,1) * [FGF2_g];
  R607: FGF2_g => ; 1;
  // V(608) = K(608,1) * [FGF2_rna];
  R608: FGF2_rna => ; 1;
  // V(609) = K(609,1) * [PARP1_g];
  R609: PARP1_g => ; 1;
  // V(610) = K(610,1) * [PARP1_rna];
  R610: PARP1_rna => ; 1;
  // V(611) = K(611,1) * [GHR_g];
  R611: GHR_g => ; 1;
  // V(612) = K(612,1) * [GHR_rna];
  R612: GHR_rna => ; 1;
  // V(613) = K(613,1) * [IRF1_g];
  R613: IRF1_g => ; 1;
  // V(614) = K(614,1) * [IRF1_rna];
  R614: IRF1_rna => ; 1;
  // V(615) = K(615,1) * [SRC_g];
  R615: SRC_g => ; 1;
  // V(616) = K(616,1) * [SRC_rna];
  R616: SRC_rna => ; 1;
  // V(617) = K(617,1) * [PKM_g];
  R617: PKM_g => ; 1;
  // V(618) = K(618,1) * [PKM_rna];
  R618: PKM_rna => ; 1;
  // V(619) = K(619,1) * [ETS1_g];
  R619: ETS1_g => ; 1;
  // V(620) = K(620,1) * [ETS1_rna];
  R620: ETS1_rna => ; 1;
  // V(621) = K(621,1) * [CREB1_g];
  R621: CREB1_g => ; 1;
  // V(622) = K(622,1) * [CREB1_rna];
  R622: CREB1_rna => ; 1;
  // V(623) = K(623,1) * [ENG_g];
  R623: ENG_g => ; 1;
  // V(624) = K(624,1) * [ENG_rna];
  R624: ENG_rna => ; 1;
  // V(625) = K(625,1) * [EGR1_g];
  R625: EGR1_g => ; 1;
  // V(626) = K(626,1) * [EGR1_rna];
  R626: EGR1_rna => ; 1;
  // V(627) = K(627,1) * [ATF3_g];
  R627: ATF3_g => ; 1;
  // V(628) = K(628,1) * [ATF3_rna];
  R628: ATF3_rna => ; 1;
  // V(629) = K(629,1) * [EPOR_g];
  R629: EPOR_g => ; 1;
  // V(630) = K(630,1) * [EPOR_rna];
  R630: EPOR_rna => ; 1;
  // V(631) = K(631,1) * [NR4A1_g];
  R631: NR4A1_g => ; 1;
  // V(632) = K(632,1) * [NR4A1_rna];
  R632: NR4A1_rna => ; 1;
  // V(633) = K(633,1) * [RPS6KB1_g];
  R633: RPS6KB1_g => ; 1;
  // V(634) = K(634,1) * [RPS6KB1_rna];
  R634: RPS6KB1_rna => ; 1;
  // V(635) = K(635,1) * [JAK1_g];
  R635: JAK1_g => ; 1;
  // V(636) = K(636,1) * [JAK1_rna];
  R636: JAK1_rna => ; 1;
  // V(637) = K(637,1) * [ZFP36_g];
  R637: ZFP36_g => ; 1;
  // V(638) = K(638,1) * [ZFP36_rna];
  R638: ZFP36_rna => ; 1;
  // V(639) = K(639,1) * [PIK3R1_g];
  R639: PIK3R1_g => ; 1;
  // V(640) = K(640,1) * [PIK3R1_rna];
  R640: PIK3R1_rna => ; 1;
  // V(641) = K(641,1) * [MAPK1_g];
  R641: MAPK1_g => ; 1;
  // V(642) = K(642,1) * [MAPK1_rna];
  R642: MAPK1_rna => ; 1;
  // V(643) = K(643,1) * [DUSP1_g];
  R643: DUSP1_g => ; 1;
  // V(644) = K(644,1) * [DUSP1_rna];
  R644: DUSP1_rna => ; 1;
  // V(645) = K(645,1) * [PTPN6_g];
  R645: PTPN6_g => ; 1;
  // V(646) = K(646,1) * [PTPN6_rna];
  R646: PTPN6_rna => ; 1;
  // V(647) = K(647,1) * [PRDX6_g];
  R647: PRDX6_g => ; 1;
  // V(648) = K(648,1) * [PRDX6_rna];
  R648: PRDX6_rna => ; 1;
  // V(649) = K(649,1) * [AKT1_g];
  R649: AKT1_g => ; 1;
  // V(650) = K(650,1) * [AKT1_rna];
  R650: AKT1_rna => ; 1;
  // V(651) = K(651,1) * [CTNNB1_g];
  R651: CTNNB1_g => ; 1;
  // V(652) = K(652,1) * [CTNNB1_rna];
  R652: CTNNB1_rna => ; 1;
  // V(653) = K(653,1) * [DDIT3_g];
  R653: DDIT3_g => ; 1;
  // V(654) = K(654,1) * [DDIT3_rna];
  R654: DDIT3_rna => ; 1;
  // V(655) = K(655,1) * [TRIM23_g];
  R655: TRIM23_g => ; 1;
  // V(656) = K(656,1) * [TRIM23_rna];
  R656: TRIM23_rna => ; 1;
  // V(657) = K(657,1) * [STAT1_g];
  R657: STAT1_g => ; 1;
  // V(658) = K(658,1) * [STAT1_rna];
  R658: STAT1_rna => ; 1;
  // V(659) = K(659,1) * [STAT6_g];
  R659: STAT6_g => ; 1;
  // V(660) = K(660,1) * [STAT6_rna];
  R660: STAT6_rna => ; 1;
  // V(661) = K(661,1) * [PIK3CA_g];
  R661: PIK3CA_g => ; 1;
  // V(662) = K(662,1) * [PIK3CA_rna];
  R662: PIK3CA_rna => ; 1;
  // V(663) = K(663,1) * [MAPK9_g];
  R663: MAPK9_g => ; 1;
  // V(664) = K(664,1) * [MAPK9_rna];
  R664: MAPK9_rna => ; 1;
  // V(665) = K(665,1) * [NOTCH1_g];
  R665: NOTCH1_g => ; 1;
  // V(666) = K(666,1) * [NOTCH1_rna];
  R666: NOTCH1_rna => ; 1;
  // V(667) = K(667,1) * [YAP1_g];
  R667: YAP1_g => ; 1;
  // V(668) = K(668,1) * [YAP1_rna];
  R668: YAP1_rna => ; 1;
  // V(669) = K(669,1) * [LEPR_g];
  R669: LEPR_g => ; 1;
  // V(670) = K(670,1) * [LEPR_rna];
  R670: LEPR_rna => ; 1;
  // V(671) = K(671,1) * [NUMB_g];
  R671: NUMB_g => ; 1;
  // V(672) = K(672,1) * [NUMB_rna];
  R672: NUMB_rna => ; 1;
  // V(673) = K(673,1) * [TSC2_g];
  R673: TSC2_g => ; 1;
  // V(674) = K(674,1) * [TSC2_rna];
  R674: TSC2_rna => ; 1;
  // V(675) = K(675,1) * [RPS6KA3_g];
  R675: RPS6KA3_g => ; 1;
  // V(676) = K(676,1) * [RPS6KA3_rna];
  R676: RPS6KA3_rna => ; 1;
  // V(677) = K(677,1) * [RCAN1_g];
  R677: RCAN1_g => ; 1;
  // V(678) = K(678,1) * [RCAN1_rna];
  R678: RCAN1_rna => ; 1;
  // V(679) = K(679,1) * [CASP9_g];
  R679: CASP9_g => ; 1;
  // V(680) = K(680,1) * [CASP9_rna];
  R680: CASP9_rna => ; 1;
  // V(681) = K(681,1) * [HDAC4_g];
  R681: HDAC4_g => ; 1;
  // V(682) = K(682,1) * [HDAC4_rna];
  R682: HDAC4_rna => ; 1;
  // V(683) = K(683,1) * [WNT4_g];
  R683: WNT4_g => ; 1;
  // V(684) = K(684,1) * [WNT4_rna];
  R684: WNT4_rna => ; 1;
  // V(685) = K(685,1) * [PTEN_g];
  R685: PTEN_g => ; 1;
  // V(686) = K(686,1) * [PTEN_rna];
  R686: PTEN_rna => ; 1;
  // V(687) = K(687,1) * [SMAD3_g];
  R687: SMAD3_g => ; 1;
  // V(688) = K(688,1) * [SMAD3_rna];
  R688: SMAD3_rna => ; 1;
  // V(689) = K(689,1) * [VLDLR_g];
  R689: VLDLR_g => ; 1;
  // V(690) = K(690,1) * [VLDLR_rna];
  R690: VLDLR_rna => ; 1;
  // V(691) = K(691,1) * [CLTC_g];
  R691: CLTC_g => ; 1;
  // V(692) = K(692,1) * [CLTC_rna];
  R692: CLTC_rna => ; 1;
  // V(693) = K(693,1) * [NFKB2_g];
  R693: NFKB2_g => ; 1;
  // V(694) = K(694,1) * [NFKB2_rna];
  R694: NFKB2_rna => ; 1;
  // V(695) = K(695,1) * [MDM2_g];
  R695: MDM2_g => ; 1;
  // V(696) = K(696,1) * [MDM2_rna];
  R696: MDM2_rna => ; 1;
  // V(697) = K(697,1) * [EP300_g];
  R697: EP300_g => ; 1;
  // V(698) = K(698,1) * [EP300_rna];
  R698: EP300_rna => ; 1;
  // V(699) = K(699,1) * [FOXO1_g];
  R699: FOXO1_g => ; 1;
  // V(700) = K(700,1) * [FOXO1_rna];
  R700: FOXO1_rna => ; 1;
  // V(701) = K(701,1) * [STK4_g];
  R701: STK4_g => ; 1;
  // V(702) = K(702,1) * [STK4_rna];
  R702: STK4_rna => ; 1;
  // V(703) = K(703,1) * [PRKAA1_g];
  R703: PRKAA1_g => ; 1;
  // V(704) = K(704,1) * [PRKAA1_rna];
  R704: PRKAA1_rna => ; 1;
  // V(705) = K(705,1) * [ROCK1_g];
  R705: ROCK1_g => ; 1;
  // V(706) = K(706,1) * [ROCK1_rna];
  R706: ROCK1_rna => ; 1;
  // V(707) = K(707,1) * [SMAD4_g];
  R707: SMAD4_g => ; 1;
  // V(708) = K(708,1) * [SMAD4_rna];
  R708: SMAD4_rna => ; 1;
  // V(709) = K(709,1) * [ATR_g];
  R709: ATR_g => ; 1;
  // V(710) = K(710,1) * [ATR_rna];
  R710: ATR_rna => ; 1;
  // V(711) = K(711,1) * [RAPGEF1_g];
  R711: RAPGEF1_g => ; 1;
  // V(712) = K(712,1) * [RAPGEF1_rna];
  R712: RAPGEF1_rna => ; 1;
  // V(713) = K(713,1) * [SMAD2_g];
  R713: SMAD2_g => ; 1;
  // V(714) = K(714,1) * [SMAD2_rna];
  R714: SMAD2_rna => ; 1;
  // V(715) = K(715,1) * [SMAD1_g];
  R715: SMAD1_g => ; 1;
  // V(716) = K(716,1) * [SMAD1_rna];
  R716: SMAD1_rna => ; 1;
  // V(717) = K(717,1) * [PKN1_g];
  R717: PKN1_g => ; 1;
  // V(718) = K(718,1) * [PKN1_rna];
  R718: PKN1_rna => ; 1;
  // V(719) = K(719,1) * [HIF1A_g];
  R719: HIF1A_g => ; 1;
  // V(720) = K(720,1) * [HIF1A_rna];
  R720: HIF1A_rna => ; 1;
  // V(721) = K(721,1) * [RICTOR_g];
  R721: RICTOR_g => ; 1;
  // V(722) = K(722,1) * [RICTOR_rna];
  R722: RICTOR_rna => ; 1;
  // V(723) = K(723,1) * [SIRT2_g];
  R723: SIRT2_g => ; 1;
  // V(724) = K(724,1) * [SIRT2_rna];
  R724: SIRT2_rna => ; 1;
  // V(725) = K(725,1) * [PIK3C3_g];
  R725: PIK3C3_g => ; 1;
  // V(726) = K(726,1) * [PIK3C3_rna];
  R726: PIK3C3_rna => ; 1;
  // V(727) = K(727,1) * [DEPTOR_g];
  R727: DEPTOR_g => ; 1;
  // V(728) = K(728,1) * [DEPTOR_rna];
  R728: DEPTOR_rna => ; 1;
  // V(729) = K(729,1) * [NRG4_g];
  R729: NRG4_g => ; 1;
  // V(730) = K(730,1) * [NRG4_rna];
  R730: NRG4_rna => ; 1;
  // V(731) = K(731,1) * [MYLIP_g];
  R731: MYLIP_g => ; 1;
  // V(732) = K(732,1) * [MYLIP_rna];
  R732: MYLIP_rna => ; 1;
  // V(733) = K(733,1) * [SIRT1_g];
  R733: SIRT1_g => ; 1;
  // V(734) = K(734,1) * [SIRT1_rna];
  R734: SIRT1_rna => ; 1;
  // V(735) = K(735,1) * [PANX1_g];
  R735: PANX1_g => ; 1;
  // V(736) = K(736,1) * [PANX1_rna];
  R736: PANX1_rna => ; 1;
  // V(737) = K(737,1) * [PARK7_g];
  R737: PARK7_g => ; 1;
  // V(738) = K(738,1) * [PARK7_rna];
  R738: PARK7_rna => ; 1;
  // V(739) = K(739,1) * [MAP3K5_g];
  R739: MAP3K5_g => ; 1;
  // V(740) = K(740,1) * [MAP3K5_rna];
  R740: MAP3K5_rna => ; 1;
  // V(741) = K(741,1) * [HIPK2_g];
  R741: HIPK2_g => ; 1;
  // V(742) = K(742,1) * [HIPK2_rna];
  R742: HIPK2_rna => ; 1;
  // V(743) = K(743,1) * [TXNIP_g];
  R743: TXNIP_g => ; 1;
  // V(744) = K(744,1) * [TXNIP_rna];
  R744: TXNIP_rna => ; 1;
  // V(745) = K(745,1) * [SIRT7_g];
  R745: SIRT7_g => ; 1;
  // V(746) = K(746,1) * [SIRT7_rna];
  R746: SIRT7_rna => ; 1;
  // V(747) = K(747,1) * [PLK2_g];
  R747: PLK2_g => ; 1;
  // V(748) = K(748,1) * [PLK2_rna];
  R748: PLK2_rna => ; 1;
  // V(749) = K(749,1) * [EIF2AK3_g];
  R749: EIF2AK3_g => ; 1;
  // V(750) = K(750,1) * [EIF2AK3_rna];
  R750: EIF2AK3_rna => ; 1;
  // V(751) = K(751,1) * [RNF7_g];
  R751: RNF7_g => ; 1;
  // V(752) = K(752,1) * [RNF7_rna];
  R752: RNF7_rna => ; 1;
  // V(753) = K(753,1) * [IKBKB_p];
  R753: IKBKB_p => ; 1;
  // V(754) = K(754,1) * [TLR3_p];
  R754: TLR3_p => ; 1;
  // V(755) = K(755,1) * [SOCS1_p];
  R755: SOCS1_p => ; 1;
  // V(756) = K(756,1) * [PROM1_p];
  R756: PROM1_p => ; 1;
  // V(757) = K(757,1) * [JAK2_p];
  R757: JAK2_p => ; 1;
  // V(758) = K(758,1) * [ABCA1_p];
  R758: ABCA1_p => ; 1;
  // V(759) = K(759,1) * [EGFR_p];
  R759: EGFR_p => ; 1;
  // V(760) = K(760,1) * [FOS_p];
  R760: FOS_p => ; 1;
  // V(761) = K(761,1) * [NR3C1_p];
  R761: NR3C1_p => ; 1;
  // V(762) = K(762,1) * [TP53_p];
  R762: TP53_p => ; 1;
  // V(763) = K(763,1) * [HMGN1_p];
  R763: HMGN1_p => ; 1;
  // V(764) = K(764,1) * [JUN_p];
  R764: JUN_p => ; 1;
  // V(765) = K(765,1) * [INSR_p];
  R765: INSR_p => ; 1;
  // V(766) = K(766,1) * [SP1_p];
  R766: SP1_p => ; 1;
  // V(767) = K(767,1) * [NR3C2_p];
  R767: NR3C2_p => ; 1;
  // V(768) = K(768,1) * [PARP1_p];
  R768: PARP1_p => ; 1;
  // V(769) = K(769,1) * [GHR_p];
  R769: GHR_p => ; 1;
  // V(770) = K(770,1) * [CDH1_p];
  R770: CDH1_p => ; 1;
  // V(771) = K(771,1) * [SRC_p];
  R771: SRC_p => ; 1;
  // V(772) = K(772,1) * [PKM_p];
  R772: PKM_p => ; 1;
  // V(773) = K(773,1) * [CREB1_p];
  R773: CREB1_p => ; 1;
  // V(774) = K(774,1) * [ENG_p];
  R774: ENG_p => ; 1;
  // V(775) = K(775,1) * [EPOR_p];
  R775: EPOR_p => ; 1;
  // V(776) = K(776,1) * [NR4A1_p];
  R776: NR4A1_p => ; 1;
  // V(777) = K(777,1) * [RPS6KB1_p];
  R777: RPS6KB1_p => ; 1;
  // V(778) = K(778,1) * [JAK1_p];
  R778: JAK1_p => ; 1;
  // V(779) = K(779,1) * [ZFP36_p];
  R779: ZFP36_p => ; 1;
  // V(780) = K(780,1) * [PIK3R1_p];
  R780: PIK3R1_p => ; 1;
  // V(781) = K(781,1) * [MAPK1_p];
  R781: MAPK1_p => ; 1;
  // V(782) = K(782,1) * [DUSP1_p];
  R782: DUSP1_p => ; 1;
  // V(783) = K(783,1) * [PTPN6_p];
  R783: PTPN6_p => ; 1;
  // V(784) = K(784,1) * [PRDX6_p];
  R784: PRDX6_p => ; 1;
  // V(785) = K(785,1) * [AKT1_p];
  R785: AKT1_p => ; 1;
  // V(786) = K(786,1) * [CTNNB1_p];
  R786: CTNNB1_p => ; 1;
  // V(787) = K(787,1) * [DDIT3_p];
  R787: DDIT3_p => ; 1;
  // V(788) = K(788,1) * [TRIM23_p];
  R788: TRIM23_p => ; 1;
  // V(789) = K(789,1) * [PPARG_p];
  R789: PPARG_p => ; 1;
  // V(790) = K(790,1) * [CDKN1A_p];
  R790: CDKN1A_p => ; 1;
  // V(791) = K(791,1) * [STAT1_p];
  R791: STAT1_p => ; 1;
  // V(792) = K(792,1) * [STAT6_p];
  R792: STAT6_p => ; 1;
  // V(793) = K(793,1) * [PIK3CA_p];
  R793: PIK3CA_p => ; 1;
  // V(794) = K(794,1) * [MAPK9_p];
  R794: MAPK9_p => ; 1;
  // V(795) = K(795,1) * [CDKN1B_p];
  R795: CDKN1B_p => ; 1;
  // V(796) = K(796,1) * [YAP1_p];
  R796: YAP1_p => ; 1;
  // V(797) = K(797,1) * [LEPR_p];
  R797: LEPR_p => ; 1;
  // V(798) = K(798,1) * [TSC2_p];
  R798: TSC2_p => ; 1;
  // V(799) = K(799,1) * [RPS6KA3_p];
  R799: RPS6KA3_p => ; 1;
  // V(800) = K(800,1) * [RCAN1_p];
  R800: RCAN1_p => ; 1;
  // V(801) = K(801,1) * [CASP9_p];
  R801: CASP9_p => ; 1;
  // V(802) = K(802,1) * [HDAC4_p];
  R802: HDAC4_p => ; 1;
  // V(803) = K(803,1) * [PTEN_p];
  R803: PTEN_p => ; 1;
  // V(804) = K(804,1) * [SMAD3_p];
  R804: SMAD3_p => ; 1;
  // V(805) = K(805,1) * [CLTC_p];
  R805: CLTC_p => ; 1;
  // V(806) = K(806,1) * [MDM2_p];
  R806: MDM2_p => ; 1;
  // V(807) = K(807,1) * [EP300_p];
  R807: EP300_p => ; 1;
  // V(808) = K(808,1) * [FOXO1_p];
  R808: FOXO1_p => ; 1;
  // V(809) = K(809,1) * [STK4_p];
  R809: STK4_p => ; 1;
  // V(810) = K(810,1) * [PRKAA1_p];
  R810: PRKAA1_p => ; 1;
  // V(811) = K(811,1) * [SMAD4_p];
  R811: SMAD4_p => ; 1;
  // V(812) = K(812,1) * [RAPGEF1_p];
  R812: RAPGEF1_p => ; 1;
  // V(813) = K(813,1) * [SMAD2_p];
  R813: SMAD2_p => ; 1;
  // V(814) = K(814,1) * [SMAD1_p];
  R814: SMAD1_p => ; 1;
  // V(815) = K(815,1) * [PKN1_p];
  R815: PKN1_p => ; 1;
  // V(816) = K(816,1) * [HIF1A_p];
  R816: HIF1A_p => ; 1;
  // V(817) = K(817,1) * [RICTOR_p];
  R817: RICTOR_p => ; 1;
  // V(818) = K(818,1) * [SIRT2_p];
  R818: SIRT2_p => ; 1;
  // V(819) = K(819,1) * [PIK3C3_p];
  R819: PIK3C3_p => ; 1;
  // V(820) = K(820,1) * [DEPTOR_p];
  R820: DEPTOR_p => ; 1;
  // V(821) = K(821,1) * [SIRT1_p];
  R821: SIRT1_p => ; 1;
  // V(822) = K(822,1) * [PANX1_p];
  R822: PANX1_p => ; 1;
  // V(823) = K(823,1) * [PARK7_p];
  R823: PARK7_p => ; 1;
  // V(824) = K(824,1) * [MAP3K5_p];
  R824: MAP3K5_p => ; 1;
  // V(825) = K(825,1) * [HIPK2_p];
  R825: HIPK2_p => ; 1;
  // V(826) = K(826,1) * [TXNIP_p];
  R826: TXNIP_p => ; 1;
  // V(827) = K(827,1) * [SIRT7_p];
  R827: SIRT7_p => ; 1;
  // V(828) = K(828,1) * [EIF2AK3_p];
  R828: EIF2AK3_p => ; 1;
  // V(829) = K(829,1) * [IRS2_p];
  R829: IRS2_p => ; 1;
  // V(830) = K(830,1) * [SIGNOR-C154_p];
  R830: => ; 1;
  // V(831) = K(831,1) * [SIGNOR-C156_p];
  R831: => ; 1;
  // V(832) = K(832,1) * [SGK1_rna];
  R832: SGK1_rna => ; 1;
  // V(833) = K(833,1) * [IKBKB_rna];
  R833: IKBKB_rna => ; 1;
  // V(834) = K(834,1) * [TLR3_rna];
  R834: TLR3_rna => ; 1;
  // V(835) = K(835,1) * [PROM1_rna];
  R835: PROM1_rna => ; 1;
  // V(836) = K(836,1) * [JAK2_rna];
  R836: JAK2_rna => ; 1;
  // V(837) = K(837,1) * [ROCK2_rna];
  R837: ROCK2_rna => ; 1;
  // V(838) = K(838,1) * [ABCA1_rna];
  R838: ABCA1_rna => ; 1;
  // V(839) = K(839,1) * [EGFR_rna];
  R839: EGFR_rna => ; 1;
  // V(840) = K(840,1) * [LDLR_rna];
  R840: LDLR_rna => ; 1;
  // V(841) = K(841,1) * [TGFA_rna];
  R841: TGFA_rna => ; 1;
  // V(842) = K(842,1) * [NR3C1_rna];
  R842: NR3C1_rna => ; 1;
  // V(843) = K(843,1) * [TP53_rna];
  R843: TP53_rna => ; 1;
  // V(844) = K(844,1) * [HMGN1_rna];
  R844: HMGN1_rna => ; 1;
  // V(845) = K(845,1) * [INSR_rna];
  R845: INSR_rna => ; 1;
  // V(846) = K(846,1) * [SP1_rna];
  R846: SP1_rna => ; 1;
  // V(847) = K(847,1) * [NR3C2_rna];
  R847: NR3C2_rna => ; 1;
  // V(848) = K(848,1) * [IL6R_rna];
  R848: IL6R_rna => ; 1;
  // V(849) = K(849,1) * [FGF2_rna];
  R849: FGF2_rna => ; 1;
  // V(850) = K(850,1) * [PARP1_rna];
  R850: PARP1_rna => ; 1;
  // V(851) = K(851,1) * [GHR_rna];
  R851: GHR_rna => ; 1;
  // V(852) = K(852,1) * [IRF1_rna];
  R852: IRF1_rna => ; 1;
  // V(853) = K(853,1) * [SRC_rna];
  R853: SRC_rna => ; 1;
  // V(854) = K(854,1) * [PKM_rna];
  R854: PKM_rna => ; 1;
  // V(855) = K(855,1) * [ETS1_rna];
  R855: ETS1_rna => ; 1;
  // V(856) = K(856,1) * [CREB1_rna];
  R856: CREB1_rna => ; 1;
  // V(857) = K(857,1) * [ENG_rna];
  R857: ENG_rna => ; 1;
  // V(858) = K(858,1) * [EGR1_rna];
  R858: EGR1_rna => ; 1;
  // V(859) = K(859,1) * [ATF3_rna];
  R859: ATF3_rna => ; 1;
  // V(860) = K(860,1) * [EPOR_rna];
  R860: EPOR_rna => ; 1;
  // V(861) = K(861,1) * [NR4A1_rna];
  R861: NR4A1_rna => ; 1;
  // V(862) = K(862,1) * [RPS6KB1_rna];
  R862: RPS6KB1_rna => ; 1;
  // V(863) = K(863,1) * [JAK1_rna];
  R863: JAK1_rna => ; 1;
  // V(864) = K(864,1) * [ZFP36_rna];
  R864: ZFP36_rna => ; 1;
  // V(865) = K(865,1) * [PIK3R1_rna];
  R865: PIK3R1_rna => ; 1;
  // V(866) = K(866,1) * [MAPK1_rna];
  R866: MAPK1_rna => ; 1;
  // V(867) = K(867,1) * [DUSP1_rna];
  R867: DUSP1_rna => ; 1;
  // V(868) = K(868,1) * [PTPN6_rna];
  R868: PTPN6_rna => ; 1;
  // V(869) = K(869,1) * [PRDX6_rna];
  R869: PRDX6_rna => ; 1;
  // V(870) = K(870,1) * [AKT1_rna];
  R870: AKT1_rna => ; 1;
  // V(871) = K(871,1) * [CTNNB1_rna];
  R871: CTNNB1_rna => ; 1;
  // V(872) = K(872,1) * [DDIT3_rna];
  R872: DDIT3_rna => ; 1;
  // V(873) = K(873,1) * [TRIM23_rna];
  R873: TRIM23_rna => ; 1;
  // V(874) = K(874,1) * [STAT1_rna];
  R874: STAT1_rna => ; 1;
  // V(875) = K(875,1) * [STAT6_rna];
  R875: STAT6_rna => ; 1;
  // V(876) = K(876,1) * [PIK3CA_rna];
  R876: PIK3CA_rna => ; 1;
  // V(877) = K(877,1) * [MAPK9_rna];
  R877: MAPK9_rna => ; 1;
  // V(878) = K(878,1) * [NOTCH1_rna];
  R878: NOTCH1_rna => ; 1;
  // V(879) = K(879,1) * [YAP1_rna];
  R879: YAP1_rna => ; 1;
  // V(880) = K(880,1) * [LEPR_rna];
  R880: LEPR_rna => ; 1;
  // V(881) = K(881,1) * [NUMB_rna];
  R881: NUMB_rna => ; 1;
  // V(882) = K(882,1) * [TSC2_rna];
  R882: TSC2_rna => ; 1;
  // V(883) = K(883,1) * [RPS6KA3_rna];
  R883: RPS6KA3_rna => ; 1;
  // V(884) = K(884,1) * [RCAN1_rna];
  R884: RCAN1_rna => ; 1;
  // V(885) = K(885,1) * [CASP9_rna];
  R885: CASP9_rna => ; 1;
  // V(886) = K(886,1) * [HDAC4_rna];
  R886: HDAC4_rna => ; 1;
  // V(887) = K(887,1) * [WNT4_rna];
  R887: WNT4_rna => ; 1;
  // V(888) = K(888,1) * [PTEN_rna];
  R888: PTEN_rna => ; 1;
  // V(889) = K(889,1) * [SMAD3_rna];
  R889: SMAD3_rna => ; 1;
  // V(890) = K(890,1) * [VLDLR_rna];
  R890: VLDLR_rna => ; 1;
  // V(891) = K(891,1) * [CLTC_rna];
  R891: CLTC_rna => ; 1;
  // V(892) = K(892,1) * [NFKB2_rna];
  R892: NFKB2_rna => ; 1;
  // V(893) = K(893,1) * [MDM2_rna];
  R893: MDM2_rna => ; 1;
  // V(894) = K(894,1) * [EP300_rna];
  R894: EP300_rna => ; 1;
  // V(895) = K(895,1) * [FOXO1_rna];
  R895: FOXO1_rna => ; 1;
  // V(896) = K(896,1) * [STK4_rna];
  R896: STK4_rna => ; 1;
  // V(897) = K(897,1) * [PRKAA1_rna];
  R897: PRKAA1_rna => ; 1;
  // V(898) = K(898,1) * [ROCK1_rna];
  R898: ROCK1_rna => ; 1;
  // V(899) = K(899,1) * [SMAD4_rna];
  R899: SMAD4_rna => ; 1;
  // V(900) = K(900,1) * [ATR_rna];
  R900: ATR_rna => ; 1;
  // V(901) = K(901,1) * [RAPGEF1_rna];
  R901: RAPGEF1_rna => ; 1;
  // V(902) = K(902,1) * [SMAD2_rna];
  R902: SMAD2_rna => ; 1;
  // V(903) = K(903,1) * [SMAD1_rna];
  R903: SMAD1_rna => ; 1;
  // V(904) = K(904,1) * [PKN1_rna];
  R904: PKN1_rna => ; 1;
  // V(905) = K(905,1) * [HIF1A_rna];
  R905: HIF1A_rna => ; 1;
  // V(906) = K(906,1) * [RICTOR_rna];
  R906: RICTOR_rna => ; 1;
  // V(907) = K(907,1) * [SIRT2_rna];
  R907: SIRT2_rna => ; 1;
  // V(908) = K(908,1) * [PIK3C3_rna];
  R908: PIK3C3_rna => ; 1;
  // V(909) = K(909,1) * [DEPTOR_rna];
  R909: DEPTOR_rna => ; 1;
  // V(910) = K(910,1) * [NRG4_rna];
  R910: NRG4_rna => ; 1;
  // V(911) = K(911,1) * [MYLIP_rna];
  R911: MYLIP_rna => ; 1;
  // V(912) = K(912,1) * [SIRT1_rna];
  R912: SIRT1_rna => ; 1;
  // V(913) = K(913,1) * [PANX1_rna];
  R913: PANX1_rna => ; 1;
  // V(914) = K(914,1) * [PARK7_rna];
  R914: PARK7_rna => ; 1;
  // V(915) = K(915,1) * [MAP3K5_rna];
  R915: MAP3K5_rna => ; 1;
  // V(916) = K(916,1) * [HIPK2_rna];
  R916: HIPK2_rna => ; 1;
  // V(917) = K(917,1) * [TXNIP_rna];
  R917: TXNIP_rna => ; 1;
  // V(918) = K(918,1) * [SIRT7_rna];
  R918: SIRT7_rna => ; 1;
  // V(919) = K(919,1) * [PLK2_rna];
  R919: PLK2_rna => ; 1;
  // V(920) = K(920,1) * [EIF2AK3_rna];
  R920: EIF2AK3_rna => ; 1;
  // V(921) = K(921,1) * [RNF7_rna];
  R921: RNF7_rna => ; 1;
end
