// SBML level 3 version 2

model VasaRecta()

  // Compartments:
  compartment cell = 1;

  // Species:
  species AGO2 in cell = 1/cell;
  species AGO2_g in cell = 1/cell;
  species AGO2_p in cell = 1/cell;
  species AGO2_rna in cell = 1/cell;
  species AIFM1 in cell = 1/cell;
  species AIFM1_g in cell = 1/cell;
  species AIFM1_rna in cell = 1/cell;
  species ANXA1 in cell = 1/cell;
  species ANXA1_g in cell = 1/cell;
  species ANXA1_p in cell = 1/cell;
  species ANXA1_rna in cell = 1/cell;
  species AR in cell = 1/cell;
  species AR_g in cell = 1/cell;
  species AR_p in cell = 1/cell;
  species AR_rna in cell = 1/cell;
  species ATF3 in cell = 1/cell;
  species ATF3_g in cell = 1/cell;
  species ATF3_rna in cell = 1/cell;
  species ATR in cell = 1/cell;
  species ATR_g in cell = 1/cell;
  species ATR_rna in cell = 1/cell;
  species BAD in cell = 1/cell;
  species BAD_g in cell = 1/cell;
  species BAD_p in cell = 1/cell;
  species BAD_rna in cell = 1/cell;
  species BAX in cell = 1/cell;
  species BAX_g in cell = 1/cell;
  species BAX_rna in cell = 1/cell;
  species CALM1 in cell = 1/cell;
  species CALM1_g in cell = 1/cell;
  species CALM1_p in cell = 1/cell;
  species CALM1_rna in cell = 1/cell;
  species CD34 in cell = 1/cell;
  species CD34_g in cell = 1/cell;
  species CD34_rna in cell = 1/cell;
  species CDKN1A in cell = 1/cell;
  species CDKN1A_g in cell = 1/cell;
  species CDKN1A_p in cell = 1/cell;
  species CDKN1A_rna in cell = 1/cell;
  species CREB1 in cell = 1/cell;
  species CREB1_g in cell = 1/cell;
  species CREB1_p in cell = 1/cell;
  species CREB1_rna in cell = 1/cell;
  species CTNNB1 in cell = 1/cell;
  species CTNNB1_g in cell = 1/cell;
  species CTNNB1_p in cell = 1/cell;
  species CTNNB1_rna in cell = 1/cell;
  species DDIT3 in cell = 1/cell;
  species DDIT3_g in cell = 1/cell;
  species DDIT3_p in cell = 1/cell;
  species DDIT3_rna in cell = 1/cell;
  species DUSP1 in cell = 1/cell;
  species DUSP1_g in cell = 1/cell;
  species DUSP1_p in cell = 1/cell;
  species DUSP1_rna in cell = 1/cell;
  species EGFR in cell = 1/cell;
  species EGFR_g in cell = 1/cell;
  species EGFR_p in cell = 1/cell;
  species EGFR_rna in cell = 1/cell;
  species EP300 in cell = 1/cell;
  species EP300_g in cell = 1/cell;
  species EP300_p in cell = 1/cell;
  species EP300_rna in cell = 1/cell;
  species ETS1 in cell = 1/cell;
  species ETS1_g in cell = 1/cell;
  species ETS1_rna in cell = 1/cell;
  species F2R in cell = 1/cell;
  species F2R_g in cell = 1/cell;
  species F2R_p in cell = 1/cell;
  species F2R_rna in cell = 1/cell;
  species FABP4 in cell = 1/cell;
  species FABP4_g in cell = 1/cell;
  species FABP4_p in cell = 1/cell;
  species FABP4_rna in cell = 1/cell;
  species FGF2 in cell = 1/cell;
  species FGF2_g in cell = 1/cell;
  species FGF2_rna in cell = 1/cell;
  species FOS in cell = 1/cell;
  species FOS_g in cell = 1/cell;
  species FOS_p in cell = 1/cell;
  species FOS_rna in cell = 1/cell;
  species FOXO1 in cell = 1/cell;
  species FOXO1_g in cell = 1/cell;
  species FOXO1_p in cell = 1/cell;
  species FOXO1_rna in cell = 1/cell;
  species FYN in cell = 1/cell;
  species FYN_g in cell = 1/cell;
  species FYN_p in cell = 1/cell;
  species FYN_rna in cell = 1/cell;
  species GCLC in cell = 1/cell;
  species GCLC_g in cell = 1/cell;
  species GCLC_rna in cell = 1/cell;
  species GDF15 in cell = 1/cell;
  species GDF15_g in cell = 1/cell;
  species GDF15_rna in cell = 1/cell;
  species GLO1 in cell = 1/cell;
  species GLO1_g in cell = 1/cell;
  species GLO1_p in cell = 1/cell;
  species GLO1_rna in cell = 1/cell;
  species GPX4 in cell = 1/cell;
  species GPX4_g in cell = 1/cell;
  species GPX4_rna in cell = 1/cell;
  species HDAC1 in cell = 1/cell;
  species HDAC1_g in cell = 1/cell;
  species HDAC1_rna in cell = 1/cell;
  species HES1 in cell = 1/cell;
  species HES1_g in cell = 1/cell;
  species HES1_rna in cell = 1/cell;
  species HMGN1 in cell = 1/cell;
  species HMGN1_g in cell = 1/cell;
  species HMGN1_p in cell = 1/cell;
  species HMGN1_rna in cell = 1/cell;
  species IGF1R in cell = 1/cell;
  species IGF1R_g in cell = 1/cell;
  species IGF1R_p in cell = 1/cell;
  species IGF1R_rna in cell = 1/cell;
  species IL6R in cell = 1/cell;
  species IL6R_g in cell = 1/cell;
  species IL6R_rna in cell = 1/cell;
  species INSR in cell = 1/cell;
  species INSR_g in cell = 1/cell;
  species INSR_p in cell = 1/cell;
  species INSR_rna in cell = 1/cell;
  species IRF3 in cell = 1/cell;
  species IRF3_g in cell = 1/cell;
  species IRF3_p in cell = 1/cell;
  species IRF3_rna in cell = 1/cell;
  species JAK1 in cell = 1/cell;
  species JAK1_g in cell = 1/cell;
  species JAK1_p in cell = 1/cell;
  species JAK1_rna in cell = 1/cell;
  species JAK2 in cell = 1/cell;
  species JAK2_g in cell = 1/cell;
  species JAK2_p in cell = 1/cell;
  species JAK2_rna in cell = 1/cell;
  species JUN in cell = 1/cell;
  species JUN_g in cell = 1/cell;
  species JUN_p in cell = 1/cell;
  species JUN_rna in cell = 1/cell;
  species KDR in cell = 1/cell;
  species KDR_g in cell = 1/cell;
  species KDR_p in cell = 1/cell;
  species KDR_rna in cell = 1/cell;
  species KLF9 in cell = 1/cell;
  species KLF9_g in cell = 1/cell;
  species KLF9_rna in cell = 1/cell;
  species LDLR in cell = 1/cell;
  species LDLR_g in cell = 1/cell;
  species LDLR_rna in cell = 1/cell;
  species LEPR in cell = 1/cell;
  species LEPR_g in cell = 1/cell;
  species LEPR_p in cell = 1/cell;
  species LEPR_rna in cell = 1/cell;
  species LYN in cell = 1/cell;
  species LYN_g in cell = 1/cell;
  species LYN_p in cell = 1/cell;
  species LYN_rna in cell = 1/cell;
  species MAP4K2 in cell = 1/cell;
  species MAP4K2_g in cell = 1/cell;
  species MAP4K2_p in cell = 1/cell;
  species MAP4K2_rna in cell = 1/cell;
  species MAPK1 in cell = 1/cell;
  species MAPK12 in cell = 1/cell;
  species MAPK12_g in cell = 1/cell;
  species MAPK12_p in cell = 1/cell;
  species MAPK12_rna in cell = 1/cell;
  species MAPK1_g in cell = 1/cell;
  species MAPK1_p in cell = 1/cell;
  species MAPK1_rna in cell = 1/cell;
  species MAPK6 in cell = 1/cell;
  species MAPK6_g in cell = 1/cell;
  species MAPK6_p in cell = 1/cell;
  species MAPK6_rna in cell = 1/cell;
  species MAPK9 in cell = 1/cell;
  species MAPK9_g in cell = 1/cell;
  species MAPK9_p in cell = 1/cell;
  species MAPK9_rna in cell = 1/cell;
  species MDM2 in cell = 1/cell;
  species MDM2_g in cell = 1/cell;
  species MDM2_p in cell = 1/cell;
  species MDM2_rna in cell = 1/cell;
  species MFF in cell = 1/cell;
  species MFF_g in cell = 1/cell;
  species MFF_p in cell = 1/cell;
  species MFF_rna in cell = 1/cell;
  species MYLIP in cell = 1/cell;
  species MYLIP_g in cell = 1/cell;
  species MYLIP_rna in cell = 1/cell;
  species NFE2L2 in cell = 1/cell;
  species NFE2L2_g in cell = 1/cell;
  species NFE2L2_p in cell = 1/cell;
  species NFE2L2_rna in cell = 1/cell;
  species NOS3 in cell = 1/cell;
  species NOS3_g in cell = 1/cell;
  species NOS3_p in cell = 1/cell;
  species NOS3_rna in cell = 1/cell;
  species NOTCH1 in cell = 1/cell;
  species NOTCH1_g in cell = 1/cell;
  species NOTCH1_rna in cell = 1/cell;
  species NR3C1 in cell = 1/cell;
  species NR3C1_g in cell = 1/cell;
  species NR3C1_p in cell = 1/cell;
  species NR3C1_rna in cell = 1/cell;
  species NR3C2 in cell = 1/cell;
  species NR3C2_g in cell = 1/cell;
  species NR3C2_p in cell = 1/cell;
  species NR3C2_rna in cell = 1/cell;
  species NR4A1 in cell = 1/cell;
  species NR4A1_g in cell = 1/cell;
  species NR4A1_p in cell = 1/cell;
  species NR4A1_rna in cell = 1/cell;
  species NUMB in cell = 1/cell;
  species NUMB_g in cell = 1/cell;
  species NUMB_rna in cell = 1/cell;
  species PARP1 in cell = 1/cell;
  species PARP1_g in cell = 1/cell;
  species PARP1_p in cell = 1/cell;
  species PARP1_rna in cell = 1/cell;
  species PCK1 in cell = 1/cell;
  species PCK1_g in cell = 1/cell;
  species PCK1_rna in cell = 1/cell;
  species PIK3CA in cell = 1/cell;
  species PIK3CA_g in cell = 1/cell;
  species PIK3CA_rna in cell = 1/cell;
  species PIK3R1 in cell = 1/cell;
  species PIK3R1_g in cell = 1/cell;
  species PIK3R1_p in cell = 1/cell;
  species PIK3R1_rna in cell = 1/cell;
  species PINK1 in cell = 1/cell;
  species PINK1_g in cell = 1/cell;
  species PINK1_rna in cell = 1/cell;
  species PKM in cell = 1/cell;
  species PKM_g in cell = 1/cell;
  species PKM_p in cell = 1/cell;
  species PKM_rna in cell = 1/cell;
  species PLK2 in cell = 1/cell;
  species PLK2_g in cell = 1/cell;
  species PLK2_rna in cell = 1/cell;
  species PRKAA1 in cell = 1/cell;
  species PRKAA1_g in cell = 1/cell;
  species PRKAA1_p in cell = 1/cell;
  species PRKAA1_rna in cell = 1/cell;
  species PTEN in cell = 1/cell;
  species PTEN_g in cell = 1/cell;
  species PTEN_p in cell = 1/cell;
  species PTEN_rna in cell = 1/cell;
  species PTPN2 in cell = 1/cell;
  species PTPN2_g in cell = 1/cell;
  species PTPN2_rna in cell = 1/cell;
  species PTPN6 in cell = 1/cell;
  species PTPN6_g in cell = 1/cell;
  species PTPN6_p in cell = 1/cell;
  species PTPN6_rna in cell = 1/cell;
  species PTPRJ in cell = 1/cell;
  species PTPRJ_g in cell = 1/cell;
  species PTPRJ_p in cell = 1/cell;
  species PTPRJ_rna in cell = 1/cell;
  species RCAN1 in cell = 1/cell;
  species RCAN1_g in cell = 1/cell;
  species RCAN1_p in cell = 1/cell;
  species RCAN1_rna in cell = 1/cell;
  species RICTOR in cell = 1/cell;
  species RICTOR_g in cell = 1/cell;
  species RICTOR_p in cell = 1/cell;
  species RICTOR_rna in cell = 1/cell;
  species ROCK2 in cell = 1/cell;
  species ROCK2_g in cell = 1/cell;
  species ROCK2_rna in cell = 1/cell;
  species RORA in cell = 1/cell;
  species RORA_g in cell = 1/cell;
  species RORA_p in cell = 1/cell;
  species RORA_rna in cell = 1/cell;
  species RPS6KA3 in cell = 1/cell;
  species RPS6KA3_g in cell = 1/cell;
  species RPS6KA3_p in cell = 1/cell;
  species RPS6KA3_rna in cell = 1/cell;
  species RPS6KB1 in cell = 1/cell;
  species RPS6KB1_g in cell = 1/cell;
  species RPS6KB1_p in cell = 1/cell;
  species RPS6KB1_rna in cell = 1/cell;
  species SGK1 in cell = 1/cell;
  species SGK1_g in cell = 1/cell;
  species SGK1_rna in cell = 1/cell;
  species SIRT1 in cell = 1/cell;
  species SIRT1_g in cell = 1/cell;
  species SIRT1_p in cell = 1/cell;
  species SIRT1_rna in cell = 1/cell;
  species SIRT6 in cell = 1/cell;
  species SIRT6_g in cell = 1/cell;
  species SIRT6_rna in cell = 1/cell;
  species SMAD1 in cell = 1/cell;
  species SMAD1_g in cell = 1/cell;
  species SMAD1_p in cell = 1/cell;
  species SMAD1_rna in cell = 1/cell;
  species SMAD2 in cell = 1/cell;
  species SMAD2_g in cell = 1/cell;
  species SMAD2_p in cell = 1/cell;
  species SMAD2_rna in cell = 1/cell;
  species SMAD3 in cell = 1/cell;
  species SMAD3_g in cell = 1/cell;
  species SMAD3_p in cell = 1/cell;
  species SMAD3_rna in cell = 1/cell;
  species SMAD4 in cell = 1/cell;
  species SMAD4_g in cell = 1/cell;
  species SMAD4_p in cell = 1/cell;
  species SMAD4_rna in cell = 1/cell;
  species SMAD7 in cell = 1/cell;
  species SMAD7_g in cell = 1/cell;
  species SMAD7_rna in cell = 1/cell;
  species SOCS3 in cell = 1/cell;
  species SOCS3_g in cell = 1/cell;
  species SOCS3_rna in cell = 1/cell;
  species SOD1 in cell = 1/cell;
  species SOD1_g in cell = 1/cell;
  species SOD1_rna in cell = 1/cell;
  species SOD2 in cell = 1/cell;
  species SOD2_g in cell = 1/cell;
  species SOD2_rna in cell = 1/cell;
  species SP1 in cell = 1/cell;
  species SP1_g in cell = 1/cell;
  species SP1_p in cell = 1/cell;
  species SP1_rna in cell = 1/cell;
  species SREBF1 in cell = 1/cell;
  species SREBF1_g in cell = 1/cell;
  species SREBF1_p in cell = 1/cell;
  species SREBF1_rna in cell = 1/cell;
  species STAT1 in cell = 1/cell;
  species STAT1_g in cell = 1/cell;
  species STAT1_p in cell = 1/cell;
  species STAT1_rna in cell = 1/cell;
  species STK11 in cell = 1/cell;
  species STK11_g in cell = 1/cell;
  species STK11_p in cell = 1/cell;
  species STK11_rna in cell = 1/cell;
  species TEK in cell = 1/cell;
  species TEK_g in cell = 1/cell;
  species TEK_p in cell = 1/cell;
  species TEK_rna in cell = 1/cell;
  species TGFBR1 in cell = 1/cell;
  species TGFBR1_g in cell = 1/cell;
  species TGFBR1_rna in cell = 1/cell;
  species TLR3 in cell = 1/cell;
  species TLR3_g in cell = 1/cell;
  species TLR3_p in cell = 1/cell;
  species TLR3_rna in cell = 1/cell;
  species TLR4 in cell = 1/cell;
  species TLR4_g in cell = 1/cell;
  species TLR4_rna in cell = 1/cell;
  species TP53 in cell = 1/cell;
  species TP53_g in cell = 1/cell;
  species TP53_p in cell = 1/cell;
  species TP53_rna in cell = 1/cell;
  species TSC2 in cell = 1/cell;
  species TSC2_g in cell = 1/cell;
  species TSC2_p in cell = 1/cell;
  species TSC2_rna in cell = 1/cell;
  species TXNIP in cell = 1/cell;
  species TXNIP_g in cell = 1/cell;
  species TXNIP_p in cell = 1/cell;
  species TXNIP_rna in cell = 1/cell;
  species UBC in cell = 1/cell;
  species UBC_g in cell = 1/cell;
  species UBC_p in cell = 1/cell;
  species UBC_rna in cell = 1/cell;
  species VEGFA in cell = 1/cell;
  species VEGFA_g in cell = 1/cell;
  species VEGFA_rna in cell = 1/cell;
  species YAP1 in cell = 1/cell;
  species YAP1_g in cell = 1/cell;
  species YAP1_p in cell = 1/cell;
  species YAP1_rna in cell = 1/cell;
  species ZFP36 in cell = 1/cell;
  species ZFP36_g in cell = 1/cell;
  species ZFP36_p in cell = 1/cell;
  species ZFP36_rna in cell = 1/cell;

  // Reactions:
  // V(1) = K(1,1) * [SMAD2_p] * [SMAD4_p] -K(1,2) * [SIGNOR-C8];
  R1: SMAD2_p => SMAD4_p; 1;
  // V(2) = K(2,1) * [SMAD4_p] * [SMAD3_p] -K(2,2) * [SIGNOR-C9];
  R2: SMAD4_p => SMAD3_p; 1;
  // V(3) = K(3,1) * [SMAD4_p] * [JUN_p] -K(3,2) * [SIGNOR-C10];
  R3: JUN_p => SMAD4_p; 1;
  // V(4) = K(4,1) * [SMAD4_p] * [SMAD1] * [SMAD1] -K(4,2) * [SIGNOR-C85];
  R4: SMAD1 => SMAD4_p; 1;
  // V(5) = K(5,1) * [JUN_p] * [SMAD3_p] -K(5,2) * [SIGNOR-C86];
  R5: JUN_p => SMAD3_p; 1;
  // V(6) = K(6,1) * [FOS_p] * [JUN_p] * [JUN_p] * [FOS_p] * [JUN_p] * [FOS_p] * [FOS_p] * [JUN_p] -K(6,2) * [SIGNOR-C154];
  R6: JUN_p => FOS_p; 1;
  // V(7) = K(7,1) * [PIK3R1_p] * [PIK3CA] -K(7,2) * [SIGNOR-C156];
  R7: PIK3CA => PIK3R1_p; 1;
  // V(8) = K(8,1) * [TGFBR1] * [SMAD2] -K(8,2) * [TGFBR1 |SMAD2];
  R8: TGFBR1 => SMAD2; 1;
  // V(9) = K(9,1) * [TGFBR1 |SMAD2];
  R9: TGFBR1 => SMAD2; 1;
  // V(10) = K(10,1) * [MAPK1_p] * [EP300] -K(10,2) * [MAPK1_p |EP300];
  R10: EP300 => MAPK1_p; 1;
  // V(11) = K(11,1) * [MAPK1_p |EP300];
  R11: EP300 => MAPK1_p; 1;
  // V(12) = K(12,1) * [MAPK1_p] * [NR3C1] -K(12,2) * [MAPK1_p |NR3C1];
  R12: NR3C1 => MAPK1_p; 1;
  // V(13) = K(13,1) * [MAPK1_p |NR3C1];
  R13: NR3C1 => MAPK1_p; 1;
  // V(14) = K(14,1) * [MAPK1_p] * [RPS6KA3] -K(14,2) * [MAPK1_p |RPS6KA3];
  R14: RPS6KA3 => MAPK1_p; 1;
  // V(15) = K(15,1) * [MAPK1_p |RPS6KA3];
  R15: RPS6KA3 => MAPK1_p; 1;
  // V(16) = K(16,1) * [FYN_p] * [STK11] -K(16,2) * [FYN_p |STK11];
  R16: FYN_p => STK11; 1;
  // V(17) = K(17,1) * [FYN_p |STK11];
  R17: FYN_p => STK11; 1;
  // V(18) = K(18,1) * [MAPK1_p] * [SMAD1] -K(18,2) * [MAPK1_p |SMAD1];
  R18: SMAD1 => MAPK1_p; 1;
  // V(19) = K(19,1) * [MAPK1_p |SMAD1];
  R19: SMAD1 => MAPK1_p; 1;
  // V(20) = K(20,1) * [MAPK1_p] * [RPS6KB1] -K(20,2) * [MAPK1_p |RPS6KB1];
  R20: RPS6KB1 => MAPK1_p; 1;
  // V(21) = K(21,1) * [MAPK1_p |RPS6KB1];
  R21: RPS6KB1 => MAPK1_p; 1;
  // V(22) = K(22,1) * [EGFR_p] * [EGFR] -K(22,2) * [EGFR_p |EGFR];
  R22: EGFR_p => EGFR; 1;
  // V(23) = K(23,1) * [EGFR_p |EGFR];
  R23: EGFR_p => EGFR; 1;
  // V(24) = K(24,1) * [JAK2_p] * [JAK2] -K(24,2) * [JAK2_p |JAK2];
  R24: JAK2_p => JAK2; 1;
  // V(25) = K(25,1) * [JAK2_p |JAK2];
  R25: JAK2_p => JAK2; 1;
  // V(26) = K(26,1) * [MAPK1_p] * [SMAD4] -K(26,2) * [MAPK1_p |SMAD4];
  R26: SMAD4 => MAPK1_p; 1;
  // V(27) = K(27,1) * [MAPK1_p |SMAD4];
  R27: SMAD4 => MAPK1_p; 1;
  // V(28) = K(28,1) * [MAPK1_p] * [STK11] -K(28,2) * [MAPK1_p |STK11];
  R28: STK11 => MAPK1_p; 1;
  // V(29) = K(29,1) * [MAPK1_p |STK11];
  R29: STK11 => MAPK1_p; 1;
  // V(30) = K(30,1) * [MAPK1_p] * [JUN] -K(30,2) * [MAPK1_p |JUN];
  R30: JUN => MAPK1_p; 1;
  // V(31) = K(31,1) * [MAPK1_p |JUN];
  R31: JUN => MAPK1_p; 1;
  // V(32) = K(32,1) * [MAPK1_p] * [FOS] -K(32,2) * [MAPK1_p |FOS];
  R32: FOS => MAPK1_p; 1;
  // V(33) = K(33,1) * [MAPK1_p |FOS];
  R33: FOS => MAPK1_p; 1;
  // V(34) = K(34,1) * [STK11_p] * [STK11] -K(34,2) * [STK11_p |STK11];
  R34: STK11_p => STK11; 1;
  // V(35) = K(35,1) * [STK11_p |STK11];
  R35: STK11_p => STK11; 1;
  // V(36) = K(36,1) * [KDR_p] * [KDR] -K(36,2) * [KDR_p |KDR];
  R36: KDR => KDR_p; 1;
  // V(37) = K(37,1) * [KDR_p |KDR];
  R37: KDR => KDR_p; 1;
  // V(38) = K(38,1) * [FYN_p] * [PTPN6] -K(38,2) * [FYN_p |PTPN6];
  R38: FYN_p => PTPN6; 1;
  // V(39) = K(39,1) * [FYN_p |PTPN6];
  R39: FYN_p => PTPN6; 1;
  // V(40) = K(40,1) * [MAPK9_p] * [TP53] -K(40,2) * [MAPK9_p |TP53];
  R40: TP53 => MAPK9_p; 1;
  // V(41) = K(41,1) * [MAPK9_p |TP53];
  R41: TP53 => MAPK9_p; 1;
  // V(42) = K(42,1) * [MAPK1_p] * [SMAD2] -K(42,2) * [MAPK1_p |SMAD2];
  R42: SMAD2 => MAPK1_p; 1;
  // V(43) = K(43,1) * [MAPK1_p |SMAD2];
  R43: SMAD2 => MAPK1_p; 1;
  // V(44) = K(44,1) * [MAPK1_p] * [RORA] -K(44,2) * [MAPK1_p |RORA];
  R44: RORA => MAPK1_p; 1;
  // V(45) = K(45,1) * [MAPK1_p |RORA];
  R45: RORA => MAPK1_p; 1;
  // V(46) = K(46,1) * [MAPK9_p] * [JUN] -K(46,2) * [MAPK9_p |JUN];
  R46: JUN => MAPK9_p; 1;
  // V(47) = K(47,1) * [MAPK9_p |JUN];
  R47: JUN => MAPK9_p; 1;
  // V(48) = K(48,1) * [INSR_p] * [INSR] -K(48,2) * [INSR_p |INSR];
  R48: INSR_p => INSR; 1;
  // V(49) = K(49,1) * [INSR_p |INSR];
  R49: INSR_p => INSR; 1;
  // V(50) = K(50,1) * [MAPK1_p] * [SREBF1] -K(50,2) * [MAPK1_p |SREBF1];
  R50: SREBF1 => MAPK1_p; 1;
  // V(51) = K(51,1) * [MAPK1_p |SREBF1];
  R51: SREBF1 => MAPK1_p; 1;
  // V(52) = K(52,1) * [JAK1_p] * [STAT1] -K(52,2) * [JAK1_p |STAT1];
  R52: STAT1 => JAK1_p; 1;
  // V(53) = K(53,1) * [JAK1_p |STAT1];
  R53: STAT1 => JAK1_p; 1;
  // V(54) = K(54,1) * [MAPK1_p] * [DUSP1] -K(54,2) * [MAPK1_p |DUSP1];
  R54: DUSP1 => MAPK1_p; 1;
  // V(55) = K(55,1) * [MAPK1_p |DUSP1];
  R55: DUSP1 => MAPK1_p; 1;
  // V(56) = K(56,1) * [MAPK1_p] * [NR3C2] -K(56,2) * [MAPK1_p |NR3C2];
  R56: NR3C2 => MAPK1_p; 1;
  // V(57) = K(57,1) * [MAPK1_p |NR3C2];
  R57: NR3C2 => MAPK1_p; 1;
  // V(58) = K(58,1) * [RPS6KA3_p] * [HMGN1] -K(58,2) * [RPS6KA3_p |HMGN1];
  R58: HMGN1 => RPS6KA3_p; 1;
  // V(59) = K(59,1) * [RPS6KA3_p |HMGN1];
  R59: HMGN1 => RPS6KA3_p; 1;
  // V(60) = K(60,1) * [MAPK1_p] * [TSC2] -K(60,2) * [MAPK1_p |TSC2];
  R60: TSC2 => MAPK1_p; 1;
  // V(61) = K(61,1) * [MAPK1_p |TSC2];
  R61: TSC2 => MAPK1_p; 1;
  // V(62) = K(62,1) * [INSR_p] * [SIGNOR-C156] -K(62,2) * [INSR_p |SIGNOR-C156];
  R62: INSR_p => ; 1;
  // V(63) = K(63,1) * [INSR_p |SIGNOR-C156];
  R63: INSR_p => ; 1;
  // V(64) = K(64,1) * [EGFR_p] * [CALM1] -K(64,2) * [EGFR_p |CALM1];
  R64: EGFR_p => CALM1; 1;
  // V(65) = K(65,1) * [EGFR_p |CALM1];
  R65: EGFR_p => CALM1; 1;
  // V(66) = K(66,1) * [MAPK1_p] * [FOXO1] -K(66,2) * [MAPK1_p |FOXO1];
  R66: FOXO1 => MAPK1_p; 1;
  // V(67) = K(67,1) * [MAPK1_p |FOXO1];
  R67: FOXO1 => MAPK1_p; 1;
  // V(68) = K(68,1) * [ATR] * [PARP1] -K(68,2) * [ATR |PARP1];
  R68: PARP1 => ATR; 1;
  // V(69) = K(69,1) * [ATR |PARP1];
  R69: PARP1 => ATR; 1;
  // V(70) = K(70,1) * [JAK2_p] * [STAT1] -K(70,2) * [JAK2_p |STAT1];
  R70: JAK2_p => STAT1; 1;
  // V(71) = K(71,1) * [JAK2_p |STAT1];
  R71: JAK2_p => STAT1; 1;
  // V(72) = K(72,1) * [MAPK1_p] * [SMAD3] -K(72,2) * [MAPK1_p |SMAD3];
  R72: SMAD3 => MAPK1_p; 1;
  // V(73) = K(73,1) * [MAPK1_p |SMAD3];
  R73: SMAD3 => MAPK1_p; 1;
  // V(74) = K(74,1) * [INSR_p] * [CALM1] -K(74,2) * [INSR_p |CALM1];
  R74: INSR_p => CALM1; 1;
  // V(75) = K(75,1) * [INSR_p |CALM1];
  R75: INSR_p => CALM1; 1;
  // V(76) = K(76,1) * [ATR] * [MDM2] -K(76,2) * [ATR |MDM2];
  R76: ATR => MDM2; 1;
  // V(77) = K(77,1) * [ATR |MDM2];
  R77: ATR => MDM2; 1;
  // V(78) = K(78,1) * [MAPK1_p] * [SIGNOR-C154] -K(78,2) * [MAPK1_p |SIGNOR-C154];
  R78: MAPK1_p => ; 1;
  // V(79) = K(79,1) * [MAPK1_p |SIGNOR-C154];
  R79: MAPK1_p => ; 1;
  // V(80) = K(80,1) * [RPS6KA3_p] * [BAD] -K(80,2) * [RPS6KA3_p |BAD];
  R80: RPS6KA3_p => BAD; 1;
  // V(81) = K(81,1) * [RPS6KA3_p |BAD];
  R81: RPS6KA3_p => BAD; 1;
  // V(82) = K(82,1) * [MAPK9_p] * [CTNNB1] -K(82,2) * [MAPK9_p |CTNNB1];
  R82: CTNNB1 => MAPK9_p; 1;
  // V(83) = K(83,1) * [MAPK9_p |CTNNB1];
  R83: CTNNB1 => MAPK9_p; 1;
  // V(84) = K(84,1) * [PINK1] * [UBC] -K(84,2) * [PINK1 |UBC];
  R84: PINK1 => UBC; 1;
  // V(85) = K(85,1) * [PINK1 |UBC];
  R85: PINK1 => UBC; 1;
  // V(86) = K(86,1) * [IGF1R_p] * [IGF1R] -K(86,2) * [IGF1R_p |IGF1R];
  R86: IGF1R_p => IGF1R; 1;
  // V(87) = K(87,1) * [IGF1R_p |IGF1R];
  R87: IGF1R_p => IGF1R; 1;
  // V(88) = K(88,1) * [STK11_p] * [PTEN] -K(88,2) * [STK11_p |PTEN];
  R88: PTEN => STK11_p; 1;
  // V(89) = K(89,1) * [STK11_p |PTEN];
  R89: PTEN => STK11_p; 1;
  // V(90) = K(90,1) * [SGK1] * [FOXO1] -K(90,2) * [SGK1 |FOXO1];
  R90: FOXO1 => SGK1; 1;
  // V(91) = K(91,1) * [SGK1 |FOXO1];
  R91: FOXO1 => SGK1; 1;
  // V(92) = K(92,1) * [MAPK9_p] * [FOXO1] -K(92,2) * [MAPK9_p |FOXO1];
  R92: FOXO1 => MAPK9_p; 1;
  // V(93) = K(93,1) * [MAPK9_p |FOXO1];
  R93: FOXO1 => MAPK9_p; 1;
  // V(94) = K(94,1) * [RPS6KA3_p] * [CREB1] -K(94,2) * [RPS6KA3_p |CREB1];
  R94: RPS6KA3_p => CREB1; 1;
  // V(95) = K(95,1) * [RPS6KA3_p |CREB1];
  R95: RPS6KA3_p => CREB1; 1;
  // V(96) = K(96,1) * [PRKAA1_p] * [NOS3] -K(96,2) * [PRKAA1_p |NOS3];
  R96: PRKAA1_p => NOS3; 1;
  // V(97) = K(97,1) * [PRKAA1_p |NOS3];
  R97: PRKAA1_p => NOS3; 1;
  // V(98) = K(98,1) * [FYN_p] * [FYN] -K(98,2) * [FYN_p |FYN];
  R98: FYN_p => FYN; 1;
  // V(99) = K(99,1) * [FYN_p |FYN];
  R99: FYN_p => FYN; 1;
  // V(100) = K(100,1) * [MAPK1_p] * [EGFR] -K(100,2) * [MAPK1_p |EGFR];
  R100: EGFR => MAPK1_p; 1;
  // V(101) = K(101,1) * [MAPK1_p |EGFR];
  R101: EGFR => MAPK1_p; 1;
  // V(102) = K(102,1) * [SIGNOR-C156_p] * [BAD] -K(102,2) * [SIGNOR-C156_p |BAD];
  R102: BAD => ; 1;
  // V(103) = K(103,1) * [SIGNOR-C156_p |BAD];
  R103: BAD => ; 1;
  // V(104) = K(104,1) * [TEK_p] * [TEK] -K(104,2) * [TEK_p |TEK];
  R104: TEK_p => TEK; 1;
  // V(105) = K(105,1) * [TEK_p |TEK];
  R105: TEK_p => TEK; 1;
  // V(106) = K(106,1) * [MAPK1_p] * [SP1] -K(106,2) * [MAPK1_p |SP1];
  R106: SP1 => MAPK1_p; 1;
  // V(107) = K(107,1) * [MAPK1_p |SP1];
  R107: SP1 => MAPK1_p; 1;
  // V(108) = K(108,1) * [MAPK1_p] * [BAD] -K(108,2) * [MAPK1_p |BAD];
  R108: BAD => MAPK1_p; 1;
  // V(109) = K(109,1) * [MAPK1_p |BAD];
  R109: BAD => MAPK1_p; 1;
  // V(110) = K(110,1) * [MAPK1_p] * [CDKN1A] -K(110,2) * [MAPK1_p |CDKN1A];
  R110: CDKN1A => MAPK1_p; 1;
  // V(111) = K(111,1) * [MAPK1_p |CDKN1A];
  R111: CDKN1A => MAPK1_p; 1;
  // V(112) = K(112,1) * [PRKAA1_p] * [FOXO1] -K(112,2) * [PRKAA1_p |FOXO1];
  R112: FOXO1 => PRKAA1_p; 1;
  // V(113) = K(113,1) * [PRKAA1_p |FOXO1];
  R113: FOXO1 => PRKAA1_p; 1;
  // V(114) = K(114,1) * [IL6R] * [JAK2] -K(114,2) * [IL6R |JAK2];
  R114: IL6R => JAK2; 1;
  // V(115) = K(115,1) * [IL6R |JAK2];
  R115: IL6R => JAK2; 1;
  // V(116) = K(116,1) * [MAPK1_p] * [JAK2] -K(116,2) * [MAPK1_p |JAK2];
  R116: JAK2 => MAPK1_p; 1;
  // V(117) = K(117,1) * [MAPK1_p |JAK2];
  R117: JAK2 => MAPK1_p; 1;
  // V(118) = K(118,1) * [MAPK1_p] * [PARP1] -K(118,2) * [MAPK1_p |PARP1];
  R118: PARP1 => MAPK1_p; 1;
  // V(119) = K(119,1) * [MAPK1_p |PARP1];
  R119: PARP1 => MAPK1_p; 1;
  // V(120) = K(120,1) * [MAPK9_p] * [YAP1] -K(120,2) * [MAPK9_p |YAP1];
  R120: YAP1 => MAPK9_p; 1;
  // V(121) = K(121,1) * [MAPK9_p |YAP1];
  R121: YAP1 => MAPK9_p; 1;
  // V(122) = K(122,1) * [STK11_p] * [SMAD4] -K(122,2) * [STK11_p |SMAD4];
  R122: SMAD4 => STK11_p; 1;
  // V(123) = K(123,1) * [STK11_p |SMAD4];
  R123: SMAD4 => STK11_p; 1;
  // V(124) = K(124,1) * [RPS6KB1_p] * [RICTOR] -K(124,2) * [RPS6KB1_p |RICTOR];
  R124: RICTOR => RPS6KB1_p; 1;
  // V(125) = K(125,1) * [RPS6KB1_p |RICTOR];
  R125: RICTOR => RPS6KB1_p; 1;
  // V(126) = K(126,1) * [PLK2] * [TP53] -K(126,2) * [PLK2 |TP53];
  R126: TP53 => PLK2; 1;
  // V(127) = K(127,1) * [PLK2 |TP53];
  R127: TP53 => PLK2; 1;
  // V(128) = K(128,1) * [SGK1] * [TSC2] -K(128,2) * [SGK1 |TSC2];
  R128: TSC2 => SGK1; 1;
  // V(129) = K(129,1) * [SGK1 |TSC2];
  R129: TSC2 => SGK1; 1;
  // V(130) = K(130,1) * [SMAD1] * [SMAD4] -K(130,2) * [SMAD1 |SMAD4];
  R130: SMAD4 => SMAD1; 1;
  // V(131) = K(131,1) * [SMAD1 |SMAD4];
  R131: SMAD4 => SMAD1; 1;
  // V(132) = K(132,1) * [RPS6KA3_p] * [FOS] -K(132,2) * [RPS6KA3_p |FOS];
  R132: RPS6KA3_p => FOS; 1;
  // V(133) = K(133,1) * [RPS6KA3_p |FOS];
  R133: RPS6KA3_p => FOS; 1;
  // V(134) = K(134,1) * [STK11_p] * [SIRT1] -K(134,2) * [STK11_p |SIRT1];
  R134: STK11_p => SIRT1; 1;
  // V(135) = K(135,1) * [STK11_p |SIRT1];
  R135: STK11_p => SIRT1; 1;
  // V(136) = K(136,1) * [RPS6KA3_p] * [RPS6KA3] -K(136,2) * [RPS6KA3_p |RPS6KA3];
  R136: RPS6KA3_p => RPS6KA3; 1;
  // V(137) = K(137,1) * [RPS6KA3_p |RPS6KA3];
  R137: RPS6KA3_p => RPS6KA3; 1;
  // V(138) = K(138,1) * [PRKAA1_p] * [EP300] -K(138,2) * [PRKAA1_p |EP300];
  R138: PRKAA1_p => EP300; 1;
  // V(139) = K(139,1) * [PRKAA1_p |EP300];
  R139: PRKAA1_p => EP300; 1;
  // V(140) = K(140,1) * [MAP4K2_p] * [MAP4K2] -K(140,2) * [MAP4K2_p |MAP4K2];
  R140: MAP4K2_p => MAP4K2; 1;
  // V(141) = K(141,1) * [MAP4K2_p |MAP4K2];
  R141: MAP4K2_p => MAP4K2; 1;
  // V(142) = K(142,1) * [PRKAA1_p] * [SREBF1] -K(142,2) * [PRKAA1_p |SREBF1];
  R142: SREBF1 => PRKAA1_p; 1;
  // V(143) = K(143,1) * [PRKAA1_p |SREBF1];
  R143: SREBF1 => PRKAA1_p; 1;
  // V(144) = K(144,1) * [RPS6KA3_p] * [NR4A1] -K(144,2) * [RPS6KA3_p |NR4A1];
  R144: NR4A1 => RPS6KA3_p; 1;
  // V(145) = K(145,1) * [RPS6KA3_p |NR4A1];
  R145: NR4A1 => RPS6KA3_p; 1;
  // V(146) = K(146,1) * [RPS6KB1_p] * [BAD] -K(146,2) * [RPS6KB1_p |BAD];
  R146: BAD => RPS6KB1_p; 1;
  // V(147) = K(147,1) * [RPS6KB1_p |BAD];
  R147: BAD => RPS6KB1_p; 1;
  // V(148) = K(148,1) * [MAPK12_p] * [TP53] -K(148,2) * [MAPK12_p |TP53];
  R148: MAPK12_p => TP53; 1;
  // V(149) = K(149,1) * [MAPK12_p |TP53];
  R149: MAPK12_p => TP53; 1;
  // V(150) = K(150,1) * [PRKAA1_p] * [SIRT1] -K(150,2) * [PRKAA1_p |SIRT1];
  R150: PRKAA1_p => SIRT1; 1;
  // V(151) = K(151,1) * [PRKAA1_p |SIRT1];
  R151: PRKAA1_p => SIRT1; 1;
  // V(152) = K(152,1) * [RPS6KB1_p] * [SREBF1] -K(152,2) * [RPS6KB1_p |SREBF1];
  R152: SREBF1 => RPS6KB1_p; 1;
  // V(153) = K(153,1) * [RPS6KB1_p |SREBF1];
  R153: SREBF1 => RPS6KB1_p; 1;
  // V(154) = K(154,1) * [STK11_p] * [YAP1] -K(154,2) * [STK11_p |YAP1];
  R154: YAP1 => STK11_p; 1;
  // V(155) = K(155,1) * [STK11_p |YAP1];
  R155: YAP1 => STK11_p; 1;
  // V(156) = K(156,1) * [MAPK1_p] * [MAPK1] -K(156,2) * [MAPK1_p |MAPK1];
  R156: MAPK1 => MAPK1_p; 1;
  // V(157) = K(157,1) * [MAPK1_p |MAPK1];
  R157: MAPK1 => MAPK1_p; 1;
  // V(158) = K(158,1) * [MAPK9_p] * [SMAD3] -K(158,2) * [MAPK9_p |SMAD3];
  R158: SMAD3 => MAPK9_p; 1;
  // V(159) = K(159,1) * [MAPK9_p |SMAD3];
  R159: SMAD3 => MAPK9_p; 1;
  // V(160) = K(160,1) * [PRKAA1_p] * [TSC2] -K(160,2) * [PRKAA1_p |TSC2];
  R160: PRKAA1_p => TSC2; 1;
  // V(161) = K(161,1) * [PRKAA1_p |TSC2];
  R161: PRKAA1_p => TSC2; 1;
  // V(162) = K(162,1) * [LYN_p] * [LYN] -K(162,2) * [LYN_p |LYN];
  R162: LYN => LYN_p; 1;
  // V(163) = K(163,1) * [LYN_p |LYN];
  R163: LYN => LYN_p; 1;
  // V(164) = K(164,1) * [MAPK1_p] * [ZFP36] -K(164,2) * [MAPK1_p |ZFP36];
  R164: ZFP36 => MAPK1_p; 1;
  // V(165) = K(165,1) * [MAPK1_p |ZFP36];
  R165: ZFP36 => MAPK1_p; 1;
  // V(166) = K(166,1) * [MAPK1_p] * [RCAN1] -K(166,2) * [MAPK1_p |RCAN1];
  R166: RCAN1 => MAPK1_p; 1;
  // V(167) = K(167,1) * [MAPK1_p |RCAN1];
  R167: RCAN1 => MAPK1_p; 1;
  // V(168) = K(168,1) * [JAK2_p] * [EGFR] -K(168,2) * [JAK2_p |EGFR];
  R168: EGFR => JAK2_p; 1;
  // V(169) = K(169,1) * [JAK2_p |EGFR];
  R169: EGFR => JAK2_p; 1;
  // V(170) = K(170,1) * [FYN_p] * [PTPRJ] -K(170,2) * [FYN_p |PTPRJ];
  R170: FYN_p => PTPRJ; 1;
  // V(171) = K(171,1) * [FYN_p |PTPRJ];
  R171: FYN_p => PTPRJ; 1;
  // V(172) = K(172,1) * [SGK1] * [SP1] -K(172,2) * [SGK1 |SP1];
  R172: SP1 => SGK1; 1;
  // V(173) = K(173,1) * [SGK1 |SP1];
  R173: SP1 => SGK1; 1;
  // V(174) = K(174,1) * [SGK1] * [MAPK1] -K(174,2) * [SGK1 |MAPK1];
  R174: MAPK1 => SGK1; 1;
  // V(175) = K(175,1) * [SGK1 |MAPK1];
  R175: MAPK1 => SGK1; 1;
  // V(176) = K(176,1) * [PRKAA1_p] * [DDIT3] -K(176,2) * [PRKAA1_p |DDIT3];
  R176: DDIT3 => PRKAA1_p; 1;
  // V(177) = K(177,1) * [PRKAA1_p |DDIT3];
  R177: DDIT3 => PRKAA1_p; 1;
  // V(178) = K(178,1) * [RPS6KA3_p] * [TP53] -K(178,2) * [RPS6KA3_p |TP53];
  R178: TP53 => RPS6KA3_p; 1;
  // V(179) = K(179,1) * [RPS6KA3_p |TP53];
  R179: TP53 => RPS6KA3_p; 1;
  // V(180) = K(180,1) * [SGK1] * [NR3C1] -K(180,2) * [SGK1 |NR3C1];
  R180: SGK1 => NR3C1; 1;
  // V(181) = K(181,1) * [SGK1 |NR3C1];
  R181: SGK1 => NR3C1; 1;
  // V(182) = K(182,1) * [INSR_p] * [FABP4] -K(182,2) * [INSR_p |FABP4];
  R182: INSR_p => FABP4; 1;
  // V(183) = K(183,1) * [INSR_p |FABP4];
  R183: INSR_p => FABP4; 1;
  // V(184) = K(184,1) * [MAPK1_p] * [AR] -K(184,2) * [MAPK1_p |AR];
  R184: AR => MAPK1_p; 1;
  // V(185) = K(185,1) * [MAPK1_p |AR];
  R185: AR => MAPK1_p; 1;
  // V(186) = K(186,1) * [JAK2_p] * [LEPR] -K(186,2) * [JAK2_p |LEPR];
  R186: JAK2_p => LEPR; 1;
  // V(187) = K(187,1) * [JAK2_p |LEPR];
  R187: JAK2_p => LEPR; 1;
  // V(188) = K(188,1) * [INSR_p] * [PTPN6] -K(188,2) * [INSR_p |PTPN6];
  R188: PTPN6 => INSR_p; 1;
  // V(189) = K(189,1) * [INSR_p |PTPN6];
  R189: PTPN6 => INSR_p; 1;
  // V(190) = K(190,1) * [PINK1] * [TP53] -K(190,2) * [PINK1 |TP53];
  R190: TP53 => PINK1; 1;
  // V(191) = K(191,1) * [PINK1 |TP53];
  R191: TP53 => PINK1; 1;
  // V(192) = K(192,1) * [EGFR_p] * [STAT1] -K(192,2) * [EGFR_p |STAT1];
  R192: EGFR_p => STAT1; 1;
  // V(193) = K(193,1) * [EGFR_p |STAT1];
  R193: EGFR_p => STAT1; 1;
  // V(194) = K(194,1) * [INSR_p] * [PTEN] -K(194,2) * [INSR_p |PTEN];
  R194: PTEN => INSR_p; 1;
  // V(195) = K(195,1) * [INSR_p |PTEN];
  R195: PTEN => INSR_p; 1;
  // V(196) = K(196,1) * [STK11_p] * [TP53] -K(196,2) * [STK11_p |TP53];
  R196: TP53 => STK11_p; 1;
  // V(197) = K(197,1) * [STK11_p |TP53];
  R197: TP53 => STK11_p; 1;
  // V(198) = K(198,1) * [INSR_p] * [PIK3R1] -K(198,2) * [INSR_p |PIK3R1];
  R198: PIK3R1 => INSR_p; 1;
  // V(199) = K(199,1) * [INSR_p |PIK3R1];
  R199: PIK3R1 => INSR_p; 1;
  // V(200) = K(200,1) * [PRKAA1_p] * [MFF] -K(200,2) * [PRKAA1_p |MFF];
  R200: PRKAA1_p => MFF; 1;
  // V(201) = K(201,1) * [PRKAA1_p |MFF];
  R201: PRKAA1_p => MFF; 1;
  // V(202) = K(202,1) * [LYN_p] * [GLO1] -K(202,2) * [LYN_p |GLO1];
  R202: GLO1 => LYN_p; 1;
  // V(203) = K(203,1) * [LYN_p |GLO1];
  R203: GLO1 => LYN_p; 1;
  // V(204) = K(204,1) * [EGFR_p] * [PARP1] -K(204,2) * [EGFR_p |PARP1];
  R204: EGFR_p => PARP1; 1;
  // V(205) = K(205,1) * [EGFR_p |PARP1];
  R205: EGFR_p => PARP1; 1;
  // V(206) = K(206,1) * [STK11_p] * [F2R] -K(206,2) * [STK11_p |F2R];
  R206: F2R => STK11_p; 1;
  // V(207) = K(207,1) * [STK11_p |F2R];
  R207: F2R => STK11_p; 1;
  // V(208) = K(208,1) * [ATR] * [TP53] -K(208,2) * [ATR |TP53];
  R208: TP53 => ATR; 1;
  // V(209) = K(209,1) * [ATR |TP53];
  R209: TP53 => ATR; 1;
  // V(210) = K(210,1) * [ATR] * [CREB1] -K(210,2) * [ATR |CREB1];
  R210: ATR => CREB1; 1;
  // V(211) = K(211,1) * [ATR |CREB1];
  R211: ATR => CREB1; 1;
  // V(212) = K(212,1) * [EGFR_p] * [AGO2] -K(212,2) * [EGFR_p |AGO2];
  R212: EGFR_p => AGO2; 1;
  // V(213) = K(213,1) * [EGFR_p |AGO2];
  R213: EGFR_p => AGO2; 1;
  // V(214) = K(214,1) * [EGFR_p] * [TLR3] -K(214,2) * [EGFR_p |TLR3];
  R214: EGFR_p => TLR3; 1;
  // V(215) = K(215,1) * [EGFR_p |TLR3];
  R215: EGFR_p => TLR3; 1;
  // V(216) = K(216,1) * [EGFR_p] * [LYN] -K(216,2) * [EGFR_p |LYN];
  R216: EGFR_p => LYN; 1;
  // V(217) = K(217,1) * [EGFR_p |LYN];
  R217: EGFR_p => LYN; 1;
  // V(218) = K(218,1) * [TGFBR1] * [SMAD3] -K(218,2) * [TGFBR1 |SMAD3];
  R218: TGFBR1 => SMAD3; 1;
  // V(219) = K(219,1) * [TGFBR1 |SMAD3];
  R219: TGFBR1 => SMAD3; 1;
  // V(220) = K(220,1) * [STK11_p] * [PRKAA1] -K(220,2) * [STK11_p |PRKAA1];
  R220: PRKAA1 => STK11_p; 1;
  // V(221) = K(221,1) * [STK11_p |PRKAA1];
  R221: PRKAA1 => STK11_p; 1;
  // V(222) = K(222,1) * [RPS6KA3_p] * [TSC2] -K(222,2) * [RPS6KA3_p |TSC2];
  R222: RPS6KA3_p => TSC2; 1;
  // V(223) = K(223,1) * [RPS6KA3_p |TSC2];
  R223: RPS6KA3_p => TSC2; 1;
  // V(224) = K(224,1) * [FYN_p] * [CTNNB1] -K(224,2) * [FYN_p |CTNNB1];
  R224: FYN_p => CTNNB1; 1;
  // V(225) = K(225,1) * [FYN_p |CTNNB1];
  R225: FYN_p => CTNNB1; 1;
  // V(226) = K(226,1) * [EGFR_p] * [ANXA1] -K(226,2) * [EGFR_p |ANXA1];
  R226: EGFR_p => ANXA1; 1;
  // V(227) = K(227,1) * [EGFR_p |ANXA1];
  R227: EGFR_p => ANXA1; 1;
  // V(228) = K(228,1) * [TLR4] * [MAPK12] -K(228,2) * [TLR4 |MAPK12];
  R228: MAPK12 => TLR4; 1;
  // V(229) = K(229,1) * [TLR4 |MAPK12];
  R229: MAPK12 => TLR4; 1;
  // V(230) = K(230,1) * [MAPK1_p] * [TP53] -K(230,2) * [MAPK1_p |TP53];
  R230: TP53 => MAPK1_p; 1;
  // V(231) = K(231,1) * [MAPK1_p |TP53];
  R231: TP53 => MAPK1_p; 1;
  // V(232) = K(232,1) * [PRKAA1_p] * [NFE2L2] -K(232,2) * [PRKAA1_p |NFE2L2];
  R232: PRKAA1_p => NFE2L2; 1;
  // V(233) = K(233,1) * [PRKAA1_p |NFE2L2];
  R233: PRKAA1_p => NFE2L2; 1;
  // V(234) = K(234,1) * [PRKAA1_p] * [PRKAA1] -K(234,2) * [PRKAA1_p |PRKAA1];
  R234: PRKAA1 => PRKAA1_p; 1;
  // V(235) = K(235,1) * [PRKAA1_p |PRKAA1];
  R235: PRKAA1 => PRKAA1_p; 1;
  // V(236) = K(236,1) * [RPS6KA3_p] * [STK11] -K(236,2) * [RPS6KA3_p |STK11];
  R236: RPS6KA3_p => STK11; 1;
  // V(237) = K(237,1) * [RPS6KA3_p |STK11];
  R237: RPS6KA3_p => STK11; 1;
  // V(238) = K(238,1) * [SGK1] * [STAT1] -K(238,2) * [SGK1 |STAT1];
  R238: STAT1 => SGK1; 1;
  // V(239) = K(239,1) * [SGK1 |STAT1];
  R239: STAT1 => SGK1; 1;
  // V(240) = K(240,1) * [TLR4] * [MAPK1] -K(240,2) * [TLR4 |MAPK1];
  R240: MAPK1 => TLR4; 1;
  // V(241) = K(241,1) * [TLR4 |MAPK1];
  R241: MAPK1 => TLR4; 1;
  // V(242) = K(242,1) * [FYN_p] * [RPS6KA3] -K(242,2) * [FYN_p |RPS6KA3];
  R242: FYN_p => RPS6KA3; 1;
  // V(243) = K(243,1) * [FYN_p |RPS6KA3];
  R243: FYN_p => RPS6KA3; 1;
  // V(244) = K(244,1) * [MAPK12_p] * [DDIT3] -K(244,2) * [MAPK12_p |DDIT3];
  R244: MAPK12_p => DDIT3; 1;
  // V(245) = K(245,1) * [MAPK12_p |DDIT3];
  R245: MAPK12_p => DDIT3; 1;
  // V(246) = K(246,1) * [FYN_p] * [NFE2L2] -K(246,2) * [FYN_p |NFE2L2];
  R246: FYN_p => NFE2L2; 1;
  // V(247) = K(247,1) * [FYN_p |NFE2L2];
  R247: FYN_p => NFE2L2; 1;
  // V(248) = K(248,1) * [TEK_p] * [STAT1] -K(248,2) * [TEK_p |STAT1];
  R248: TEK_p => STAT1; 1;
  // V(249) = K(249,1) * [TEK_p |STAT1];
  R249: TEK_p => STAT1; 1;
  // V(250) = K(250,1) * [LYN_p] * [EGFR] -K(250,2) * [LYN_p |EGFR];
  R250: EGFR => LYN_p; 1;
  // V(251) = K(251,1) * [LYN_p |EGFR];
  R251: EGFR => LYN_p; 1;
  // V(252) = K(252,1) * [EGFR_p] * [CTNNB1] -K(252,2) * [EGFR_p |CTNNB1];
  R252: EGFR_p => CTNNB1; 1;
  // V(253) = K(253,1) * [EGFR_p |CTNNB1];
  R253: EGFR_p => CTNNB1; 1;
  // V(254) = K(254,1) * [ROCK2] * [EP300] -K(254,2) * [ROCK2 |EP300];
  R254: EP300 => ROCK2; 1;
  // V(255) = K(255,1) * [ROCK2 |EP300];
  R255: EP300 => ROCK2; 1;
  // V(256) = K(256,1) * [MAPK6_p] * [MAPK6] -K(256,2) * [MAPK6_p |MAPK6];
  R256: MAPK6_p => MAPK6; 1;
  // V(257) = K(257,1) * [MAPK6_p |MAPK6];
  R257: MAPK6_p => MAPK6; 1;
  // V(258) = K(258,1) * [MAPK1_p] * [NR4A1] -K(258,2) * [MAPK1_p |NR4A1];
  R258: NR4A1 => MAPK1_p; 1;
  // V(259) = K(259,1) * [MAPK1_p |NR4A1];
  R259: NR4A1 => MAPK1_p; 1;
  // V(260) = K(260,1) * [PINK1] * [PTEN] -K(260,2) * [PINK1 |PTEN];
  R260: PTEN => PINK1; 1;
  // V(261) = K(261,1) * [PINK1 |PTEN];
  R261: PTEN => PINK1; 1;
  // V(262) = K(262,1) * [MAPK1_p] * [TXNIP] -K(262,2) * [MAPK1_p |TXNIP];
  R262: TXNIP => MAPK1_p; 1;
  // V(263) = K(263,1) * [MAPK1_p |TXNIP];
  R263: TXNIP => MAPK1_p; 1;
  // V(264) = K(264,1) * [STK11_p] * [CDKN1A] -K(264,2) * [STK11_p |CDKN1A];
  R264: STK11_p => CDKN1A; 1;
  // V(265) = K(265,1) * [STK11_p |CDKN1A];
  R265: STK11_p => CDKN1A; 1;
  // V(266) = K(266,1) * [EGFR_p] * [PKM] -K(266,2) * [EGFR_p |PKM];
  R266: EGFR_p => PKM; 1;
  // V(267) = K(267,1) * [EGFR_p |PKM];
  R267: EGFR_p => PKM; 1;
  // V(268) = K(268,1) * [TLR4] * [MAPK9] -K(268,2) * [TLR4 |MAPK9];
  R268: MAPK9 => TLR4; 1;
  // V(269) = K(269,1) * [TLR4 |MAPK9];
  R269: MAPK9 => TLR4; 1;
  // V(270) = K(270,1) * [PIK3CA] * [PIK3R1] -K(270,2) * [PIK3CA |PIK3R1];
  R270: PIK3CA => PIK3R1; 1;
  // V(271) = K(271,1) * [PIK3CA |PIK3R1];
  R271: PIK3CA => PIK3R1; 1;
  // V(272) = K(272,1) * [LYN_p] * [PTPN6] -K(272,2) * [LYN_p |PTPN6];
  R272: PTPN6 => LYN_p; 1;
  // V(273) = K(273,1) * [LYN_p |PTPN6];
  R273: PTPN6 => LYN_p; 1;
  // V(274) = K(274,1) * [PRKAA1_p] * [TP53] -K(274,2) * [PRKAA1_p |TP53];
  R274: TP53 => PRKAA1_p; 1;
  // V(275) = K(275,1) * [PRKAA1_p |TP53];
  R275: TP53 => PRKAA1_p; 1;
  // V(276) = K(276,1) * [PTPRJ_p] * [INSR_p] -K(276,2) * [PTPRJ_p |INSR_p];
  R276: PTPRJ_p => INSR_p; 1;
  // V(277) = K(277,1) * [PTPRJ_p |INSR_p];
  R277: PTPRJ_p => INSR_p; 1;
  // V(278) = K(278,1) * [PTPRJ_p] * [MAPK1_p] -K(278,2) * [PTPRJ_p |MAPK1_p];
  R278: PTPRJ_p => MAPK1_p; 1;
  // V(279) = K(279,1) * [PTPRJ_p |MAPK1_p];
  R279: PTPRJ_p => MAPK1_p; 1;
  // V(280) = K(280,1) * [PTPN2] * [KDR_p] -K(280,2) * [PTPN2 |KDR_p];
  R280: PTPN2 => KDR_p; 1;
  // V(281) = K(281,1) * [PTPN2 |KDR_p];
  R281: PTPN2 => KDR_p; 1;
  // V(282) = K(282,1) * [PTPN6_p] * [JAK2_p] -K(282,2) * [PTPN6_p |JAK2_p];
  R282: PTPN6_p => JAK2_p; 1;
  // V(283) = K(283,1) * [PTPN6_p |JAK2_p];
  R283: PTPN6_p => JAK2_p; 1;
  // V(284) = K(284,1) * [PTPN6_p] * [EGFR_p] -K(284,2) * [PTPN6_p |EGFR_p];
  R284: PTPN6_p => EGFR_p; 1;
  // V(285) = K(285,1) * [PTPN6_p |EGFR_p];
  R285: PTPN6_p => EGFR_p; 1;
  // V(286) = K(286,1) * [PTPN6_p] * [KDR_p] -K(286,2) * [PTPN6_p |KDR_p];
  R286: PTPN6_p => KDR_p; 1;
  // V(287) = K(287,1) * [PTPN6_p |KDR_p];
  R287: PTPN6_p => KDR_p; 1;
  // V(288) = K(288,1) * [PTPRJ_p] * [CTNNB1_p] -K(288,2) * [PTPRJ_p |CTNNB1_p];
  R288: PTPRJ_p => CTNNB1_p; 1;
  // V(289) = K(289,1) * [PTPRJ_p |CTNNB1_p];
  R289: PTPRJ_p => CTNNB1_p; 1;
  // V(290) = K(290,1) * [PTEN] * [RPS6KB1_p] -K(290,2) * [PTEN |RPS6KB1_p];
  R290: PTEN => RPS6KB1_p; 1;
  // V(291) = K(291,1) * [PTEN |RPS6KB1_p];
  R291: PTEN => RPS6KB1_p; 1;
  // V(292) = K(292,1) * [PTPN2] * [INSR_p] -K(292,2) * [PTPN2 |INSR_p];
  R292: INSR_p => PTPN2; 1;
  // V(293) = K(293,1) * [PTPN2 |INSR_p];
  R293: INSR_p => PTPN2; 1;
  // V(294) = K(294,1) * [PTPRJ_p] * [KDR_p] -K(294,2) * [PTPRJ_p |KDR_p];
  R294: PTPRJ_p => KDR_p; 1;
  // V(295) = K(295,1) * [PTPRJ_p |KDR_p];
  R295: PTPRJ_p => KDR_p; 1;
  // V(296) = K(296,1) * [PTEN] * [AR_p] -K(296,2) * [PTEN |AR_p];
  R296: PTEN => AR_p; 1;
  // V(297) = K(297,1) * [PTEN |AR_p];
  R297: PTEN => AR_p; 1;
  // V(298) = K(298,1) * [DUSP1_p] * [MAPK9_p] -K(298,2) * [DUSP1_p |MAPK9_p];
  R298: DUSP1_p => MAPK9_p; 1;
  // V(299) = K(299,1) * [DUSP1_p |MAPK9_p];
  R299: DUSP1_p => MAPK9_p; 1;
  // V(300) = K(300,1) * [PTPN2] * [FYN_p] -K(300,2) * [PTPN2 |FYN_p];
  R300: FYN_p => PTPN2; 1;
  // V(301) = K(301,1) * [PTPN2 |FYN_p];
  R301: FYN_p => PTPN2; 1;
  // V(302) = K(302,1) * [PTPN6_p] * [PKM_p] -K(302,2) * [PTPN6_p |PKM_p];
  R302: PTPN6_p => PKM_p; 1;
  // V(303) = K(303,1) * [PTPN6_p |PKM_p];
  R303: PTPN6_p => PKM_p; 1;
  // V(304) = K(304,1) * [PTPN6_p] * [INSR_p] -K(304,2) * [PTPN6_p |INSR_p];
  R304: PTPN6_p => INSR_p; 1;
  // V(305) = K(305,1) * [PTPN6_p |INSR_p];
  R305: PTPN6_p => INSR_p; 1;
  // V(306) = K(306,1) * [DUSP1_p] * [MAPK1_p] -K(306,2) * [DUSP1_p |MAPK1_p];
  R306: DUSP1_p => MAPK1_p; 1;
  // V(307) = K(307,1) * [DUSP1_p |MAPK1_p];
  R307: DUSP1_p => MAPK1_p; 1;
  // V(308) = K(308,1) * [PTPN2] * [JAK1_p] -K(308,2) * [PTPN2 |JAK1_p];
  R308: PTPN2 => JAK1_p; 1;
  // V(309) = K(309,1) * [PTPN2 |JAK1_p];
  R309: PTPN2 => JAK1_p; 1;
  // V(310) = K(310,1) * [PTPN6_p] * [JAK1_p] -K(310,2) * [PTPN6_p |JAK1_p];
  R310: PTPN6_p => JAK1_p; 1;
  // V(311) = K(311,1) * [PTPN6_p |JAK1_p];
  R311: PTPN6_p => JAK1_p; 1;
  // V(312) = K(312,1) * [PTPN2] * [EGFR_p] -K(312,2) * [PTPN2 |EGFR_p];
  R312: EGFR_p => PTPN2; 1;
  // V(313) = K(313,1) * [PTPN2 |EGFR_p];
  R313: EGFR_p => PTPN2; 1;
  // V(314) = K(314,1) * [PTEN] * [SP1_p] -K(314,2) * [PTEN |SP1_p];
  R314: PTEN => SP1_p; 1;
  // V(315) = K(315,1) * [PTEN |SP1_p];
  R315: PTEN => SP1_p; 1;
  // V(316) = K(316,1) * [PTEN] * [PTEN_p] -K(316,2) * [PTEN |PTEN_p];
  R316: PTEN => PTEN_p; 1;
  // V(317) = K(317,1) * [PTEN |PTEN_p];
  R317: PTEN => PTEN_p; 1;
  // V(318) = K(318,1) * [PTPRJ_p] * [PIK3R1_p] -K(318,2) * [PTPRJ_p |PIK3R1_p];
  R318: PTPRJ_p => PIK3R1_p; 1;
  // V(319) = K(319,1) * [PTPRJ_p |PIK3R1_p];
  R319: PTPRJ_p => PIK3R1_p; 1;
  // V(320) = K(320,1) * [PTPRJ_p] * [SIGNOR-C156_p] -K(320,2) * [PTPRJ_p |SIGNOR-C156_p];
  R320: PTPRJ_p => ; 1;
  // V(321) = K(321,1) * [PTPRJ_p |SIGNOR-C156_p];
  R321: PTPRJ_p => ; 1;
  // V(322) = K(322,1) * [PTPRJ_p] * [JAK2_p] -K(322,2) * [PTPRJ_p |JAK2_p];
  R322: PTPRJ_p => JAK2_p; 1;
  // V(323) = K(323,1) * [PTPRJ_p |JAK2_p];
  R323: PTPRJ_p => JAK2_p; 1;
  // V(324) = K(324,1) * [PTPN2] * [STAT1_p] -K(324,2) * [PTPN2 |STAT1_p];
  R324: STAT1_p => PTPN2; 1;
  // V(325) = K(325,1) * [PTPN2 |STAT1_p];
  R325: STAT1_p => PTPN2; 1;
  // V(326) = K(326,1) * [PTPRJ_p] * [EGFR_p] -K(326,2) * [PTPRJ_p |EGFR_p];
  R326: PTPRJ_p => EGFR_p; 1;
  // V(327) = K(327,1) * [PTPRJ_p |EGFR_p];
  R327: PTPRJ_p => EGFR_p; 1;
  // V(328) = K(328,1) * [PTEN] * [IRF3_p] -K(328,2) * [PTEN |IRF3_p];
  R328: PTEN => IRF3_p; 1;
  // V(329) = K(329,1) * [PTEN |IRF3_p];
  R329: PTEN => IRF3_p; 1;
  // V(330) = K(330,1) * [PTEN] * [CREB1_p] -K(330,2) * [PTEN |CREB1_p];
  R330: PTEN => CREB1_p; 1;
  // V(331) = K(331,1) * [PTEN |CREB1_p];
  R331: PTEN => CREB1_p; 1;
  // V(332) = K(332,1) * [DUSP1_p] * [JUN_p] -K(332,2) * [DUSP1_p |JUN_p];
  R332: JUN_p => DUSP1_p; 1;
  // V(333) = K(333,1) * [DUSP1_p |JUN_p];
  R333: JUN_p => DUSP1_p; 1;
  // V(334) = K(334,1) * [PTPN6_p] * [CTNNB1_p] -K(334,2) * [PTPN6_p |CTNNB1_p];
  R334: PTPN6_p => CTNNB1_p; 1;
  // V(335) = K(335,1) * [PTPN6_p |CTNNB1_p];
  R335: PTPN6_p => CTNNB1_p; 1;
  // V(336) = K(336,1) * [PTPN6_p] * [LYN_p] -K(336,2) * [PTPN6_p |LYN_p];
  R336: PTPN6_p => LYN_p; 1;
  // V(337) = K(337,1) * [PTPN6_p |LYN_p];
  R337: PTPN6_p => LYN_p; 1;
  // V(338) = K(338,1) * [MYLIP] * [LDLR] -K(338,2) * [MYLIP |LDLR];
  R338: MYLIP => LDLR; 1;
  // V(339) = K(339,1) * [MYLIP |LDLR];
  R339: MYLIP => LDLR; 1;
  // V(340) = K(340,1) * [MDM2] * [NOTCH1] -K(340,2) * [MDM2 |NOTCH1];
  R340: NOTCH1 => MDM2; 1;
  // V(341) = K(341,1) * [MDM2 |NOTCH1];
  R341: NOTCH1 => MDM2; 1;
  // V(342) = K(342,1) * [MDM2] * [NUMB] -K(342,2) * [MDM2 |NUMB];
  R342: NUMB => MDM2; 1;
  // V(343) = K(343,1) * [MDM2 |NUMB];
  R343: NUMB => MDM2; 1;
  // V(344) = K(344,1) * [MDM2] * [TP53] -K(344,2) * [MDM2 |TP53];
  R344: TP53 => MDM2; 1;
  // V(345) = K(345,1) * [MDM2 |TP53];
  R345: TP53 => MDM2; 1;
  // V(346) = K(346,1) * [MDM2] * [HDAC1] -K(346,2) * [MDM2 |HDAC1];
  R346: HDAC1 => MDM2; 1;
  // V(347) = K(347,1) * [MDM2 |HDAC1];
  R347: HDAC1 => MDM2; 1;
  // V(348) = K(348,1) * [MYLIP] * [MYLIP] -K(348,2) * [MYLIP |MYLIP];
  R348: MYLIP => ; 1;
  // V(349) = K(349,1) * [MYLIP |MYLIP];
  R349: MYLIP => ; 1;
  // V(350) = K(350,1) * [MDM2] * [IGF1R] -K(350,2) * [MDM2 |IGF1R];
  R350: IGF1R => MDM2; 1;
  // V(351) = K(351,1) * [MDM2 |IGF1R];
  R351: IGF1R => MDM2; 1;
  // V(352) = K(352,1) * [MYLIP] * [AR] -K(352,2) * [MYLIP |AR];
  R352: MYLIP => AR; 1;
  // V(353) = K(353,1) * [MYLIP |AR];
  R353: MYLIP => AR; 1;
  // V(354) = K(354,1) * [NUMB] * [NOTCH1] -K(354,2) * [NUMB |NOTCH1];
  R354: NOTCH1 => NUMB; 1;
  // V(355) = K(355,1) * [NUMB |NOTCH1];
  R355: NOTCH1 => NUMB; 1;
  // V(356) = K(356,1) * [MDM2] * [SIRT6] -K(356,2) * [MDM2 |SIRT6];
  R356: SIRT6 => MDM2; 1;
  // V(357) = K(357,1) * [MDM2 |SIRT6];
  R357: SIRT6 => MDM2; 1;
  // V(358) = K(358,1) * [TP53_p] * [CDKN1A_g] -K(358,2) * [TP53_p |CDKN1A_g];
  R358: CDKN1A_g => TP53_p; 1;
  // V(359) = K(359,1) * [TP53_p |CDKN1A_g];
  R359: CDKN1A_g => TP53_p; 1;
  // V(360) = K(360,1) * [CDKN1A_rna];
  R360: CDKN1A_rna => ; 1;
  // V(361) = K(361,1) * [NFE2L2_p] * [SOD1_g] -K(361,2) * [NFE2L2_p |SOD1_g];
  R361: SOD1_g => NFE2L2_p; 1;
  // V(362) = K(362,1) * [NFE2L2_p |SOD1_g];
  R362: SOD1_g => NFE2L2_p; 1;
  // V(363) = K(363,1) * [SOD1_rna];
  R363: SOD1_rna => ; 1;
  // V(364) = K(364,1) * [SREBF1_p] * [PKM_g] -K(364,2) * [SREBF1_p |PKM_g];
  R364: PKM_g => SREBF1_p; 1;
  // V(365) = K(365,1) * [SREBF1_p |PKM_g];
  R365: PKM_g => SREBF1_p; 1;
  // V(366) = K(366,1) * [PKM_rna];
  R366: PKM_rna => ; 1;
  // V(367) = K(367,1) * [ATF3] * [GDF15_g] -K(367,2) * [ATF3 |GDF15_g];
  R367: GDF15_g => ATF3; 1;
  // V(368) = K(368,1) * [ATF3 |GDF15_g];
  R368: GDF15_g => ATF3; 1;
  // V(369) = K(369,1) * [GDF15_rna];
  R369: GDF15_rna => ; 1;
  // V(370) = K(370,1) * [TP53_p] * [BAX_g] -K(370,2) * [TP53_p |BAX_g];
  R370: BAX_g => TP53_p; 1;
  // V(371) = K(371,1) * [TP53_p |BAX_g];
  R371: BAX_g => TP53_p; 1;
  // V(372) = K(372,1) * [BAX_rna];
  R372: BAX_rna => ; 1;
  // V(373) = K(373,1) * [STAT1_p] * [SOCS3_g] -K(373,2) * [STAT1_p |SOCS3_g];
  R373: SOCS3_g => STAT1_p; 1;
  // V(374) = K(374,1) * [STAT1_p |SOCS3_g];
  R374: SOCS3_g => STAT1_p; 1;
  // V(375) = K(375,1) * [SOCS3_rna];
  R375: SOCS3_rna => ; 1;
  // V(376) = K(376,1) * [NFE2L2_p] * [GCLC_g] -K(376,2) * [NFE2L2_p |GCLC_g];
  R376: GCLC_g => NFE2L2_p; 1;
  // V(377) = K(377,1) * [NFE2L2_p |GCLC_g];
  R377: GCLC_g => NFE2L2_p; 1;
  // V(378) = K(378,1) * [GCLC_rna];
  R378: GCLC_rna => ; 1;
  // V(379) = K(379,1) * [FOXO1_p] * [PCK1_g] -K(379,2) * [FOXO1_p |PCK1_g];
  R379: FOXO1_p => PCK1_g; 1;
  // V(380) = K(380,1) * [FOXO1_p |PCK1_g];
  R380: FOXO1_p => PCK1_g; 1;
  // V(381) = K(381,1) * [PCK1_rna];
  R381: PCK1_rna => ; 1;
  // V(382) = K(382,1) * [NR3C1_p] * [KLF9_g] -K(382,2) * [NR3C1_p |KLF9_g];
  R382: KLF9_g => NR3C1_p; 1;
  // V(383) = K(383,1) * [NR3C1_p |KLF9_g];
  R383: KLF9_g => NR3C1_p; 1;
  // V(384) = K(384,1) * [KLF9_rna];
  R384: KLF9_rna => ; 1;
  // V(385) = K(385,1) * [SP1_p] * [CD34_g] -K(385,2) * [SP1_p |CD34_g];
  R385: SP1_p => CD34_g; 1;
  // V(386) = K(386,1) * [SP1_p |CD34_g];
  R386: SP1_p => CD34_g; 1;
  // V(387) = K(387,1) * [CD34_rna];
  R387: CD34_rna => ; 1;
  // V(388) = K(388,1) * [NFE2L2_p] * [GPX4_g] -K(388,2) * [NFE2L2_p |GPX4_g];
  R388: GPX4_g => NFE2L2_p; 1;
  // V(389) = K(389,1) * [NFE2L2_p |GPX4_g];
  R389: GPX4_g => NFE2L2_p; 1;
  // V(390) = K(390,1) * [GPX4_rna];
  R390: GPX4_rna => ; 1;
  // V(391) = K(391,1) * [TP53_p] * [AIFM1_g] -K(391,2) * [TP53_p |AIFM1_g];
  R391: AIFM1_g => TP53_p; 1;
  // V(392) = K(392,1) * [TP53_p |AIFM1_g];
  R392: AIFM1_g => TP53_p; 1;
  // V(393) = K(393,1) * [AIFM1_rna];
  R393: AIFM1_rna => ; 1;
  // V(394) = K(394,1) * [NFE2L2_p] * [SOD2_g] -K(394,2) * [NFE2L2_p |SOD2_g];
  R394: SOD2_g => NFE2L2_p; 1;
  // V(395) = K(395,1) * [NFE2L2_p |SOD2_g];
  R395: SOD2_g => NFE2L2_p; 1;
  // V(396) = K(396,1) * [SOD2_rna];
  R396: SOD2_rna => ; 1;
  // V(397) = K(397,1) * [ETS1] * [FOS_g] -K(397,2) * [ETS1 |FOS_g];
  R397: FOS_g => ETS1; 1;
  // V(398) = K(398,1) * [ETS1 |FOS_g];
  R398: FOS_g => ETS1; 1;
  // V(399) = K(399,1) * [FOS_rna];
  R399: FOS_rna => ; 1;
  // V(400) = K(400,1) * [HES1] * [NR3C1_g] -K(400,2) * [HES1 |NR3C1_g];
  R400: HES1 => NR3C1_g; 1;
  // V(401) = K(401,1) * [NR3C1_g];
  R401: NR3C1_g => ; 1;
  // V(402) = K(402,1) * [NR3C1_rna];
  R402: NR3C1_rna => ; 1;
  // V(403) = K(403,1) * [NR3C1_p] * [JUN_g] -K(403,2) * [NR3C1_p |JUN_g];
  R403: JUN_g => NR3C1_p; 1;
  // V(404) = K(404,1) * [JUN_g];
  R404: JUN_g => ; 1;
  // V(405) = K(405,1) * [JUN_rna];
  R405: JUN_rna => ; 1;
  // V(406) = K(406,1) * [SMAD7] * [SMAD3_g] -K(406,2) * [SMAD7 |SMAD3_g];
  R406: SMAD7 => SMAD3_g; 1;
  // V(407) = K(407,1) * [SMAD3_g];
  R407: SMAD3_g => ; 1;
  // V(408) = K(408,1) * [SMAD3_rna];
  R408: SMAD3_rna => ; 1;
  // V(409) = K(409,1) * [HES1] * [RCAN1_g] -K(409,2) * [HES1 |RCAN1_g];
  R409: HES1 => RCAN1_g; 1;
  // V(410) = K(410,1) * [RCAN1_g];
  R410: RCAN1_g => ; 1;
  // V(411) = K(411,1) * [RCAN1_rna];
  R411: RCAN1_rna => ; 1;
  // V(412) = K(412,1) * [SGK1];
  R412: SGK1 => ; 1;
  // V(413) = K(413,1) * [TLR4];
  R413: TLR4 => ; 1;
  // V(414) = K(414,1) * [SOCS3];
  R414: SOCS3 => ; 1;
  // V(415) = K(415,1) * [SMAD7];
  R415: SMAD7 => ; 1;
  // V(416) = K(416,1) * [TLR3];
  R416: TLR3 => ; 1;
  // V(417) = K(417,1) * [JAK2];
  R417: JAK2 => ; 1;
  // V(418) = K(418,1) * [ROCK2];
  R418: ROCK2 => ; 1;
  // V(419) = K(419,1) * [AIFM1];
  R419: AIFM1 => ; 1;
  // V(420) = K(420,1) * [SOD1];
  R420: SOD1 => ; 1;
  // V(421) = K(421,1) * [EGFR];
  R421: EGFR => ; 1;
  // V(422) = K(422,1) * [FOS];
  R422: FOS => ; 1;
  // V(423) = K(423,1) * [LDLR];
  R423: LDLR => ; 1;
  // V(424) = K(424,1) * [ANXA1];
  R424: ANXA1 => ; 1;
  // V(425) = K(425,1) * [NR3C1];
  R425: NR3C1 => ; 1;
  // V(426) = K(426,1) * [SOD2];
  R426: SOD2 => ; 1;
  // V(427) = K(427,1) * [TP53];
  R427: TP53 => ; 1;
  // V(428) = K(428,1) * [HMGN1];
  R428: HMGN1 => ; 1;
  // V(429) = K(429,1) * [JUN];
  R429: JUN => ; 1;
  // V(430) = K(430,1) * [INSR];
  R430: INSR => ; 1;
  // V(431) = K(431,1) * [FYN];
  R431: FYN => ; 1;
  // V(432) = K(432,1) * [LYN];
  R432: LYN => ; 1;
  // V(433) = K(433,1) * [SP1];
  R433: SP1 => ; 1;
  // V(434) = K(434,1) * [IGF1R];
  R434: IGF1R => ; 1;
  // V(435) = K(435,1) * [NR3C2];
  R435: NR3C2 => ; 1;
  // V(436) = K(436,1) * [IL6R];
  R436: IL6R => ; 1;
  // V(437) = K(437,1) * [FGF2];
  R437: FGF2 => ; 1;
  // V(438) = K(438,1) * [PARP1];
  R438: PARP1 => ; 1;
  // V(439) = K(439,1) * [UBC];
  R439: UBC => ; 1;
  // V(440) = K(440,1) * [CALM1];
  R440: CALM1 => ; 1;
  // V(441) = K(441,1) * [AR];
  R441: AR => ; 1;
  // V(442) = K(442,1) * [PKM];
  R442: PKM => ; 1;
  // V(443) = K(443,1) * [ETS1];
  R443: ETS1 => ; 1;
  // V(444) = K(444,1) * [FABP4];
  R444: FABP4 => ; 1;
  // V(445) = K(445,1) * [VEGFA];
  R445: VEGFA => ; 1;
  // V(446) = K(446,1) * [CREB1];
  R446: CREB1 => ; 1;
  // V(447) = K(447,1) * [PTPN2];
  R447: PTPN2 => ; 1;
  // V(448) = K(448,1) * [ATF3];
  R448: ATF3 => ; 1;
  // V(449) = K(449,1) * [NR4A1];
  R449: NR4A1 => ; 1;
  // V(450) = K(450,1) * [RPS6KB1];
  R450: RPS6KB1 => ; 1;
  // V(451) = K(451,1) * [JAK1];
  R451: JAK1 => ; 1;
  // V(452) = K(452,1) * [F2R];
  R452: F2R => ; 1;
  // V(453) = K(453,1) * [ZFP36];
  R453: ZFP36 => ; 1;
  // V(454) = K(454,1) * [PIK3R1];
  R454: PIK3R1 => ; 1;
  // V(455) = K(455,1) * [MAPK1];
  R455: MAPK1 => ; 1;
  // V(456) = K(456,1) * [DUSP1];
  R456: DUSP1 => ; 1;
  // V(457) = K(457,1) * [CD34];
  R457: CD34 => ; 1;
  // V(458) = K(458,1) * [PTPN6];
  R458: PTPN6 => ; 1;
  // V(459) = K(459,1) * [NOS3];
  R459: NOS3 => ; 1;
  // V(460) = K(460,1) * [CTNNB1];
  R460: CTNNB1 => ; 1;
  // V(461) = K(461,1) * [RORA];
  R461: RORA => ; 1;
  // V(462) = K(462,1) * [PCK1];
  R462: PCK1 => ; 1;
  // V(463) = K(463,1) * [DDIT3];
  R463: DDIT3 => ; 1;
  // V(464) = K(464,1) * [KDR];
  R464: KDR => ; 1;
  // V(465) = K(465,1) * [TGFBR1];
  R465: TGFBR1 => ; 1;
  // V(466) = K(466,1) * [SREBF1];
  R466: SREBF1 => ; 1;
  // V(467) = K(467,1) * [GPX4];
  R467: GPX4 => ; 1;
  // V(468) = K(468,1) * [CDKN1A];
  R468: CDKN1A => ; 1;
  // V(469) = K(469,1) * [STAT1];
  R469: STAT1 => ; 1;
  // V(470) = K(470,1) * [PIK3CA];
  R470: PIK3CA => ; 1;
  // V(471) = K(471,1) * [MAPK9];
  R471: MAPK9 => ; 1;
  // V(472) = K(472,1) * [NOTCH1];
  R472: NOTCH1 => ; 1;
  // V(473) = K(473,1) * [YAP1];
  R473: YAP1 => ; 1;
  // V(474) = K(474,1) * [LEPR];
  R474: LEPR => ; 1;
  // V(475) = K(475,1) * [GCLC];
  R475: GCLC => ; 1;
  // V(476) = K(476,1) * [NUMB];
  R476: NUMB => ; 1;
  // V(477) = K(477,1) * [TSC2];
  R477: TSC2 => ; 1;
  // V(478) = K(478,1) * [RPS6KA3];
  R478: RPS6KA3 => ; 1;
  // V(479) = K(479,1) * [MAPK12];
  R479: MAPK12 => ; 1;
  // V(480) = K(480,1) * [RCAN1];
  R480: RCAN1 => ; 1;
  // V(481) = K(481,1) * [PTEN];
  R481: PTEN => ; 1;
  // V(482) = K(482,1) * [SMAD3];
  R482: SMAD3 => ; 1;
  // V(483) = K(483,1) * [MDM2];
  R483: MDM2 => ; 1;
  // V(484) = K(484,1) * [TEK];
  R484: TEK => ; 1;
  // V(485) = K(485,1) * [GLO1];
  R485: GLO1 => ; 1;
  // V(486) = K(486,1) * [BAX];
  R486: BAX => ; 1;
  // V(487) = K(487,1) * [EP300];
  R487: EP300 => ; 1;
  // V(488) = K(488,1) * [FOXO1];
  R488: FOXO1 => ; 1;
  // V(489) = K(489,1) * [MAP4K2];
  R489: MAP4K2 => ; 1;
  // V(490) = K(490,1) * [PTPRJ];
  R490: PTPRJ => ; 1;
  // V(491) = K(491,1) * [PRKAA1];
  R491: PRKAA1 => ; 1;
  // V(492) = K(492,1) * [SMAD4];
  R492: SMAD4 => ; 1;
  // V(493) = K(493,1) * [ATR];
  R493: ATR => ; 1;
  // V(494) = K(494,1) * [HDAC1];
  R494: HDAC1 => ; 1;
  // V(495) = K(495,1) * [KLF9];
  R495: KLF9 => ; 1;
  // V(496) = K(496,1) * [HES1];
  R496: HES1 => ; 1;
  // V(497) = K(497,1) * [IRF3];
  R497: IRF3 => ; 1;
  // V(498) = K(498,1) * [SMAD2];
  R498: SMAD2 => ; 1;
  // V(499) = K(499,1) * [SMAD1];
  R499: SMAD1 => ; 1;
  // V(500) = K(500,1) * [STK11];
  R500: STK11 => ; 1;
  // V(501) = K(501,1) * [NFE2L2];
  R501: NFE2L2 => ; 1;
  // V(502) = K(502,1) * [MAPK6];
  R502: MAPK6 => ; 1;
  // V(503) = K(503,1) * [RICTOR];
  R503: RICTOR => ; 1;
  // V(504) = K(504,1) * [SIRT6];
  R504: SIRT6 => ; 1;
  // V(505) = K(505,1) * [MYLIP];
  R505: MYLIP => ; 1;
  // V(506) = K(506,1) * [BAD];
  R506: BAD => ; 1;
  // V(507) = K(507,1) * [SIRT1];
  R507: SIRT1 => ; 1;
  // V(508) = K(508,1) * [GDF15];
  R508: GDF15 => ; 1;
  // V(509) = K(509,1) * [PINK1];
  R509: PINK1 => ; 1;
  // V(510) = K(510,1) * [MFF];
  R510: MFF => ; 1;
  // V(511) = K(511,1) * [TXNIP];
  R511: TXNIP => ; 1;
  // V(512) = K(512,1) * [PLK2];
  R512: PLK2 => ; 1;
  // V(513) = K(513,1) * [AGO2];
  R513: AGO2 => ; 1;
  // V(514) = K(514,1) * [SOCS3_rna];
  R514: SOCS3_rna => ; 1;
  // V(515) = K(515,1) * [AIFM1_rna];
  R515: AIFM1_rna => ; 1;
  // V(516) = K(516,1) * [SOD1_rna];
  R516: SOD1_rna => ; 1;
  // V(517) = K(517,1) * [FOS_rna];
  R517: FOS_rna => ; 1;
  // V(518) = K(518,1) * [NR3C1_rna];
  R518: NR3C1_rna => ; 1;
  // V(519) = K(519,1) * [SOD2_rna];
  R519: SOD2_rna => ; 1;
  // V(520) = K(520,1) * [JUN_rna];
  R520: JUN_rna => ; 1;
  // V(521) = K(521,1) * [PKM_rna];
  R521: PKM_rna => ; 1;
  // V(522) = K(522,1) * [CD34_rna];
  R522: CD34_rna => ; 1;
  // V(523) = K(523,1) * [PCK1_rna];
  R523: PCK1_rna => ; 1;
  // V(524) = K(524,1) * [GPX4_rna];
  R524: GPX4_rna => ; 1;
  // V(525) = K(525,1) * [CDKN1A_rna];
  R525: CDKN1A_rna => ; 1;
  // V(526) = K(526,1) * [GCLC_rna];
  R526: GCLC_rna => ; 1;
  // V(527) = K(527,1) * [RCAN1_rna];
  R527: RCAN1_rna => ; 1;
  // V(528) = K(528,1) * [SMAD3_rna];
  R528: SMAD3_rna => ; 1;
  // V(529) = K(529,1) * [BAX_rna];
  R529: BAX_rna => ; 1;
  // V(530) = K(530,1) * [KLF9_rna];
  R530: KLF9_rna => ; 1;
  // V(531) = K(531,1) * [GDF15_rna];
  R531: GDF15_rna => ; 1;
  // V(532) = K(532,1) * [SGK1_g];
  R532: SGK1_g => ; 1;
  // V(533) = K(533,1) * [SGK1_rna];
  R533: SGK1_rna => ; 1;
  // V(534) = K(534,1) * [TLR4_g];
  R534: TLR4_g => ; 1;
  // V(535) = K(535,1) * [TLR4_rna];
  R535: TLR4_rna => ; 1;
  // V(536) = K(536,1) * [SMAD7_g];
  R536: SMAD7_g => ; 1;
  // V(537) = K(537,1) * [SMAD7_rna];
  R537: SMAD7_rna => ; 1;
  // V(538) = K(538,1) * [TLR3_g];
  R538: TLR3_g => ; 1;
  // V(539) = K(539,1) * [TLR3_rna];
  R539: TLR3_rna => ; 1;
  // V(540) = K(540,1) * [JAK2_g];
  R540: JAK2_g => ; 1;
  // V(541) = K(541,1) * [JAK2_rna];
  R541: JAK2_rna => ; 1;
  // V(542) = K(542,1) * [ROCK2_g];
  R542: ROCK2_g => ; 1;
  // V(543) = K(543,1) * [ROCK2_rna];
  R543: ROCK2_rna => ; 1;
  // V(544) = K(544,1) * [EGFR_g];
  R544: EGFR_g => ; 1;
  // V(545) = K(545,1) * [EGFR_rna];
  R545: EGFR_rna => ; 1;
  // V(546) = K(546,1) * [LDLR_g];
  R546: LDLR_g => ; 1;
  // V(547) = K(547,1) * [LDLR_rna];
  R547: LDLR_rna => ; 1;
  // V(548) = K(548,1) * [ANXA1_g];
  R548: ANXA1_g => ; 1;
  // V(549) = K(549,1) * [ANXA1_rna];
  R549: ANXA1_rna => ; 1;
  // V(550) = K(550,1) * [TP53_g];
  R550: TP53_g => ; 1;
  // V(551) = K(551,1) * [TP53_rna];
  R551: TP53_rna => ; 1;
  // V(552) = K(552,1) * [HMGN1_g];
  R552: HMGN1_g => ; 1;
  // V(553) = K(553,1) * [HMGN1_rna];
  R553: HMGN1_rna => ; 1;
  // V(554) = K(554,1) * [INSR_g];
  R554: INSR_g => ; 1;
  // V(555) = K(555,1) * [INSR_rna];
  R555: INSR_rna => ; 1;
  // V(556) = K(556,1) * [FYN_g];
  R556: FYN_g => ; 1;
  // V(557) = K(557,1) * [FYN_rna];
  R557: FYN_rna => ; 1;
  // V(558) = K(558,1) * [LYN_g];
  R558: LYN_g => ; 1;
  // V(559) = K(559,1) * [LYN_rna];
  R559: LYN_rna => ; 1;
  // V(560) = K(560,1) * [SP1_g];
  R560: SP1_g => ; 1;
  // V(561) = K(561,1) * [SP1_rna];
  R561: SP1_rna => ; 1;
  // V(562) = K(562,1) * [IGF1R_g];
  R562: IGF1R_g => ; 1;
  // V(563) = K(563,1) * [IGF1R_rna];
  R563: IGF1R_rna => ; 1;
  // V(564) = K(564,1) * [NR3C2_g];
  R564: NR3C2_g => ; 1;
  // V(565) = K(565,1) * [NR3C2_rna];
  R565: NR3C2_rna => ; 1;
  // V(566) = K(566,1) * [IL6R_g];
  R566: IL6R_g => ; 1;
  // V(567) = K(567,1) * [IL6R_rna];
  R567: IL6R_rna => ; 1;
  // V(568) = K(568,1) * [FGF2_g];
  R568: FGF2_g => ; 1;
  // V(569) = K(569,1) * [FGF2_rna];
  R569: FGF2_rna => ; 1;
  // V(570) = K(570,1) * [PARP1_g];
  R570: PARP1_g => ; 1;
  // V(571) = K(571,1) * [PARP1_rna];
  R571: PARP1_rna => ; 1;
  // V(572) = K(572,1) * [UBC_g];
  R572: UBC_g => ; 1;
  // V(573) = K(573,1) * [UBC_rna];
  R573: UBC_rna => ; 1;
  // V(574) = K(574,1) * [CALM1_g];
  R574: CALM1_g => ; 1;
  // V(575) = K(575,1) * [CALM1_rna];
  R575: CALM1_rna => ; 1;
  // V(576) = K(576,1) * [AR_g];
  R576: AR_g => ; 1;
  // V(577) = K(577,1) * [AR_rna];
  R577: AR_rna => ; 1;
  // V(578) = K(578,1) * [ETS1_g];
  R578: ETS1_g => ; 1;
  // V(579) = K(579,1) * [ETS1_rna];
  R579: ETS1_rna => ; 1;
  // V(580) = K(580,1) * [FABP4_g];
  R580: FABP4_g => ; 1;
  // V(581) = K(581,1) * [FABP4_rna];
  R581: FABP4_rna => ; 1;
  // V(582) = K(582,1) * [VEGFA_g];
  R582: VEGFA_g => ; 1;
  // V(583) = K(583,1) * [VEGFA_rna];
  R583: VEGFA_rna => ; 1;
  // V(584) = K(584,1) * [CREB1_g];
  R584: CREB1_g => ; 1;
  // V(585) = K(585,1) * [CREB1_rna];
  R585: CREB1_rna => ; 1;
  // V(586) = K(586,1) * [PTPN2_g];
  R586: PTPN2_g => ; 1;
  // V(587) = K(587,1) * [PTPN2_rna];
  R587: PTPN2_rna => ; 1;
  // V(588) = K(588,1) * [ATF3_g];
  R588: ATF3_g => ; 1;
  // V(589) = K(589,1) * [ATF3_rna];
  R589: ATF3_rna => ; 1;
  // V(590) = K(590,1) * [NR4A1_g];
  R590: NR4A1_g => ; 1;
  // V(591) = K(591,1) * [NR4A1_rna];
  R591: NR4A1_rna => ; 1;
  // V(592) = K(592,1) * [RPS6KB1_g];
  R592: RPS6KB1_g => ; 1;
  // V(593) = K(593,1) * [RPS6KB1_rna];
  R593: RPS6KB1_rna => ; 1;
  // V(594) = K(594,1) * [JAK1_g];
  R594: JAK1_g => ; 1;
  // V(595) = K(595,1) * [JAK1_rna];
  R595: JAK1_rna => ; 1;
  // V(596) = K(596,1) * [F2R_g];
  R596: F2R_g => ; 1;
  // V(597) = K(597,1) * [F2R_rna];
  R597: F2R_rna => ; 1;
  // V(598) = K(598,1) * [ZFP36_g];
  R598: ZFP36_g => ; 1;
  // V(599) = K(599,1) * [ZFP36_rna];
  R599: ZFP36_rna => ; 1;
  // V(600) = K(600,1) * [PIK3R1_g];
  R600: PIK3R1_g => ; 1;
  // V(601) = K(601,1) * [PIK3R1_rna];
  R601: PIK3R1_rna => ; 1;
  // V(602) = K(602,1) * [MAPK1_g];
  R602: MAPK1_g => ; 1;
  // V(603) = K(603,1) * [MAPK1_rna];
  R603: MAPK1_rna => ; 1;
  // V(604) = K(604,1) * [DUSP1_g];
  R604: DUSP1_g => ; 1;
  // V(605) = K(605,1) * [DUSP1_rna];
  R605: DUSP1_rna => ; 1;
  // V(606) = K(606,1) * [PTPN6_g];
  R606: PTPN6_g => ; 1;
  // V(607) = K(607,1) * [PTPN6_rna];
  R607: PTPN6_rna => ; 1;
  // V(608) = K(608,1) * [NOS3_g];
  R608: NOS3_g => ; 1;
  // V(609) = K(609,1) * [NOS3_rna];
  R609: NOS3_rna => ; 1;
  // V(610) = K(610,1) * [CTNNB1_g];
  R610: CTNNB1_g => ; 1;
  // V(611) = K(611,1) * [CTNNB1_rna];
  R611: CTNNB1_rna => ; 1;
  // V(612) = K(612,1) * [RORA_g];
  R612: RORA_g => ; 1;
  // V(613) = K(613,1) * [RORA_rna];
  R613: RORA_rna => ; 1;
  // V(614) = K(614,1) * [DDIT3_g];
  R614: DDIT3_g => ; 1;
  // V(615) = K(615,1) * [DDIT3_rna];
  R615: DDIT3_rna => ; 1;
  // V(616) = K(616,1) * [KDR_g];
  R616: KDR_g => ; 1;
  // V(617) = K(617,1) * [KDR_rna];
  R617: KDR_rna => ; 1;
  // V(618) = K(618,1) * [TGFBR1_g];
  R618: TGFBR1_g => ; 1;
  // V(619) = K(619,1) * [TGFBR1_rna];
  R619: TGFBR1_rna => ; 1;
  // V(620) = K(620,1) * [SREBF1_g];
  R620: SREBF1_g => ; 1;
  // V(621) = K(621,1) * [SREBF1_rna];
  R621: SREBF1_rna => ; 1;
  // V(622) = K(622,1) * [STAT1_g];
  R622: STAT1_g => ; 1;
  // V(623) = K(623,1) * [STAT1_rna];
  R623: STAT1_rna => ; 1;
  // V(624) = K(624,1) * [PIK3CA_g];
  R624: PIK3CA_g => ; 1;
  // V(625) = K(625,1) * [PIK3CA_rna];
  R625: PIK3CA_rna => ; 1;
  // V(626) = K(626,1) * [MAPK9_g];
  R626: MAPK9_g => ; 1;
  // V(627) = K(627,1) * [MAPK9_rna];
  R627: MAPK9_rna => ; 1;
  // V(628) = K(628,1) * [NOTCH1_g];
  R628: NOTCH1_g => ; 1;
  // V(629) = K(629,1) * [NOTCH1_rna];
  R629: NOTCH1_rna => ; 1;
  // V(630) = K(630,1) * [YAP1_g];
  R630: YAP1_g => ; 1;
  // V(631) = K(631,1) * [YAP1_rna];
  R631: YAP1_rna => ; 1;
  // V(632) = K(632,1) * [LEPR_g];
  R632: LEPR_g => ; 1;
  // V(633) = K(633,1) * [LEPR_rna];
  R633: LEPR_rna => ; 1;
  // V(634) = K(634,1) * [NUMB_g];
  R634: NUMB_g => ; 1;
  // V(635) = K(635,1) * [NUMB_rna];
  R635: NUMB_rna => ; 1;
  // V(636) = K(636,1) * [TSC2_g];
  R636: TSC2_g => ; 1;
  // V(637) = K(637,1) * [TSC2_rna];
  R637: TSC2_rna => ; 1;
  // V(638) = K(638,1) * [RPS6KA3_g];
  R638: RPS6KA3_g => ; 1;
  // V(639) = K(639,1) * [RPS6KA3_rna];
  R639: RPS6KA3_rna => ; 1;
  // V(640) = K(640,1) * [MAPK12_g];
  R640: MAPK12_g => ; 1;
  // V(641) = K(641,1) * [MAPK12_rna];
  R641: MAPK12_rna => ; 1;
  // V(642) = K(642,1) * [PTEN_g];
  R642: PTEN_g => ; 1;
  // V(643) = K(643,1) * [PTEN_rna];
  R643: PTEN_rna => ; 1;
  // V(644) = K(644,1) * [MDM2_g];
  R644: MDM2_g => ; 1;
  // V(645) = K(645,1) * [MDM2_rna];
  R645: MDM2_rna => ; 1;
  // V(646) = K(646,1) * [TEK_g];
  R646: TEK_g => ; 1;
  // V(647) = K(647,1) * [TEK_rna];
  R647: TEK_rna => ; 1;
  // V(648) = K(648,1) * [GLO1_g];
  R648: GLO1_g => ; 1;
  // V(649) = K(649,1) * [GLO1_rna];
  R649: GLO1_rna => ; 1;
  // V(650) = K(650,1) * [EP300_g];
  R650: EP300_g => ; 1;
  // V(651) = K(651,1) * [EP300_rna];
  R651: EP300_rna => ; 1;
  // V(652) = K(652,1) * [FOXO1_g];
  R652: FOXO1_g => ; 1;
  // V(653) = K(653,1) * [FOXO1_rna];
  R653: FOXO1_rna => ; 1;
  // V(654) = K(654,1) * [MAP4K2_g];
  R654: MAP4K2_g => ; 1;
  // V(655) = K(655,1) * [MAP4K2_rna];
  R655: MAP4K2_rna => ; 1;
  // V(656) = K(656,1) * [PTPRJ_g];
  R656: PTPRJ_g => ; 1;
  // V(657) = K(657,1) * [PTPRJ_rna];
  R657: PTPRJ_rna => ; 1;
  // V(658) = K(658,1) * [PRKAA1_g];
  R658: PRKAA1_g => ; 1;
  // V(659) = K(659,1) * [PRKAA1_rna];
  R659: PRKAA1_rna => ; 1;
  // V(660) = K(660,1) * [SMAD4_g];
  R660: SMAD4_g => ; 1;
  // V(661) = K(661,1) * [SMAD4_rna];
  R661: SMAD4_rna => ; 1;
  // V(662) = K(662,1) * [ATR_g];
  R662: ATR_g => ; 1;
  // V(663) = K(663,1) * [ATR_rna];
  R663: ATR_rna => ; 1;
  // V(664) = K(664,1) * [HDAC1_g];
  R664: HDAC1_g => ; 1;
  // V(665) = K(665,1) * [HDAC1_rna];
  R665: HDAC1_rna => ; 1;
  // V(666) = K(666,1) * [HES1_g];
  R666: HES1_g => ; 1;
  // V(667) = K(667,1) * [HES1_rna];
  R667: HES1_rna => ; 1;
  // V(668) = K(668,1) * [IRF3_g];
  R668: IRF3_g => ; 1;
  // V(669) = K(669,1) * [IRF3_rna];
  R669: IRF3_rna => ; 1;
  // V(670) = K(670,1) * [SMAD2_g];
  R670: SMAD2_g => ; 1;
  // V(671) = K(671,1) * [SMAD2_rna];
  R671: SMAD2_rna => ; 1;
  // V(672) = K(672,1) * [SMAD1_g];
  R672: SMAD1_g => ; 1;
  // V(673) = K(673,1) * [SMAD1_rna];
  R673: SMAD1_rna => ; 1;
  // V(674) = K(674,1) * [STK11_g];
  R674: STK11_g => ; 1;
  // V(675) = K(675,1) * [STK11_rna];
  R675: STK11_rna => ; 1;
  // V(676) = K(676,1) * [NFE2L2_g];
  R676: NFE2L2_g => ; 1;
  // V(677) = K(677,1) * [NFE2L2_rna];
  R677: NFE2L2_rna => ; 1;
  // V(678) = K(678,1) * [MAPK6_g];
  R678: MAPK6_g => ; 1;
  // V(679) = K(679,1) * [MAPK6_rna];
  R679: MAPK6_rna => ; 1;
  // V(680) = K(680,1) * [RICTOR_g];
  R680: RICTOR_g => ; 1;
  // V(681) = K(681,1) * [RICTOR_rna];
  R681: RICTOR_rna => ; 1;
  // V(682) = K(682,1) * [SIRT6_g];
  R682: SIRT6_g => ; 1;
  // V(683) = K(683,1) * [SIRT6_rna];
  R683: SIRT6_rna => ; 1;
  // V(684) = K(684,1) * [MYLIP_g];
  R684: MYLIP_g => ; 1;
  // V(685) = K(685,1) * [MYLIP_rna];
  R685: MYLIP_rna => ; 1;
  // V(686) = K(686,1) * [BAD_g];
  R686: BAD_g => ; 1;
  // V(687) = K(687,1) * [BAD_rna];
  R687: BAD_rna => ; 1;
  // V(688) = K(688,1) * [SIRT1_g];
  R688: SIRT1_g => ; 1;
  // V(689) = K(689,1) * [SIRT1_rna];
  R689: SIRT1_rna => ; 1;
  // V(690) = K(690,1) * [PINK1_g];
  R690: PINK1_g => ; 1;
  // V(691) = K(691,1) * [PINK1_rna];
  R691: PINK1_rna => ; 1;
  // V(692) = K(692,1) * [MFF_g];
  R692: MFF_g => ; 1;
  // V(693) = K(693,1) * [MFF_rna];
  R693: MFF_rna => ; 1;
  // V(694) = K(694,1) * [TXNIP_g];
  R694: TXNIP_g => ; 1;
  // V(695) = K(695,1) * [TXNIP_rna];
  R695: TXNIP_rna => ; 1;
  // V(696) = K(696,1) * [PLK2_g];
  R696: PLK2_g => ; 1;
  // V(697) = K(697,1) * [PLK2_rna];
  R697: PLK2_rna => ; 1;
  // V(698) = K(698,1) * [AGO2_g];
  R698: AGO2_g => ; 1;
  // V(699) = K(699,1) * [AGO2_rna];
  R699: AGO2_rna => ; 1;
  // V(700) = K(700,1) * [TLR3_p];
  R700: TLR3_p => ; 1;
  // V(701) = K(701,1) * [JAK2_p];
  R701: JAK2_p => ; 1;
  // V(702) = K(702,1) * [EGFR_p];
  R702: EGFR_p => ; 1;
  // V(703) = K(703,1) * [FOS_p];
  R703: FOS_p => ; 1;
  // V(704) = K(704,1) * [ANXA1_p];
  R704: ANXA1_p => ; 1;
  // V(705) = K(705,1) * [NR3C1_p];
  R705: NR3C1_p => ; 1;
  // V(706) = K(706,1) * [TP53_p];
  R706: TP53_p => ; 1;
  // V(707) = K(707,1) * [HMGN1_p];
  R707: HMGN1_p => ; 1;
  // V(708) = K(708,1) * [JUN_p];
  R708: JUN_p => ; 1;
  // V(709) = K(709,1) * [INSR_p];
  R709: INSR_p => ; 1;
  // V(710) = K(710,1) * [FYN_p];
  R710: FYN_p => ; 1;
  // V(711) = K(711,1) * [LYN_p];
  R711: LYN_p => ; 1;
  // V(712) = K(712,1) * [SP1_p];
  R712: SP1_p => ; 1;
  // V(713) = K(713,1) * [IGF1R_p];
  R713: IGF1R_p => ; 1;
  // V(714) = K(714,1) * [NR3C2_p];
  R714: NR3C2_p => ; 1;
  // V(715) = K(715,1) * [PARP1_p];
  R715: PARP1_p => ; 1;
  // V(716) = K(716,1) * [UBC_p];
  R716: UBC_p => ; 1;
  // V(717) = K(717,1) * [CALM1_p];
  R717: CALM1_p => ; 1;
  // V(718) = K(718,1) * [AR_p];
  R718: AR_p => ; 1;
  // V(719) = K(719,1) * [PKM_p];
  R719: PKM_p => ; 1;
  // V(720) = K(720,1) * [FABP4_p];
  R720: FABP4_p => ; 1;
  // V(721) = K(721,1) * [CREB1_p];
  R721: CREB1_p => ; 1;
  // V(722) = K(722,1) * [NR4A1_p];
  R722: NR4A1_p => ; 1;
  // V(723) = K(723,1) * [RPS6KB1_p];
  R723: RPS6KB1_p => ; 1;
  // V(724) = K(724,1) * [JAK1_p];
  R724: JAK1_p => ; 1;
  // V(725) = K(725,1) * [F2R_p];
  R725: F2R_p => ; 1;
  // V(726) = K(726,1) * [ZFP36_p];
  R726: ZFP36_p => ; 1;
  // V(727) = K(727,1) * [PIK3R1_p];
  R727: PIK3R1_p => ; 1;
  // V(728) = K(728,1) * [MAPK1_p];
  R728: MAPK1_p => ; 1;
  // V(729) = K(729,1) * [DUSP1_p];
  R729: DUSP1_p => ; 1;
  // V(730) = K(730,1) * [PTPN6_p];
  R730: PTPN6_p => ; 1;
  // V(731) = K(731,1) * [NOS3_p];
  R731: NOS3_p => ; 1;
  // V(732) = K(732,1) * [CTNNB1_p];
  R732: CTNNB1_p => ; 1;
  // V(733) = K(733,1) * [RORA_p];
  R733: RORA_p => ; 1;
  // V(734) = K(734,1) * [DDIT3_p];
  R734: DDIT3_p => ; 1;
  // V(735) = K(735,1) * [KDR_p];
  R735: KDR_p => ; 1;
  // V(736) = K(736,1) * [SREBF1_p];
  R736: SREBF1_p => ; 1;
  // V(737) = K(737,1) * [CDKN1A_p];
  R737: CDKN1A_p => ; 1;
  // V(738) = K(738,1) * [STAT1_p];
  R738: STAT1_p => ; 1;
  // V(739) = K(739,1) * [MAPK9_p];
  R739: MAPK9_p => ; 1;
  // V(740) = K(740,1) * [YAP1_p];
  R740: YAP1_p => ; 1;
  // V(741) = K(741,1) * [LEPR_p];
  R741: LEPR_p => ; 1;
  // V(742) = K(742,1) * [TSC2_p];
  R742: TSC2_p => ; 1;
  // V(743) = K(743,1) * [RPS6KA3_p];
  R743: RPS6KA3_p => ; 1;
  // V(744) = K(744,1) * [MAPK12_p];
  R744: MAPK12_p => ; 1;
  // V(745) = K(745,1) * [RCAN1_p];
  R745: RCAN1_p => ; 1;
  // V(746) = K(746,1) * [PTEN_p];
  R746: PTEN_p => ; 1;
  // V(747) = K(747,1) * [SMAD3_p];
  R747: SMAD3_p => ; 1;
  // V(748) = K(748,1) * [MDM2_p];
  R748: MDM2_p => ; 1;
  // V(749) = K(749,1) * [TEK_p];
  R749: TEK_p => ; 1;
  // V(750) = K(750,1) * [GLO1_p];
  R750: GLO1_p => ; 1;
  // V(751) = K(751,1) * [EP300_p];
  R751: EP300_p => ; 1;
  // V(752) = K(752,1) * [FOXO1_p];
  R752: FOXO1_p => ; 1;
  // V(753) = K(753,1) * [MAP4K2_p];
  R753: MAP4K2_p => ; 1;
  // V(754) = K(754,1) * [PTPRJ_p];
  R754: PTPRJ_p => ; 1;
  // V(755) = K(755,1) * [PRKAA1_p];
  R755: PRKAA1_p => ; 1;
  // V(756) = K(756,1) * [SMAD4_p];
  R756: SMAD4_p => ; 1;
  // V(757) = K(757,1) * [IRF3_p];
  R757: IRF3_p => ; 1;
  // V(758) = K(758,1) * [SMAD2_p];
  R758: SMAD2_p => ; 1;
  // V(759) = K(759,1) * [SMAD1_p];
  R759: SMAD1_p => ; 1;
  // V(760) = K(760,1) * [STK11_p];
  R760: STK11_p => ; 1;
  // V(761) = K(761,1) * [NFE2L2_p];
  R761: NFE2L2_p => ; 1;
  // V(762) = K(762,1) * [MAPK6_p];
  R762: MAPK6_p => ; 1;
  // V(763) = K(763,1) * [RICTOR_p];
  R763: RICTOR_p => ; 1;
  // V(764) = K(764,1) * [BAD_p];
  R764: BAD_p => ; 1;
  // V(765) = K(765,1) * [SIRT1_p];
  R765: SIRT1_p => ; 1;
  // V(766) = K(766,1) * [MFF_p];
  R766: MFF_p => ; 1;
  // V(767) = K(767,1) * [TXNIP_p];
  R767: TXNIP_p => ; 1;
  // V(768) = K(768,1) * [AGO2_p];
  R768: AGO2_p => ; 1;
  // V(769) = K(769,1) * [SIGNOR-C154_p];
  R769: => ; 1;
  // V(770) = K(770,1) * [SIGNOR-C156_p];
  R770: => ; 1;
  // V(771) = K(771,1) * [SGK1_rna];
  R771: SGK1_rna => ; 1;
  // V(772) = K(772,1) * [TLR4_rna];
  R772: TLR4_rna => ; 1;
  // V(773) = K(773,1) * [SMAD7_rna];
  R773: SMAD7_rna => ; 1;
  // V(774) = K(774,1) * [TLR3_rna];
  R774: TLR3_rna => ; 1;
  // V(775) = K(775,1) * [JAK2_rna];
  R775: JAK2_rna => ; 1;
  // V(776) = K(776,1) * [ROCK2_rna];
  R776: ROCK2_rna => ; 1;
  // V(777) = K(777,1) * [EGFR_rna];
  R777: EGFR_rna => ; 1;
  // V(778) = K(778,1) * [LDLR_rna];
  R778: LDLR_rna => ; 1;
  // V(779) = K(779,1) * [ANXA1_rna];
  R779: ANXA1_rna => ; 1;
  // V(780) = K(780,1) * [TP53_rna];
  R780: TP53_rna => ; 1;
  // V(781) = K(781,1) * [HMGN1_rna];
  R781: HMGN1_rna => ; 1;
  // V(782) = K(782,1) * [INSR_rna];
  R782: INSR_rna => ; 1;
  // V(783) = K(783,1) * [FYN_rna];
  R783: FYN_rna => ; 1;
  // V(784) = K(784,1) * [LYN_rna];
  R784: LYN_rna => ; 1;
  // V(785) = K(785,1) * [SP1_rna];
  R785: SP1_rna => ; 1;
  // V(786) = K(786,1) * [IGF1R_rna];
  R786: IGF1R_rna => ; 1;
  // V(787) = K(787,1) * [NR3C2_rna];
  R787: NR3C2_rna => ; 1;
  // V(788) = K(788,1) * [IL6R_rna];
  R788: IL6R_rna => ; 1;
  // V(789) = K(789,1) * [FGF2_rna];
  R789: FGF2_rna => ; 1;
  // V(790) = K(790,1) * [PARP1_rna];
  R790: PARP1_rna => ; 1;
  // V(791) = K(791,1) * [UBC_rna];
  R791: UBC_rna => ; 1;
  // V(792) = K(792,1) * [CALM1_rna];
  R792: CALM1_rna => ; 1;
  // V(793) = K(793,1) * [AR_rna];
  R793: AR_rna => ; 1;
  // V(794) = K(794,1) * [ETS1_rna];
  R794: ETS1_rna => ; 1;
  // V(795) = K(795,1) * [FABP4_rna];
  R795: FABP4_rna => ; 1;
  // V(796) = K(796,1) * [VEGFA_rna];
  R796: VEGFA_rna => ; 1;
  // V(797) = K(797,1) * [CREB1_rna];
  R797: CREB1_rna => ; 1;
  // V(798) = K(798,1) * [PTPN2_rna];
  R798: PTPN2_rna => ; 1;
  // V(799) = K(799,1) * [ATF3_rna];
  R799: ATF3_rna => ; 1;
  // V(800) = K(800,1) * [NR4A1_rna];
  R800: NR4A1_rna => ; 1;
  // V(801) = K(801,1) * [RPS6KB1_rna];
  R801: RPS6KB1_rna => ; 1;
  // V(802) = K(802,1) * [JAK1_rna];
  R802: JAK1_rna => ; 1;
  // V(803) = K(803,1) * [F2R_rna];
  R803: F2R_rna => ; 1;
  // V(804) = K(804,1) * [ZFP36_rna];
  R804: ZFP36_rna => ; 1;
  // V(805) = K(805,1) * [PIK3R1_rna];
  R805: PIK3R1_rna => ; 1;
  // V(806) = K(806,1) * [MAPK1_rna];
  R806: MAPK1_rna => ; 1;
  // V(807) = K(807,1) * [DUSP1_rna];
  R807: DUSP1_rna => ; 1;
  // V(808) = K(808,1) * [PTPN6_rna];
  R808: PTPN6_rna => ; 1;
  // V(809) = K(809,1) * [NOS3_rna];
  R809: NOS3_rna => ; 1;
  // V(810) = K(810,1) * [CTNNB1_rna];
  R810: CTNNB1_rna => ; 1;
  // V(811) = K(811,1) * [RORA_rna];
  R811: RORA_rna => ; 1;
  // V(812) = K(812,1) * [DDIT3_rna];
  R812: DDIT3_rna => ; 1;
  // V(813) = K(813,1) * [KDR_rna];
  R813: KDR_rna => ; 1;
  // V(814) = K(814,1) * [TGFBR1_rna];
  R814: TGFBR1_rna => ; 1;
  // V(815) = K(815,1) * [SREBF1_rna];
  R815: SREBF1_rna => ; 1;
  // V(816) = K(816,1) * [STAT1_rna];
  R816: STAT1_rna => ; 1;
  // V(817) = K(817,1) * [PIK3CA_rna];
  R817: PIK3CA_rna => ; 1;
  // V(818) = K(818,1) * [MAPK9_rna];
  R818: MAPK9_rna => ; 1;
  // V(819) = K(819,1) * [NOTCH1_rna];
  R819: NOTCH1_rna => ; 1;
  // V(820) = K(820,1) * [YAP1_rna];
  R820: YAP1_rna => ; 1;
  // V(821) = K(821,1) * [LEPR_rna];
  R821: LEPR_rna => ; 1;
  // V(822) = K(822,1) * [NUMB_rna];
  R822: NUMB_rna => ; 1;
  // V(823) = K(823,1) * [TSC2_rna];
  R823: TSC2_rna => ; 1;
  // V(824) = K(824,1) * [RPS6KA3_rna];
  R824: RPS6KA3_rna => ; 1;
  // V(825) = K(825,1) * [MAPK12_rna];
  R825: MAPK12_rna => ; 1;
  // V(826) = K(826,1) * [PTEN_rna];
  R826: PTEN_rna => ; 1;
  // V(827) = K(827,1) * [MDM2_rna];
  R827: MDM2_rna => ; 1;
  // V(828) = K(828,1) * [TEK_rna];
  R828: TEK_rna => ; 1;
  // V(829) = K(829,1) * [GLO1_rna];
  R829: GLO1_rna => ; 1;
  // V(830) = K(830,1) * [EP300_rna];
  R830: EP300_rna => ; 1;
  // V(831) = K(831,1) * [FOXO1_rna];
  R831: FOXO1_rna => ; 1;
  // V(832) = K(832,1) * [MAP4K2_rna];
  R832: MAP4K2_rna => ; 1;
  // V(833) = K(833,1) * [PTPRJ_rna];
  R833: PTPRJ_rna => ; 1;
  // V(834) = K(834,1) * [PRKAA1_rna];
  R834: PRKAA1_rna => ; 1;
  // V(835) = K(835,1) * [SMAD4_rna];
  R835: SMAD4_rna => ; 1;
  // V(836) = K(836,1) * [ATR_rna];
  R836: ATR_rna => ; 1;
  // V(837) = K(837,1) * [HDAC1_rna];
  R837: HDAC1_rna => ; 1;
  // V(838) = K(838,1) * [HES1_rna];
  R838: HES1_rna => ; 1;
  // V(839) = K(839,1) * [IRF3_rna];
  R839: IRF3_rna => ; 1;
  // V(840) = K(840,1) * [SMAD2_rna];
  R840: SMAD2_rna => ; 1;
  // V(841) = K(841,1) * [SMAD1_rna];
  R841: SMAD1_rna => ; 1;
  // V(842) = K(842,1) * [STK11_rna];
  R842: STK11_rna => ; 1;
  // V(843) = K(843,1) * [NFE2L2_rna];
  R843: NFE2L2_rna => ; 1;
  // V(844) = K(844,1) * [MAPK6_rna];
  R844: MAPK6_rna => ; 1;
  // V(845) = K(845,1) * [RICTOR_rna];
  R845: RICTOR_rna => ; 1;
  // V(846) = K(846,1) * [SIRT6_rna];
  R846: SIRT6_rna => ; 1;
  // V(847) = K(847,1) * [MYLIP_rna];
  R847: MYLIP_rna => ; 1;
  // V(848) = K(848,1) * [BAD_rna];
  R848: BAD_rna => ; 1;
  // V(849) = K(849,1) * [SIRT1_rna];
  R849: SIRT1_rna => ; 1;
  // V(850) = K(850,1) * [PINK1_rna];
  R850: PINK1_rna => ; 1;
  // V(851) = K(851,1) * [MFF_rna];
  R851: MFF_rna => ; 1;
  // V(852) = K(852,1) * [TXNIP_rna];
  R852: TXNIP_rna => ; 1;
  // V(853) = K(853,1) * [PLK2_rna];
  R853: PLK2_rna => ; 1;
  // V(854) = K(854,1) * [AGO2_rna];
  R854: AGO2_rna => ; 1;
end
