// SBML level 3 version 2

model ConnectingTubule()

  // Compartments:
  compartment cell = 1;

  // Species:
  species ABCA1 in cell = 1/cell;
  species ABCA1_g in cell = 1/cell;
  species ABCA1_p in cell = 1/cell;
  species ABCA1_rna in cell = 1/cell;
  species AIFM1 in cell = 1/cell;
  species AIFM1_g in cell = 1/cell;
  species AIFM1_rna in cell = 1/cell;
  species AKT1 in cell = 1/cell;
  species AKT1_g in cell = 1/cell;
  species AKT1_p in cell = 1/cell;
  species AKT1_rna in cell = 1/cell;
  species ATF3 in cell = 1/cell;
  species ATF3_g in cell = 1/cell;
  species ATF3_rna in cell = 1/cell;
  species ATR in cell = 1/cell;
  species ATR_g in cell = 1/cell;
  species ATR_rna in cell = 1/cell;
  species BAX in cell = 1/cell;
  species BAX_g in cell = 1/cell;
  species BAX_p in cell = 1/cell;
  species BAX_rna in cell = 1/cell;
  species CASP3 in cell = 1/cell;
  species CASP3_g in cell = 1/cell;
  species CASP3_rna in cell = 1/cell;
  species CASP9 in cell = 1/cell;
  species CASP9_g in cell = 1/cell;
  species CASP9_p in cell = 1/cell;
  species CASP9_rna in cell = 1/cell;
  species CAT in cell = 1/cell;
  species CAT_g in cell = 1/cell;
  species CAT_rna in cell = 1/cell;
  species CCL2 in cell = 1/cell;
  species CCL2_g in cell = 1/cell;
  species CCL2_rna in cell = 1/cell;
  species CDH1 in cell = 1/cell;
  species CDH1_g in cell = 1/cell;
  species CDH1_p in cell = 1/cell;
  species CDH1_rna in cell = 1/cell;
  species CDKN1A in cell = 1/cell;
  species CDKN1A_g in cell = 1/cell;
  species CDKN1A_p in cell = 1/cell;
  species CDKN1A_rna in cell = 1/cell;
  species CDKN1B in cell = 1/cell;
  species CDKN1B_g in cell = 1/cell;
  species CDKN1B_p in cell = 1/cell;
  species CDKN1B_rna in cell = 1/cell;
  species CLTC in cell = 1/cell;
  species CLTC_g in cell = 1/cell;
  species CLTC_p in cell = 1/cell;
  species CLTC_rna in cell = 1/cell;
  species COL1A1 in cell = 1/cell;
  species COL1A1_g in cell = 1/cell;
  species COL1A1_rna in cell = 1/cell;
  species CREB1 in cell = 1/cell;
  species CREB1_g in cell = 1/cell;
  species CREB1_p in cell = 1/cell;
  species CREB1_rna in cell = 1/cell;
  species CTNNB1 in cell = 1/cell;
  species CTNNB1_g in cell = 1/cell;
  species CTNNB1_p in cell = 1/cell;
  species CTNNB1_rna in cell = 1/cell;
  species DDIT3 in cell = 1/cell;
  species DDIT3_g in cell = 1/cell;
  species DDIT3_p in cell = 1/cell;
  species DDIT3_rna in cell = 1/cell;
  species DEPTOR in cell = 1/cell;
  species DEPTOR_g in cell = 1/cell;
  species DEPTOR_p in cell = 1/cell;
  species DEPTOR_rna in cell = 1/cell;
  species DUSP1 in cell = 1/cell;
  species DUSP1_g in cell = 1/cell;
  species DUSP1_p in cell = 1/cell;
  species DUSP1_rna in cell = 1/cell;
  species EGFR in cell = 1/cell;
  species EGFR_g in cell = 1/cell;
  species EGFR_p in cell = 1/cell;
  species EGFR_rna in cell = 1/cell;
  species EIF2AK3 in cell = 1/cell;
  species EIF2AK3_g in cell = 1/cell;
  species EIF2AK3_p in cell = 1/cell;
  species EIF2AK3_rna in cell = 1/cell;
  species ENG in cell = 1/cell;
  species ENG_g in cell = 1/cell;
  species ENG_p in cell = 1/cell;
  species ENG_rna in cell = 1/cell;
  species EPOR in cell = 1/cell;
  species EPOR_g in cell = 1/cell;
  species EPOR_p in cell = 1/cell;
  species EPOR_rna in cell = 1/cell;
  species ERN1 in cell = 1/cell;
  species ERN1_g in cell = 1/cell;
  species ERN1_p in cell = 1/cell;
  species ERN1_rna in cell = 1/cell;
  species FAS in cell = 1/cell;
  species FAS_g in cell = 1/cell;
  species FAS_rna in cell = 1/cell;
  species FGF2 in cell = 1/cell;
  species FGF2_g in cell = 1/cell;
  species FGF2_rna in cell = 1/cell;
  species FOS in cell = 1/cell;
  species FOS_g in cell = 1/cell;
  species FOS_p in cell = 1/cell;
  species FOS_rna in cell = 1/cell;
  species FOXO1 in cell = 1/cell;
  species FOXO1_g in cell = 1/cell;
  species FOXO1_p in cell = 1/cell;
  species FOXO1_rna in cell = 1/cell;
  species GCLC in cell = 1/cell;
  species GCLC_g in cell = 1/cell;
  species GCLC_rna in cell = 1/cell;
  species GCLM in cell = 1/cell;
  species GCLM_g in cell = 1/cell;
  species GCLM_rna in cell = 1/cell;
  species GDF15 in cell = 1/cell;
  species GDF15_g in cell = 1/cell;
  species GDF15_rna in cell = 1/cell;
  species GHR in cell = 1/cell;
  species GHR_g in cell = 1/cell;
  species GHR_p in cell = 1/cell;
  species GHR_rna in cell = 1/cell;
  species GPX4 in cell = 1/cell;
  species GPX4_g in cell = 1/cell;
  species GPX4_rna in cell = 1/cell;
  species HIF1A in cell = 1/cell;
  species HIF1A_g in cell = 1/cell;
  species HIF1A_p in cell = 1/cell;
  species HIF1A_rna in cell = 1/cell;
  species HSPB1 in cell = 1/cell;
  species HSPB1_g in cell = 1/cell;
  species HSPB1_p in cell = 1/cell;
  species HSPB1_rna in cell = 1/cell;
  species IGF1R in cell = 1/cell;
  species IGF1R_g in cell = 1/cell;
  species IGF1R_p in cell = 1/cell;
  species IGF1R_rna in cell = 1/cell;
  species ILK in cell = 1/cell;
  species ILK_g in cell = 1/cell;
  species ILK_p in cell = 1/cell;
  species ILK_rna in cell = 1/cell;
  species JAK1 in cell = 1/cell;
  species JAK1_g in cell = 1/cell;
  species JAK1_p in cell = 1/cell;
  species JAK1_rna in cell = 1/cell;
  species JAK2 in cell = 1/cell;
  species JAK2_g in cell = 1/cell;
  species JAK2_p in cell = 1/cell;
  species JAK2_rna in cell = 1/cell;
  species JUN in cell = 1/cell;
  species JUN_g in cell = 1/cell;
  species JUN_p in cell = 1/cell;
  species JUN_rna in cell = 1/cell;
  species KDM6B in cell = 1/cell;
  species KDM6B_g in cell = 1/cell;
  species KDM6B_rna in cell = 1/cell;
  species KIT in cell = 1/cell;
  species KIT_g in cell = 1/cell;
  species KIT_p in cell = 1/cell;
  species KIT_rna in cell = 1/cell;
  species KLF9 in cell = 1/cell;
  species KLF9_g in cell = 1/cell;
  species KLF9_rna in cell = 1/cell;
  species LDLR in cell = 1/cell;
  species LDLR_g in cell = 1/cell;
  species LDLR_rna in cell = 1/cell;
  species LEPR in cell = 1/cell;
  species LEPR_g in cell = 1/cell;
  species LEPR_p in cell = 1/cell;
  species LEPR_rna in cell = 1/cell;
  species MAP3K14 in cell = 1/cell;
  species MAP3K14_g in cell = 1/cell;
  species MAP3K14_p in cell = 1/cell;
  species MAP3K14_rna in cell = 1/cell;
  species MAP3K5 in cell = 1/cell;
  species MAP3K5_g in cell = 1/cell;
  species MAP3K5_p in cell = 1/cell;
  species MAP3K5_rna in cell = 1/cell;
  species MAPK1 in cell = 1/cell;
  species MAPK1_g in cell = 1/cell;
  species MAPK1_p in cell = 1/cell;
  species MAPK1_rna in cell = 1/cell;
  species MAPK6 in cell = 1/cell;
  species MAPK6_g in cell = 1/cell;
  species MAPK6_p in cell = 1/cell;
  species MAPK6_rna in cell = 1/cell;
  species MFF in cell = 1/cell;
  species MFF_g in cell = 1/cell;
  species MFF_p in cell = 1/cell;
  species MFF_rna in cell = 1/cell;
  species MYD88 in cell = 1/cell;
  species MYD88_g in cell = 1/cell;
  species MYD88_p in cell = 1/cell;
  species MYD88_rna in cell = 1/cell;
  species MYLIP in cell = 1/cell;
  species MYLIP_g in cell = 1/cell;
  species MYLIP_rna in cell = 1/cell;
  species NFE2L2 in cell = 1/cell;
  species NFE2L2_g in cell = 1/cell;
  species NFE2L2_p in cell = 1/cell;
  species NFE2L2_rna in cell = 1/cell;
  species NFKB2 in cell = 1/cell;
  species NFKB2_g in cell = 1/cell;
  species NFKB2_p in cell = 1/cell;
  species NFKB2_rna in cell = 1/cell;
  species NOTCH1 in cell = 1/cell;
  species NOTCH1_g in cell = 1/cell;
  species NOTCH1_rna in cell = 1/cell;
  species NR3C1 in cell = 1/cell;
  species NR3C1_g in cell = 1/cell;
  species NR3C1_p in cell = 1/cell;
  species NR3C1_rna in cell = 1/cell;
  species NR4A1 in cell = 1/cell;
  species NR4A1_g in cell = 1/cell;
  species NR4A1_p in cell = 1/cell;
  species NR4A1_rna in cell = 1/cell;
  species NRG4 in cell = 1/cell;
  species NRG4_g in cell = 1/cell;
  species NRG4_rna in cell = 1/cell;
  species NUMB in cell = 1/cell;
  species NUMB_g in cell = 1/cell;
  species NUMB_rna in cell = 1/cell;
  species PARK7 in cell = 1/cell;
  species PARK7_g in cell = 1/cell;
  species PARK7_p in cell = 1/cell;
  species PARK7_rna in cell = 1/cell;
  species PCNA in cell = 1/cell;
  species PCNA_g in cell = 1/cell;
  species PCNA_p in cell = 1/cell;
  species PCNA_rna in cell = 1/cell;
  species PKM in cell = 1/cell;
  species PKM_g in cell = 1/cell;
  species PKM_p in cell = 1/cell;
  species PKM_rna in cell = 1/cell;
  species PKN1 in cell = 1/cell;
  species PKN1_g in cell = 1/cell;
  species PKN1_p in cell = 1/cell;
  species PKN1_rna in cell = 1/cell;
  species PRKAA1 in cell = 1/cell;
  species PRKAA1_g in cell = 1/cell;
  species PRKAA1_p in cell = 1/cell;
  species PRKAA1_rna in cell = 1/cell;
  species PROM1 in cell = 1/cell;
  species PROM1_g in cell = 1/cell;
  species PROM1_p in cell = 1/cell;
  species PROM1_rna in cell = 1/cell;
  species PTEN in cell = 1/cell;
  species PTEN_g in cell = 1/cell;
  species PTEN_p in cell = 1/cell;
  species PTEN_rna in cell = 1/cell;
  species PTPN6 in cell = 1/cell;
  species PTPN6_g in cell = 1/cell;
  species PTPN6_p in cell = 1/cell;
  species PTPN6_rna in cell = 1/cell;
  species RCAN1 in cell = 1/cell;
  species RCAN1_g in cell = 1/cell;
  species RCAN1_p in cell = 1/cell;
  species RCAN1_rna in cell = 1/cell;
  species RHOA in cell = 1/cell;
  species RHOA_g in cell = 1/cell;
  species RHOA_p in cell = 1/cell;
  species RHOA_rna in cell = 1/cell;
  species RNF7 in cell = 1/cell;
  species RNF7_g in cell = 1/cell;
  species RNF7_rna in cell = 1/cell;
  species ROCK1 in cell = 1/cell;
  species ROCK1_g in cell = 1/cell;
  species ROCK1_rna in cell = 1/cell;
  species RPS6KA3 in cell = 1/cell;
  species RPS6KA3_g in cell = 1/cell;
  species RPS6KA3_p in cell = 1/cell;
  species RPS6KA3_rna in cell = 1/cell;
  species RRAS in cell = 1/cell;
  species RRAS_g in cell = 1/cell;
  species RRAS_p in cell = 1/cell;
  species RRAS_rna in cell = 1/cell;
  species RUNX2 in cell = 1/cell;
  species RUNX2_g in cell = 1/cell;
  species RUNX2_p in cell = 1/cell;
  species RUNX2_rna in cell = 1/cell;
  species SGK1 in cell = 1/cell;
  species SGK1_g in cell = 1/cell;
  species SGK1_rna in cell = 1/cell;
  species SLC9A3 in cell = 1/cell;
  species SLC9A3_g in cell = 1/cell;
  species SLC9A3_p in cell = 1/cell;
  species SLC9A3_rna in cell = 1/cell;
  species SMAD1 in cell = 1/cell;
  species SMAD1_g in cell = 1/cell;
  species SMAD1_p in cell = 1/cell;
  species SMAD1_rna in cell = 1/cell;
  species SMAD3 in cell = 1/cell;
  species SMAD3_g in cell = 1/cell;
  species SMAD3_p in cell = 1/cell;
  species SMAD3_rna in cell = 1/cell;
  species SMAD4 in cell = 1/cell;
  species SMAD4_g in cell = 1/cell;
  species SMAD4_p in cell = 1/cell;
  species SMAD4_rna in cell = 1/cell;
  species SMURF1 in cell = 1/cell;
  species SMURF1_g in cell = 1/cell;
  species SMURF1_p in cell = 1/cell;
  species SMURF1_rna in cell = 1/cell;
  species SP1 in cell = 1/cell;
  species SP1_g in cell = 1/cell;
  species SP1_p in cell = 1/cell;
  species SP1_rna in cell = 1/cell;
  species SPHK1 in cell = 1/cell;
  species SPHK1_g in cell = 1/cell;
  species SPHK1_p in cell = 1/cell;
  species SPHK1_rna in cell = 1/cell;
  species SRC in cell = 1/cell;
  species SRC_g in cell = 1/cell;
  species SRC_p in cell = 1/cell;
  species SRC_rna in cell = 1/cell;
  species STAT1 in cell = 1/cell;
  species STAT1_g in cell = 1/cell;
  species STAT1_p in cell = 1/cell;
  species STAT1_rna in cell = 1/cell;
  species STAT6 in cell = 1/cell;
  species STAT6_g in cell = 1/cell;
  species STAT6_p in cell = 1/cell;
  species STAT6_rna in cell = 1/cell;
  species TGFA in cell = 1/cell;
  species TGFA_g in cell = 1/cell;
  species TGFA_rna in cell = 1/cell;
  species TGFB1 in cell = 1/cell;
  species TGFB1_g in cell = 1/cell;
  species TGFB1_rna in cell = 1/cell;
  species TLR3 in cell = 1/cell;
  species TLR3_g in cell = 1/cell;
  species TLR3_p in cell = 1/cell;
  species TLR3_rna in cell = 1/cell;
  species TP53 in cell = 1/cell;
  species TP53_g in cell = 1/cell;
  species TP53_p in cell = 1/cell;
  species TP53_rna in cell = 1/cell;
  species TXNIP in cell = 1/cell;
  species TXNIP_g in cell = 1/cell;
  species TXNIP_p in cell = 1/cell;
  species TXNIP_rna in cell = 1/cell;
  species VHL in cell = 1/cell;
  species VHL_g in cell = 1/cell;
  species VHL_p in cell = 1/cell;
  species VHL_rna in cell = 1/cell;
  species VIM in cell = 1/cell;
  species VIM_g in cell = 1/cell;
  species VIM_p in cell = 1/cell;
  species VIM_rna in cell = 1/cell;
  species VLDLR in cell = 1/cell;
  species VLDLR_g in cell = 1/cell;
  species VLDLR_rna in cell = 1/cell;
  species XBP1 in cell = 1/cell;
  species XBP1_g in cell = 1/cell;
  species XBP1_p in cell = 1/cell;
  species XBP1_rna in cell = 1/cell;
  species YAP1 in cell = 1/cell;
  species YAP1_g in cell = 1/cell;
  species YAP1_p in cell = 1/cell;
  species YAP1_rna in cell = 1/cell;
  species ZFP36 in cell = 1/cell;
  species ZFP36_g in cell = 1/cell;
  species ZFP36_p in cell = 1/cell;
  species ZFP36_rna in cell = 1/cell;

  // Reactions:
  // V(1) = K(1,1) * [SMAD4_p] * [SMAD3_p] -K(1,2) * [SIGNOR-C9];
  R1: SMAD4_p => SMAD3_p; 1;
  // V(2) = K(2,1) * [SMAD4_p] * [JUN_p] -K(2,2) * [SIGNOR-C10];
  R2: JUN_p => SMAD4_p; 1;
  // V(3) = K(3,1) * [SMAD4_p] * [SMAD1] * [SMAD1] -K(3,2) * [SIGNOR-C85];
  R3: SMAD1 => SMAD4_p; 1;
  // V(4) = K(4,1) * [JUN_p] * [SMAD3_p] -K(4,2) * [SIGNOR-C86];
  R4: JUN_p => SMAD3_p; 1;
  // V(5) = K(5,1) * [FOS_p] * [JUN_p] * [JUN_p] * [FOS_p] * [JUN_p] * [FOS_p] * [FOS_p] * [JUN_p] -K(5,2) * [SIGNOR-C154];
  R5: JUN_p => FOS_p; 1;
  // V(6) = K(6,1) * [MAPK1_p] * [HIF1A] -K(6,2) * [MAPK1_p |HIF1A];
  R6: HIF1A => MAPK1_p; 1;
  // V(7) = K(7,1) * [MAPK1_p |HIF1A];
  R7: HIF1A => MAPK1_p; 1;
  // V(8) = K(8,1) * [MAPK1_p] * [NR3C1] -K(8,2) * [MAPK1_p |NR3C1];
  R8: NR3C1 => MAPK1_p; 1;
  // V(9) = K(9,1) * [MAPK1_p |NR3C1];
  R9: NR3C1 => MAPK1_p; 1;
  // V(10) = K(10,1) * [MAPK1_p] * [RPS6KA3] -K(10,2) * [MAPK1_p |RPS6KA3];
  R10: RPS6KA3 => MAPK1_p; 1;
  // V(11) = K(11,1) * [MAPK1_p |RPS6KA3];
  R11: RPS6KA3 => MAPK1_p; 1;
  // V(12) = K(12,1) * [AKT1_p] * [FOXO1] -K(12,2) * [AKT1_p |FOXO1];
  R12: FOXO1 => AKT1_p; 1;
  // V(13) = K(13,1) * [AKT1_p |FOXO1];
  R13: FOXO1 => AKT1_p; 1;
  // V(14) = K(14,1) * [SRC_p] * [RPS6KA3] -K(14,2) * [SRC_p |RPS6KA3];
  R14: SRC_p => RPS6KA3; 1;
  // V(15) = K(15,1) * [SRC_p |RPS6KA3];
  R15: SRC_p => RPS6KA3; 1;
  // V(16) = K(16,1) * [MAPK1_p] * [SMAD1] -K(16,2) * [MAPK1_p |SMAD1];
  R16: SMAD1 => MAPK1_p; 1;
  // V(17) = K(17,1) * [MAPK1_p |SMAD1];
  R17: SMAD1 => MAPK1_p; 1;
  // V(18) = K(18,1) * [SRC_p] * [TP53] -K(18,2) * [SRC_p |TP53];
  R18: TP53 => SRC_p; 1;
  // V(19) = K(19,1) * [SRC_p |TP53];
  R19: TP53 => SRC_p; 1;
  // V(20) = K(20,1) * [AKT1_p] * [PRKAA1] -K(20,2) * [AKT1_p |PRKAA1];
  R20: PRKAA1 => AKT1_p; 1;
  // V(21) = K(21,1) * [AKT1_p |PRKAA1];
  R21: PRKAA1 => AKT1_p; 1;
  // V(22) = K(22,1) * [EGFR_p] * [EGFR] -K(22,2) * [EGFR_p |EGFR];
  R22: EGFR_p => EGFR; 1;
  // V(23) = K(23,1) * [EGFR_p |EGFR];
  R23: EGFR_p => EGFR; 1;
  // V(24) = K(24,1) * [JAK2_p] * [JAK2] -K(24,2) * [JAK2_p |JAK2];
  R24: JAK2_p => JAK2; 1;
  // V(25) = K(25,1) * [JAK2_p |JAK2];
  R25: JAK2_p => JAK2; 1;
  // V(26) = K(26,1) * [MAPK1_p] * [CDKN1B] -K(26,2) * [MAPK1_p |CDKN1B];
  R26: CDKN1B => MAPK1_p; 1;
  // V(27) = K(27,1) * [MAPK1_p |CDKN1B];
  R27: CDKN1B => MAPK1_p; 1;
  // V(28) = K(28,1) * [MAPK1_p] * [SMAD4] -K(28,2) * [MAPK1_p |SMAD4];
  R28: SMAD4 => MAPK1_p; 1;
  // V(29) = K(29,1) * [MAPK1_p |SMAD4];
  R29: SMAD4 => MAPK1_p; 1;
  // V(30) = K(30,1) * [MAPK1_p] * [JUN] -K(30,2) * [MAPK1_p |JUN];
  R30: JUN => MAPK1_p; 1;
  // V(31) = K(31,1) * [MAPK1_p |JUN];
  R31: JUN => MAPK1_p; 1;
  // V(32) = K(32,1) * [AKT1_p] * [NR4A1] -K(32,2) * [AKT1_p |NR4A1];
  R32: NR4A1 => AKT1_p; 1;
  // V(33) = K(33,1) * [AKT1_p |NR4A1];
  R33: NR4A1 => AKT1_p; 1;
  // V(34) = K(34,1) * [JAK2_p] * [MAP3K5] -K(34,2) * [JAK2_p |MAP3K5];
  R34: JAK2_p => MAP3K5; 1;
  // V(35) = K(35,1) * [JAK2_p |MAP3K5];
  R35: JAK2_p => MAP3K5; 1;
  // V(36) = K(36,1) * [MAPK1_p] * [FOS] -K(36,2) * [MAPK1_p |FOS];
  R36: FOS => MAPK1_p; 1;
  // V(37) = K(37,1) * [MAPK1_p |FOS];
  R37: FOS => MAPK1_p; 1;
  // V(38) = K(38,1) * [SRC_p] * [SRC] -K(38,2) * [SRC_p |SRC];
  R38: SRC => SRC_p; 1;
  // V(39) = K(39,1) * [SRC_p |SRC];
  R39: SRC => SRC_p; 1;
  // V(40) = K(40,1) * [SRC_p] * [TLR3] -K(40,2) * [SRC_p |TLR3];
  R40: TLR3 => SRC_p; 1;
  // V(41) = K(41,1) * [SRC_p |TLR3];
  R41: TLR3 => SRC_p; 1;
  // V(42) = K(42,1) * [KIT_p] * [CTNNB1] -K(42,2) * [KIT_p |CTNNB1];
  R42: CTNNB1 => KIT_p; 1;
  // V(43) = K(43,1) * [KIT_p |CTNNB1];
  R43: CTNNB1 => KIT_p; 1;
  // V(44) = K(44,1) * [JAK1_p] * [STAT1] -K(44,2) * [JAK1_p |STAT1];
  R44: STAT1 => JAK1_p; 1;
  // V(45) = K(45,1) * [JAK1_p |STAT1];
  R45: STAT1 => JAK1_p; 1;
  // V(46) = K(46,1) * [MAPK1_p] * [DUSP1] -K(46,2) * [MAPK1_p |DUSP1];
  R46: DUSP1 => MAPK1_p; 1;
  // V(47) = K(47,1) * [MAPK1_p |DUSP1];
  R47: DUSP1 => MAPK1_p; 1;
  // V(48) = K(48,1) * [AKT1_p] * [HSPB1] -K(48,2) * [AKT1_p |HSPB1];
  R48: HSPB1 => AKT1_p; 1;
  // V(49) = K(49,1) * [AKT1_p |HSPB1];
  R49: HSPB1 => AKT1_p; 1;
  // V(50) = K(50,1) * [PKN1_p] * [PKN1] -K(50,2) * [PKN1_p |PKN1];
  R50: PKN1 => PKN1_p; 1;
  // V(51) = K(51,1) * [PKN1_p |PKN1];
  R51: PKN1 => PKN1_p; 1;
  // V(52) = K(52,1) * [AKT1_p] * [CDKN1A] -K(52,2) * [AKT1_p |CDKN1A];
  R52: AKT1_p => CDKN1A; 1;
  // V(53) = K(53,1) * [AKT1_p |CDKN1A];
  R53: AKT1_p => CDKN1A; 1;
  // V(54) = K(54,1) * [SRC_p] * [AKT1] -K(54,2) * [SRC_p |AKT1];
  R54: AKT1 => SRC_p; 1;
  // V(55) = K(55,1) * [SRC_p |AKT1];
  R55: AKT1 => SRC_p; 1;
  // V(56) = K(56,1) * [JAK1_p] * [EIF2AK3] -K(56,2) * [JAK1_p |EIF2AK3];
  R56: EIF2AK3 => JAK1_p; 1;
  // V(57) = K(57,1) * [JAK1_p |EIF2AK3];
  R57: EIF2AK3 => JAK1_p; 1;
  // V(58) = K(58,1) * [MAPK1_p] * [SPHK1] -K(58,2) * [MAPK1_p |SPHK1];
  R58: SPHK1 => MAPK1_p; 1;
  // V(59) = K(59,1) * [MAPK1_p |SPHK1];
  R59: SPHK1 => MAPK1_p; 1;
  // V(60) = K(60,1) * [KIT_p] * [KIT] -K(60,2) * [KIT_p |KIT];
  R60: KIT => KIT_p; 1;
  // V(61) = K(61,1) * [KIT_p |KIT];
  R61: KIT => KIT_p; 1;
  // V(62) = K(62,1) * [MAPK1_p] * [RHOA] -K(62,2) * [MAPK1_p |RHOA];
  R62: RHOA => MAPK1_p; 1;
  // V(63) = K(63,1) * [MAPK1_p |RHOA];
  R63: RHOA => MAPK1_p; 1;
  // V(64) = K(64,1) * [JAK2_p] * [EPOR] -K(64,2) * [JAK2_p |EPOR];
  R64: JAK2_p => EPOR; 1;
  // V(65) = K(65,1) * [JAK2_p |EPOR];
  R65: JAK2_p => EPOR; 1;
  // V(66) = K(66,1) * [MAPK1_p] * [FOXO1] -K(66,2) * [MAPK1_p |FOXO1];
  R66: FOXO1 => MAPK1_p; 1;
  // V(67) = K(67,1) * [MAPK1_p |FOXO1];
  R67: FOXO1 => MAPK1_p; 1;
  // V(68) = K(68,1) * [JAK2_p] * [STAT1] -K(68,2) * [JAK2_p |STAT1];
  R68: JAK2_p => STAT1; 1;
  // V(69) = K(69,1) * [JAK2_p |STAT1];
  R69: JAK2_p => STAT1; 1;
  // V(70) = K(70,1) * [SRC_p] * [EGFR] -K(70,2) * [SRC_p |EGFR];
  R70: EGFR => SRC_p; 1;
  // V(71) = K(71,1) * [SRC_p |EGFR];
  R71: EGFR => SRC_p; 1;
  // V(72) = K(72,1) * [SRC_p] * [STAT1] -K(72,2) * [SRC_p |STAT1];
  R72: STAT1 => SRC_p; 1;
  // V(73) = K(73,1) * [SRC_p |STAT1];
  R73: STAT1 => SRC_p; 1;
  // V(74) = K(74,1) * [MAPK1_p] * [SMAD3] -K(74,2) * [MAPK1_p |SMAD3];
  R74: SMAD3 => MAPK1_p; 1;
  // V(75) = K(75,1) * [MAPK1_p |SMAD3];
  R75: SMAD3 => MAPK1_p; 1;
  // V(76) = K(76,1) * [ERN1_p] * [ERN1] -K(76,2) * [ERN1_p |ERN1];
  R76: ERN1_p => ERN1; 1;
  // V(77) = K(77,1) * [ERN1_p |ERN1];
  R77: ERN1_p => ERN1; 1;
  // V(78) = K(78,1) * [RPS6KA3_p] * [DEPTOR] -K(78,2) * [RPS6KA3_p |DEPTOR];
  R78: DEPTOR => RPS6KA3_p; 1;
  // V(79) = K(79,1) * [RPS6KA3_p |DEPTOR];
  R79: DEPTOR => RPS6KA3_p; 1;
  // V(80) = K(80,1) * [RPS6KA3_p] * [MAP3K5] -K(80,2) * [RPS6KA3_p |MAP3K5];
  R80: RPS6KA3_p => MAP3K5; 1;
  // V(81) = K(81,1) * [RPS6KA3_p |MAP3K5];
  R81: RPS6KA3_p => MAP3K5; 1;
  // V(82) = K(82,1) * [AKT1_p] * [CDKN1B] -K(82,2) * [AKT1_p |CDKN1B];
  R82: CDKN1B => AKT1_p; 1;
  // V(83) = K(83,1) * [AKT1_p |CDKN1B];
  R83: CDKN1B => AKT1_p; 1;
  // V(84) = K(84,1) * [SRC_p] * [IGF1R] -K(84,2) * [SRC_p |IGF1R];
  R84: SRC_p => IGF1R; 1;
  // V(85) = K(85,1) * [SRC_p |IGF1R];
  R85: SRC_p => IGF1R; 1;
  // V(86) = K(86,1) * [MAPK1_p] * [SIGNOR-C154] -K(86,2) * [MAPK1_p |SIGNOR-C154];
  R86: MAPK1_p => ; 1;
  // V(87) = K(87,1) * [MAPK1_p |SIGNOR-C154];
  R87: MAPK1_p => ; 1;
  // V(88) = K(88,1) * [IGF1R_p] * [IGF1R] -K(88,2) * [IGF1R_p |IGF1R];
  R88: IGF1R_p => IGF1R; 1;
  // V(89) = K(89,1) * [IGF1R_p |IGF1R];
  R89: IGF1R_p => IGF1R; 1;
  // V(90) = K(90,1) * [SGK1] * [FOXO1] -K(90,2) * [SGK1 |FOXO1];
  R90: FOXO1 => SGK1; 1;
  // V(91) = K(91,1) * [SGK1 |FOXO1];
  R91: FOXO1 => SGK1; 1;
  // V(92) = K(92,1) * [SGK1] * [CDKN1B] -K(92,2) * [SGK1 |CDKN1B];
  R92: CDKN1B => SGK1; 1;
  // V(93) = K(93,1) * [SGK1 |CDKN1B];
  R93: CDKN1B => SGK1; 1;
  // V(94) = K(94,1) * [RPS6KA3_p] * [CREB1] -K(94,2) * [RPS6KA3_p |CREB1];
  R94: RPS6KA3_p => CREB1; 1;
  // V(95) = K(95,1) * [RPS6KA3_p |CREB1];
  R95: RPS6KA3_p => CREB1; 1;
  // V(96) = K(96,1) * [MAPK1_p] * [EGFR] -K(96,2) * [MAPK1_p |EGFR];
  R96: EGFR => MAPK1_p; 1;
  // V(97) = K(97,1) * [MAPK1_p |EGFR];
  R97: EGFR => MAPK1_p; 1;
  // V(98) = K(98,1) * [SRC_p] * [PTEN] -K(98,2) * [SRC_p |PTEN];
  R98: PTEN => SRC_p; 1;
  // V(99) = K(99,1) * [SRC_p |PTEN];
  R99: PTEN => SRC_p; 1;
  // V(100) = K(100,1) * [EIF2AK3_p] * [EIF2AK3] -K(100,2) * [EIF2AK3_p |EIF2AK3];
  R100: EIF2AK3_p => EIF2AK3; 1;
  // V(101) = K(101,1) * [EIF2AK3_p |EIF2AK3];
  R101: EIF2AK3_p => EIF2AK3; 1;
  // V(102) = K(102,1) * [MAP3K5_p] * [MAP3K5] -K(102,2) * [MAP3K5_p |MAP3K5];
  R102: MAP3K5 => MAP3K5_p; 1;
  // V(103) = K(103,1) * [MAP3K5_p |MAP3K5];
  R103: MAP3K5 => MAP3K5_p; 1;
  // V(104) = K(104,1) * [AKT1_p] * [VIM] -K(104,2) * [AKT1_p |VIM];
  R104: VIM => AKT1_p; 1;
  // V(105) = K(105,1) * [AKT1_p |VIM];
  R105: VIM => AKT1_p; 1;
  // V(106) = K(106,1) * [ILK_p] * [AKT1] -K(106,2) * [ILK_p |AKT1];
  R106: ILK_p => AKT1; 1;
  // V(107) = K(107,1) * [ILK_p |AKT1];
  R107: ILK_p => AKT1; 1;
  // V(108) = K(108,1) * [MAPK1_p] * [SP1] -K(108,2) * [MAPK1_p |SP1];
  R108: SP1 => MAPK1_p; 1;
  // V(109) = K(109,1) * [MAPK1_p |SP1];
  R109: SP1 => MAPK1_p; 1;
  // V(110) = K(110,1) * [ROCK1] * [PTEN] -K(110,2) * [ROCK1 |PTEN];
  R110: PTEN => ROCK1; 1;
  // V(111) = K(111,1) * [ROCK1 |PTEN];
  R111: PTEN => ROCK1; 1;
  // V(112) = K(112,1) * [MAPK1_p] * [CDKN1A] -K(112,2) * [MAPK1_p |CDKN1A];
  R112: CDKN1A => MAPK1_p; 1;
  // V(113) = K(113,1) * [MAPK1_p |CDKN1A];
  R113: CDKN1A => MAPK1_p; 1;
  // V(114) = K(114,1) * [PRKAA1] * [FOXO1] -K(114,2) * [PRKAA1 |FOXO1];
  R114: PRKAA1 => FOXO1; 1;
  // V(115) = K(115,1) * [PRKAA1 |FOXO1];
  R115: PRKAA1 => FOXO1; 1;
  // V(116) = K(116,1) * [MAPK1_p] * [JAK2] -K(116,2) * [MAPK1_p |JAK2];
  R116: JAK2 => MAPK1_p; 1;
  // V(117) = K(117,1) * [MAPK1_p |JAK2];
  R117: JAK2 => MAPK1_p; 1;
  // V(118) = K(118,1) * [IGF1R_p] * [PCNA] -K(118,2) * [IGF1R_p |PCNA];
  R118: PCNA => IGF1R_p; 1;
  // V(119) = K(119,1) * [IGF1R_p |PCNA];
  R119: PCNA => IGF1R_p; 1;
  // V(120) = K(120,1) * [AKT1_p] * [CASP9] -K(120,2) * [AKT1_p |CASP9];
  R120: CASP9 => AKT1_p; 1;
  // V(121) = K(121,1) * [AKT1_p |CASP9];
  R121: CASP9 => AKT1_p; 1;
  // V(122) = K(122,1) * [AKT1_p] * [NR3C1] -K(122,2) * [AKT1_p |NR3C1];
  R122: AKT1_p => NR3C1; 1;
  // V(123) = K(123,1) * [AKT1_p |NR3C1];
  R123: AKT1_p => NR3C1; 1;
  // V(124) = K(124,1) * [SRC_p] * [CLTC] -K(124,2) * [SRC_p |CLTC];
  R124: SRC_p => CLTC; 1;
  // V(125) = K(125,1) * [SRC_p |CLTC];
  R125: SRC_p => CLTC; 1;
  // V(126) = K(126,1) * [JAK2_p] * [STAT6] -K(126,2) * [JAK2_p |STAT6];
  R126: STAT6 => JAK2_p; 1;
  // V(127) = K(127,1) * [JAK2_p |STAT6];
  R127: STAT6 => JAK2_p; 1;
  // V(128) = K(128,1) * [MAP3K14_p] * [NFKB2] -K(128,2) * [MAP3K14_p |NFKB2];
  R128: NFKB2 => MAP3K14_p; 1;
  // V(129) = K(129,1) * [MAP3K14_p |NFKB2];
  R129: NFKB2 => MAP3K14_p; 1;
  // V(130) = K(130,1) * [PKN1_p] * [FOXO1] -K(130,2) * [PKN1_p |FOXO1];
  R130: FOXO1 => PKN1_p; 1;
  // V(131) = K(131,1) * [PKN1_p |FOXO1];
  R131: FOXO1 => PKN1_p; 1;
  // V(132) = K(132,1) * [MAPK1_p] * [CASP9] -K(132,2) * [MAPK1_p |CASP9];
  R132: CASP9 => MAPK1_p; 1;
  // V(133) = K(133,1) * [MAPK1_p |CASP9];
  R133: CASP9 => MAPK1_p; 1;
  // V(134) = K(134,1) * [MAP3K14_p] * [MAP3K14] -K(134,2) * [MAP3K14_p |MAP3K14];
  R134: MAP3K14 => MAP3K14_p; 1;
  // V(135) = K(135,1) * [MAP3K14_p |MAP3K14];
  R135: MAP3K14 => MAP3K14_p; 1;
  // V(136) = K(136,1) * [JAK1_p] * [STAT6] -K(136,2) * [JAK1_p |STAT6];
  R136: STAT6 => JAK1_p; 1;
  // V(137) = K(137,1) * [JAK1_p |STAT6];
  R137: STAT6 => JAK1_p; 1;
  // V(138) = K(138,1) * [AKT1_p] * [YAP1] -K(138,2) * [AKT1_p |YAP1];
  R138: YAP1 => AKT1_p; 1;
  // V(139) = K(139,1) * [AKT1_p |YAP1];
  R139: YAP1 => AKT1_p; 1;
  // V(140) = K(140,1) * [JAK2_p] * [CDKN1B] -K(140,2) * [JAK2_p |CDKN1B];
  R140: JAK2_p => CDKN1B; 1;
  // V(141) = K(141,1) * [JAK2_p |CDKN1B];
  R141: JAK2_p => CDKN1B; 1;
  // V(142) = K(142,1) * [SMAD1] * [SMAD4] -K(142,2) * [SMAD1 |SMAD4];
  R142: SMAD4 => SMAD1; 1;
  // V(143) = K(143,1) * [SMAD1 |SMAD4];
  R143: SMAD4 => SMAD1; 1;
  // V(144) = K(144,1) * [RPS6KA3_p] * [FOS] -K(144,2) * [RPS6KA3_p |FOS];
  R144: RPS6KA3_p => FOS; 1;
  // V(145) = K(145,1) * [RPS6KA3_p |FOS];
  R145: RPS6KA3_p => FOS; 1;
  // V(146) = K(146,1) * [AKT1_p] * [RPS6KA3] -K(146,2) * [AKT1_p |RPS6KA3];
  R146: RPS6KA3 => AKT1_p; 1;
  // V(147) = K(147,1) * [AKT1_p |RPS6KA3];
  R147: RPS6KA3 => AKT1_p; 1;
  // V(148) = K(148,1) * [KIT_p] * [STAT1] -K(148,2) * [KIT_p |STAT1];
  R148: STAT1 => KIT_p; 1;
  // V(149) = K(149,1) * [KIT_p |STAT1];
  R149: STAT1 => KIT_p; 1;
  // V(150) = K(150,1) * [RPS6KA3_p] * [RPS6KA3] -K(150,2) * [RPS6KA3_p |RPS6KA3];
  R150: RPS6KA3_p => RPS6KA3; 1;
  // V(151) = K(151,1) * [RPS6KA3_p |RPS6KA3];
  R151: RPS6KA3_p => RPS6KA3; 1;
  // V(152) = K(152,1) * [AKT1_p] * [CTNNB1] -K(152,2) * [AKT1_p |CTNNB1];
  R152: CTNNB1 => AKT1_p; 1;
  // V(153) = K(153,1) * [AKT1_p |CTNNB1];
  R153: CTNNB1 => AKT1_p; 1;
  // V(154) = K(154,1) * [RPS6KA3_p] * [NR4A1] -K(154,2) * [RPS6KA3_p |NR4A1];
  R154: NR4A1 => RPS6KA3_p; 1;
  // V(155) = K(155,1) * [RPS6KA3_p |NR4A1];
  R155: NR4A1 => RPS6KA3_p; 1;
  // V(156) = K(156,1) * [ROCK1] * [TP53] -K(156,2) * [ROCK1 |TP53];
  R156: TP53 => ROCK1; 1;
  // V(157) = K(157,1) * [ROCK1 |TP53];
  R157: TP53 => ROCK1; 1;
  // V(158) = K(158,1) * [AKT1_p] * [RUNX2] -K(158,2) * [AKT1_p |RUNX2];
  R158: RUNX2 => AKT1_p; 1;
  // V(159) = K(159,1) * [AKT1_p |RUNX2];
  R159: RUNX2 => AKT1_p; 1;
  // V(160) = K(160,1) * [MAPK1_p] * [MAPK1] -K(160,2) * [MAPK1_p |MAPK1];
  R160: MAPK1 => MAPK1_p; 1;
  // V(161) = K(161,1) * [MAPK1_p |MAPK1];
  R161: MAPK1 => MAPK1_p; 1;
  // V(162) = K(162,1) * [MAPK1_p] * [RRAS] -K(162,2) * [MAPK1_p |RRAS];
  R162: RRAS => MAPK1_p; 1;
  // V(163) = K(163,1) * [MAPK1_p |RRAS];
  R163: RRAS => MAPK1_p; 1;
  // V(164) = K(164,1) * [SRC_p] * [CDH1] -K(164,2) * [SRC_p |CDH1];
  R164: CDH1 => SRC_p; 1;
  // V(165) = K(165,1) * [SRC_p |CDH1];
  R165: CDH1 => SRC_p; 1;
  // V(166) = K(166,1) * [MAPK1_p] * [ZFP36] -K(166,2) * [MAPK1_p |ZFP36];
  R166: ZFP36 => MAPK1_p; 1;
  // V(167) = K(167,1) * [MAPK1_p |ZFP36];
  R167: ZFP36 => MAPK1_p; 1;
  // V(168) = K(168,1) * [MAPK1_p] * [RCAN1] -K(168,2) * [MAPK1_p |RCAN1];
  R168: RCAN1 => MAPK1_p; 1;
  // V(169) = K(169,1) * [MAPK1_p |RCAN1];
  R169: RCAN1 => MAPK1_p; 1;
  // V(170) = K(170,1) * [JAK2_p] * [EGFR] -K(170,2) * [JAK2_p |EGFR];
  R170: EGFR => JAK2_p; 1;
  // V(171) = K(171,1) * [JAK2_p |EGFR];
  R171: EGFR => JAK2_p; 1;
  // V(172) = K(172,1) * [PKN1_p] * [EGFR] -K(172,2) * [PKN1_p |EGFR];
  R172: EGFR => PKN1_p; 1;
  // V(173) = K(173,1) * [PKN1_p |EGFR];
  R173: EGFR => PKN1_p; 1;
  // V(174) = K(174,1) * [AKT1_p] * [MAP3K5] -K(174,2) * [AKT1_p |MAP3K5];
  R174: MAP3K5 => AKT1_p; 1;
  // V(175) = K(175,1) * [AKT1_p |MAP3K5];
  R175: MAP3K5 => AKT1_p; 1;
  // V(176) = K(176,1) * [AKT1_p] * [PARK7] -K(176,2) * [AKT1_p |PARK7];
  R176: AKT1_p => PARK7; 1;
  // V(177) = K(177,1) * [AKT1_p |PARK7];
  R177: AKT1_p => PARK7; 1;
  // V(178) = K(178,1) * [SRC_p] * [KIT] -K(178,2) * [SRC_p |KIT];
  R178: SRC_p => KIT; 1;
  // V(179) = K(179,1) * [SRC_p |KIT];
  R179: SRC_p => KIT; 1;
  // V(180) = K(180,1) * [SGK1] * [SP1] -K(180,2) * [SGK1 |SP1];
  R180: SP1 => SGK1; 1;
  // V(181) = K(181,1) * [SGK1 |SP1];
  R181: SP1 => SGK1; 1;
  // V(182) = K(182,1) * [SRC_p] * [PROM1] -K(182,2) * [SRC_p |PROM1];
  R182: PROM1 => SRC_p; 1;
  // V(183) = K(183,1) * [SRC_p |PROM1];
  R183: PROM1 => SRC_p; 1;
  // V(184) = K(184,1) * [SRC_p] * [CTNNB1] -K(184,2) * [SRC_p |CTNNB1];
  R184: CTNNB1 => SRC_p; 1;
  // V(185) = K(185,1) * [SRC_p |CTNNB1];
  R185: CTNNB1 => SRC_p; 1;
  // V(186) = K(186,1) * [SGK1] * [MAPK1] -K(186,2) * [SGK1 |MAPK1];
  R186: MAPK1 => SGK1; 1;
  // V(187) = K(187,1) * [SGK1 |MAPK1];
  R187: MAPK1 => SGK1; 1;
  // V(188) = K(188,1) * [JAK2_p] * [GHR] -K(188,2) * [JAK2_p |GHR];
  R188: JAK2_p => GHR; 1;
  // V(189) = K(189,1) * [JAK2_p |GHR];
  R189: JAK2_p => GHR; 1;
  // V(190) = K(190,1) * [PRKAA1] * [DDIT3] -K(190,2) * [PRKAA1 |DDIT3];
  R190: PRKAA1 => DDIT3; 1;
  // V(191) = K(191,1) * [PRKAA1 |DDIT3];
  R191: PRKAA1 => DDIT3; 1;
  // V(192) = K(192,1) * [RPS6KA3_p] * [TP53] -K(192,2) * [RPS6KA3_p |TP53];
  R192: TP53 => RPS6KA3_p; 1;
  // V(193) = K(193,1) * [RPS6KA3_p |TP53];
  R193: TP53 => RPS6KA3_p; 1;
  // V(194) = K(194,1) * [SRC_p] * [MYD88] -K(194,2) * [SRC_p |MYD88];
  R194: MYD88 => SRC_p; 1;
  // V(195) = K(195,1) * [SRC_p |MYD88];
  R195: MYD88 => SRC_p; 1;
  // V(196) = K(196,1) * [MAPK1_p] * [XBP1] -K(196,2) * [MAPK1_p |XBP1];
  R196: XBP1 => MAPK1_p; 1;
  // V(197) = K(197,1) * [MAPK1_p |XBP1];
  R197: XBP1 => MAPK1_p; 1;
  // V(198) = K(198,1) * [SGK1] * [NR3C1] -K(198,2) * [SGK1 |NR3C1];
  R198: SGK1 => NR3C1; 1;
  // V(199) = K(199,1) * [SGK1 |NR3C1];
  R199: SGK1 => NR3C1; 1;
  // V(200) = K(200,1) * [JAK2_p] * [LEPR] -K(200,2) * [JAK2_p |LEPR];
  R200: JAK2_p => LEPR; 1;
  // V(201) = K(201,1) * [JAK2_p |LEPR];
  R201: JAK2_p => LEPR; 1;
  // V(202) = K(202,1) * [AKT1_p] * [AKT1] -K(202,2) * [AKT1_p |AKT1];
  R202: AKT1 => AKT1_p; 1;
  // V(203) = K(203,1) * [AKT1_p |AKT1];
  R203: AKT1 => AKT1_p; 1;
  // V(204) = K(204,1) * [EGFR_p] * [STAT1] -K(204,2) * [EGFR_p |STAT1];
  R204: EGFR_p => STAT1; 1;
  // V(205) = K(205,1) * [EGFR_p |STAT1];
  R205: EGFR_p => STAT1; 1;
  // V(206) = K(206,1) * [EGFR_p] * [PCNA] -K(206,2) * [EGFR_p |PCNA];
  R206: EGFR_p => PCNA; 1;
  // V(207) = K(207,1) * [EGFR_p |PCNA];
  R207: EGFR_p => PCNA; 1;
  // V(208) = K(208,1) * [PRKAA1] * [MFF] -K(208,2) * [PRKAA1 |MFF];
  R208: PRKAA1 => MFF; 1;
  // V(209) = K(209,1) * [PRKAA1 |MFF];
  R209: PRKAA1 => MFF; 1;
  // V(210) = K(210,1) * [SRC_p] * [CDKN1B] -K(210,2) * [SRC_p |CDKN1B];
  R210: CDKN1B => SRC_p; 1;
  // V(211) = K(211,1) * [SRC_p |CDKN1B];
  R211: CDKN1B => SRC_p; 1;
  // V(212) = K(212,1) * [AKT1_p] * [CREB1] -K(212,2) * [AKT1_p |CREB1];
  R212: CREB1 => AKT1_p; 1;
  // V(213) = K(213,1) * [AKT1_p |CREB1];
  R213: CREB1 => AKT1_p; 1;
  // V(214) = K(214,1) * [SGK1] * [SLC9A3] -K(214,2) * [SGK1 |SLC9A3];
  R214: SLC9A3 => SGK1; 1;
  // V(215) = K(215,1) * [SGK1 |SLC9A3];
  R215: SLC9A3 => SGK1; 1;
  // V(216) = K(216,1) * [AKT1_p] * [MAPK1] -K(216,2) * [AKT1_p |MAPK1];
  R216: MAPK1 => AKT1_p; 1;
  // V(217) = K(217,1) * [AKT1_p |MAPK1];
  R217: MAPK1 => AKT1_p; 1;
  // V(218) = K(218,1) * [ROCK1] * [VIM] -K(218,2) * [ROCK1 |VIM];
  R218: ROCK1 => VIM; 1;
  // V(219) = K(219,1) * [ROCK1 |VIM];
  R219: ROCK1 => VIM; 1;
  // V(220) = K(220,1) * [ATR] * [TP53] -K(220,2) * [ATR |TP53];
  R220: TP53 => ATR; 1;
  // V(221) = K(221,1) * [ATR |TP53];
  R221: TP53 => ATR; 1;
  // V(222) = K(222,1) * [ATR] * [CREB1] -K(222,2) * [ATR |CREB1];
  R222: ATR => CREB1; 1;
  // V(223) = K(223,1) * [ATR |CREB1];
  R223: ATR => CREB1; 1;
  // V(224) = K(224,1) * [EGFR_p] * [TLR3] -K(224,2) * [EGFR_p |TLR3];
  R224: EGFR_p => TLR3; 1;
  // V(225) = K(225,1) * [EGFR_p |TLR3];
  R225: EGFR_p => TLR3; 1;
  // V(226) = K(226,1) * [SRC_p] * [RRAS] -K(226,2) * [SRC_p |RRAS];
  R226: RRAS => SRC_p; 1;
  // V(227) = K(227,1) * [SRC_p |RRAS];
  R227: RRAS => SRC_p; 1;
  // V(228) = K(228,1) * [MAP3K5_p] * [ERN1] -K(228,2) * [MAP3K5_p |ERN1];
  R228: ERN1 => MAP3K5_p; 1;
  // V(229) = K(229,1) * [MAP3K5_p |ERN1];
  R229: ERN1 => MAP3K5_p; 1;
  // V(230) = K(230,1) * [MAPK1_p] * [TP53] -K(230,2) * [MAPK1_p |TP53];
  R230: TP53 => MAPK1_p; 1;
  // V(231) = K(231,1) * [MAPK1_p |TP53];
  R231: TP53 => MAPK1_p; 1;
  // V(232) = K(232,1) * [PRKAA1] * [NFE2L2] -K(232,2) * [PRKAA1 |NFE2L2];
  R232: PRKAA1 => NFE2L2; 1;
  // V(233) = K(233,1) * [PRKAA1 |NFE2L2];
  R233: PRKAA1 => NFE2L2; 1;
  // V(234) = K(234,1) * [PRKAA1] * [PRKAA1] -K(234,2) * [PRKAA1 |PRKAA1];
  R234: PRKAA1 => ; 1;
  // V(235) = K(235,1) * [PRKAA1 |PRKAA1];
  R235: PRKAA1 => ; 1;
  // V(236) = K(236,1) * [SGK1] * [STAT1] -K(236,2) * [SGK1 |STAT1];
  R236: STAT1 => SGK1; 1;
  // V(237) = K(237,1) * [SGK1 |STAT1];
  R237: STAT1 => SGK1; 1;
  // V(238) = K(238,1) * [ERN1_p] * [XBP1] -K(238,2) * [ERN1_p |XBP1];
  R238: ERN1_p => XBP1; 1;
  // V(239) = K(239,1) * [ERN1_p |XBP1];
  R239: ERN1_p => XBP1; 1;
  // V(240) = K(240,1) * [ILK_p] * [ILK] -K(240,2) * [ILK_p |ILK];
  R240: ILK_p => ILK; 1;
  // V(241) = K(241,1) * [ILK_p |ILK];
  R241: ILK_p => ILK; 1;
  // V(242) = K(242,1) * [SRC_p] * [RHOA] -K(242,2) * [SRC_p |RHOA];
  R242: RHOA => SRC_p; 1;
  // V(243) = K(243,1) * [SRC_p |RHOA];
  R243: RHOA => SRC_p; 1;
  // V(244) = K(244,1) * [SRC_p] * [VHL] -K(244,2) * [SRC_p |VHL];
  R244: VHL => SRC_p; 1;
  // V(245) = K(245,1) * [SRC_p |VHL];
  R245: VHL => SRC_p; 1;
  // V(246) = K(246,1) * [SRC_p] * [ENG] -K(246,2) * [SRC_p |ENG];
  R246: ENG => SRC_p; 1;
  // V(247) = K(247,1) * [SRC_p |ENG];
  R247: ENG => SRC_p; 1;
  // V(248) = K(248,1) * [MAP3K5_p] * [CDKN1A] -K(248,2) * [MAP3K5_p |CDKN1A];
  R248: MAP3K5_p => CDKN1A; 1;
  // V(249) = K(249,1) * [MAP3K5_p |CDKN1A];
  R249: MAP3K5_p => CDKN1A; 1;
  // V(250) = K(250,1) * [EGFR_p] * [CTNNB1] -K(250,2) * [EGFR_p |CTNNB1];
  R250: EGFR_p => CTNNB1; 1;
  // V(251) = K(251,1) * [EGFR_p |CTNNB1];
  R251: EGFR_p => CTNNB1; 1;
  // V(252) = K(252,1) * [SRC_p] * [SMAD3] -K(252,2) * [SRC_p |SMAD3];
  R252: SRC_p => SMAD3; 1;
  // V(253) = K(253,1) * [SRC_p |SMAD3];
  R253: SRC_p => SMAD3; 1;
  // V(254) = K(254,1) * [SRC_p] * [CASP9] -K(254,2) * [SRC_p |CASP9];
  R254: SRC_p => CASP9; 1;
  // V(255) = K(255,1) * [SRC_p |CASP9];
  R255: SRC_p => CASP9; 1;
  // V(256) = K(256,1) * [AKT1_p] * [SMURF1] -K(256,2) * [AKT1_p |SMURF1];
  R256: SMURF1 => AKT1_p; 1;
  // V(257) = K(257,1) * [AKT1_p |SMURF1];
  R257: SMURF1 => AKT1_p; 1;
  // V(258) = K(258,1) * [MAPK6_p] * [MAPK6] -K(258,2) * [MAPK6_p |MAPK6];
  R258: MAPK6_p => MAPK6; 1;
  // V(259) = K(259,1) * [MAPK6_p |MAPK6];
  R259: MAPK6_p => MAPK6; 1;
  // V(260) = K(260,1) * [MAPK1_p] * [NR4A1] -K(260,2) * [MAPK1_p |NR4A1];
  R260: NR4A1 => MAPK1_p; 1;
  // V(261) = K(261,1) * [MAPK1_p |NR4A1];
  R261: NR4A1 => MAPK1_p; 1;
  // V(262) = K(262,1) * [SRC_p] * [PTPN6] -K(262,2) * [SRC_p |PTPN6];
  R262: PTPN6 => SRC_p; 1;
  // V(263) = K(263,1) * [SRC_p |PTPN6];
  R263: PTPN6 => SRC_p; 1;
  // V(264) = K(264,1) * [EGFR_p] * [ABCA1] -K(264,2) * [EGFR_p |ABCA1];
  R264: EGFR_p => ABCA1; 1;
  // V(265) = K(265,1) * [EGFR_p |ABCA1];
  R265: EGFR_p => ABCA1; 1;
  // V(266) = K(266,1) * [MAPK1_p] * [TXNIP] -K(266,2) * [MAPK1_p |TXNIP];
  R266: TXNIP => MAPK1_p; 1;
  // V(267) = K(267,1) * [MAPK1_p |TXNIP];
  R267: TXNIP => MAPK1_p; 1;
  // V(268) = K(268,1) * [EGFR_p] * [PKM] -K(268,2) * [EGFR_p |PKM];
  R268: EGFR_p => PKM; 1;
  // V(269) = K(269,1) * [EGFR_p |PKM];
  R269: EGFR_p => PKM; 1;
  // V(270) = K(270,1) * [AKT1_p] * [BAX] -K(270,2) * [AKT1_p |BAX];
  R270: AKT1_p => BAX; 1;
  // V(271) = K(271,1) * [AKT1_p |BAX];
  R271: AKT1_p => BAX; 1;
  // V(272) = K(272,1) * [PRKAA1] * [CDKN1B] -K(272,2) * [PRKAA1 |CDKN1B];
  R272: PRKAA1 => CDKN1B; 1;
  // V(273) = K(273,1) * [PRKAA1 |CDKN1B];
  R273: PRKAA1 => CDKN1B; 1;
  // V(274) = K(274,1) * [PRKAA1] * [TP53] -K(274,2) * [PRKAA1 |TP53];
  R274: TP53 => PRKAA1; 1;
  // V(275) = K(275,1) * [PRKAA1 |TP53];
  R275: TP53 => PRKAA1; 1;
  // V(276) = K(276,1) * [PTPN6_p] * [JAK2_p] -K(276,2) * [PTPN6_p |JAK2_p];
  R276: PTPN6_p => JAK2_p; 1;
  // V(277) = K(277,1) * [PTPN6_p |JAK2_p];
  R277: PTPN6_p => JAK2_p; 1;
  // V(278) = K(278,1) * [PTPN6_p] * [EGFR_p] -K(278,2) * [PTPN6_p |EGFR_p];
  R278: PTPN6_p => EGFR_p; 1;
  // V(279) = K(279,1) * [PTPN6_p |EGFR_p];
  R279: PTPN6_p => EGFR_p; 1;
  // V(280) = K(280,1) * [PTEN_p] * [SRC_p] -K(280,2) * [PTEN_p |SRC_p];
  R280: PTEN_p => SRC_p; 1;
  // V(281) = K(281,1) * [PTEN_p |SRC_p];
  R281: PTEN_p => SRC_p; 1;
  // V(282) = K(282,1) * [PTPN6_p] * [PKM_p] -K(282,2) * [PTPN6_p |PKM_p];
  R282: PTPN6_p => PKM_p; 1;
  // V(283) = K(283,1) * [PTPN6_p |PKM_p];
  R283: PTPN6_p => PKM_p; 1;
  // V(284) = K(284,1) * [DUSP1_p] * [MAPK1_p] -K(284,2) * [DUSP1_p |MAPK1_p];
  R284: DUSP1_p => MAPK1_p; 1;
  // V(285) = K(285,1) * [DUSP1_p |MAPK1_p];
  R285: DUSP1_p => MAPK1_p; 1;
  // V(286) = K(286,1) * [PTPN6_p] * [SRC_p] -K(286,2) * [PTPN6_p |SRC_p];
  R286: PTPN6_p => SRC_p; 1;
  // V(287) = K(287,1) * [PTPN6_p |SRC_p];
  R287: PTPN6_p => SRC_p; 1;
  // V(288) = K(288,1) * [PTPN6_p] * [JAK1_p] -K(288,2) * [PTPN6_p |JAK1_p];
  R288: PTPN6_p => JAK1_p; 1;
  // V(289) = K(289,1) * [PTPN6_p |JAK1_p];
  R289: PTPN6_p => JAK1_p; 1;
  // V(290) = K(290,1) * [PTEN_p] * [SP1_p] -K(290,2) * [PTEN_p |SP1_p];
  R290: PTEN_p => SP1_p; 1;
  // V(291) = K(291,1) * [PTEN_p |SP1_p];
  R291: PTEN_p => SP1_p; 1;
  // V(292) = K(292,1) * [PTEN_p] * [PTEN_p] -K(292,2) * [PTEN_p |PTEN_p];
  R292: PTEN_p => ; 1;
  // V(293) = K(293,1) * [PTEN_p |PTEN_p];
  R293: PTEN_p => ; 1;
  // V(294) = K(294,1) * [DUSP1_p] * [RUNX2_p] -K(294,2) * [DUSP1_p |RUNX2_p];
  R294: RUNX2_p => DUSP1_p; 1;
  // V(295) = K(295,1) * [DUSP1_p |RUNX2_p];
  R295: RUNX2_p => DUSP1_p; 1;
  // V(296) = K(296,1) * [PTEN_p] * [CREB1_p] -K(296,2) * [PTEN_p |CREB1_p];
  R296: PTEN_p => CREB1_p; 1;
  // V(297) = K(297,1) * [PTEN_p |CREB1_p];
  R297: PTEN_p => CREB1_p; 1;
  // V(298) = K(298,1) * [DUSP1_p] * [JUN_p] -K(298,2) * [DUSP1_p |JUN_p];
  R298: JUN_p => DUSP1_p; 1;
  // V(299) = K(299,1) * [DUSP1_p |JUN_p];
  R299: JUN_p => DUSP1_p; 1;
  // V(300) = K(300,1) * [PTPN6_p] * [CTNNB1_p] -K(300,2) * [PTPN6_p |CTNNB1_p];
  R300: PTPN6_p => CTNNB1_p; 1;
  // V(301) = K(301,1) * [PTPN6_p |CTNNB1_p];
  R301: PTPN6_p => CTNNB1_p; 1;
  // V(302) = K(302,1) * [MYLIP] * [LDLR] -K(302,2) * [MYLIP |LDLR];
  R302: MYLIP => LDLR; 1;
  // V(303) = K(303,1) * [MYLIP |LDLR];
  R303: MYLIP => LDLR; 1;
  // V(304) = K(304,1) * [MYLIP] * [VLDLR] -K(304,2) * [MYLIP |VLDLR];
  R304: VLDLR => MYLIP; 1;
  // V(305) = K(305,1) * [MYLIP |VLDLR];
  R305: VLDLR => MYLIP; 1;
  // V(306) = K(306,1) * [RNF7] * [HIF1A] -K(306,2) * [RNF7 |HIF1A];
  R306: HIF1A => RNF7; 1;
  // V(307) = K(307,1) * [RNF7 |HIF1A];
  R307: HIF1A => RNF7; 1;
  // V(308) = K(308,1) * [RNF7] * [DEPTOR] -K(308,2) * [RNF7 |DEPTOR];
  R308: DEPTOR => RNF7; 1;
  // V(309) = K(309,1) * [RNF7 |DEPTOR];
  R309: DEPTOR => RNF7; 1;
  // V(310) = K(310,1) * [SMURF1_p] * [SMAD1] -K(310,2) * [SMURF1_p |SMAD1];
  R310: SMURF1_p => SMAD1; 1;
  // V(311) = K(311,1) * [SMURF1_p |SMAD1];
  R311: SMURF1_p => SMAD1; 1;
  // V(312) = K(312,1) * [RNF7] * [CDKN1B] -K(312,2) * [RNF7 |CDKN1B];
  R312: CDKN1B => RNF7; 1;
  // V(313) = K(313,1) * [RNF7 |CDKN1B];
  R313: CDKN1B => RNF7; 1;
  // V(314) = K(314,1) * [SMURF1_p] * [RUNX2] -K(314,2) * [SMURF1_p |RUNX2];
  R314: SMURF1_p => RUNX2; 1;
  // V(315) = K(315,1) * [SMURF1_p |RUNX2];
  R315: SMURF1_p => RUNX2; 1;
  // V(316) = K(316,1) * [SMURF1_p] * [SMAD4] -K(316,2) * [SMURF1_p |SMAD4];
  R316: SMURF1_p => SMAD4; 1;
  // V(317) = K(317,1) * [SMURF1_p |SMAD4];
  R317: SMURF1_p => SMAD4; 1;
  // V(318) = K(318,1) * [MYLIP] * [MYLIP] -K(318,2) * [MYLIP |MYLIP];
  R318: MYLIP => ; 1;
  // V(319) = K(319,1) * [MYLIP |MYLIP];
  R319: MYLIP => ; 1;
  // V(320) = K(320,1) * [RNF7] * [JUN] -K(320,2) * [RNF7 |JUN];
  R320: JUN => RNF7; 1;
  // V(321) = K(321,1) * [RNF7 |JUN];
  R321: JUN => RNF7; 1;
  // V(322) = K(322,1) * [NUMB] * [NOTCH1] -K(322,2) * [NUMB |NOTCH1];
  R322: NOTCH1 => NUMB; 1;
  // V(323) = K(323,1) * [NUMB |NOTCH1];
  R323: NOTCH1 => NUMB; 1;
  // V(324) = K(324,1) * [RNF7] * [CASP3] -K(324,2) * [RNF7 |CASP3];
  R324: RNF7 => CASP3; 1;
  // V(325) = K(325,1) * [RNF7 |CASP3];
  R325: RNF7 => CASP3; 1;
  // V(326) = K(326,1) * [JUN_p] * [SP1_p] * [TGFB1_g] -K(326,2) * [JUN_p |SP1_p |TGFB1_g];
  R326: SP1_p => TGFB1_g; 1;
  // V(327) = K(327,1) * [JUN_p |SP1_p |TGFB1_g];
  R327: SP1_p => TGFB1_g; 1;
  // V(328) = K(328,1) * [TGFB1_rna];
  R328: TGFB1_rna => ; 1;
  // V(329) = K(329,1) * [TP53_p] * [CDKN1A_g] -K(329,2) * [TP53_p |CDKN1A_g];
  R329: CDKN1A_g => TP53_p; 1;
  // V(330) = K(330,1) * [TP53_p |CDKN1A_g];
  R330: CDKN1A_g => TP53_p; 1;
  // V(331) = K(331,1) * [CDKN1A_rna];
  R331: CDKN1A_rna => ; 1;
  // V(332) = K(332,1) * [HIF1A_p] * [SIGNOR-C154_p] * [CCL2_g] -K(332,2) * [HIF1A_p |SIGNOR-C154_p |CCL2_g];
  R332: CCL2_g => HIF1A_p; 1;
  // V(333) = K(333,1) * [HIF1A_p |SIGNOR-C154_p |CCL2_g];
  R333: CCL2_g => HIF1A_p; 1;
  // V(334) = K(334,1) * [CCL2_rna];
  R334: CCL2_rna => ; 1;
  // V(335) = K(335,1) * [ATF3] * [GDF15_g] -K(335,2) * [ATF3 |GDF15_g];
  R335: GDF15_g => ATF3; 1;
  // V(336) = K(336,1) * [ATF3 |GDF15_g];
  R336: GDF15_g => ATF3; 1;
  // V(337) = K(337,1) * [GDF15_rna];
  R337: GDF15_rna => ; 1;
  // V(338) = K(338,1) * [TP53_p] * [BAX_g] -K(338,2) * [TP53_p |BAX_g];
  R338: BAX_g => TP53_p; 1;
  // V(339) = K(339,1) * [TP53_p |BAX_g];
  R339: BAX_g => TP53_p; 1;
  // V(340) = K(340,1) * [BAX_rna];
  R340: BAX_rna => ; 1;
  // V(341) = K(341,1) * [FOXO1_p] * [CDKN1B_g] -K(341,2) * [FOXO1_p |CDKN1B_g];
  R341: FOXO1_p => CDKN1B_g; 1;
  // V(342) = K(342,1) * [FOXO1_p |CDKN1B_g];
  R342: FOXO1_p => CDKN1B_g; 1;
  // V(343) = K(343,1) * [CDKN1B_rna];
  R343: CDKN1B_rna => ; 1;
  // V(344) = K(344,1) * [NFE2L2_p] * [CAT_g] -K(344,2) * [NFE2L2_p |CAT_g];
  R344: CAT_g => NFE2L2_p; 1;
  // V(345) = K(345,1) * [NFE2L2_p |CAT_g];
  R345: CAT_g => NFE2L2_p; 1;
  // V(346) = K(346,1) * [CAT_rna];
  R346: CAT_rna => ; 1;
  // V(347) = K(347,1) * [NFE2L2_p] * [GCLC_g] -K(347,2) * [NFE2L2_p |GCLC_g];
  R347: GCLC_g => NFE2L2_p; 1;
  // V(348) = K(348,1) * [NFE2L2_p |GCLC_g];
  R348: GCLC_g => NFE2L2_p; 1;
  // V(349) = K(349,1) * [GCLC_rna];
  R349: GCLC_rna => ; 1;
  // V(350) = K(350,1) * [TP53_p] * [FAS_g] -K(350,2) * [TP53_p |FAS_g];
  R350: FAS_g => TP53_p; 1;
  // V(351) = K(351,1) * [TP53_p |FAS_g];
  R351: FAS_g => TP53_p; 1;
  // V(352) = K(352,1) * [FAS_rna];
  R352: FAS_rna => ; 1;
  // V(353) = K(353,1) * [HIF1A_p] * [KDM6B_g] -K(353,2) * [HIF1A_p |KDM6B_g];
  R353: KDM6B_g => HIF1A_p; 1;
  // V(354) = K(354,1) * [HIF1A_p |KDM6B_g];
  R354: KDM6B_g => HIF1A_p; 1;
  // V(355) = K(355,1) * [KDM6B_rna];
  R355: KDM6B_rna => ; 1;
  // V(356) = K(356,1) * [FOXO1_p] * [SMURF1_g] -K(356,2) * [FOXO1_p |SMURF1_g];
  R356: FOXO1_p => SMURF1_g; 1;
  // V(357) = K(357,1) * [FOXO1_p |SMURF1_g];
  R357: FOXO1_p => SMURF1_g; 1;
  // V(358) = K(358,1) * [SMURF1_rna];
  R358: SMURF1_rna => ; 1;
  // V(359) = K(359,1) * [NR3C1_p] * [KLF9_g] -K(359,2) * [NR3C1_p |KLF9_g];
  R359: KLF9_g => NR3C1_p; 1;
  // V(360) = K(360,1) * [NR3C1_p |KLF9_g];
  R360: KLF9_g => NR3C1_p; 1;
  // V(361) = K(361,1) * [KLF9_rna];
  R361: KLF9_rna => ; 1;
  // V(362) = K(362,1) * [NFE2L2_p] * [GPX4_g] -K(362,2) * [NFE2L2_p |GPX4_g];
  R362: GPX4_g => NFE2L2_p; 1;
  // V(363) = K(363,1) * [NFE2L2_p |GPX4_g];
  R363: GPX4_g => NFE2L2_p; 1;
  // V(364) = K(364,1) * [GPX4_rna];
  R364: GPX4_rna => ; 1;
  // V(365) = K(365,1) * [TGFB1] * [COL1A1_g] -K(365,2) * [TGFB1 |COL1A1_g];
  R365: TGFB1 => COL1A1_g; 1;
  // V(366) = K(366,1) * [TGFB1 |COL1A1_g];
  R366: TGFB1 => COL1A1_g; 1;
  // V(367) = K(367,1) * [COL1A1_rna];
  R367: COL1A1_rna => ; 1;
  // V(368) = K(368,1) * [NFE2L2_p] * [GCLM_g] -K(368,2) * [NFE2L2_p |GCLM_g];
  R368: GCLM_g => NFE2L2_p; 1;
  // V(369) = K(369,1) * [NFE2L2_p |GCLM_g];
  R369: GCLM_g => NFE2L2_p; 1;
  // V(370) = K(370,1) * [GCLM_rna];
  R370: GCLM_rna => ; 1;
  // V(371) = K(371,1) * [TP53_p] * [AIFM1_g] -K(371,2) * [TP53_p |AIFM1_g];
  R371: AIFM1_g => TP53_p; 1;
  // V(372) = K(372,1) * [TP53_p |AIFM1_g];
  R372: AIFM1_g => TP53_p; 1;
  // V(373) = K(373,1) * [AIFM1_rna];
  R373: AIFM1_rna => ; 1;
  // V(374) = K(374,1) * [NR3C1_p] * [JUN_g] -K(374,2) * [NR3C1_p |JUN_g];
  R374: JUN_g => NR3C1_p; 1;
  // V(375) = K(375,1) * [JUN_g];
  R375: JUN_g => ; 1;
  // V(376) = K(376,1) * [JUN_rna];
  R376: JUN_rna => ; 1;
  // V(377) = K(377,1) * [SGK1];
  R377: SGK1 => ; 1;
  // V(378) = K(378,1) * [KDM6B];
  R378: KDM6B => ; 1;
  // V(379) = K(379,1) * [TLR3];
  R379: TLR3 => ; 1;
  // V(380) = K(380,1) * [PROM1];
  R380: PROM1 => ; 1;
  // V(381) = K(381,1) * [JAK2];
  R381: JAK2 => ; 1;
  // V(382) = K(382,1) * [ERN1];
  R382: ERN1 => ; 1;
  // V(383) = K(383,1) * [ABCA1];
  R383: ABCA1 => ; 1;
  // V(384) = K(384,1) * [AIFM1];
  R384: AIFM1 => ; 1;
  // V(385) = K(385,1) * [EGFR];
  R385: EGFR => ; 1;
  // V(386) = K(386,1) * [FOS];
  R386: FOS => ; 1;
  // V(387) = K(387,1) * [LDLR];
  R387: LDLR => ; 1;
  // V(388) = K(388,1) * [TGFA];
  R388: TGFA => ; 1;
  // V(389) = K(389,1) * [TGFB1];
  R389: TGFB1 => ; 1;
  // V(390) = K(390,1) * [COL1A1];
  R390: COL1A1 => ; 1;
  // V(391) = K(391,1) * [CAT];
  R391: CAT => ; 1;
  // V(392) = K(392,1) * [NR3C1];
  R392: NR3C1 => ; 1;
  // V(393) = K(393,1) * [TP53];
  R393: TP53 => ; 1;
  // V(394) = K(394,1) * [HSPB1];
  R394: HSPB1 => ; 1;
  // V(395) = K(395,1) * [JUN];
  R395: JUN => ; 1;
  // V(396) = K(396,1) * [SP1];
  R396: SP1 => ; 1;
  // V(397) = K(397,1) * [IGF1R];
  R397: IGF1R => ; 1;
  // V(398) = K(398,1) * [VIM];
  R398: VIM => ; 1;
  // V(399) = K(399,1) * [FGF2];
  R399: FGF2 => ; 1;
  // V(400) = K(400,1) * [RRAS];
  R400: RRAS => ; 1;
  // V(401) = K(401,1) * [KIT];
  R401: KIT => ; 1;
  // V(402) = K(402,1) * [GHR];
  R402: GHR => ; 1;
  // V(403) = K(403,1) * [PCNA];
  R403: PCNA => ; 1;
  // V(404) = K(404,1) * [CDH1];
  R404: CDH1 => ; 1;
  // V(405) = K(405,1) * [SRC];
  R405: SRC => ; 1;
  // V(406) = K(406,1) * [CCL2];
  R406: CCL2 => ; 1;
  // V(407) = K(407,1) * [PKM];
  R407: PKM => ; 1;
  // V(408) = K(408,1) * [CREB1];
  R408: CREB1 => ; 1;
  // V(409) = K(409,1) * [ENG];
  R409: ENG => ; 1;
  // V(410) = K(410,1) * [XBP1];
  R410: XBP1 => ; 1;
  // V(411) = K(411,1) * [ATF3];
  R411: ATF3 => ; 1;
  // V(412) = K(412,1) * [EPOR];
  R412: EPOR => ; 1;
  // V(413) = K(413,1) * [NR4A1];
  R413: NR4A1 => ; 1;
  // V(414) = K(414,1) * [JAK1];
  R414: JAK1 => ; 1;
  // V(415) = K(415,1) * [FAS];
  R415: FAS => ; 1;
  // V(416) = K(416,1) * [ZFP36];
  R416: ZFP36 => ; 1;
  // V(417) = K(417,1) * [MAPK1];
  R417: MAPK1 => ; 1;
  // V(418) = K(418,1) * [DUSP1];
  R418: DUSP1 => ; 1;
  // V(419) = K(419,1) * [PTPN6];
  R419: PTPN6 => ; 1;
  // V(420) = K(420,1) * [AKT1];
  R420: AKT1 => ; 1;
  // V(421) = K(421,1) * [CTNNB1];
  R421: CTNNB1 => ; 1;
  // V(422) = K(422,1) * [DDIT3];
  R422: DDIT3 => ; 1;
  // V(423) = K(423,1) * [GPX4];
  R423: GPX4 => ; 1;
  // V(424) = K(424,1) * [CDKN1A];
  R424: CDKN1A => ; 1;
  // V(425) = K(425,1) * [VHL];
  R425: VHL => ; 1;
  // V(426) = K(426,1) * [STAT1];
  R426: STAT1 => ; 1;
  // V(427) = K(427,1) * [STAT6];
  R427: STAT6 => ; 1;
  // V(428) = K(428,1) * [CASP3];
  R428: CASP3 => ; 1;
  // V(429) = K(429,1) * [CDKN1B];
  R429: CDKN1B => ; 1;
  // V(430) = K(430,1) * [NOTCH1];
  R430: NOTCH1 => ; 1;
  // V(431) = K(431,1) * [YAP1];
  R431: YAP1 => ; 1;
  // V(432) = K(432,1) * [LEPR];
  R432: LEPR => ; 1;
  // V(433) = K(433,1) * [GCLC];
  R433: GCLC => ; 1;
  // V(434) = K(434,1) * [GCLM];
  R434: GCLM => ; 1;
  // V(435) = K(435,1) * [SLC9A3];
  R435: SLC9A3 => ; 1;
  // V(436) = K(436,1) * [NUMB];
  R436: NUMB => ; 1;
  // V(437) = K(437,1) * [RPS6KA3];
  R437: RPS6KA3 => ; 1;
  // V(438) = K(438,1) * [RCAN1];
  R438: RCAN1 => ; 1;
  // V(439) = K(439,1) * [CASP9];
  R439: CASP9 => ; 1;
  // V(440) = K(440,1) * [PTEN];
  R440: PTEN => ; 1;
  // V(441) = K(441,1) * [RHOA];
  R441: RHOA => ; 1;
  // V(442) = K(442,1) * [SMAD3];
  R442: SMAD3 => ; 1;
  // V(443) = K(443,1) * [VLDLR];
  R443: VLDLR => ; 1;
  // V(444) = K(444,1) * [CLTC];
  R444: CLTC => ; 1;
  // V(445) = K(445,1) * [NFKB2];
  R445: NFKB2 => ; 1;
  // V(446) = K(446,1) * [BAX];
  R446: BAX => ; 1;
  // V(447) = K(447,1) * [FOXO1];
  R447: FOXO1 => ; 1;
  // V(448) = K(448,1) * [PRKAA1];
  R448: PRKAA1 => ; 1;
  // V(449) = K(449,1) * [ILK];
  R449: ILK => ; 1;
  // V(450) = K(450,1) * [ROCK1];
  R450: ROCK1 => ; 1;
  // V(451) = K(451,1) * [SMAD4];
  R451: SMAD4 => ; 1;
  // V(452) = K(452,1) * [ATR];
  R452: ATR => ; 1;
  // V(453) = K(453,1) * [KLF9];
  R453: KLF9 => ; 1;
  // V(454) = K(454,1) * [RUNX2];
  R454: RUNX2 => ; 1;
  // V(455) = K(455,1) * [SMAD1];
  R455: SMAD1 => ; 1;
  // V(456) = K(456,1) * [NFE2L2];
  R456: NFE2L2 => ; 1;
  // V(457) = K(457,1) * [PKN1];
  R457: PKN1 => ; 1;
  // V(458) = K(458,1) * [MAPK6];
  R458: MAPK6 => ; 1;
  // V(459) = K(459,1) * [HIF1A];
  R459: HIF1A => ; 1;
  // V(460) = K(460,1) * [DEPTOR];
  R460: DEPTOR => ; 1;
  // V(461) = K(461,1) * [NRG4];
  R461: NRG4 => ; 1;
  // V(462) = K(462,1) * [MYLIP];
  R462: MYLIP => ; 1;
  // V(463) = K(463,1) * [PARK7];
  R463: PARK7 => ; 1;
  // V(464) = K(464,1) * [MAP3K14];
  R464: MAP3K14 => ; 1;
  // V(465) = K(465,1) * [MAP3K5];
  R465: MAP3K5 => ; 1;
  // V(466) = K(466,1) * [MYD88];
  R466: MYD88 => ; 1;
  // V(467) = K(467,1) * [GDF15];
  R467: GDF15 => ; 1;
  // V(468) = K(468,1) * [MFF];
  R468: MFF => ; 1;
  // V(469) = K(469,1) * [TXNIP];
  R469: TXNIP => ; 1;
  // V(470) = K(470,1) * [SMURF1];
  R470: SMURF1 => ; 1;
  // V(471) = K(471,1) * [SPHK1];
  R471: SPHK1 => ; 1;
  // V(472) = K(472,1) * [EIF2AK3];
  R472: EIF2AK3 => ; 1;
  // V(473) = K(473,1) * [RNF7];
  R473: RNF7 => ; 1;
  // V(474) = K(474,1) * [KDM6B_rna];
  R474: KDM6B_rna => ; 1;
  // V(475) = K(475,1) * [AIFM1_rna];
  R475: AIFM1_rna => ; 1;
  // V(476) = K(476,1) * [TGFB1_rna];
  R476: TGFB1_rna => ; 1;
  // V(477) = K(477,1) * [COL1A1_rna];
  R477: COL1A1_rna => ; 1;
  // V(478) = K(478,1) * [CAT_rna];
  R478: CAT_rna => ; 1;
  // V(479) = K(479,1) * [JUN_rna];
  R479: JUN_rna => ; 1;
  // V(480) = K(480,1) * [CCL2_rna];
  R480: CCL2_rna => ; 1;
  // V(481) = K(481,1) * [FAS_rna];
  R481: FAS_rna => ; 1;
  // V(482) = K(482,1) * [GPX4_rna];
  R482: GPX4_rna => ; 1;
  // V(483) = K(483,1) * [CDKN1A_rna];
  R483: CDKN1A_rna => ; 1;
  // V(484) = K(484,1) * [CDKN1B_rna];
  R484: CDKN1B_rna => ; 1;
  // V(485) = K(485,1) * [GCLC_rna];
  R485: GCLC_rna => ; 1;
  // V(486) = K(486,1) * [GCLM_rna];
  R486: GCLM_rna => ; 1;
  // V(487) = K(487,1) * [BAX_rna];
  R487: BAX_rna => ; 1;
  // V(488) = K(488,1) * [KLF9_rna];
  R488: KLF9_rna => ; 1;
  // V(489) = K(489,1) * [GDF15_rna];
  R489: GDF15_rna => ; 1;
  // V(490) = K(490,1) * [SMURF1_rna];
  R490: SMURF1_rna => ; 1;
  // V(491) = K(491,1) * [SGK1_g];
  R491: SGK1_g => ; 1;
  // V(492) = K(492,1) * [SGK1_rna];
  R492: SGK1_rna => ; 1;
  // V(493) = K(493,1) * [TLR3_g];
  R493: TLR3_g => ; 1;
  // V(494) = K(494,1) * [TLR3_rna];
  R494: TLR3_rna => ; 1;
  // V(495) = K(495,1) * [PROM1_g];
  R495: PROM1_g => ; 1;
  // V(496) = K(496,1) * [PROM1_rna];
  R496: PROM1_rna => ; 1;
  // V(497) = K(497,1) * [JAK2_g];
  R497: JAK2_g => ; 1;
  // V(498) = K(498,1) * [JAK2_rna];
  R498: JAK2_rna => ; 1;
  // V(499) = K(499,1) * [ERN1_g];
  R499: ERN1_g => ; 1;
  // V(500) = K(500,1) * [ERN1_rna];
  R500: ERN1_rna => ; 1;
  // V(501) = K(501,1) * [ABCA1_g];
  R501: ABCA1_g => ; 1;
  // V(502) = K(502,1) * [ABCA1_rna];
  R502: ABCA1_rna => ; 1;
  // V(503) = K(503,1) * [EGFR_g];
  R503: EGFR_g => ; 1;
  // V(504) = K(504,1) * [EGFR_rna];
  R504: EGFR_rna => ; 1;
  // V(505) = K(505,1) * [FOS_g];
  R505: FOS_g => ; 1;
  // V(506) = K(506,1) * [FOS_rna];
  R506: FOS_rna => ; 1;
  // V(507) = K(507,1) * [LDLR_g];
  R507: LDLR_g => ; 1;
  // V(508) = K(508,1) * [LDLR_rna];
  R508: LDLR_rna => ; 1;
  // V(509) = K(509,1) * [TGFA_g];
  R509: TGFA_g => ; 1;
  // V(510) = K(510,1) * [TGFA_rna];
  R510: TGFA_rna => ; 1;
  // V(511) = K(511,1) * [NR3C1_g];
  R511: NR3C1_g => ; 1;
  // V(512) = K(512,1) * [NR3C1_rna];
  R512: NR3C1_rna => ; 1;
  // V(513) = K(513,1) * [TP53_g];
  R513: TP53_g => ; 1;
  // V(514) = K(514,1) * [TP53_rna];
  R514: TP53_rna => ; 1;
  // V(515) = K(515,1) * [HSPB1_g];
  R515: HSPB1_g => ; 1;
  // V(516) = K(516,1) * [HSPB1_rna];
  R516: HSPB1_rna => ; 1;
  // V(517) = K(517,1) * [SP1_g];
  R517: SP1_g => ; 1;
  // V(518) = K(518,1) * [SP1_rna];
  R518: SP1_rna => ; 1;
  // V(519) = K(519,1) * [IGF1R_g];
  R519: IGF1R_g => ; 1;
  // V(520) = K(520,1) * [IGF1R_rna];
  R520: IGF1R_rna => ; 1;
  // V(521) = K(521,1) * [VIM_g];
  R521: VIM_g => ; 1;
  // V(522) = K(522,1) * [VIM_rna];
  R522: VIM_rna => ; 1;
  // V(523) = K(523,1) * [FGF2_g];
  R523: FGF2_g => ; 1;
  // V(524) = K(524,1) * [FGF2_rna];
  R524: FGF2_rna => ; 1;
  // V(525) = K(525,1) * [RRAS_g];
  R525: RRAS_g => ; 1;
  // V(526) = K(526,1) * [RRAS_rna];
  R526: RRAS_rna => ; 1;
  // V(527) = K(527,1) * [KIT_g];
  R527: KIT_g => ; 1;
  // V(528) = K(528,1) * [KIT_rna];
  R528: KIT_rna => ; 1;
  // V(529) = K(529,1) * [GHR_g];
  R529: GHR_g => ; 1;
  // V(530) = K(530,1) * [GHR_rna];
  R530: GHR_rna => ; 1;
  // V(531) = K(531,1) * [PCNA_g];
  R531: PCNA_g => ; 1;
  // V(532) = K(532,1) * [PCNA_rna];
  R532: PCNA_rna => ; 1;
  // V(533) = K(533,1) * [CDH1_g];
  R533: CDH1_g => ; 1;
  // V(534) = K(534,1) * [CDH1_rna];
  R534: CDH1_rna => ; 1;
  // V(535) = K(535,1) * [SRC_g];
  R535: SRC_g => ; 1;
  // V(536) = K(536,1) * [SRC_rna];
  R536: SRC_rna => ; 1;
  // V(537) = K(537,1) * [PKM_g];
  R537: PKM_g => ; 1;
  // V(538) = K(538,1) * [PKM_rna];
  R538: PKM_rna => ; 1;
  // V(539) = K(539,1) * [CREB1_g];
  R539: CREB1_g => ; 1;
  // V(540) = K(540,1) * [CREB1_rna];
  R540: CREB1_rna => ; 1;
  // V(541) = K(541,1) * [ENG_g];
  R541: ENG_g => ; 1;
  // V(542) = K(542,1) * [ENG_rna];
  R542: ENG_rna => ; 1;
  // V(543) = K(543,1) * [XBP1_g];
  R543: XBP1_g => ; 1;
  // V(544) = K(544,1) * [XBP1_rna];
  R544: XBP1_rna => ; 1;
  // V(545) = K(545,1) * [ATF3_g];
  R545: ATF3_g => ; 1;
  // V(546) = K(546,1) * [ATF3_rna];
  R546: ATF3_rna => ; 1;
  // V(547) = K(547,1) * [EPOR_g];
  R547: EPOR_g => ; 1;
  // V(548) = K(548,1) * [EPOR_rna];
  R548: EPOR_rna => ; 1;
  // V(549) = K(549,1) * [NR4A1_g];
  R549: NR4A1_g => ; 1;
  // V(550) = K(550,1) * [NR4A1_rna];
  R550: NR4A1_rna => ; 1;
  // V(551) = K(551,1) * [JAK1_g];
  R551: JAK1_g => ; 1;
  // V(552) = K(552,1) * [JAK1_rna];
  R552: JAK1_rna => ; 1;
  // V(553) = K(553,1) * [ZFP36_g];
  R553: ZFP36_g => ; 1;
  // V(554) = K(554,1) * [ZFP36_rna];
  R554: ZFP36_rna => ; 1;
  // V(555) = K(555,1) * [MAPK1_g];
  R555: MAPK1_g => ; 1;
  // V(556) = K(556,1) * [MAPK1_rna];
  R556: MAPK1_rna => ; 1;
  // V(557) = K(557,1) * [DUSP1_g];
  R557: DUSP1_g => ; 1;
  // V(558) = K(558,1) * [DUSP1_rna];
  R558: DUSP1_rna => ; 1;
  // V(559) = K(559,1) * [PTPN6_g];
  R559: PTPN6_g => ; 1;
  // V(560) = K(560,1) * [PTPN6_rna];
  R560: PTPN6_rna => ; 1;
  // V(561) = K(561,1) * [AKT1_g];
  R561: AKT1_g => ; 1;
  // V(562) = K(562,1) * [AKT1_rna];
  R562: AKT1_rna => ; 1;
  // V(563) = K(563,1) * [CTNNB1_g];
  R563: CTNNB1_g => ; 1;
  // V(564) = K(564,1) * [CTNNB1_rna];
  R564: CTNNB1_rna => ; 1;
  // V(565) = K(565,1) * [DDIT3_g];
  R565: DDIT3_g => ; 1;
  // V(566) = K(566,1) * [DDIT3_rna];
  R566: DDIT3_rna => ; 1;
  // V(567) = K(567,1) * [VHL_g];
  R567: VHL_g => ; 1;
  // V(568) = K(568,1) * [VHL_rna];
  R568: VHL_rna => ; 1;
  // V(569) = K(569,1) * [STAT1_g];
  R569: STAT1_g => ; 1;
  // V(570) = K(570,1) * [STAT1_rna];
  R570: STAT1_rna => ; 1;
  // V(571) = K(571,1) * [STAT6_g];
  R571: STAT6_g => ; 1;
  // V(572) = K(572,1) * [STAT6_rna];
  R572: STAT6_rna => ; 1;
  // V(573) = K(573,1) * [CASP3_g];
  R573: CASP3_g => ; 1;
  // V(574) = K(574,1) * [CASP3_rna];
  R574: CASP3_rna => ; 1;
  // V(575) = K(575,1) * [NOTCH1_g];
  R575: NOTCH1_g => ; 1;
  // V(576) = K(576,1) * [NOTCH1_rna];
  R576: NOTCH1_rna => ; 1;
  // V(577) = K(577,1) * [YAP1_g];
  R577: YAP1_g => ; 1;
  // V(578) = K(578,1) * [YAP1_rna];
  R578: YAP1_rna => ; 1;
  // V(579) = K(579,1) * [LEPR_g];
  R579: LEPR_g => ; 1;
  // V(580) = K(580,1) * [LEPR_rna];
  R580: LEPR_rna => ; 1;
  // V(581) = K(581,1) * [SLC9A3_g];
  R581: SLC9A3_g => ; 1;
  // V(582) = K(582,1) * [SLC9A3_rna];
  R582: SLC9A3_rna => ; 1;
  // V(583) = K(583,1) * [NUMB_g];
  R583: NUMB_g => ; 1;
  // V(584) = K(584,1) * [NUMB_rna];
  R584: NUMB_rna => ; 1;
  // V(585) = K(585,1) * [RPS6KA3_g];
  R585: RPS6KA3_g => ; 1;
  // V(586) = K(586,1) * [RPS6KA3_rna];
  R586: RPS6KA3_rna => ; 1;
  // V(587) = K(587,1) * [RCAN1_g];
  R587: RCAN1_g => ; 1;
  // V(588) = K(588,1) * [RCAN1_rna];
  R588: RCAN1_rna => ; 1;
  // V(589) = K(589,1) * [CASP9_g];
  R589: CASP9_g => ; 1;
  // V(590) = K(590,1) * [CASP9_rna];
  R590: CASP9_rna => ; 1;
  // V(591) = K(591,1) * [PTEN_g];
  R591: PTEN_g => ; 1;
  // V(592) = K(592,1) * [PTEN_rna];
  R592: PTEN_rna => ; 1;
  // V(593) = K(593,1) * [RHOA_g];
  R593: RHOA_g => ; 1;
  // V(594) = K(594,1) * [RHOA_rna];
  R594: RHOA_rna => ; 1;
  // V(595) = K(595,1) * [SMAD3_g];
  R595: SMAD3_g => ; 1;
  // V(596) = K(596,1) * [SMAD3_rna];
  R596: SMAD3_rna => ; 1;
  // V(597) = K(597,1) * [VLDLR_g];
  R597: VLDLR_g => ; 1;
  // V(598) = K(598,1) * [VLDLR_rna];
  R598: VLDLR_rna => ; 1;
  // V(599) = K(599,1) * [CLTC_g];
  R599: CLTC_g => ; 1;
  // V(600) = K(600,1) * [CLTC_rna];
  R600: CLTC_rna => ; 1;
  // V(601) = K(601,1) * [NFKB2_g];
  R601: NFKB2_g => ; 1;
  // V(602) = K(602,1) * [NFKB2_rna];
  R602: NFKB2_rna => ; 1;
  // V(603) = K(603,1) * [FOXO1_g];
  R603: FOXO1_g => ; 1;
  // V(604) = K(604,1) * [FOXO1_rna];
  R604: FOXO1_rna => ; 1;
  // V(605) = K(605,1) * [PRKAA1_g];
  R605: PRKAA1_g => ; 1;
  // V(606) = K(606,1) * [PRKAA1_rna];
  R606: PRKAA1_rna => ; 1;
  // V(607) = K(607,1) * [ILK_g];
  R607: ILK_g => ; 1;
  // V(608) = K(608,1) * [ILK_rna];
  R608: ILK_rna => ; 1;
  // V(609) = K(609,1) * [ROCK1_g];
  R609: ROCK1_g => ; 1;
  // V(610) = K(610,1) * [ROCK1_rna];
  R610: ROCK1_rna => ; 1;
  // V(611) = K(611,1) * [SMAD4_g];
  R611: SMAD4_g => ; 1;
  // V(612) = K(612,1) * [SMAD4_rna];
  R612: SMAD4_rna => ; 1;
  // V(613) = K(613,1) * [ATR_g];
  R613: ATR_g => ; 1;
  // V(614) = K(614,1) * [ATR_rna];
  R614: ATR_rna => ; 1;
  // V(615) = K(615,1) * [RUNX2_g];
  R615: RUNX2_g => ; 1;
  // V(616) = K(616,1) * [RUNX2_rna];
  R616: RUNX2_rna => ; 1;
  // V(617) = K(617,1) * [SMAD1_g];
  R617: SMAD1_g => ; 1;
  // V(618) = K(618,1) * [SMAD1_rna];
  R618: SMAD1_rna => ; 1;
  // V(619) = K(619,1) * [NFE2L2_g];
  R619: NFE2L2_g => ; 1;
  // V(620) = K(620,1) * [NFE2L2_rna];
  R620: NFE2L2_rna => ; 1;
  // V(621) = K(621,1) * [PKN1_g];
  R621: PKN1_g => ; 1;
  // V(622) = K(622,1) * [PKN1_rna];
  R622: PKN1_rna => ; 1;
  // V(623) = K(623,1) * [MAPK6_g];
  R623: MAPK6_g => ; 1;
  // V(624) = K(624,1) * [MAPK6_rna];
  R624: MAPK6_rna => ; 1;
  // V(625) = K(625,1) * [HIF1A_g];
  R625: HIF1A_g => ; 1;
  // V(626) = K(626,1) * [HIF1A_rna];
  R626: HIF1A_rna => ; 1;
  // V(627) = K(627,1) * [DEPTOR_g];
  R627: DEPTOR_g => ; 1;
  // V(628) = K(628,1) * [DEPTOR_rna];
  R628: DEPTOR_rna => ; 1;
  // V(629) = K(629,1) * [NRG4_g];
  R629: NRG4_g => ; 1;
  // V(630) = K(630,1) * [NRG4_rna];
  R630: NRG4_rna => ; 1;
  // V(631) = K(631,1) * [MYLIP_g];
  R631: MYLIP_g => ; 1;
  // V(632) = K(632,1) * [MYLIP_rna];
  R632: MYLIP_rna => ; 1;
  // V(633) = K(633,1) * [PARK7_g];
  R633: PARK7_g => ; 1;
  // V(634) = K(634,1) * [PARK7_rna];
  R634: PARK7_rna => ; 1;
  // V(635) = K(635,1) * [MAP3K14_g];
  R635: MAP3K14_g => ; 1;
  // V(636) = K(636,1) * [MAP3K14_rna];
  R636: MAP3K14_rna => ; 1;
  // V(637) = K(637,1) * [MAP3K5_g];
  R637: MAP3K5_g => ; 1;
  // V(638) = K(638,1) * [MAP3K5_rna];
  R638: MAP3K5_rna => ; 1;
  // V(639) = K(639,1) * [MYD88_g];
  R639: MYD88_g => ; 1;
  // V(640) = K(640,1) * [MYD88_rna];
  R640: MYD88_rna => ; 1;
  // V(641) = K(641,1) * [MFF_g];
  R641: MFF_g => ; 1;
  // V(642) = K(642,1) * [MFF_rna];
  R642: MFF_rna => ; 1;
  // V(643) = K(643,1) * [TXNIP_g];
  R643: TXNIP_g => ; 1;
  // V(644) = K(644,1) * [TXNIP_rna];
  R644: TXNIP_rna => ; 1;
  // V(645) = K(645,1) * [SPHK1_g];
  R645: SPHK1_g => ; 1;
  // V(646) = K(646,1) * [SPHK1_rna];
  R646: SPHK1_rna => ; 1;
  // V(647) = K(647,1) * [EIF2AK3_g];
  R647: EIF2AK3_g => ; 1;
  // V(648) = K(648,1) * [EIF2AK3_rna];
  R648: EIF2AK3_rna => ; 1;
  // V(649) = K(649,1) * [RNF7_g];
  R649: RNF7_g => ; 1;
  // V(650) = K(650,1) * [RNF7_rna];
  R650: RNF7_rna => ; 1;
  // V(651) = K(651,1) * [TLR3_p];
  R651: TLR3_p => ; 1;
  // V(652) = K(652,1) * [PROM1_p];
  R652: PROM1_p => ; 1;
  // V(653) = K(653,1) * [JAK2_p];
  R653: JAK2_p => ; 1;
  // V(654) = K(654,1) * [ERN1_p];
  R654: ERN1_p => ; 1;
  // V(655) = K(655,1) * [ABCA1_p];
  R655: ABCA1_p => ; 1;
  // V(656) = K(656,1) * [EGFR_p];
  R656: EGFR_p => ; 1;
  // V(657) = K(657,1) * [FOS_p];
  R657: FOS_p => ; 1;
  // V(658) = K(658,1) * [NR3C1_p];
  R658: NR3C1_p => ; 1;
  // V(659) = K(659,1) * [TP53_p];
  R659: TP53_p => ; 1;
  // V(660) = K(660,1) * [HSPB1_p];
  R660: HSPB1_p => ; 1;
  // V(661) = K(661,1) * [JUN_p];
  R661: JUN_p => ; 1;
  // V(662) = K(662,1) * [SP1_p];
  R662: SP1_p => ; 1;
  // V(663) = K(663,1) * [IGF1R_p];
  R663: IGF1R_p => ; 1;
  // V(664) = K(664,1) * [VIM_p];
  R664: VIM_p => ; 1;
  // V(665) = K(665,1) * [RRAS_p];
  R665: RRAS_p => ; 1;
  // V(666) = K(666,1) * [KIT_p];
  R666: KIT_p => ; 1;
  // V(667) = K(667,1) * [GHR_p];
  R667: GHR_p => ; 1;
  // V(668) = K(668,1) * [PCNA_p];
  R668: PCNA_p => ; 1;
  // V(669) = K(669,1) * [CDH1_p];
  R669: CDH1_p => ; 1;
  // V(670) = K(670,1) * [SRC_p];
  R670: SRC_p => ; 1;
  // V(671) = K(671,1) * [PKM_p];
  R671: PKM_p => ; 1;
  // V(672) = K(672,1) * [CREB1_p];
  R672: CREB1_p => ; 1;
  // V(673) = K(673,1) * [ENG_p];
  R673: ENG_p => ; 1;
  // V(674) = K(674,1) * [XBP1_p];
  R674: XBP1_p => ; 1;
  // V(675) = K(675,1) * [EPOR_p];
  R675: EPOR_p => ; 1;
  // V(676) = K(676,1) * [NR4A1_p];
  R676: NR4A1_p => ; 1;
  // V(677) = K(677,1) * [JAK1_p];
  R677: JAK1_p => ; 1;
  // V(678) = K(678,1) * [ZFP36_p];
  R678: ZFP36_p => ; 1;
  // V(679) = K(679,1) * [MAPK1_p];
  R679: MAPK1_p => ; 1;
  // V(680) = K(680,1) * [DUSP1_p];
  R680: DUSP1_p => ; 1;
  // V(681) = K(681,1) * [PTPN6_p];
  R681: PTPN6_p => ; 1;
  // V(682) = K(682,1) * [AKT1_p];
  R682: AKT1_p => ; 1;
  // V(683) = K(683,1) * [CTNNB1_p];
  R683: CTNNB1_p => ; 1;
  // V(684) = K(684,1) * [DDIT3_p];
  R684: DDIT3_p => ; 1;
  // V(685) = K(685,1) * [CDKN1A_p];
  R685: CDKN1A_p => ; 1;
  // V(686) = K(686,1) * [VHL_p];
  R686: VHL_p => ; 1;
  // V(687) = K(687,1) * [STAT1_p];
  R687: STAT1_p => ; 1;
  // V(688) = K(688,1) * [STAT6_p];
  R688: STAT6_p => ; 1;
  // V(689) = K(689,1) * [CDKN1B_p];
  R689: CDKN1B_p => ; 1;
  // V(690) = K(690,1) * [YAP1_p];
  R690: YAP1_p => ; 1;
  // V(691) = K(691,1) * [LEPR_p];
  R691: LEPR_p => ; 1;
  // V(692) = K(692,1) * [SLC9A3_p];
  R692: SLC9A3_p => ; 1;
  // V(693) = K(693,1) * [RPS6KA3_p];
  R693: RPS6KA3_p => ; 1;
  // V(694) = K(694,1) * [RCAN1_p];
  R694: RCAN1_p => ; 1;
  // V(695) = K(695,1) * [CASP9_p];
  R695: CASP9_p => ; 1;
  // V(696) = K(696,1) * [PTEN_p];
  R696: PTEN_p => ; 1;
  // V(697) = K(697,1) * [RHOA_p];
  R697: RHOA_p => ; 1;
  // V(698) = K(698,1) * [SMAD3_p];
  R698: SMAD3_p => ; 1;
  // V(699) = K(699,1) * [CLTC_p];
  R699: CLTC_p => ; 1;
  // V(700) = K(700,1) * [NFKB2_p];
  R700: NFKB2_p => ; 1;
  // V(701) = K(701,1) * [BAX_p];
  R701: BAX_p => ; 1;
  // V(702) = K(702,1) * [FOXO1_p];
  R702: FOXO1_p => ; 1;
  // V(703) = K(703,1) * [PRKAA1_p];
  R703: PRKAA1_p => ; 1;
  // V(704) = K(704,1) * [ILK_p];
  R704: ILK_p => ; 1;
  // V(705) = K(705,1) * [SMAD4_p];
  R705: SMAD4_p => ; 1;
  // V(706) = K(706,1) * [RUNX2_p];
  R706: RUNX2_p => ; 1;
  // V(707) = K(707,1) * [SMAD1_p];
  R707: SMAD1_p => ; 1;
  // V(708) = K(708,1) * [NFE2L2_p];
  R708: NFE2L2_p => ; 1;
  // V(709) = K(709,1) * [PKN1_p];
  R709: PKN1_p => ; 1;
  // V(710) = K(710,1) * [MAPK6_p];
  R710: MAPK6_p => ; 1;
  // V(711) = K(711,1) * [HIF1A_p];
  R711: HIF1A_p => ; 1;
  // V(712) = K(712,1) * [DEPTOR_p];
  R712: DEPTOR_p => ; 1;
  // V(713) = K(713,1) * [PARK7_p];
  R713: PARK7_p => ; 1;
  // V(714) = K(714,1) * [MAP3K14_p];
  R714: MAP3K14_p => ; 1;
  // V(715) = K(715,1) * [MAP3K5_p];
  R715: MAP3K5_p => ; 1;
  // V(716) = K(716,1) * [MYD88_p];
  R716: MYD88_p => ; 1;
  // V(717) = K(717,1) * [MFF_p];
  R717: MFF_p => ; 1;
  // V(718) = K(718,1) * [TXNIP_p];
  R718: TXNIP_p => ; 1;
  // V(719) = K(719,1) * [SMURF1_p];
  R719: SMURF1_p => ; 1;
  // V(720) = K(720,1) * [SPHK1_p];
  R720: SPHK1_p => ; 1;
  // V(721) = K(721,1) * [EIF2AK3_p];
  R721: EIF2AK3_p => ; 1;
  // V(722) = K(722,1) * [SIGNOR-C154_p];
  R722: => ; 1;
  // V(723) = K(723,1) * [SGK1_rna];
  R723: SGK1_rna => ; 1;
  // V(724) = K(724,1) * [TLR3_rna];
  R724: TLR3_rna => ; 1;
  // V(725) = K(725,1) * [PROM1_rna];
  R725: PROM1_rna => ; 1;
  // V(726) = K(726,1) * [JAK2_rna];
  R726: JAK2_rna => ; 1;
  // V(727) = K(727,1) * [ERN1_rna];
  R727: ERN1_rna => ; 1;
  // V(728) = K(728,1) * [ABCA1_rna];
  R728: ABCA1_rna => ; 1;
  // V(729) = K(729,1) * [EGFR_rna];
  R729: EGFR_rna => ; 1;
  // V(730) = K(730,1) * [FOS_rna];
  R730: FOS_rna => ; 1;
  // V(731) = K(731,1) * [LDLR_rna];
  R731: LDLR_rna => ; 1;
  // V(732) = K(732,1) * [TGFA_rna];
  R732: TGFA_rna => ; 1;
  // V(733) = K(733,1) * [NR3C1_rna];
  R733: NR3C1_rna => ; 1;
  // V(734) = K(734,1) * [TP53_rna];
  R734: TP53_rna => ; 1;
  // V(735) = K(735,1) * [HSPB1_rna];
  R735: HSPB1_rna => ; 1;
  // V(736) = K(736,1) * [SP1_rna];
  R736: SP1_rna => ; 1;
  // V(737) = K(737,1) * [IGF1R_rna];
  R737: IGF1R_rna => ; 1;
  // V(738) = K(738,1) * [VIM_rna];
  R738: VIM_rna => ; 1;
  // V(739) = K(739,1) * [FGF2_rna];
  R739: FGF2_rna => ; 1;
  // V(740) = K(740,1) * [RRAS_rna];
  R740: RRAS_rna => ; 1;
  // V(741) = K(741,1) * [KIT_rna];
  R741: KIT_rna => ; 1;
  // V(742) = K(742,1) * [GHR_rna];
  R742: GHR_rna => ; 1;
  // V(743) = K(743,1) * [PCNA_rna];
  R743: PCNA_rna => ; 1;
  // V(744) = K(744,1) * [CDH1_rna];
  R744: CDH1_rna => ; 1;
  // V(745) = K(745,1) * [SRC_rna];
  R745: SRC_rna => ; 1;
  // V(746) = K(746,1) * [PKM_rna];
  R746: PKM_rna => ; 1;
  // V(747) = K(747,1) * [CREB1_rna];
  R747: CREB1_rna => ; 1;
  // V(748) = K(748,1) * [ENG_rna];
  R748: ENG_rna => ; 1;
  // V(749) = K(749,1) * [XBP1_rna];
  R749: XBP1_rna => ; 1;
  // V(750) = K(750,1) * [ATF3_rna];
  R750: ATF3_rna => ; 1;
  // V(751) = K(751,1) * [EPOR_rna];
  R751: EPOR_rna => ; 1;
  // V(752) = K(752,1) * [NR4A1_rna];
  R752: NR4A1_rna => ; 1;
  // V(753) = K(753,1) * [JAK1_rna];
  R753: JAK1_rna => ; 1;
  // V(754) = K(754,1) * [ZFP36_rna];
  R754: ZFP36_rna => ; 1;
  // V(755) = K(755,1) * [MAPK1_rna];
  R755: MAPK1_rna => ; 1;
  // V(756) = K(756,1) * [DUSP1_rna];
  R756: DUSP1_rna => ; 1;
  // V(757) = K(757,1) * [PTPN6_rna];
  R757: PTPN6_rna => ; 1;
  // V(758) = K(758,1) * [AKT1_rna];
  R758: AKT1_rna => ; 1;
  // V(759) = K(759,1) * [CTNNB1_rna];
  R759: CTNNB1_rna => ; 1;
  // V(760) = K(760,1) * [DDIT3_rna];
  R760: DDIT3_rna => ; 1;
  // V(761) = K(761,1) * [VHL_rna];
  R761: VHL_rna => ; 1;
  // V(762) = K(762,1) * [STAT1_rna];
  R762: STAT1_rna => ; 1;
  // V(763) = K(763,1) * [STAT6_rna];
  R763: STAT6_rna => ; 1;
  // V(764) = K(764,1) * [CASP3_rna];
  R764: CASP3_rna => ; 1;
  // V(765) = K(765,1) * [NOTCH1_rna];
  R765: NOTCH1_rna => ; 1;
  // V(766) = K(766,1) * [YAP1_rna];
  R766: YAP1_rna => ; 1;
  // V(767) = K(767,1) * [LEPR_rna];
  R767: LEPR_rna => ; 1;
  // V(768) = K(768,1) * [SLC9A3_rna];
  R768: SLC9A3_rna => ; 1;
  // V(769) = K(769,1) * [NUMB_rna];
  R769: NUMB_rna => ; 1;
  // V(770) = K(770,1) * [RPS6KA3_rna];
  R770: RPS6KA3_rna => ; 1;
  // V(771) = K(771,1) * [RCAN1_rna];
  R771: RCAN1_rna => ; 1;
  // V(772) = K(772,1) * [CASP9_rna];
  R772: CASP9_rna => ; 1;
  // V(773) = K(773,1) * [PTEN_rna];
  R773: PTEN_rna => ; 1;
  // V(774) = K(774,1) * [RHOA_rna];
  R774: RHOA_rna => ; 1;
  // V(775) = K(775,1) * [SMAD3_rna];
  R775: SMAD3_rna => ; 1;
  // V(776) = K(776,1) * [VLDLR_rna];
  R776: VLDLR_rna => ; 1;
  // V(777) = K(777,1) * [CLTC_rna];
  R777: CLTC_rna => ; 1;
  // V(778) = K(778,1) * [NFKB2_rna];
  R778: NFKB2_rna => ; 1;
  // V(779) = K(779,1) * [FOXO1_rna];
  R779: FOXO1_rna => ; 1;
  // V(780) = K(780,1) * [PRKAA1_rna];
  R780: PRKAA1_rna => ; 1;
  // V(781) = K(781,1) * [ILK_rna];
  R781: ILK_rna => ; 1;
  // V(782) = K(782,1) * [ROCK1_rna];
  R782: ROCK1_rna => ; 1;
  // V(783) = K(783,1) * [SMAD4_rna];
  R783: SMAD4_rna => ; 1;
  // V(784) = K(784,1) * [ATR_rna];
  R784: ATR_rna => ; 1;
  // V(785) = K(785,1) * [RUNX2_rna];
  R785: RUNX2_rna => ; 1;
  // V(786) = K(786,1) * [SMAD1_rna];
  R786: SMAD1_rna => ; 1;
  // V(787) = K(787,1) * [NFE2L2_rna];
  R787: NFE2L2_rna => ; 1;
  // V(788) = K(788,1) * [PKN1_rna];
  R788: PKN1_rna => ; 1;
  // V(789) = K(789,1) * [MAPK6_rna];
  R789: MAPK6_rna => ; 1;
  // V(790) = K(790,1) * [HIF1A_rna];
  R790: HIF1A_rna => ; 1;
  // V(791) = K(791,1) * [DEPTOR_rna];
  R791: DEPTOR_rna => ; 1;
  // V(792) = K(792,1) * [NRG4_rna];
  R792: NRG4_rna => ; 1;
  // V(793) = K(793,1) * [MYLIP_rna];
  R793: MYLIP_rna => ; 1;
  // V(794) = K(794,1) * [PARK7_rna];
  R794: PARK7_rna => ; 1;
  // V(795) = K(795,1) * [MAP3K14_rna];
  R795: MAP3K14_rna => ; 1;
  // V(796) = K(796,1) * [MAP3K5_rna];
  R796: MAP3K5_rna => ; 1;
  // V(797) = K(797,1) * [MYD88_rna];
  R797: MYD88_rna => ; 1;
  // V(798) = K(798,1) * [MFF_rna];
  R798: MFF_rna => ; 1;
  // V(799) = K(799,1) * [TXNIP_rna];
  R799: TXNIP_rna => ; 1;
  // V(800) = K(800,1) * [SPHK1_rna];
  R800: SPHK1_rna => ; 1;
  // V(801) = K(801,1) * [EIF2AK3_rna];
  R801: EIF2AK3_rna => ; 1;
  // V(802) = K(802,1) * [RNF7_rna];
  R802: RNF7_rna => ; 1;
end
