// SBML level 3 version 2

model DCT()

  // Compartments:
  compartment cell = 1;

  // Species:
  species ALK in cell = 1/cell;
  species ALK_g in cell = 1/cell;
  species ALK_p in cell = 1/cell;
  species ALK_rna in cell = 1/cell;
  species ANXA1 in cell = 1/cell;
  species ANXA1_g in cell = 1/cell;
  species ANXA1_p in cell = 1/cell;
  species ANXA1_rna in cell = 1/cell;
  species AR in cell = 1/cell;
  species AR_g in cell = 1/cell;
  species AR_p in cell = 1/cell;
  species AR_rna in cell = 1/cell;
  species BAD in cell = 1/cell;
  species BAD_g in cell = 1/cell;
  species BAD_p in cell = 1/cell;
  species BAD_rna in cell = 1/cell;
  species CAT in cell = 1/cell;
  species CAT_g in cell = 1/cell;
  species CAT_rna in cell = 1/cell;
  species CDK5 in cell = 1/cell;
  species CDK5_g in cell = 1/cell;
  species CDK5_p in cell = 1/cell;
  species CDK5_rna in cell = 1/cell;
  species CDKN1A in cell = 1/cell;
  species CDKN1A_g in cell = 1/cell;
  species CDKN1A_p in cell = 1/cell;
  species CDKN1A_rna in cell = 1/cell;
  species CLTC in cell = 1/cell;
  species CLTC_g in cell = 1/cell;
  species CLTC_p in cell = 1/cell;
  species CLTC_rna in cell = 1/cell;
  species ERN1 in cell = 1/cell;
  species ERN1_g in cell = 1/cell;
  species ERN1_p in cell = 1/cell;
  species ERN1_rna in cell = 1/cell;
  species FABP4 in cell = 1/cell;
  species FABP4_g in cell = 1/cell;
  species FABP4_p in cell = 1/cell;
  species FABP4_rna in cell = 1/cell;
  species FYN in cell = 1/cell;
  species FYN_g in cell = 1/cell;
  species FYN_p in cell = 1/cell;
  species FYN_rna in cell = 1/cell;
  species GJB1 in cell = 1/cell;
  species GJB1_g in cell = 1/cell;
  species GJB1_p in cell = 1/cell;
  species GJB1_rna in cell = 1/cell;
  species GSTA1 in cell = 1/cell;
  species GSTA1_g in cell = 1/cell;
  species GSTA1_rna in cell = 1/cell;
  species HIPK2 in cell = 1/cell;
  species HIPK2_g in cell = 1/cell;
  species HIPK2_p in cell = 1/cell;
  species HIPK2_rna in cell = 1/cell;
  species IKBKB in cell = 1/cell;
  species IKBKB_g in cell = 1/cell;
  species IKBKB_p in cell = 1/cell;
  species IKBKB_rna in cell = 1/cell;
  species INSR in cell = 1/cell;
  species INSR_g in cell = 1/cell;
  species INSR_p in cell = 1/cell;
  species INSR_rna in cell = 1/cell;
  species KDR in cell = 1/cell;
  species KDR_g in cell = 1/cell;
  species KDR_p in cell = 1/cell;
  species KDR_rna in cell = 1/cell;
  species MAP3K14 in cell = 1/cell;
  species MAP3K14_g in cell = 1/cell;
  species MAP3K14_p in cell = 1/cell;
  species MAP3K14_rna in cell = 1/cell;
  species MECP2 in cell = 1/cell;
  species MECP2_g in cell = 1/cell;
  species MECP2_p in cell = 1/cell;
  species MECP2_rna in cell = 1/cell;
  species NFE2L2 in cell = 1/cell;
  species NFE2L2_g in cell = 1/cell;
  species NFE2L2_p in cell = 1/cell;
  species NFE2L2_rna in cell = 1/cell;
  species NOS3 in cell = 1/cell;
  species NOS3_g in cell = 1/cell;
  species NOS3_p in cell = 1/cell;
  species NOS3_rna in cell = 1/cell;
  species NOTCH2 in cell = 1/cell;
  species NOTCH2_g in cell = 1/cell;
  species NOTCH2_rna in cell = 1/cell;
  species NPHS1 in cell = 1/cell;
  species NPHS1_g in cell = 1/cell;
  species NPHS1_p in cell = 1/cell;
  species NPHS1_rna in cell = 1/cell;
  species NR1H4 in cell = 1/cell;
  species NR1H4_g in cell = 1/cell;
  species NR1H4_p in cell = 1/cell;
  species NR1H4_rna in cell = 1/cell;
  species NR1I2 in cell = 1/cell;
  species NR1I2_g in cell = 1/cell;
  species NR1I2_p in cell = 1/cell;
  species NR1I2_rna in cell = 1/cell;
  species PANX1 in cell = 1/cell;
  species PANX1_g in cell = 1/cell;
  species PANX1_p in cell = 1/cell;
  species PANX1_rna in cell = 1/cell;
  species PARP1 in cell = 1/cell;
  species PARP1_g in cell = 1/cell;
  species PARP1_p in cell = 1/cell;
  species PARP1_rna in cell = 1/cell;
  species PDPK1 in cell = 1/cell;
  species PDPK1_g in cell = 1/cell;
  species PDPK1_p in cell = 1/cell;
  species PDPK1_rna in cell = 1/cell;
  species PIK3CA in cell = 1/cell;
  species PIK3CA_g in cell = 1/cell;
  species PIK3CA_p in cell = 1/cell;
  species PIK3CA_rna in cell = 1/cell;
  species PIK3R1 in cell = 1/cell;
  species PIK3R1_g in cell = 1/cell;
  species PIK3R1_p in cell = 1/cell;
  species PIK3R1_rna in cell = 1/cell;
  species PRKCA in cell = 1/cell;
  species PRKCA_g in cell = 1/cell;
  species PRKCA_p in cell = 1/cell;
  species PRKCA_rna in cell = 1/cell;
  species PTPN2 in cell = 1/cell;
  species PTPN2_g in cell = 1/cell;
  species PTPN2_rna in cell = 1/cell;
  species PTPN6 in cell = 1/cell;
  species PTPN6_g in cell = 1/cell;
  species PTPN6_p in cell = 1/cell;
  species PTPN6_rna in cell = 1/cell;
  species PTPRJ in cell = 1/cell;
  species PTPRJ_g in cell = 1/cell;
  species PTPRJ_p in cell = 1/cell;
  species PTPRJ_rna in cell = 1/cell;
  species RAPGEF1 in cell = 1/cell;
  species RAPGEF1_g in cell = 1/cell;
  species RAPGEF1_p in cell = 1/cell;
  species RAPGEF1_rna in cell = 1/cell;
  species SGK1 in cell = 1/cell;
  species SGK1_g in cell = 1/cell;
  species SGK1_p in cell = 1/cell;
  species SGK1_rna in cell = 1/cell;
  species SIRT1 in cell = 1/cell;
  species SIRT1_g in cell = 1/cell;
  species SIRT1_p in cell = 1/cell;
  species SIRT1_rna in cell = 1/cell;
  species SIRT2 in cell = 1/cell;
  species SIRT2_g in cell = 1/cell;
  species SIRT2_p in cell = 1/cell;
  species SIRT2_rna in cell = 1/cell;
  species SMAD1 in cell = 1/cell;
  species SMAD1_g in cell = 1/cell;
  species SMAD1_rna in cell = 1/cell;
  species SMAD3 in cell = 1/cell;
  species SMAD3_g in cell = 1/cell;
  species SMAD3_p in cell = 1/cell;
  species SMAD3_rna in cell = 1/cell;
  species SMAD4 in cell = 1/cell;
  species SMAD4_g in cell = 1/cell;
  species SMAD4_p in cell = 1/cell;
  species SMAD4_rna in cell = 1/cell;
  species SMAD7 in cell = 1/cell;
  species SMAD7_g in cell = 1/cell;
  species SMAD7_rna in cell = 1/cell;
  species SOD1 in cell = 1/cell;
  species SOD1_g in cell = 1/cell;
  species SOD1_rna in cell = 1/cell;
  species SRC in cell = 1/cell;
  species SRC_g in cell = 1/cell;
  species SRC_p in cell = 1/cell;
  species SRC_rna in cell = 1/cell;
  species STAT3 in cell = 1/cell;
  species STAT3_g in cell = 1/cell;
  species STAT3_p in cell = 1/cell;
  species STAT3_rna in cell = 1/cell;
  species STAT5A in cell = 1/cell;
  species STAT5A_g in cell = 1/cell;
  species STAT5A_p in cell = 1/cell;
  species STAT5A_rna in cell = 1/cell;
  species STAT6 in cell = 1/cell;
  species STAT6_g in cell = 1/cell;
  species STAT6_p in cell = 1/cell;
  species STAT6_rna in cell = 1/cell;
  species STK4 in cell = 1/cell;
  species STK4_g in cell = 1/cell;
  species STK4_p in cell = 1/cell;
  species STK4_rna in cell = 1/cell;
  species TLR9 in cell = 1/cell;
  species TLR9_g in cell = 1/cell;
  species TLR9_rna in cell = 1/cell;
  species TRIM23 in cell = 1/cell;
  species TRIM23_g in cell = 1/cell;
  species TRIM23_p in cell = 1/cell;
  species TRIM23_rna in cell = 1/cell;
  species VEGFD in cell = 1/cell;
  species VEGFD_g in cell = 1/cell;
  species VEGFD_rna in cell = 1/cell;

  // Reactions:
  // V(1) = K(1,1) * [SMAD4_p] * [SMAD3_p] -K(1,2) * [SIGNOR-C9];
  R1: SMAD4_p => SMAD3_p; 1;
  // V(2) = K(2,1) * [SMAD4_p] * [SMAD1] * [SMAD1] -K(2,2) * [SIGNOR-C85];
  R2: SMAD1 => SMAD4_p; 1;
  // V(3) = K(3,1) * [PIK3R1_p] * [PIK3CA] -K(3,2) * [SIGNOR-C156];
  R3: PIK3CA => PIK3R1_p; 1;
  // V(4) = K(4,1) * [SRC_p] * [PANX1] -K(4,2) * [SRC_p |PANX1];
  R4: PANX1 => SRC_p; 1;
  // V(5) = K(5,1) * [SRC_p |PANX1];
  R5: PANX1 => SRC_p; 1;
  // V(6) = K(6,1) * [IKBKB_p] * [IKBKB] -K(6,2) * [IKBKB_p |IKBKB];
  R6: IKBKB => IKBKB_p; 1;
  // V(7) = K(7,1) * [IKBKB_p |IKBKB];
  R7: IKBKB => IKBKB_p; 1;
  // V(8) = K(8,1) * [PRKCA_p] * [PTPN6] -K(8,2) * [PRKCA_p |PTPN6];
  R8: PTPN6 => PRKCA_p; 1;
  // V(9) = K(9,1) * [PRKCA_p |PTPN6];
  R9: PTPN6 => PRKCA_p; 1;
  // V(10) = K(10,1) * [PDPK1_p] * [IKBKB] -K(10,2) * [PDPK1_p |IKBKB];
  R10: PDPK1_p => IKBKB; 1;
  // V(11) = K(11,1) * [PDPK1_p |IKBKB];
  R11: PDPK1_p => IKBKB; 1;
  // V(12) = K(12,1) * [SRC_p] * [SIRT2] -K(12,2) * [SRC_p |SIRT2];
  R12: SIRT2 => SRC_p; 1;
  // V(13) = K(13,1) * [SRC_p |SIRT2];
  R13: SIRT2 => SRC_p; 1;
  // V(14) = K(14,1) * [KDR_p] * [KDR] -K(14,2) * [KDR_p |KDR];
  R14: KDR => KDR_p; 1;
  // V(15) = K(15,1) * [KDR_p |KDR];
  R15: KDR => KDR_p; 1;
  // V(16) = K(16,1) * [SRC_p] * [SRC] -K(16,2) * [SRC_p |SRC];
  R16: SRC => SRC_p; 1;
  // V(17) = K(17,1) * [SRC_p |SRC];
  R17: SRC => SRC_p; 1;
  // V(18) = K(18,1) * [FYN_p] * [PTPN6] -K(18,2) * [FYN_p |PTPN6];
  R18: FYN_p => PTPN6; 1;
  // V(19) = K(19,1) * [FYN_p |PTPN6];
  R19: FYN_p => PTPN6; 1;
  // V(20) = K(20,1) * [CDK5_p] * [NOS3] -K(20,2) * [CDK5_p |NOS3];
  R20: CDK5_p => NOS3; 1;
  // V(21) = K(21,1) * [CDK5_p |NOS3];
  R21: CDK5_p => NOS3; 1;
  // V(22) = K(22,1) * [INSR_p] * [INSR] -K(22,2) * [INSR_p |INSR];
  R22: INSR_p => INSR; 1;
  // V(23) = K(23,1) * [INSR_p |INSR];
  R23: INSR_p => INSR; 1;
  // V(24) = K(24,1) * [INSR_p] * [SIGNOR-C156] -K(24,2) * [INSR_p |SIGNOR-C156];
  R24: INSR_p => ; 1;
  // V(25) = K(25,1) * [INSR_p |SIGNOR-C156];
  R25: INSR_p => ; 1;
  // V(26) = K(26,1) * [PRKCA_p] * [PRKCA] -K(26,2) * [PRKCA_p |PRKCA];
  R26: PRKCA => PRKCA_p; 1;
  // V(27) = K(27,1) * [PRKCA_p |PRKCA];
  R27: PRKCA => PRKCA_p; 1;
  // V(28) = K(28,1) * [PDPK1_p] * [SGK1] -K(28,2) * [PDPK1_p |SGK1];
  R28: PDPK1_p => SGK1; 1;
  // V(29) = K(29,1) * [PDPK1_p |SGK1];
  R29: PDPK1_p => SGK1; 1;
  // V(30) = K(30,1) * [PRKCA_p] * [CDKN1A] -K(30,2) * [PRKCA_p |CDKN1A];
  R30: PRKCA_p => CDKN1A; 1;
  // V(31) = K(31,1) * [PRKCA_p |CDKN1A];
  R31: PRKCA_p => CDKN1A; 1;
  // V(32) = K(32,1) * [ERN1_p] * [ERN1] -K(32,2) * [ERN1_p |ERN1];
  R32: ERN1_p => ERN1; 1;
  // V(33) = K(33,1) * [ERN1_p |ERN1];
  R33: ERN1_p => ERN1; 1;
  // V(34) = K(34,1) * [STK4_p] * [STK4] -K(34,2) * [STK4_p |STK4];
  R34: STK4_p => STK4; 1;
  // V(35) = K(35,1) * [STK4_p |STK4];
  R35: STK4_p => STK4; 1;
  // V(36) = K(36,1) * [PRKCA_p] * [SRC] -K(36,2) * [PRKCA_p |SRC];
  R36: PRKCA_p => SRC; 1;
  // V(37) = K(37,1) * [PRKCA_p |SRC];
  R37: PRKCA_p => SRC; 1;
  // V(38) = K(38,1) * [HIPK2_p] * [HIPK2] -K(38,2) * [HIPK2_p |HIPK2];
  R38: HIPK2_p => HIPK2; 1;
  // V(39) = K(39,1) * [HIPK2_p |HIPK2];
  R39: HIPK2_p => HIPK2; 1;
  // V(40) = K(40,1) * [PDPK1_p] * [PDPK1] -K(40,2) * [PDPK1_p |PDPK1];
  R40: PDPK1_p => PDPK1; 1;
  // V(41) = K(41,1) * [PDPK1_p |PDPK1];
  R41: PDPK1_p => PDPK1; 1;
  // V(42) = K(42,1) * [SRC_p] * [PDPK1] -K(42,2) * [SRC_p |PDPK1];
  R42: PDPK1 => SRC_p; 1;
  // V(43) = K(43,1) * [SRC_p |PDPK1];
  R43: PDPK1 => SRC_p; 1;
  // V(44) = K(44,1) * [FYN_p] * [FYN] -K(44,2) * [FYN_p |FYN];
  R44: FYN_p => FYN; 1;
  // V(45) = K(45,1) * [FYN_p |FYN];
  R45: FYN_p => FYN; 1;
  // V(46) = K(46,1) * [PRKCA_p] * [INSR] -K(46,2) * [PRKCA_p |INSR];
  R46: PRKCA_p => INSR; 1;
  // V(47) = K(47,1) * [PRKCA_p |INSR];
  R47: PRKCA_p => INSR; 1;
  // V(48) = K(48,1) * [SIGNOR-C156_p] * [BAD] -K(48,2) * [SIGNOR-C156_p |BAD];
  R48: BAD => ; 1;
  // V(49) = K(49,1) * [SIGNOR-C156_p |BAD];
  R49: BAD => ; 1;
  // V(50) = K(50,1) * [ALK_p] * [ALK] -K(50,2) * [ALK_p |ALK];
  R50: ALK_p => ALK; 1;
  // V(51) = K(51,1) * [ALK_p |ALK];
  R51: ALK_p => ALK; 1;
  // V(52) = K(52,1) * [SRC_p] * [ANXA1] -K(52,2) * [SRC_p |ANXA1];
  R52: SRC_p => ANXA1; 1;
  // V(53) = K(53,1) * [SRC_p |ANXA1];
  R53: SRC_p => ANXA1; 1;
  // V(54) = K(54,1) * [CDK5_p] * [SRC] -K(54,2) * [CDK5_p |SRC];
  R54: CDK5_p => SRC; 1;
  // V(55) = K(55,1) * [CDK5_p |SRC];
  R55: CDK5_p => SRC; 1;
  // V(56) = K(56,1) * [SRC_p] * [PTPRJ] -K(56,2) * [SRC_p |PTPRJ];
  R56: PTPRJ => SRC_p; 1;
  // V(57) = K(57,1) * [SRC_p |PTPRJ];
  R57: PTPRJ => SRC_p; 1;
  // V(58) = K(58,1) * [SRC_p] * [RAPGEF1] -K(58,2) * [SRC_p |RAPGEF1];
  R58: SRC_p => RAPGEF1; 1;
  // V(59) = K(59,1) * [SRC_p |RAPGEF1];
  R59: SRC_p => RAPGEF1; 1;
  // V(60) = K(60,1) * [PRKCA_p] * [NR1H4] -K(60,2) * [PRKCA_p |NR1H4];
  R60: PRKCA_p => NR1H4; 1;
  // V(61) = K(61,1) * [PRKCA_p |NR1H4];
  R61: PRKCA_p => NR1H4; 1;
  // V(62) = K(62,1) * [PRKCA_p] * [ANXA1] -K(62,2) * [PRKCA_p |ANXA1];
  R62: PRKCA_p => ANXA1; 1;
  // V(63) = K(63,1) * [PRKCA_p |ANXA1];
  R63: PRKCA_p => ANXA1; 1;
  // V(64) = K(64,1) * [SRC_p] * [CLTC] -K(64,2) * [SRC_p |CLTC];
  R64: SRC_p => CLTC; 1;
  // V(65) = K(65,1) * [SRC_p |CLTC];
  R65: SRC_p => CLTC; 1;
  // V(66) = K(66,1) * [STK4_p] * [PIK3CA] -K(66,2) * [STK4_p |PIK3CA];
  R66: STK4_p => PIK3CA; 1;
  // V(67) = K(67,1) * [STK4_p |PIK3CA];
  R67: STK4_p => PIK3CA; 1;
  // V(68) = K(68,1) * [SRC_p] * [IKBKB] -K(68,2) * [SRC_p |IKBKB];
  R68: SRC_p => IKBKB; 1;
  // V(69) = K(69,1) * [SRC_p |IKBKB];
  R69: SRC_p => IKBKB; 1;
  // V(70) = K(70,1) * [MAP3K14_p] * [MAP3K14] -K(70,2) * [MAP3K14_p |MAP3K14];
  R70: MAP3K14 => MAP3K14_p; 1;
  // V(71) = K(71,1) * [MAP3K14_p |MAP3K14];
  R71: MAP3K14 => MAP3K14_p; 1;
  // V(72) = K(72,1) * [SMAD1] * [SMAD4] -K(72,2) * [SMAD1 |SMAD4];
  R72: SMAD4 => SMAD1; 1;
  // V(73) = K(73,1) * [SMAD1 |SMAD4];
  R73: SMAD4 => SMAD1; 1;
  // V(74) = K(74,1) * [HIPK2_p] * [MECP2] -K(74,2) * [HIPK2_p |MECP2];
  R74: MECP2 => HIPK2_p; 1;
  // V(75) = K(75,1) * [HIPK2_p |MECP2];
  R75: MECP2 => HIPK2_p; 1;
  // V(76) = K(76,1) * [PRKCA_p] * [NPHS1] -K(76,2) * [PRKCA_p |NPHS1];
  R76: NPHS1 => PRKCA_p; 1;
  // V(77) = K(77,1) * [PRKCA_p |NPHS1];
  R77: NPHS1 => PRKCA_p; 1;
  // V(78) = K(78,1) * [PRKCA_p] * [BAD] -K(78,2) * [PRKCA_p |BAD];
  R78: PRKCA_p => BAD; 1;
  // V(79) = K(79,1) * [PRKCA_p |BAD];
  R79: PRKCA_p => BAD; 1;
  // V(80) = K(80,1) * [SRC_p] * [NPHS1] -K(80,2) * [SRC_p |NPHS1];
  R80: NPHS1 => SRC_p; 1;
  // V(81) = K(81,1) * [SRC_p |NPHS1];
  R81: NPHS1 => SRC_p; 1;
  // V(82) = K(82,1) * [STK4_p] * [AR] -K(82,2) * [STK4_p |AR];
  R82: STK4_p => AR; 1;
  // V(83) = K(83,1) * [STK4_p |AR];
  R83: STK4_p => AR; 1;
  // V(84) = K(84,1) * [STK4_p] * [PRKCA] -K(84,2) * [STK4_p |PRKCA];
  R84: STK4_p => PRKCA; 1;
  // V(85) = K(85,1) * [STK4_p |PRKCA];
  R85: STK4_p => PRKCA; 1;
  // V(86) = K(86,1) * [CDK5_p] * [PARP1] -K(86,2) * [CDK5_p |PARP1];
  R86: PARP1 => CDK5_p; 1;
  // V(87) = K(87,1) * [CDK5_p |PARP1];
  R87: PARP1 => CDK5_p; 1;
  // V(88) = K(88,1) * [FYN_p] * [PTPRJ] -K(88,2) * [FYN_p |PTPRJ];
  R88: FYN_p => PTPRJ; 1;
  // V(89) = K(89,1) * [FYN_p |PTPRJ];
  R89: FYN_p => PTPRJ; 1;
  // V(90) = K(90,1) * [SRC_p] * [NOS3] -K(90,2) * [SRC_p |NOS3];
  R90: NOS3 => SRC_p; 1;
  // V(91) = K(91,1) * [SRC_p |NOS3];
  R91: NOS3 => SRC_p; 1;
  // V(92) = K(92,1) * [ALK_p] * [STAT3] -K(92,2) * [ALK_p |STAT3];
  R92: ALK_p => STAT3; 1;
  // V(93) = K(93,1) * [ALK_p |STAT3];
  R93: ALK_p => STAT3; 1;
  // V(94) = K(94,1) * [CDK5_p] * [NR1I2] -K(94,2) * [CDK5_p |NR1I2];
  R94: NR1I2 => CDK5_p; 1;
  // V(95) = K(95,1) * [CDK5_p |NR1I2];
  R95: NR1I2 => CDK5_p; 1;
  // V(96) = K(96,1) * [FYN_p] * [NPHS1] -K(96,2) * [FYN_p |NPHS1];
  R96: FYN_p => NPHS1; 1;
  // V(97) = K(97,1) * [FYN_p |NPHS1];
  R97: FYN_p => NPHS1; 1;
  // V(98) = K(98,1) * [INSR_p] * [FABP4] -K(98,2) * [INSR_p |FABP4];
  R98: INSR_p => FABP4; 1;
  // V(99) = K(99,1) * [INSR_p |FABP4];
  R99: INSR_p => FABP4; 1;
  // V(100) = K(100,1) * [SRC_p] * [AR] -K(100,2) * [SRC_p |AR];
  R100: AR => SRC_p; 1;
  // V(101) = K(101,1) * [SRC_p |AR];
  R101: AR => SRC_p; 1;
  // V(102) = K(102,1) * [INSR_p] * [PTPN6] -K(102,2) * [INSR_p |PTPN6];
  R102: PTPN6 => INSR_p; 1;
  // V(103) = K(103,1) * [INSR_p |PTPN6];
  R103: PTPN6 => INSR_p; 1;
  // V(104) = K(104,1) * [INSR_p] * [PIK3R1] -K(104,2) * [INSR_p |PIK3R1];
  R104: PIK3R1 => INSR_p; 1;
  // V(105) = K(105,1) * [INSR_p |PIK3R1];
  R105: PIK3R1 => INSR_p; 1;
  // V(106) = K(106,1) * [SRC_p] * [STAT5A] -K(106,2) * [SRC_p |STAT5A];
  R106: SRC_p => STAT5A; 1;
  // V(107) = K(107,1) * [SRC_p |STAT5A];
  R107: SRC_p => STAT5A; 1;
  // V(108) = K(108,1) * [CDK5_p] * [STAT3] -K(108,2) * [CDK5_p |STAT3];
  R108: CDK5_p => STAT3; 1;
  // V(109) = K(109,1) * [CDK5_p |STAT3];
  R109: CDK5_p => STAT3; 1;
  // V(110) = K(110,1) * [SRC_p] * [STAT3] -K(110,2) * [SRC_p |STAT3];
  R110: STAT3 => SRC_p; 1;
  // V(111) = K(111,1) * [SRC_p |STAT3];
  R111: STAT3 => SRC_p; 1;
  // V(112) = K(112,1) * [SRC_p] * [KDR] -K(112,2) * [SRC_p |KDR];
  R112: KDR => SRC_p; 1;
  // V(113) = K(113,1) * [SRC_p |KDR];
  R113: KDR => SRC_p; 1;
  // V(114) = K(114,1) * [PRKCA_p] * [NFE2L2] -K(114,2) * [PRKCA_p |NFE2L2];
  R114: PRKCA_p => NFE2L2; 1;
  // V(115) = K(115,1) * [PRKCA_p |NFE2L2];
  R115: PRKCA_p => NFE2L2; 1;
  // V(116) = K(116,1) * [FYN_p] * [CDK5] -K(116,2) * [FYN_p |CDK5];
  R116: CDK5 => FYN_p; 1;
  // V(117) = K(117,1) * [FYN_p |CDK5];
  R117: CDK5 => FYN_p; 1;
  // V(118) = K(118,1) * [STK4_p] * [SIRT1] -K(118,2) * [STK4_p |SIRT1];
  R118: STK4_p => SIRT1; 1;
  // V(119) = K(119,1) * [STK4_p |SIRT1];
  R119: STK4_p => SIRT1; 1;
  // V(120) = K(120,1) * [SRC_p] * [HIPK2] -K(120,2) * [SRC_p |HIPK2];
  R120: SRC_p => HIPK2; 1;
  // V(121) = K(121,1) * [SRC_p |HIPK2];
  R121: SRC_p => HIPK2; 1;
  // V(122) = K(122,1) * [PRKCA_p] * [GJB1] -K(122,2) * [PRKCA_p |GJB1];
  R122: PRKCA_p => GJB1; 1;
  // V(123) = K(123,1) * [PRKCA_p |GJB1];
  R123: PRKCA_p => GJB1; 1;
  // V(124) = K(124,1) * [CDK5_p] * [AR] -K(124,2) * [CDK5_p |AR];
  R124: AR => CDK5_p; 1;
  // V(125) = K(125,1) * [CDK5_p |AR];
  R125: AR => CDK5_p; 1;
  // V(126) = K(126,1) * [IKBKB_p] * [TRIM23] -K(126,2) * [IKBKB_p |TRIM23];
  R126: TRIM23 => IKBKB_p; 1;
  // V(127) = K(127,1) * [IKBKB_p |TRIM23];
  R127: TRIM23 => IKBKB_p; 1;
  // V(128) = K(128,1) * [MAP3K14_p] * [STAT3] -K(128,2) * [MAP3K14_p |STAT3];
  R128: MAP3K14_p => STAT3; 1;
  // V(129) = K(129,1) * [MAP3K14_p |STAT3];
  R129: MAP3K14_p => STAT3; 1;
  // V(130) = K(130,1) * [PRKCA_p] * [NOS3] -K(130,2) * [PRKCA_p |NOS3];
  R130: PRKCA_p => NOS3; 1;
  // V(131) = K(131,1) * [PRKCA_p |NOS3];
  R131: PRKCA_p => NOS3; 1;
  // V(132) = K(132,1) * [PDPK1_p] * [PRKCA] -K(132,2) * [PDPK1_p |PRKCA];
  R132: PDPK1_p => PRKCA; 1;
  // V(133) = K(133,1) * [PDPK1_p |PRKCA];
  R133: PDPK1_p => PRKCA; 1;
  // V(134) = K(134,1) * [FYN_p] * [NFE2L2] -K(134,2) * [FYN_p |NFE2L2];
  R134: FYN_p => NFE2L2; 1;
  // V(135) = K(135,1) * [FYN_p |NFE2L2];
  R135: FYN_p => NFE2L2; 1;
  // V(136) = K(136,1) * [SRC_p] * [SMAD3] -K(136,2) * [SRC_p |SMAD3];
  R136: SRC_p => SMAD3; 1;
  // V(137) = K(137,1) * [SRC_p |SMAD3];
  R137: SRC_p => SMAD3; 1;
  // V(138) = K(138,1) * [CDK5_p] * [SIRT2] -K(138,2) * [CDK5_p |SIRT2];
  R138: SIRT2 => CDK5_p; 1;
  // V(139) = K(139,1) * [CDK5_p |SIRT2];
  R139: SIRT2 => CDK5_p; 1;
  // V(140) = K(140,1) * [SRC_p] * [PTPN6] -K(140,2) * [SRC_p |PTPN6];
  R140: PTPN6 => SRC_p; 1;
  // V(141) = K(141,1) * [SRC_p |PTPN6];
  R141: PTPN6 => SRC_p; 1;
  // V(142) = K(142,1) * [MAP3K14_p] * [IKBKB] -K(142,2) * [MAP3K14_p |IKBKB];
  R142: MAP3K14_p => IKBKB; 1;
  // V(143) = K(143,1) * [MAP3K14_p |IKBKB];
  R143: MAP3K14_p => IKBKB; 1;
  // V(144) = K(144,1) * [IKBKB_p] * [BAD] -K(144,2) * [IKBKB_p |BAD];
  R144: BAD => IKBKB_p; 1;
  // V(145) = K(145,1) * [IKBKB_p |BAD];
  R145: BAD => IKBKB_p; 1;
  // V(146) = K(146,1) * [PTPRJ_p] * [SRC] -K(146,2) * [PTPRJ_p |SRC];
  R146: PTPRJ_p => SRC; 1;
  // V(147) = K(147,1) * [PTPRJ_p |SRC];
  R147: PTPRJ_p => SRC; 1;
  // V(148) = K(148,1) * [PIK3CA] * [PIK3R1] -K(148,2) * [PIK3CA |PIK3R1];
  R148: PIK3CA => PIK3R1; 1;
  // V(149) = K(149,1) * [PIK3CA |PIK3R1];
  R149: PIK3CA => PIK3R1; 1;
  // V(150) = K(150,1) * [PTPRJ_p] * [INSR_p] -K(150,2) * [PTPRJ_p |INSR_p];
  R150: PTPRJ_p => INSR_p; 1;
  // V(151) = K(151,1) * [PTPRJ_p |INSR_p];
  R151: PTPRJ_p => INSR_p; 1;
  // V(152) = K(152,1) * [PTPN2] * [KDR_p] -K(152,2) * [PTPN2 |KDR_p];
  R152: PTPN2 => KDR_p; 1;
  // V(153) = K(153,1) * [PTPN2 |KDR_p];
  R153: PTPN2 => KDR_p; 1;
  // V(154) = K(154,1) * [PTPN6_p] * [KDR_p] -K(154,2) * [PTPN6_p |KDR_p];
  R154: PTPN6_p => KDR_p; 1;
  // V(155) = K(155,1) * [PTPN6_p |KDR_p];
  R155: PTPN6_p => KDR_p; 1;
  // V(156) = K(156,1) * [PTPN2] * [INSR_p] -K(156,2) * [PTPN2 |INSR_p];
  R156: INSR_p => PTPN2; 1;
  // V(157) = K(157,1) * [PTPN2 |INSR_p];
  R157: INSR_p => PTPN2; 1;
  // V(158) = K(158,1) * [PTPRJ_p] * [KDR_p] -K(158,2) * [PTPRJ_p |KDR_p];
  R158: PTPRJ_p => KDR_p; 1;
  // V(159) = K(159,1) * [PTPRJ_p |KDR_p];
  R159: PTPRJ_p => KDR_p; 1;
  // V(160) = K(160,1) * [PTPN2] * [FYN_p] -K(160,2) * [PTPN2 |FYN_p];
  R160: FYN_p => PTPN2; 1;
  // V(161) = K(161,1) * [PTPN2 |FYN_p];
  R161: FYN_p => PTPN2; 1;
  // V(162) = K(162,1) * [PTPN2] * [SRC_p] -K(162,2) * [PTPN2 |SRC_p];
  R162: PTPN2 => SRC_p; 1;
  // V(163) = K(163,1) * [PTPN2 |SRC_p];
  R163: PTPN2 => SRC_p; 1;
  // V(164) = K(164,1) * [PTPN6_p] * [INSR_p] -K(164,2) * [PTPN6_p |INSR_p];
  R164: PTPN6_p => INSR_p; 1;
  // V(165) = K(165,1) * [PTPN6_p |INSR_p];
  R165: PTPN6_p => INSR_p; 1;
  // V(166) = K(166,1) * [PTPN6_p] * [SRC_p] -K(166,2) * [PTPN6_p |SRC_p];
  R166: PTPN6_p => SRC_p; 1;
  // V(167) = K(167,1) * [PTPN6_p |SRC_p];
  R167: PTPN6_p => SRC_p; 1;
  // V(168) = K(168,1) * [PTPN2] * [STAT3_p] -K(168,2) * [PTPN2 |STAT3_p];
  R168: STAT3_p => PTPN2; 1;
  // V(169) = K(169,1) * [PTPN2 |STAT3_p];
  R169: STAT3_p => PTPN2; 1;
  // V(170) = K(170,1) * [PTPN2] * [STAT6_p] -K(170,2) * [PTPN2 |STAT6_p];
  R170: STAT6_p => PTPN2; 1;
  // V(171) = K(171,1) * [PTPN2 |STAT6_p];
  R171: STAT6_p => PTPN2; 1;
  // V(172) = K(172,1) * [PTPRJ_p] * [PIK3R1_p] -K(172,2) * [PTPRJ_p |PIK3R1_p];
  R172: PTPRJ_p => PIK3R1_p; 1;
  // V(173) = K(173,1) * [PTPRJ_p |PIK3R1_p];
  R173: PTPRJ_p => PIK3R1_p; 1;
  // V(174) = K(174,1) * [PTPRJ_p] * [SIGNOR-C156_p] -K(174,2) * [PTPRJ_p |SIGNOR-C156_p];
  R174: PTPRJ_p => ; 1;
  // V(175) = K(175,1) * [PTPRJ_p |SIGNOR-C156_p];
  R175: PTPRJ_p => ; 1;
  // V(176) = K(176,1) * [PTPRJ_p] * [SRC_p] -K(176,2) * [PTPRJ_p |SRC_p];
  R176: PTPRJ_p => SRC_p; 1;
  // V(177) = K(177,1) * [PTPRJ_p |SRC_p];
  R177: PTPRJ_p => SRC_p; 1;
  // V(178) = K(178,1) * [PTPN6_p] * [STAT3_p] -K(178,2) * [PTPN6_p |STAT3_p];
  R178: PTPN6_p => STAT3_p; 1;
  // V(179) = K(179,1) * [PTPN6_p |STAT3_p];
  R179: PTPN6_p => STAT3_p; 1;
  // V(180) = K(180,1) * [PTPN2] * [STAT5A_p] -K(180,2) * [PTPN2 |STAT5A_p];
  R180: STAT5A_p => PTPN2; 1;
  // V(181) = K(181,1) * [PTPN2 |STAT5A_p];
  R181: STAT5A_p => PTPN2; 1;
  // V(182) = K(182,1) * [NFE2L2_p] * [SOD1_g] -K(182,2) * [NFE2L2_p |SOD1_g];
  R182: SOD1_g => NFE2L2_p; 1;
  // V(183) = K(183,1) * [NFE2L2_p |SOD1_g];
  R183: SOD1_g => NFE2L2_p; 1;
  // V(184) = K(184,1) * [SOD1_rna];
  R184: SOD1_rna => ; 1;
  // V(185) = K(185,1) * [NFE2L2_p] * [CAT_g] -K(185,2) * [NFE2L2_p |CAT_g];
  R185: CAT_g => NFE2L2_p; 1;
  // V(186) = K(186,1) * [NFE2L2_p |CAT_g];
  R186: CAT_g => NFE2L2_p; 1;
  // V(187) = K(187,1) * [CAT_rna];
  R187: CAT_rna => ; 1;
  // V(188) = K(188,1) * [NFE2L2_p] * [GSTA1_g] -K(188,2) * [NFE2L2_p |GSTA1_g];
  R188: GSTA1_g => NFE2L2_p; 1;
  // V(189) = K(189,1) * [NFE2L2_p |GSTA1_g];
  R189: GSTA1_g => NFE2L2_p; 1;
  // V(190) = K(190,1) * [GSTA1_rna];
  R190: GSTA1_rna => ; 1;
  // V(191) = K(191,1) * [SMAD7] * [SMAD3_g] -K(191,2) * [SMAD7 |SMAD3_g];
  R191: SMAD7 => SMAD3_g; 1;
  // V(192) = K(192,1) * [SMAD3_g];
  R192: SMAD3_g => ; 1;
  // V(193) = K(193,1) * [SMAD3_rna];
  R193: SMAD3_rna => ; 1;
  // V(194) = K(194,1) * [MECP2_p] * [SGK1_g] -K(194,2) * [MECP2_p |SGK1_g];
  R194: MECP2_p => SGK1_g; 1;
  // V(195) = K(195,1) * [SGK1_g];
  R195: SGK1_g => ; 1;
  // V(196) = K(196,1) * [SGK1_rna];
  R196: SGK1_rna => ; 1;
  // V(197) = K(197,1) * [SGK1];
  R197: SGK1 => ; 1;
  // V(198) = K(198,1) * [IKBKB];
  R198: IKBKB => ; 1;
  // V(199) = K(199,1) * [SMAD7];
  R199: SMAD7 => ; 1;
  // V(200) = K(200,1) * [PDPK1];
  R200: PDPK1 => ; 1;
  // V(201) = K(201,1) * [VEGFD];
  R201: VEGFD => ; 1;
  // V(202) = K(202,1) * [NPHS1];
  R202: NPHS1 => ; 1;
  // V(203) = K(203,1) * [ERN1];
  R203: ERN1 => ; 1;
  // V(204) = K(204,1) * [NR1I2];
  R204: NR1I2 => ; 1;
  // V(205) = K(205,1) * [SOD1];
  R205: SOD1 => ; 1;
  // V(206) = K(206,1) * [CAT];
  R206: CAT => ; 1;
  // V(207) = K(207,1) * [ANXA1];
  R207: ANXA1 => ; 1;
  // V(208) = K(208,1) * [INSR];
  R208: INSR => ; 1;
  // V(209) = K(209,1) * [FYN];
  R209: FYN => ; 1;
  // V(210) = K(210,1) * [GJB1];
  R210: GJB1 => ; 1;
  // V(211) = K(211,1) * [GSTA1];
  R211: GSTA1 => ; 1;
  // V(212) = K(212,1) * [PARP1];
  R212: PARP1 => ; 1;
  // V(213) = K(213,1) * [AR];
  R213: AR => ; 1;
  // V(214) = K(214,1) * [SRC];
  R214: SRC => ; 1;
  // V(215) = K(215,1) * [FABP4];
  R215: FABP4 => ; 1;
  // V(216) = K(216,1) * [PRKCA];
  R216: PRKCA => ; 1;
  // V(217) = K(217,1) * [PTPN2];
  R217: PTPN2 => ; 1;
  // V(218) = K(218,1) * [PIK3R1];
  R218: PIK3R1 => ; 1;
  // V(219) = K(219,1) * [PTPN6];
  R219: PTPN6 => ; 1;
  // V(220) = K(220,1) * [NOS3];
  R220: NOS3 => ; 1;
  // V(221) = K(221,1) * [KDR];
  R221: KDR => ; 1;
  // V(222) = K(222,1) * [TRIM23];
  R222: TRIM23 => ; 1;
  // V(223) = K(223,1) * [CDKN1A];
  R223: CDKN1A => ; 1;
  // V(224) = K(224,1) * [STAT3];
  R224: STAT3 => ; 1;
  // V(225) = K(225,1) * [STAT6];
  R225: STAT6 => ; 1;
  // V(226) = K(226,1) * [STAT5A];
  R226: STAT5A => ; 1;
  // V(227) = K(227,1) * [PIK3CA];
  R227: PIK3CA => ; 1;
  // V(228) = K(228,1) * [MECP2];
  R228: MECP2 => ; 1;
  // V(229) = K(229,1) * [SMAD3];
  R229: SMAD3 => ; 1;
  // V(230) = K(230,1) * [CDK5];
  R230: CDK5 => ; 1;
  // V(231) = K(231,1) * [CLTC];
  R231: CLTC => ; 1;
  // V(232) = K(232,1) * [NOTCH2];
  R232: NOTCH2 => ; 1;
  // V(233) = K(233,1) * [PTPRJ];
  R233: PTPRJ => ; 1;
  // V(234) = K(234,1) * [STK4];
  R234: STK4 => ; 1;
  // V(235) = K(235,1) * [SMAD4];
  R235: SMAD4 => ; 1;
  // V(236) = K(236,1) * [RAPGEF1];
  R236: RAPGEF1 => ; 1;
  // V(237) = K(237,1) * [SMAD1];
  R237: SMAD1 => ; 1;
  // V(238) = K(238,1) * [NFE2L2];
  R238: NFE2L2 => ; 1;
  // V(239) = K(239,1) * [SIRT2];
  R239: SIRT2 => ; 1;
  // V(240) = K(240,1) * [BAD];
  R240: BAD => ; 1;
  // V(241) = K(241,1) * [SIRT1];
  R241: SIRT1 => ; 1;
  // V(242) = K(242,1) * [PANX1];
  R242: PANX1 => ; 1;
  // V(243) = K(243,1) * [NR1H4];
  R243: NR1H4 => ; 1;
  // V(244) = K(244,1) * [MAP3K14];
  R244: MAP3K14 => ; 1;
  // V(245) = K(245,1) * [HIPK2];
  R245: HIPK2 => ; 1;
  // V(246) = K(246,1) * [TLR9];
  R246: TLR9 => ; 1;
  // V(247) = K(247,1) * [ALK];
  R247: ALK => ; 1;
  // V(248) = K(248,1) * [SGK1_rna];
  R248: SGK1_rna => ; 1;
  // V(249) = K(249,1) * [SOD1_rna];
  R249: SOD1_rna => ; 1;
  // V(250) = K(250,1) * [CAT_rna];
  R250: CAT_rna => ; 1;
  // V(251) = K(251,1) * [GSTA1_rna];
  R251: GSTA1_rna => ; 1;
  // V(252) = K(252,1) * [SMAD3_rna];
  R252: SMAD3_rna => ; 1;
  // V(253) = K(253,1) * [IKBKB_g];
  R253: IKBKB_g => ; 1;
  // V(254) = K(254,1) * [IKBKB_rna];
  R254: IKBKB_rna => ; 1;
  // V(255) = K(255,1) * [SMAD7_g];
  R255: SMAD7_g => ; 1;
  // V(256) = K(256,1) * [SMAD7_rna];
  R256: SMAD7_rna => ; 1;
  // V(257) = K(257,1) * [PDPK1_g];
  R257: PDPK1_g => ; 1;
  // V(258) = K(258,1) * [PDPK1_rna];
  R258: PDPK1_rna => ; 1;
  // V(259) = K(259,1) * [VEGFD_g];
  R259: VEGFD_g => ; 1;
  // V(260) = K(260,1) * [VEGFD_rna];
  R260: VEGFD_rna => ; 1;
  // V(261) = K(261,1) * [NPHS1_g];
  R261: NPHS1_g => ; 1;
  // V(262) = K(262,1) * [NPHS1_rna];
  R262: NPHS1_rna => ; 1;
  // V(263) = K(263,1) * [ERN1_g];
  R263: ERN1_g => ; 1;
  // V(264) = K(264,1) * [ERN1_rna];
  R264: ERN1_rna => ; 1;
  // V(265) = K(265,1) * [NR1I2_g];
  R265: NR1I2_g => ; 1;
  // V(266) = K(266,1) * [NR1I2_rna];
  R266: NR1I2_rna => ; 1;
  // V(267) = K(267,1) * [ANXA1_g];
  R267: ANXA1_g => ; 1;
  // V(268) = K(268,1) * [ANXA1_rna];
  R268: ANXA1_rna => ; 1;
  // V(269) = K(269,1) * [INSR_g];
  R269: INSR_g => ; 1;
  // V(270) = K(270,1) * [INSR_rna];
  R270: INSR_rna => ; 1;
  // V(271) = K(271,1) * [FYN_g];
  R271: FYN_g => ; 1;
  // V(272) = K(272,1) * [FYN_rna];
  R272: FYN_rna => ; 1;
  // V(273) = K(273,1) * [GJB1_g];
  R273: GJB1_g => ; 1;
  // V(274) = K(274,1) * [GJB1_rna];
  R274: GJB1_rna => ; 1;
  // V(275) = K(275,1) * [PARP1_g];
  R275: PARP1_g => ; 1;
  // V(276) = K(276,1) * [PARP1_rna];
  R276: PARP1_rna => ; 1;
  // V(277) = K(277,1) * [AR_g];
  R277: AR_g => ; 1;
  // V(278) = K(278,1) * [AR_rna];
  R278: AR_rna => ; 1;
  // V(279) = K(279,1) * [SRC_g];
  R279: SRC_g => ; 1;
  // V(280) = K(280,1) * [SRC_rna];
  R280: SRC_rna => ; 1;
  // V(281) = K(281,1) * [FABP4_g];
  R281: FABP4_g => ; 1;
  // V(282) = K(282,1) * [FABP4_rna];
  R282: FABP4_rna => ; 1;
  // V(283) = K(283,1) * [PRKCA_g];
  R283: PRKCA_g => ; 1;
  // V(284) = K(284,1) * [PRKCA_rna];
  R284: PRKCA_rna => ; 1;
  // V(285) = K(285,1) * [PTPN2_g];
  R285: PTPN2_g => ; 1;
  // V(286) = K(286,1) * [PTPN2_rna];
  R286: PTPN2_rna => ; 1;
  // V(287) = K(287,1) * [PIK3R1_g];
  R287: PIK3R1_g => ; 1;
  // V(288) = K(288,1) * [PIK3R1_rna];
  R288: PIK3R1_rna => ; 1;
  // V(289) = K(289,1) * [PTPN6_g];
  R289: PTPN6_g => ; 1;
  // V(290) = K(290,1) * [PTPN6_rna];
  R290: PTPN6_rna => ; 1;
  // V(291) = K(291,1) * [NOS3_g];
  R291: NOS3_g => ; 1;
  // V(292) = K(292,1) * [NOS3_rna];
  R292: NOS3_rna => ; 1;
  // V(293) = K(293,1) * [KDR_g];
  R293: KDR_g => ; 1;
  // V(294) = K(294,1) * [KDR_rna];
  R294: KDR_rna => ; 1;
  // V(295) = K(295,1) * [TRIM23_g];
  R295: TRIM23_g => ; 1;
  // V(296) = K(296,1) * [TRIM23_rna];
  R296: TRIM23_rna => ; 1;
  // V(297) = K(297,1) * [CDKN1A_g];
  R297: CDKN1A_g => ; 1;
  // V(298) = K(298,1) * [CDKN1A_rna];
  R298: CDKN1A_rna => ; 1;
  // V(299) = K(299,1) * [STAT3_g];
  R299: STAT3_g => ; 1;
  // V(300) = K(300,1) * [STAT3_rna];
  R300: STAT3_rna => ; 1;
  // V(301) = K(301,1) * [STAT6_g];
  R301: STAT6_g => ; 1;
  // V(302) = K(302,1) * [STAT6_rna];
  R302: STAT6_rna => ; 1;
  // V(303) = K(303,1) * [STAT5A_g];
  R303: STAT5A_g => ; 1;
  // V(304) = K(304,1) * [STAT5A_rna];
  R304: STAT5A_rna => ; 1;
  // V(305) = K(305,1) * [PIK3CA_g];
  R305: PIK3CA_g => ; 1;
  // V(306) = K(306,1) * [PIK3CA_rna];
  R306: PIK3CA_rna => ; 1;
  // V(307) = K(307,1) * [MECP2_g];
  R307: MECP2_g => ; 1;
  // V(308) = K(308,1) * [MECP2_rna];
  R308: MECP2_rna => ; 1;
  // V(309) = K(309,1) * [CDK5_g];
  R309: CDK5_g => ; 1;
  // V(310) = K(310,1) * [CDK5_rna];
  R310: CDK5_rna => ; 1;
  // V(311) = K(311,1) * [CLTC_g];
  R311: CLTC_g => ; 1;
  // V(312) = K(312,1) * [CLTC_rna];
  R312: CLTC_rna => ; 1;
  // V(313) = K(313,1) * [NOTCH2_g];
  R313: NOTCH2_g => ; 1;
  // V(314) = K(314,1) * [NOTCH2_rna];
  R314: NOTCH2_rna => ; 1;
  // V(315) = K(315,1) * [PTPRJ_g];
  R315: PTPRJ_g => ; 1;
  // V(316) = K(316,1) * [PTPRJ_rna];
  R316: PTPRJ_rna => ; 1;
  // V(317) = K(317,1) * [STK4_g];
  R317: STK4_g => ; 1;
  // V(318) = K(318,1) * [STK4_rna];
  R318: STK4_rna => ; 1;
  // V(319) = K(319,1) * [SMAD4_g];
  R319: SMAD4_g => ; 1;
  // V(320) = K(320,1) * [SMAD4_rna];
  R320: SMAD4_rna => ; 1;
  // V(321) = K(321,1) * [RAPGEF1_g];
  R321: RAPGEF1_g => ; 1;
  // V(322) = K(322,1) * [RAPGEF1_rna];
  R322: RAPGEF1_rna => ; 1;
  // V(323) = K(323,1) * [SMAD1_g];
  R323: SMAD1_g => ; 1;
  // V(324) = K(324,1) * [SMAD1_rna];
  R324: SMAD1_rna => ; 1;
  // V(325) = K(325,1) * [NFE2L2_g];
  R325: NFE2L2_g => ; 1;
  // V(326) = K(326,1) * [NFE2L2_rna];
  R326: NFE2L2_rna => ; 1;
  // V(327) = K(327,1) * [SIRT2_g];
  R327: SIRT2_g => ; 1;
  // V(328) = K(328,1) * [SIRT2_rna];
  R328: SIRT2_rna => ; 1;
  // V(329) = K(329,1) * [BAD_g];
  R329: BAD_g => ; 1;
  // V(330) = K(330,1) * [BAD_rna];
  R330: BAD_rna => ; 1;
  // V(331) = K(331,1) * [SIRT1_g];
  R331: SIRT1_g => ; 1;
  // V(332) = K(332,1) * [SIRT1_rna];
  R332: SIRT1_rna => ; 1;
  // V(333) = K(333,1) * [PANX1_g];
  R333: PANX1_g => ; 1;
  // V(334) = K(334,1) * [PANX1_rna];
  R334: PANX1_rna => ; 1;
  // V(335) = K(335,1) * [NR1H4_g];
  R335: NR1H4_g => ; 1;
  // V(336) = K(336,1) * [NR1H4_rna];
  R336: NR1H4_rna => ; 1;
  // V(337) = K(337,1) * [MAP3K14_g];
  R337: MAP3K14_g => ; 1;
  // V(338) = K(338,1) * [MAP3K14_rna];
  R338: MAP3K14_rna => ; 1;
  // V(339) = K(339,1) * [HIPK2_g];
  R339: HIPK2_g => ; 1;
  // V(340) = K(340,1) * [HIPK2_rna];
  R340: HIPK2_rna => ; 1;
  // V(341) = K(341,1) * [TLR9_g];
  R341: TLR9_g => ; 1;
  // V(342) = K(342,1) * [TLR9_rna];
  R342: TLR9_rna => ; 1;
  // V(343) = K(343,1) * [ALK_g];
  R343: ALK_g => ; 1;
  // V(344) = K(344,1) * [ALK_rna];
  R344: ALK_rna => ; 1;
  // V(345) = K(345,1) * [SGK1_p];
  R345: SGK1_p => ; 1;
  // V(346) = K(346,1) * [IKBKB_p];
  R346: IKBKB_p => ; 1;
  // V(347) = K(347,1) * [PDPK1_p];
  R347: PDPK1_p => ; 1;
  // V(348) = K(348,1) * [NPHS1_p];
  R348: NPHS1_p => ; 1;
  // V(349) = K(349,1) * [ERN1_p];
  R349: ERN1_p => ; 1;
  // V(350) = K(350,1) * [NR1I2_p];
  R350: NR1I2_p => ; 1;
  // V(351) = K(351,1) * [ANXA1_p];
  R351: ANXA1_p => ; 1;
  // V(352) = K(352,1) * [INSR_p];
  R352: INSR_p => ; 1;
  // V(353) = K(353,1) * [FYN_p];
  R353: FYN_p => ; 1;
  // V(354) = K(354,1) * [GJB1_p];
  R354: GJB1_p => ; 1;
  // V(355) = K(355,1) * [PARP1_p];
  R355: PARP1_p => ; 1;
  // V(356) = K(356,1) * [AR_p];
  R356: AR_p => ; 1;
  // V(357) = K(357,1) * [SRC_p];
  R357: SRC_p => ; 1;
  // V(358) = K(358,1) * [FABP4_p];
  R358: FABP4_p => ; 1;
  // V(359) = K(359,1) * [PRKCA_p];
  R359: PRKCA_p => ; 1;
  // V(360) = K(360,1) * [PIK3R1_p];
  R360: PIK3R1_p => ; 1;
  // V(361) = K(361,1) * [PTPN6_p];
  R361: PTPN6_p => ; 1;
  // V(362) = K(362,1) * [NOS3_p];
  R362: NOS3_p => ; 1;
  // V(363) = K(363,1) * [KDR_p];
  R363: KDR_p => ; 1;
  // V(364) = K(364,1) * [TRIM23_p];
  R364: TRIM23_p => ; 1;
  // V(365) = K(365,1) * [CDKN1A_p];
  R365: CDKN1A_p => ; 1;
  // V(366) = K(366,1) * [STAT3_p];
  R366: STAT3_p => ; 1;
  // V(367) = K(367,1) * [STAT6_p];
  R367: STAT6_p => ; 1;
  // V(368) = K(368,1) * [STAT5A_p];
  R368: STAT5A_p => ; 1;
  // V(369) = K(369,1) * [PIK3CA_p];
  R369: PIK3CA_p => ; 1;
  // V(370) = K(370,1) * [MECP2_p];
  R370: MECP2_p => ; 1;
  // V(371) = K(371,1) * [SMAD3_p];
  R371: SMAD3_p => ; 1;
  // V(372) = K(372,1) * [CDK5_p];
  R372: CDK5_p => ; 1;
  // V(373) = K(373,1) * [CLTC_p];
  R373: CLTC_p => ; 1;
  // V(374) = K(374,1) * [PTPRJ_p];
  R374: PTPRJ_p => ; 1;
  // V(375) = K(375,1) * [STK4_p];
  R375: STK4_p => ; 1;
  // V(376) = K(376,1) * [SMAD4_p];
  R376: SMAD4_p => ; 1;
  // V(377) = K(377,1) * [RAPGEF1_p];
  R377: RAPGEF1_p => ; 1;
  // V(378) = K(378,1) * [NFE2L2_p];
  R378: NFE2L2_p => ; 1;
  // V(379) = K(379,1) * [SIRT2_p];
  R379: SIRT2_p => ; 1;
  // V(380) = K(380,1) * [BAD_p];
  R380: BAD_p => ; 1;
  // V(381) = K(381,1) * [SIRT1_p];
  R381: SIRT1_p => ; 1;
  // V(382) = K(382,1) * [PANX1_p];
  R382: PANX1_p => ; 1;
  // V(383) = K(383,1) * [NR1H4_p];
  R383: NR1H4_p => ; 1;
  // V(384) = K(384,1) * [MAP3K14_p];
  R384: MAP3K14_p => ; 1;
  // V(385) = K(385,1) * [HIPK2_p];
  R385: HIPK2_p => ; 1;
  // V(386) = K(386,1) * [ALK_p];
  R386: ALK_p => ; 1;
  // V(387) = K(387,1) * [SIGNOR-C156_p];
  R387: => ; 1;
  // V(388) = K(388,1) * [IKBKB_rna];
  R388: IKBKB_rna => ; 1;
  // V(389) = K(389,1) * [SMAD7_rna];
  R389: SMAD7_rna => ; 1;
  // V(390) = K(390,1) * [PDPK1_rna];
  R390: PDPK1_rna => ; 1;
  // V(391) = K(391,1) * [VEGFD_rna];
  R391: VEGFD_rna => ; 1;
  // V(392) = K(392,1) * [NPHS1_rna];
  R392: NPHS1_rna => ; 1;
  // V(393) = K(393,1) * [ERN1_rna];
  R393: ERN1_rna => ; 1;
  // V(394) = K(394,1) * [NR1I2_rna];
  R394: NR1I2_rna => ; 1;
  // V(395) = K(395,1) * [ANXA1_rna];
  R395: ANXA1_rna => ; 1;
  // V(396) = K(396,1) * [INSR_rna];
  R396: INSR_rna => ; 1;
  // V(397) = K(397,1) * [FYN_rna];
  R397: FYN_rna => ; 1;
  // V(398) = K(398,1) * [GJB1_rna];
  R398: GJB1_rna => ; 1;
  // V(399) = K(399,1) * [PARP1_rna];
  R399: PARP1_rna => ; 1;
  // V(400) = K(400,1) * [AR_rna];
  R400: AR_rna => ; 1;
  // V(401) = K(401,1) * [SRC_rna];
  R401: SRC_rna => ; 1;
  // V(402) = K(402,1) * [FABP4_rna];
  R402: FABP4_rna => ; 1;
  // V(403) = K(403,1) * [PRKCA_rna];
  R403: PRKCA_rna => ; 1;
  // V(404) = K(404,1) * [PTPN2_rna];
  R404: PTPN2_rna => ; 1;
  // V(405) = K(405,1) * [PIK3R1_rna];
  R405: PIK3R1_rna => ; 1;
  // V(406) = K(406,1) * [PTPN6_rna];
  R406: PTPN6_rna => ; 1;
  // V(407) = K(407,1) * [NOS3_rna];
  R407: NOS3_rna => ; 1;
  // V(408) = K(408,1) * [KDR_rna];
  R408: KDR_rna => ; 1;
  // V(409) = K(409,1) * [TRIM23_rna];
  R409: TRIM23_rna => ; 1;
  // V(410) = K(410,1) * [CDKN1A_rna];
  R410: CDKN1A_rna => ; 1;
  // V(411) = K(411,1) * [STAT3_rna];
  R411: STAT3_rna => ; 1;
  // V(412) = K(412,1) * [STAT6_rna];
  R412: STAT6_rna => ; 1;
  // V(413) = K(413,1) * [STAT5A_rna];
  R413: STAT5A_rna => ; 1;
  // V(414) = K(414,1) * [PIK3CA_rna];
  R414: PIK3CA_rna => ; 1;
  // V(415) = K(415,1) * [MECP2_rna];
  R415: MECP2_rna => ; 1;
  // V(416) = K(416,1) * [CDK5_rna];
  R416: CDK5_rna => ; 1;
  // V(417) = K(417,1) * [CLTC_rna];
  R417: CLTC_rna => ; 1;
  // V(418) = K(418,1) * [NOTCH2_rna];
  R418: NOTCH2_rna => ; 1;
  // V(419) = K(419,1) * [PTPRJ_rna];
  R419: PTPRJ_rna => ; 1;
  // V(420) = K(420,1) * [STK4_rna];
  R420: STK4_rna => ; 1;
  // V(421) = K(421,1) * [SMAD4_rna];
  R421: SMAD4_rna => ; 1;
  // V(422) = K(422,1) * [RAPGEF1_rna];
  R422: RAPGEF1_rna => ; 1;
  // V(423) = K(423,1) * [SMAD1_rna];
  R423: SMAD1_rna => ; 1;
  // V(424) = K(424,1) * [NFE2L2_rna];
  R424: NFE2L2_rna => ; 1;
  // V(425) = K(425,1) * [SIRT2_rna];
  R425: SIRT2_rna => ; 1;
  // V(426) = K(426,1) * [BAD_rna];
  R426: BAD_rna => ; 1;
  // V(427) = K(427,1) * [SIRT1_rna];
  R427: SIRT1_rna => ; 1;
  // V(428) = K(428,1) * [PANX1_rna];
  R428: PANX1_rna => ; 1;
  // V(429) = K(429,1) * [NR1H4_rna];
  R429: NR1H4_rna => ; 1;
  // V(430) = K(430,1) * [MAP3K14_rna];
  R430: MAP3K14_rna => ; 1;
  // V(431) = K(431,1) * [HIPK2_rna];
  R431: HIPK2_rna => ; 1;
  // V(432) = K(432,1) * [TLR9_rna];
  R432: TLR9_rna => ; 1;
  // V(433) = K(433,1) * [ALK_rna];
  R433: ALK_rna => ; 1;
end
