// SBML level 3 version 2

model Endothelial()

  // Compartments:
  compartment cell = 1;

  // Species:
  species ABCA1 in cell = 1/cell;
  species ABCA1_g in cell = 1/cell;
  species ABCA1_p in cell = 1/cell;
  species ABCA1_rna in cell = 1/cell;
  species ADD3 in cell = 1/cell;
  species ADD3_g in cell = 1/cell;
  species ADD3_p in cell = 1/cell;
  species ADD3_rna in cell = 1/cell;
  species AGO2 in cell = 1/cell;
  species AGO2_g in cell = 1/cell;
  species AGO2_p in cell = 1/cell;
  species AGO2_rna in cell = 1/cell;
  species ANXA1 in cell = 1/cell;
  species ANXA1_g in cell = 1/cell;
  species ANXA1_p in cell = 1/cell;
  species ANXA1_rna in cell = 1/cell;
  species ATR in cell = 1/cell;
  species ATR_g in cell = 1/cell;
  species ATR_rna in cell = 1/cell;
  species BCL2 in cell = 1/cell;
  species BCL2_g in cell = 1/cell;
  species BCL2_p in cell = 1/cell;
  species BCL2_rna in cell = 1/cell;
  species BMP4 in cell = 1/cell;
  species BMP4_g in cell = 1/cell;
  species BMP4_rna in cell = 1/cell;
  species CALM1 in cell = 1/cell;
  species CALM1_g in cell = 1/cell;
  species CALM1_p in cell = 1/cell;
  species CALM1_rna in cell = 1/cell;
  species CD34 in cell = 1/cell;
  species CD34_g in cell = 1/cell;
  species CD34_rna in cell = 1/cell;
  species CDKN1A in cell = 1/cell;
  species CDKN1A_g in cell = 1/cell;
  species CDKN1A_p in cell = 1/cell;
  species CDKN1A_rna in cell = 1/cell;
  species CREB1 in cell = 1/cell;
  species CREB1_g in cell = 1/cell;
  species CREB1_p in cell = 1/cell;
  species CREB1_rna in cell = 1/cell;
  species CTNNB1 in cell = 1/cell;
  species CTNNB1_g in cell = 1/cell;
  species CTNNB1_p in cell = 1/cell;
  species CTNNB1_rna in cell = 1/cell;
  species DEPTOR in cell = 1/cell;
  species DEPTOR_g in cell = 1/cell;
  species DEPTOR_p in cell = 1/cell;
  species DEPTOR_rna in cell = 1/cell;
  species DUSP1 in cell = 1/cell;
  species DUSP1_g in cell = 1/cell;
  species DUSP1_p in cell = 1/cell;
  species DUSP1_rna in cell = 1/cell;
  species EGF in cell = 1/cell;
  species EGFR in cell = 1/cell;
  species EGFR_g in cell = 1/cell;
  species EGFR_p in cell = 1/cell;
  species EGFR_rna in cell = 1/cell;
  species EGF_g in cell = 1/cell;
  species EGF_rna in cell = 1/cell;
  species EP300 in cell = 1/cell;
  species EP300_g in cell = 1/cell;
  species EP300_p in cell = 1/cell;
  species EP300_rna in cell = 1/cell;
  species FABP4 in cell = 1/cell;
  species FABP4_g in cell = 1/cell;
  species FABP4_p in cell = 1/cell;
  species FABP4_rna in cell = 1/cell;
  species FGF2 in cell = 1/cell;
  species FGF2_g in cell = 1/cell;
  species FGF2_rna in cell = 1/cell;
  species FOS in cell = 1/cell;
  species FOS_g in cell = 1/cell;
  species FOS_p in cell = 1/cell;
  species FOS_rna in cell = 1/cell;
  species GCLC in cell = 1/cell;
  species GCLC_g in cell = 1/cell;
  species GCLC_rna in cell = 1/cell;
  species GHR in cell = 1/cell;
  species GHR_g in cell = 1/cell;
  species GHR_p in cell = 1/cell;
  species GHR_rna in cell = 1/cell;
  species GJA1 in cell = 1/cell;
  species GJA1_g in cell = 1/cell;
  species GJA1_p in cell = 1/cell;
  species GJA1_rna in cell = 1/cell;
  species GLO1 in cell = 1/cell;
  species GLO1_g in cell = 1/cell;
  species GLO1_p in cell = 1/cell;
  species GLO1_rna in cell = 1/cell;
  species GSTA1 in cell = 1/cell;
  species GSTA1_g in cell = 1/cell;
  species GSTA1_rna in cell = 1/cell;
  species HES1 in cell = 1/cell;
  species HES1_g in cell = 1/cell;
  species HES1_p in cell = 1/cell;
  species HES1_rna in cell = 1/cell;
  species HGF in cell = 1/cell;
  species HGF_g in cell = 1/cell;
  species HGF_rna in cell = 1/cell;
  species HMGN1 in cell = 1/cell;
  species HMGN1_g in cell = 1/cell;
  species HMGN1_p in cell = 1/cell;
  species HMGN1_rna in cell = 1/cell;
  species IKBKB in cell = 1/cell;
  species IKBKB_g in cell = 1/cell;
  species IKBKB_p in cell = 1/cell;
  species IKBKB_rna in cell = 1/cell;
  species IL6 in cell = 1/cell;
  species IL6_g in cell = 1/cell;
  species IL6_rna in cell = 1/cell;
  species INSR in cell = 1/cell;
  species INSR_g in cell = 1/cell;
  species INSR_p in cell = 1/cell;
  species INSR_rna in cell = 1/cell;
  species IRS1 in cell = 1/cell;
  species IRS1_g in cell = 1/cell;
  species IRS1_p in cell = 1/cell;
  species IRS1_rna in cell = 1/cell;
  species JUN in cell = 1/cell;
  species JUNB in cell = 1/cell;
  species JUNB_g in cell = 1/cell;
  species JUNB_p in cell = 1/cell;
  species JUNB_rna in cell = 1/cell;
  species JUN_g in cell = 1/cell;
  species JUN_p in cell = 1/cell;
  species JUN_rna in cell = 1/cell;
  species KDR in cell = 1/cell;
  species KDR_g in cell = 1/cell;
  species KDR_p in cell = 1/cell;
  species KDR_rna in cell = 1/cell;
  species KIT in cell = 1/cell;
  species KIT_g in cell = 1/cell;
  species KIT_p in cell = 1/cell;
  species KIT_rna in cell = 1/cell;
  species KLF9 in cell = 1/cell;
  species KLF9_g in cell = 1/cell;
  species KLF9_rna in cell = 1/cell;
  species LDLR in cell = 1/cell;
  species LDLR_g in cell = 1/cell;
  species LDLR_rna in cell = 1/cell;
  species LEPR in cell = 1/cell;
  species LEPR_g in cell = 1/cell;
  species LEPR_rna in cell = 1/cell;
  species LYN in cell = 1/cell;
  species LYN_g in cell = 1/cell;
  species LYN_p in cell = 1/cell;
  species LYN_rna in cell = 1/cell;
  species MAPK1 in cell = 1/cell;
  species MAPK12 in cell = 1/cell;
  species MAPK12_g in cell = 1/cell;
  species MAPK12_p in cell = 1/cell;
  species MAPK12_rna in cell = 1/cell;
  species MAPK1_g in cell = 1/cell;
  species MAPK1_p in cell = 1/cell;
  species MAPK1_rna in cell = 1/cell;
  species MAPK8 in cell = 1/cell;
  species MAPK8_g in cell = 1/cell;
  species MAPK8_p in cell = 1/cell;
  species MAPK8_rna in cell = 1/cell;
  species MAPK9 in cell = 1/cell;
  species MAPK9_g in cell = 1/cell;
  species MAPK9_p in cell = 1/cell;
  species MAPK9_rna in cell = 1/cell;
  species MDM2 in cell = 1/cell;
  species MDM2_g in cell = 1/cell;
  species MDM2_p in cell = 1/cell;
  species MDM2_rna in cell = 1/cell;
  species MECP2 in cell = 1/cell;
  species MECP2_g in cell = 1/cell;
  species MECP2_rna in cell = 1/cell;
  species MYLIP in cell = 1/cell;
  species MYLIP_g in cell = 1/cell;
  species MYLIP_rna in cell = 1/cell;
  species NFE2L2 in cell = 1/cell;
  species NFE2L2_g in cell = 1/cell;
  species NFE2L2_p in cell = 1/cell;
  species NFE2L2_rna in cell = 1/cell;
  species NOS2 in cell = 1/cell;
  species NOS2_g in cell = 1/cell;
  species NOS2_rna in cell = 1/cell;
  species NOS3 in cell = 1/cell;
  species NOS3_g in cell = 1/cell;
  species NOS3_p in cell = 1/cell;
  species NOS3_rna in cell = 1/cell;
  species NOTCH1 in cell = 1/cell;
  species NOTCH1_g in cell = 1/cell;
  species NOTCH1_rna in cell = 1/cell;
  species NR3C1 in cell = 1/cell;
  species NR3C1_g in cell = 1/cell;
  species NR3C1_p in cell = 1/cell;
  species NR3C1_rna in cell = 1/cell;
  species NR3C2 in cell = 1/cell;
  species NR3C2_g in cell = 1/cell;
  species NR3C2_p in cell = 1/cell;
  species NR3C2_rna in cell = 1/cell;
  species NR4A1 in cell = 1/cell;
  species NR4A1_g in cell = 1/cell;
  species NR4A1_p in cell = 1/cell;
  species NR4A1_rna in cell = 1/cell;
  species OCLN in cell = 1/cell;
  species OCLN_g in cell = 1/cell;
  species OCLN_p in cell = 1/cell;
  species OCLN_rna in cell = 1/cell;
  species PIK3R1 in cell = 1/cell;
  species PIK3R1_g in cell = 1/cell;
  species PIK3R1_p in cell = 1/cell;
  species PIK3R1_rna in cell = 1/cell;
  species PINK1 in cell = 1/cell;
  species PINK1_g in cell = 1/cell;
  species PINK1_rna in cell = 1/cell;
  species PKM in cell = 1/cell;
  species PKM_g in cell = 1/cell;
  species PKM_p in cell = 1/cell;
  species PKM_rna in cell = 1/cell;
  species PKN1 in cell = 1/cell;
  species PKN1_g in cell = 1/cell;
  species PKN1_p in cell = 1/cell;
  species PKN1_rna in cell = 1/cell;
  species PLK2 in cell = 1/cell;
  species PLK2_g in cell = 1/cell;
  species PLK2_rna in cell = 1/cell;
  species PPARA in cell = 1/cell;
  species PPARA_g in cell = 1/cell;
  species PPARA_p in cell = 1/cell;
  species PPARA_rna in cell = 1/cell;
  species PRKAA1 in cell = 1/cell;
  species PRKAA1_g in cell = 1/cell;
  species PRKAA1_p in cell = 1/cell;
  species PRKAA1_rna in cell = 1/cell;
  species PRKCA in cell = 1/cell;
  species PRKCA_g in cell = 1/cell;
  species PRKCA_p in cell = 1/cell;
  species PRKCA_rna in cell = 1/cell;
  species PRKCZ in cell = 1/cell;
  species PRKCZ_g in cell = 1/cell;
  species PRKCZ_p in cell = 1/cell;
  species PRKCZ_rna in cell = 1/cell;
  species PTEN in cell = 1/cell;
  species PTEN_g in cell = 1/cell;
  species PTEN_p in cell = 1/cell;
  species PTEN_rna in cell = 1/cell;
  species PTPRB in cell = 1/cell;
  species PTPRB_g in cell = 1/cell;
  species PTPRB_rna in cell = 1/cell;
  species PTPRJ in cell = 1/cell;
  species PTPRJ_g in cell = 1/cell;
  species PTPRJ_rna in cell = 1/cell;
  species RCAN1 in cell = 1/cell;
  species RCAN1_g in cell = 1/cell;
  species RCAN1_p in cell = 1/cell;
  species RCAN1_rna in cell = 1/cell;
  species RELA in cell = 1/cell;
  species RELA_g in cell = 1/cell;
  species RELA_p in cell = 1/cell;
  species RELA_rna in cell = 1/cell;
  species RNF7 in cell = 1/cell;
  species RNF7_g in cell = 1/cell;
  species RNF7_rna in cell = 1/cell;
  species RORA in cell = 1/cell;
  species RORA_g in cell = 1/cell;
  species RORA_p in cell = 1/cell;
  species RORA_rna in cell = 1/cell;
  species RPS6KA3 in cell = 1/cell;
  species RPS6KA3_g in cell = 1/cell;
  species RPS6KA3_p in cell = 1/cell;
  species RPS6KA3_rna in cell = 1/cell;
  species SLC2A1 in cell = 1/cell;
  species SLC2A1_g in cell = 1/cell;
  species SLC2A1_rna in cell = 1/cell;
  species SMAD1 in cell = 1/cell;
  species SMAD1_g in cell = 1/cell;
  species SMAD1_p in cell = 1/cell;
  species SMAD1_rna in cell = 1/cell;
  species SMAD2 in cell = 1/cell;
  species SMAD2_g in cell = 1/cell;
  species SMAD2_p in cell = 1/cell;
  species SMAD2_rna in cell = 1/cell;
  species SMAD3 in cell = 1/cell;
  species SMAD3_g in cell = 1/cell;
  species SMAD3_p in cell = 1/cell;
  species SMAD3_rna in cell = 1/cell;
  species SMAD4 in cell = 1/cell;
  species SMAD4_g in cell = 1/cell;
  species SMAD4_p in cell = 1/cell;
  species SMAD4_rna in cell = 1/cell;
  species SMAD7 in cell = 1/cell;
  species SMAD7_g in cell = 1/cell;
  species SMAD7_rna in cell = 1/cell;
  species SNAI1 in cell = 1/cell;
  species SNAI1_g in cell = 1/cell;
  species SNAI1_p in cell = 1/cell;
  species SNAI1_rna in cell = 1/cell;
  species SOCS1 in cell = 1/cell;
  species SOCS1_g in cell = 1/cell;
  species SOCS1_p in cell = 1/cell;
  species SOCS1_rna in cell = 1/cell;
  species SOCS2 in cell = 1/cell;
  species SOCS2_g in cell = 1/cell;
  species SOCS2_rna in cell = 1/cell;
  species SOCS3 in cell = 1/cell;
  species SOCS3_g in cell = 1/cell;
  species SOCS3_rna in cell = 1/cell;
  species SOD1 in cell = 1/cell;
  species SOD1_g in cell = 1/cell;
  species SOD1_rna in cell = 1/cell;
  species SP1 in cell = 1/cell;
  species SP1_g in cell = 1/cell;
  species SP1_p in cell = 1/cell;
  species SP1_rna in cell = 1/cell;
  species SREBF1 in cell = 1/cell;
  species SREBF1_g in cell = 1/cell;
  species SREBF1_p in cell = 1/cell;
  species SREBF1_rna in cell = 1/cell;
  species STAT1 in cell = 1/cell;
  species STAT1_g in cell = 1/cell;
  species STAT1_p in cell = 1/cell;
  species STAT1_rna in cell = 1/cell;
  species STAT3 in cell = 1/cell;
  species STAT3_g in cell = 1/cell;
  species STAT3_p in cell = 1/cell;
  species STAT3_rna in cell = 1/cell;
  species STAT5A in cell = 1/cell;
  species STAT5A_g in cell = 1/cell;
  species STAT5A_p in cell = 1/cell;
  species STAT5A_rna in cell = 1/cell;
  species STAT6 in cell = 1/cell;
  species STAT6_g in cell = 1/cell;
  species STAT6_p in cell = 1/cell;
  species STAT6_rna in cell = 1/cell;
  species STK11 in cell = 1/cell;
  species STK11_g in cell = 1/cell;
  species STK11_p in cell = 1/cell;
  species STK11_rna in cell = 1/cell;
  species SYVN1 in cell = 1/cell;
  species SYVN1_g in cell = 1/cell;
  species SYVN1_rna in cell = 1/cell;
  species TFEB in cell = 1/cell;
  species TFEB_g in cell = 1/cell;
  species TFEB_p in cell = 1/cell;
  species TFEB_rna in cell = 1/cell;
  species TGFB1 in cell = 1/cell;
  species TGFB1_g in cell = 1/cell;
  species TGFB1_rna in cell = 1/cell;
  species TGFB2 in cell = 1/cell;
  species TGFB2_g in cell = 1/cell;
  species TGFB2_rna in cell = 1/cell;
  species TGFBR1 in cell = 1/cell;
  species TGFBR1_g in cell = 1/cell;
  species TGFBR1_rna in cell = 1/cell;
  species TLR3 in cell = 1/cell;
  species TLR3_g in cell = 1/cell;
  species TLR3_p in cell = 1/cell;
  species TLR3_rna in cell = 1/cell;
  species TLR4 in cell = 1/cell;
  species TLR4_g in cell = 1/cell;
  species TLR4_rna in cell = 1/cell;
  species TNC in cell = 1/cell;
  species TNC_g in cell = 1/cell;
  species TNC_rna in cell = 1/cell;
  species TP53 in cell = 1/cell;
  species TP53_g in cell = 1/cell;
  species TP53_p in cell = 1/cell;
  species TP53_rna in cell = 1/cell;
  species TRIM23 in cell = 1/cell;
  species TRIM23_g in cell = 1/cell;
  species TRIM23_p in cell = 1/cell;
  species TRIM23_rna in cell = 1/cell;
  species TXNIP in cell = 1/cell;
  species TXNIP_g in cell = 1/cell;
  species TXNIP_p in cell = 1/cell;
  species TXNIP_rna in cell = 1/cell;
  species UBC in cell = 1/cell;
  species UBC_g in cell = 1/cell;
  species UBC_p in cell = 1/cell;
  species UBC_rna in cell = 1/cell;
  species VCAN in cell = 1/cell;
  species VCAN_g in cell = 1/cell;
  species VCAN_rna in cell = 1/cell;
  species VIM in cell = 1/cell;
  species VIM_g in cell = 1/cell;
  species VIM_p in cell = 1/cell;
  species VIM_rna in cell = 1/cell;
  species YAP1 in cell = 1/cell;
  species YAP1_g in cell = 1/cell;
  species YAP1_p in cell = 1/cell;
  species YAP1_rna in cell = 1/cell;
  species ZFP36 in cell = 1/cell;
  species ZFP36_g in cell = 1/cell;
  species ZFP36_p in cell = 1/cell;
  species ZFP36_rna in cell = 1/cell;

  // Reactions:
  // V(1) = K(1,1) * [SMAD2_p] * [SMAD4_p] -K(1,2) * [SIGNOR-C8];
  R1: SMAD2_p => SMAD4_p; 1;
  // V(2) = K(2,1) * [SMAD4_p] * [SMAD3_p] -K(2,2) * [SIGNOR-C9];
  R2: SMAD4_p => SMAD3_p; 1;
  // V(3) = K(3,1) * [SMAD4_p] * [JUN_p] -K(3,2) * [SIGNOR-C10];
  R3: JUN_p => SMAD4_p; 1;
  // V(4) = K(4,1) * [STAT3_p] * [SP1_p] -K(4,2) * [SIGNOR-C74];
  R4: STAT3_p => SP1_p; 1;
  // V(5) = K(5,1) * [NR3C1] * [STAT5A_p] -K(5,2) * [SIGNOR-C84];
  R5: STAT5A_p => NR3C1; 1;
  // V(6) = K(6,1) * [SMAD4_p] * [SMAD1] * [SMAD1] -K(6,2) * [SIGNOR-C85];
  R6: SMAD1 => SMAD4_p; 1;
  // V(7) = K(7,1) * [JUN_p] * [SMAD3_p] -K(7,2) * [SIGNOR-C86];
  R7: JUN_p => SMAD3_p; 1;
  // V(8) = K(8,1) * [STAT1_p] * [STAT3_p] -K(8,2) * [SIGNOR-C118];
  R8: STAT3_p => STAT1_p; 1;
  // V(9) = K(9,1) * [FOS_p] * [JUN_p] * [JUN_p] * [FOS_p] * [JUN_p] * [FOS_p] * [FOS_p] * [JUN_p] -K(9,2) * [SIGNOR-C154];
  R9: JUN_p => FOS_p; 1;
  // V(10) = K(10,1) * [TGFBR1] * [SMAD2] -K(10,2) * [TGFBR1 |SMAD2];
  R10: TGFBR1 => SMAD2; 1;
  // V(11) = K(11,1) * [TGFBR1 |SMAD2];
  R11: TGFBR1 => SMAD2; 1;
  // V(12) = K(12,1) * [MAPK1_p] * [EP300] -K(12,2) * [MAPK1_p |EP300];
  R12: EP300 => MAPK1_p; 1;
  // V(13) = K(13,1) * [MAPK1_p |EP300];
  R13: EP300 => MAPK1_p; 1;
  // V(14) = K(14,1) * [MAPK1_p] * [NR3C1] -K(14,2) * [MAPK1_p |NR3C1];
  R14: NR3C1 => MAPK1_p; 1;
  // V(15) = K(15,1) * [MAPK1_p |NR3C1];
  R15: NR3C1 => MAPK1_p; 1;
  // V(16) = K(16,1) * [MAPK1_p] * [RPS6KA3] -K(16,2) * [MAPK1_p |RPS6KA3];
  R16: RPS6KA3 => MAPK1_p; 1;
  // V(17) = K(17,1) * [MAPK1_p |RPS6KA3];
  R17: RPS6KA3 => MAPK1_p; 1;
  // V(18) = K(18,1) * [PRKCA_p] * [CTNNB1] -K(18,2) * [PRKCA_p |CTNNB1];
  R18: CTNNB1 => PRKCA_p; 1;
  // V(19) = K(19,1) * [PRKCA_p |CTNNB1];
  R19: CTNNB1 => PRKCA_p; 1;
  // V(20) = K(20,1) * [MAPK1_p] * [SMAD1] -K(20,2) * [MAPK1_p |SMAD1];
  R20: SMAD1 => MAPK1_p; 1;
  // V(21) = K(21,1) * [MAPK1_p |SMAD1];
  R21: SMAD1 => MAPK1_p; 1;
  // V(22) = K(22,1) * [PRKCZ_p] * [SP1] -K(22,2) * [PRKCZ_p |SP1];
  R22: SP1 => PRKCZ_p; 1;
  // V(23) = K(23,1) * [PRKCZ_p |SP1];
  R23: SP1 => PRKCZ_p; 1;
  // V(24) = K(24,1) * [PRKCZ_p] * [SNAI1] -K(24,2) * [PRKCZ_p |SNAI1];
  R24: SNAI1 => PRKCZ_p; 1;
  // V(25) = K(25,1) * [PRKCZ_p |SNAI1];
  R25: SNAI1 => PRKCZ_p; 1;
  // V(26) = K(26,1) * [EGFR_p] * [EGFR] -K(26,2) * [EGFR_p |EGFR];
  R26: EGFR_p => EGFR; 1;
  // V(27) = K(27,1) * [EGFR_p |EGFR];
  R27: EGFR_p => EGFR; 1;
  // V(28) = K(28,1) * [IKBKB_p] * [IKBKB] -K(28,2) * [IKBKB_p |IKBKB];
  R28: IKBKB => IKBKB_p; 1;
  // V(29) = K(29,1) * [IKBKB_p |IKBKB];
  R29: IKBKB => IKBKB_p; 1;
  // V(30) = K(30,1) * [PRKCA_p] * [VIM] -K(30,2) * [PRKCA_p |VIM];
  R30: PRKCA_p => VIM; 1;
  // V(31) = K(31,1) * [PRKCA_p |VIM];
  R31: PRKCA_p => VIM; 1;
  // V(32) = K(32,1) * [MAPK1_p] * [SMAD4] -K(32,2) * [MAPK1_p |SMAD4];
  R32: SMAD4 => MAPK1_p; 1;
  // V(33) = K(33,1) * [MAPK1_p |SMAD4];
  R33: SMAD4 => MAPK1_p; 1;
  // V(34) = K(34,1) * [MAPK1_p] * [STK11] -K(34,2) * [MAPK1_p |STK11];
  R34: STK11 => MAPK1_p; 1;
  // V(35) = K(35,1) * [MAPK1_p |STK11];
  R35: STK11 => MAPK1_p; 1;
  // V(36) = K(36,1) * [MAPK1_p] * [JUN] -K(36,2) * [MAPK1_p |JUN];
  R36: JUN => MAPK1_p; 1;
  // V(37) = K(37,1) * [MAPK1_p |JUN];
  R37: JUN => MAPK1_p; 1;
  // V(38) = K(38,1) * [MAPK8_p] * [IRS1] -K(38,2) * [MAPK8_p |IRS1];
  R38: MAPK8_p => IRS1; 1;
  // V(39) = K(39,1) * [MAPK8_p |IRS1];
  R39: MAPK8_p => IRS1; 1;
  // V(40) = K(40,1) * [MAPK1_p] * [FOS] -K(40,2) * [MAPK1_p |FOS];
  R40: FOS => MAPK1_p; 1;
  // V(41) = K(41,1) * [MAPK1_p |FOS];
  R41: FOS => MAPK1_p; 1;
  // V(42) = K(42,1) * [PRKCA_p] * [EGFR] -K(42,2) * [PRKCA_p |EGFR];
  R42: EGFR => PRKCA_p; 1;
  // V(43) = K(43,1) * [PRKCA_p |EGFR];
  R43: EGFR => PRKCA_p; 1;
  // V(44) = K(44,1) * [STK11_p] * [STK11] -K(44,2) * [STK11_p |STK11];
  R44: STK11_p => STK11; 1;
  // V(45) = K(45,1) * [STK11_p |STK11];
  R45: STK11_p => STK11; 1;
  // V(46) = K(46,1) * [KDR_p] * [KDR] -K(46,2) * [KDR_p |KDR];
  R46: KDR => KDR_p; 1;
  // V(47) = K(47,1) * [KDR_p |KDR];
  R47: KDR => KDR_p; 1;
  // V(48) = K(48,1) * [MAPK8_p] * [BCL2] -K(48,2) * [MAPK8_p |BCL2];
  R48: MAPK8_p => BCL2; 1;
  // V(49) = K(49,1) * [MAPK8_p |BCL2];
  R49: MAPK8_p => BCL2; 1;
  // V(50) = K(50,1) * [MAPK9_p] * [TP53] -K(50,2) * [MAPK9_p |TP53];
  R50: TP53 => MAPK9_p; 1;
  // V(51) = K(51,1) * [MAPK9_p |TP53];
  R51: TP53 => MAPK9_p; 1;
  // V(52) = K(52,1) * [MAPK1_p] * [SMAD2] -K(52,2) * [MAPK1_p |SMAD2];
  R52: SMAD2 => MAPK1_p; 1;
  // V(53) = K(53,1) * [MAPK1_p |SMAD2];
  R53: SMAD2 => MAPK1_p; 1;
  // V(54) = K(54,1) * [KIT_p] * [CTNNB1] -K(54,2) * [KIT_p |CTNNB1];
  R54: CTNNB1 => KIT_p; 1;
  // V(55) = K(55,1) * [KIT_p |CTNNB1];
  R55: CTNNB1 => KIT_p; 1;
  // V(56) = K(56,1) * [MAPK1_p] * [RORA] -K(56,2) * [MAPK1_p |RORA];
  R56: RORA => MAPK1_p; 1;
  // V(57) = K(57,1) * [MAPK1_p |RORA];
  R57: RORA => MAPK1_p; 1;
  // V(58) = K(58,1) * [MAPK9_p] * [JUN] -K(58,2) * [MAPK9_p |JUN];
  R58: JUN => MAPK9_p; 1;
  // V(59) = K(59,1) * [MAPK9_p |JUN];
  R59: JUN => MAPK9_p; 1;
  // V(60) = K(60,1) * [MAPK1_p] * [BCL2] -K(60,2) * [MAPK1_p |BCL2];
  R60: BCL2 => MAPK1_p; 1;
  // V(61) = K(61,1) * [MAPK1_p |BCL2];
  R61: BCL2 => MAPK1_p; 1;
  // V(62) = K(62,1) * [INSR_p] * [INSR] -K(62,2) * [INSR_p |INSR];
  R62: INSR_p => INSR; 1;
  // V(63) = K(63,1) * [INSR_p |INSR];
  R63: INSR_p => INSR; 1;
  // V(64) = K(64,1) * [MAPK1_p] * [GJA1] -K(64,2) * [MAPK1_p |GJA1];
  R64: GJA1 => MAPK1_p; 1;
  // V(65) = K(65,1) * [MAPK1_p |GJA1];
  R65: GJA1 => MAPK1_p; 1;
  // V(66) = K(66,1) * [INSR_p] * [IRS1] -K(66,2) * [INSR_p |IRS1];
  R66: IRS1 => INSR_p; 1;
  // V(67) = K(67,1) * [INSR_p |IRS1];
  R67: IRS1 => INSR_p; 1;
  // V(68) = K(68,1) * [MAPK1_p] * [SREBF1] -K(68,2) * [MAPK1_p |SREBF1];
  R68: SREBF1 => MAPK1_p; 1;
  // V(69) = K(69,1) * [MAPK1_p |SREBF1];
  R69: SREBF1 => MAPK1_p; 1;
  // V(70) = K(70,1) * [MAPK1_p] * [DUSP1] -K(70,2) * [MAPK1_p |DUSP1];
  R70: DUSP1 => MAPK1_p; 1;
  // V(71) = K(71,1) * [MAPK1_p |DUSP1];
  R71: DUSP1 => MAPK1_p; 1;
  // V(72) = K(72,1) * [MAPK1_p] * [NR3C2] -K(72,2) * [MAPK1_p |NR3C2];
  R72: NR3C2 => MAPK1_p; 1;
  // V(73) = K(73,1) * [MAPK1_p |NR3C2];
  R73: NR3C2 => MAPK1_p; 1;
  // V(74) = K(74,1) * [RPS6KA3_p] * [HMGN1] -K(74,2) * [RPS6KA3_p |HMGN1];
  R74: HMGN1 => RPS6KA3_p; 1;
  // V(75) = K(75,1) * [RPS6KA3_p |HMGN1];
  R75: HMGN1 => RPS6KA3_p; 1;
  // V(76) = K(76,1) * [PKN1_p] * [PKN1] -K(76,2) * [PKN1_p |PKN1];
  R76: PKN1 => PKN1_p; 1;
  // V(77) = K(77,1) * [PKN1_p |PKN1];
  R77: PKN1 => PKN1_p; 1;
  // V(78) = K(78,1) * [PRKAA1_p] * [SNAI1] -K(78,2) * [PRKAA1_p |SNAI1];
  R78: SNAI1 => PRKAA1_p; 1;
  // V(79) = K(79,1) * [PRKAA1_p |SNAI1];
  R79: SNAI1 => PRKAA1_p; 1;
  // V(80) = K(80,1) * [IKBKB_p] * [IRS1] -K(80,2) * [IKBKB_p |IRS1];
  R80: IRS1 => IKBKB_p; 1;
  // V(81) = K(81,1) * [IKBKB_p |IRS1];
  R81: IRS1 => IKBKB_p; 1;
  // V(82) = K(82,1) * [MAPK8_p] * [MAPK9] -K(82,2) * [MAPK8_p |MAPK9];
  R82: MAPK8_p => MAPK9; 1;
  // V(83) = K(83,1) * [MAPK8_p |MAPK9];
  R83: MAPK8_p => MAPK9; 1;
  // V(84) = K(84,1) * [MAPK8_p] * [TP53] -K(84,2) * [MAPK8_p |TP53];
  R84: TP53 => MAPK8_p; 1;
  // V(85) = K(85,1) * [MAPK8_p |TP53];
  R85: TP53 => MAPK8_p; 1;
  // V(86) = K(86,1) * [MAPK9_p] * [IRS1] -K(86,2) * [MAPK9_p |IRS1];
  R86: IRS1 => MAPK9_p; 1;
  // V(87) = K(87,1) * [MAPK9_p |IRS1];
  R87: IRS1 => MAPK9_p; 1;
  // V(88) = K(88,1) * [KIT_p] * [KIT] -K(88,2) * [KIT_p |KIT];
  R88: KIT => KIT_p; 1;
  // V(89) = K(89,1) * [KIT_p |KIT];
  R89: KIT => KIT_p; 1;
  // V(90) = K(90,1) * [EGFR_p] * [CALM1] -K(90,2) * [EGFR_p |CALM1];
  R90: EGFR_p => CALM1; 1;
  // V(91) = K(91,1) * [EGFR_p |CALM1];
  R91: EGFR_p => CALM1; 1;
  // V(92) = K(92,1) * [MAPK8_p] * [NR3C1] -K(92,2) * [MAPK8_p |NR3C1];
  R92: MAPK8_p => NR3C1; 1;
  // V(93) = K(93,1) * [MAPK8_p |NR3C1];
  R93: MAPK8_p => NR3C1; 1;
  // V(94) = K(94,1) * [PRKCA_p] * [PRKCA] -K(94,2) * [PRKCA_p |PRKCA];
  R94: PRKCA => PRKCA_p; 1;
  // V(95) = K(95,1) * [PRKCA_p |PRKCA];
  R95: PRKCA => PRKCA_p; 1;
  // V(96) = K(96,1) * [MAPK1_p] * [SMAD3] -K(96,2) * [MAPK1_p |SMAD3];
  R96: SMAD3 => MAPK1_p; 1;
  // V(97) = K(97,1) * [MAPK1_p |SMAD3];
  R97: SMAD3 => MAPK1_p; 1;
  // V(98) = K(98,1) * [MAPK1_p] * [TFEB] -K(98,2) * [MAPK1_p |TFEB];
  R98: TFEB => MAPK1_p; 1;
  // V(99) = K(99,1) * [MAPK1_p |TFEB];
  R99: TFEB => MAPK1_p; 1;
  // V(100) = K(100,1) * [PRKCA_p] * [HMGN1] -K(100,2) * [PRKCA_p |HMGN1];
  R100: HMGN1 => PRKCA_p; 1;
  // V(101) = K(101,1) * [PRKCA_p |HMGN1];
  R101: HMGN1 => PRKCA_p; 1;
  // V(102) = K(102,1) * [INSR_p] * [CALM1] -K(102,2) * [INSR_p |CALM1];
  R102: INSR_p => CALM1; 1;
  // V(103) = K(103,1) * [INSR_p |CALM1];
  R103: INSR_p => CALM1; 1;
  // V(104) = K(104,1) * [PRKCA_p] * [CDKN1A] -K(104,2) * [PRKCA_p |CDKN1A];
  R104: PRKCA_p => CDKN1A; 1;
  // V(105) = K(105,1) * [PRKCA_p |CDKN1A];
  R105: PRKCA_p => CDKN1A; 1;
  // V(106) = K(106,1) * [PRKCA_p] * [GJA1] -K(106,2) * [PRKCA_p |GJA1];
  R106: GJA1 => PRKCA_p; 1;
  // V(107) = K(107,1) * [PRKCA_p |GJA1];
  R107: GJA1 => PRKCA_p; 1;
  // V(108) = K(108,1) * [RPS6KA3_p] * [DEPTOR] -K(108,2) * [RPS6KA3_p |DEPTOR];
  R108: DEPTOR => RPS6KA3_p; 1;
  // V(109) = K(109,1) * [RPS6KA3_p |DEPTOR];
  R109: DEPTOR => RPS6KA3_p; 1;
  // V(110) = K(110,1) * [PRKCA_p] * [KIT] -K(110,2) * [PRKCA_p |KIT];
  R110: PRKCA_p => KIT; 1;
  // V(111) = K(111,1) * [PRKCA_p |KIT];
  R111: PRKCA_p => KIT; 1;
  // V(112) = K(112,1) * [PRKCZ_p] * [IRS1] -K(112,2) * [PRKCZ_p |IRS1];
  R112: IRS1 => PRKCZ_p; 1;
  // V(113) = K(113,1) * [PRKCZ_p |IRS1];
  R113: IRS1 => PRKCZ_p; 1;
  // V(114) = K(114,1) * [ATR] * [MDM2] -K(114,2) * [ATR |MDM2];
  R114: ATR => MDM2; 1;
  // V(115) = K(115,1) * [ATR |MDM2];
  R115: ATR => MDM2; 1;
  // V(116) = K(116,1) * [PRKCZ_p] * [YAP1] -K(116,2) * [PRKCZ_p |YAP1];
  R116: YAP1 => PRKCZ_p; 1;
  // V(117) = K(117,1) * [PRKCZ_p |YAP1];
  R117: YAP1 => PRKCZ_p; 1;
  // V(118) = K(118,1) * [MAPK1_p] * [SIGNOR-C154] -K(118,2) * [MAPK1_p |SIGNOR-C154];
  R118: MAPK1_p => ; 1;
  // V(119) = K(119,1) * [MAPK1_p |SIGNOR-C154];
  R119: MAPK1_p => ; 1;
  // V(120) = K(120,1) * [MAPK8_p] * [CTNNB1] -K(120,2) * [MAPK8_p |CTNNB1];
  R120: MAPK8_p => CTNNB1; 1;
  // V(121) = K(121,1) * [MAPK8_p |CTNNB1];
  R121: MAPK8_p => CTNNB1; 1;
  // V(122) = K(122,1) * [PINK1] * [UBC] -K(122,2) * [PINK1 |UBC];
  R122: PINK1 => UBC; 1;
  // V(123) = K(123,1) * [PINK1 |UBC];
  R123: PINK1 => UBC; 1;
  // V(124) = K(124,1) * [MAPK1_p] * [PPARA] -K(124,2) * [MAPK1_p |PPARA];
  R124: PPARA => MAPK1_p; 1;
  // V(125) = K(125,1) * [MAPK1_p |PPARA];
  R125: PPARA => MAPK1_p; 1;
  // V(126) = K(126,1) * [PRKCZ_p] * [VIM] -K(126,2) * [PRKCZ_p |VIM];
  R126: PRKCZ_p => VIM; 1;
  // V(127) = K(127,1) * [PRKCZ_p |VIM];
  R127: PRKCZ_p => VIM; 1;
  // V(128) = K(128,1) * [STK11_p] * [PTEN] -K(128,2) * [STK11_p |PTEN];
  R128: PTEN => STK11_p; 1;
  // V(129) = K(129,1) * [STK11_p |PTEN];
  R129: PTEN => STK11_p; 1;
  // V(130) = K(130,1) * [RPS6KA3_p] * [CREB1] -K(130,2) * [RPS6KA3_p |CREB1];
  R130: RPS6KA3_p => CREB1; 1;
  // V(131) = K(131,1) * [RPS6KA3_p |CREB1];
  R131: RPS6KA3_p => CREB1; 1;
  // V(132) = K(132,1) * [PRKAA1_p] * [NOS3] -K(132,2) * [PRKAA1_p |NOS3];
  R132: PRKAA1_p => NOS3; 1;
  // V(133) = K(133,1) * [PRKAA1_p |NOS3];
  R133: PRKAA1_p => NOS3; 1;
  // V(134) = K(134,1) * [MAPK8_p] * [PKM] -K(134,2) * [MAPK8_p |PKM];
  R134: PKM => MAPK8_p; 1;
  // V(135) = K(135,1) * [MAPK8_p |PKM];
  R135: PKM => MAPK8_p; 1;
  // V(136) = K(136,1) * [PRKCA_p] * [PRKAA1] -K(136,2) * [PRKCA_p |PRKAA1];
  R136: PRKAA1 => PRKCA_p; 1;
  // V(137) = K(137,1) * [PRKCA_p |PRKAA1];
  R137: PRKAA1 => PRKCA_p; 1;
  // V(138) = K(138,1) * [MAPK1_p] * [EGFR] -K(138,2) * [MAPK1_p |EGFR];
  R138: EGFR => MAPK1_p; 1;
  // V(139) = K(139,1) * [MAPK1_p |EGFR];
  R139: EGFR => MAPK1_p; 1;
  // V(140) = K(140,1) * [MAPK8_p] * [STAT6] -K(140,2) * [MAPK8_p |STAT6];
  R140: STAT6 => MAPK8_p; 1;
  // V(141) = K(141,1) * [MAPK8_p |STAT6];
  R141: STAT6 => MAPK8_p; 1;
  // V(142) = K(142,1) * [PRKCA_p] * [INSR] -K(142,2) * [PRKCA_p |INSR];
  R142: PRKCA_p => INSR; 1;
  // V(143) = K(143,1) * [PRKCA_p |INSR];
  R143: PRKCA_p => INSR; 1;
  // V(144) = K(144,1) * [PRKCZ_p] * [PRKCZ] -K(144,2) * [PRKCZ_p |PRKCZ];
  R144: PRKCZ_p => PRKCZ; 1;
  // V(145) = K(145,1) * [PRKCZ_p |PRKCZ];
  R145: PRKCZ_p => PRKCZ; 1;
  // V(146) = K(146,1) * [MAPK1_p] * [SP1] -K(146,2) * [MAPK1_p |SP1];
  R146: SP1 => MAPK1_p; 1;
  // V(147) = K(147,1) * [MAPK1_p |SP1];
  R147: SP1 => MAPK1_p; 1;
  // V(148) = K(148,1) * [MAPK8_p] * [CDKN1A] -K(148,2) * [MAPK8_p |CDKN1A];
  R148: MAPK8_p => CDKN1A; 1;
  // V(149) = K(149,1) * [MAPK8_p |CDKN1A];
  R149: MAPK8_p => CDKN1A; 1;
  // V(150) = K(150,1) * [PRKCZ_p] * [STK11] -K(150,2) * [PRKCZ_p |STK11];
  R150: PRKCZ_p => STK11; 1;
  // V(151) = K(151,1) * [PRKCZ_p |STK11];
  R151: PRKCZ_p => STK11; 1;
  // V(152) = K(152,1) * [MAPK1_p] * [STAT5A] -K(152,2) * [MAPK1_p |STAT5A];
  R152: STAT5A => MAPK1_p; 1;
  // V(153) = K(153,1) * [MAPK1_p |STAT5A];
  R153: STAT5A => MAPK1_p; 1;
  // V(154) = K(154,1) * [MAPK1_p] * [CDKN1A] -K(154,2) * [MAPK1_p |CDKN1A];
  R154: CDKN1A => MAPK1_p; 1;
  // V(155) = K(155,1) * [MAPK1_p |CDKN1A];
  R155: CDKN1A => MAPK1_p; 1;
  // V(156) = K(156,1) * [MAPK8_p] * [JUN] -K(156,2) * [MAPK8_p |JUN];
  R156: MAPK8_p => JUN; 1;
  // V(157) = K(157,1) * [MAPK8_p |JUN];
  R157: MAPK8_p => JUN; 1;
  // V(158) = K(158,1) * [PRKCA_p] * [HES1] -K(158,2) * [PRKCA_p |HES1];
  R158: PRKCA_p => HES1; 1;
  // V(159) = K(159,1) * [PRKCA_p |HES1];
  R159: PRKCA_p => HES1; 1;
  // V(160) = K(160,1) * [MAPK8_p] * [YAP1] -K(160,2) * [MAPK8_p |YAP1];
  R160: MAPK8_p => YAP1; 1;
  // V(161) = K(161,1) * [MAPK8_p |YAP1];
  R161: MAPK8_p => YAP1; 1;
  // V(162) = K(162,1) * [STK11_p] * [SMAD4] -K(162,2) * [STK11_p |SMAD4];
  R162: SMAD4 => STK11_p; 1;
  // V(163) = K(163,1) * [STK11_p |SMAD4];
  R163: SMAD4 => STK11_p; 1;
  // V(164) = K(164,1) * [PRKCA_p] * [ANXA1] -K(164,2) * [PRKCA_p |ANXA1];
  R164: PRKCA_p => ANXA1; 1;
  // V(165) = K(165,1) * [PRKCA_p |ANXA1];
  R165: PRKCA_p => ANXA1; 1;
  // V(166) = K(166,1) * [MAPK8_p] * [SP1] -K(166,2) * [MAPK8_p |SP1];
  R166: MAPK8_p => SP1; 1;
  // V(167) = K(167,1) * [MAPK8_p |SP1];
  R167: MAPK8_p => SP1; 1;
  // V(168) = K(168,1) * [PLK2] * [TP53] -K(168,2) * [PLK2 |TP53];
  R168: TP53 => PLK2; 1;
  // V(169) = K(169,1) * [PLK2 |TP53];
  R169: TP53 => PLK2; 1;
  // V(170) = K(170,1) * [SMAD1] * [SMAD4] -K(170,2) * [SMAD1 |SMAD4];
  R170: SMAD4 => SMAD1; 1;
  // V(171) = K(171,1) * [SMAD1 |SMAD4];
  R171: SMAD4 => SMAD1; 1;
  // V(172) = K(172,1) * [RPS6KA3_p] * [FOS] -K(172,2) * [RPS6KA3_p |FOS];
  R172: RPS6KA3_p => FOS; 1;
  // V(173) = K(173,1) * [RPS6KA3_p |FOS];
  R173: RPS6KA3_p => FOS; 1;
  // V(174) = K(174,1) * [KIT_p] * [STAT1] -K(174,2) * [KIT_p |STAT1];
  R174: STAT1 => KIT_p; 1;
  // V(175) = K(175,1) * [KIT_p |STAT1];
  R175: STAT1 => KIT_p; 1;
  // V(176) = K(176,1) * [RPS6KA3_p] * [RPS6KA3] -K(176,2) * [RPS6KA3_p |RPS6KA3];
  R176: RPS6KA3_p => RPS6KA3; 1;
  // V(177) = K(177,1) * [RPS6KA3_p |RPS6KA3];
  R177: RPS6KA3_p => RPS6KA3; 1;
  // V(178) = K(178,1) * [PRKAA1_p] * [EP300] -K(178,2) * [PRKAA1_p |EP300];
  R178: PRKAA1_p => EP300; 1;
  // V(179) = K(179,1) * [PRKAA1_p |EP300];
  R179: PRKAA1_p => EP300; 1;
  // V(180) = K(180,1) * [MAPK1_p] * [IRS1] -K(180,2) * [MAPK1_p |IRS1];
  R180: IRS1 => MAPK1_p; 1;
  // V(181) = K(181,1) * [MAPK1_p |IRS1];
  R181: IRS1 => MAPK1_p; 1;
  // V(182) = K(182,1) * [PRKAA1_p] * [SREBF1] -K(182,2) * [PRKAA1_p |SREBF1];
  R182: SREBF1 => PRKAA1_p; 1;
  // V(183) = K(183,1) * [PRKAA1_p |SREBF1];
  R183: SREBF1 => PRKAA1_p; 1;
  // V(184) = K(184,1) * [MAPK8_p] * [JUNB] -K(184,2) * [MAPK8_p |JUNB];
  R184: MAPK8_p => JUNB; 1;
  // V(185) = K(185,1) * [MAPK8_p |JUNB];
  R185: MAPK8_p => JUNB; 1;
  // V(186) = K(186,1) * [RPS6KA3_p] * [NR4A1] -K(186,2) * [RPS6KA3_p |NR4A1];
  R186: NR4A1 => RPS6KA3_p; 1;
  // V(187) = K(187,1) * [RPS6KA3_p |NR4A1];
  R187: NR4A1 => RPS6KA3_p; 1;
  // V(188) = K(188,1) * [MAPK12_p] * [TP53] -K(188,2) * [MAPK12_p |TP53];
  R188: MAPK12_p => TP53; 1;
  // V(189) = K(189,1) * [MAPK12_p |TP53];
  R189: MAPK12_p => TP53; 1;
  // V(190) = K(190,1) * [STK11_p] * [YAP1] -K(190,2) * [STK11_p |YAP1];
  R190: YAP1 => STK11_p; 1;
  // V(191) = K(191,1) * [STK11_p |YAP1];
  R191: YAP1 => STK11_p; 1;
  // V(192) = K(192,1) * [MAPK1_p] * [MAPK1] -K(192,2) * [MAPK1_p |MAPK1];
  R192: MAPK1 => MAPK1_p; 1;
  // V(193) = K(193,1) * [MAPK1_p |MAPK1];
  R193: MAPK1 => MAPK1_p; 1;
  // V(194) = K(194,1) * [MAPK8_p] * [SMAD3] -K(194,2) * [MAPK8_p |SMAD3];
  R194: MAPK8_p => SMAD3; 1;
  // V(195) = K(195,1) * [MAPK8_p |SMAD3];
  R195: MAPK8_p => SMAD3; 1;
  // V(196) = K(196,1) * [PKN1_p] * [SNAI1] -K(196,2) * [PKN1_p |SNAI1];
  R196: SNAI1 => PKN1_p; 1;
  // V(197) = K(197,1) * [PKN1_p |SNAI1];
  R197: SNAI1 => PKN1_p; 1;
  // V(198) = K(198,1) * [LYN_p] * [LYN] -K(198,2) * [LYN_p |LYN];
  R198: LYN => LYN_p; 1;
  // V(199) = K(199,1) * [LYN_p |LYN];
  R199: LYN => LYN_p; 1;
  // V(200) = K(200,1) * [MAPK1_p] * [ZFP36] -K(200,2) * [MAPK1_p |ZFP36];
  R200: ZFP36 => MAPK1_p; 1;
  // V(201) = K(201,1) * [MAPK1_p |ZFP36];
  R201: ZFP36 => MAPK1_p; 1;
  // V(202) = K(202,1) * [MAPK1_p] * [RCAN1] -K(202,2) * [MAPK1_p |RCAN1];
  R202: RCAN1 => MAPK1_p; 1;
  // V(203) = K(203,1) * [MAPK1_p |RCAN1];
  R203: RCAN1 => MAPK1_p; 1;
  // V(204) = K(204,1) * [PKN1_p] * [EGFR] -K(204,2) * [PKN1_p |EGFR];
  R204: EGFR => PKN1_p; 1;
  // V(205) = K(205,1) * [PKN1_p |EGFR];
  R205: EGFR => PKN1_p; 1;
  // V(206) = K(206,1) * [PRKCZ_p] * [CTNNB1] -K(206,2) * [PRKCZ_p |CTNNB1];
  R206: CTNNB1 => PRKCZ_p; 1;
  // V(207) = K(207,1) * [PRKCZ_p |CTNNB1];
  R207: CTNNB1 => PRKCZ_p; 1;
  // V(208) = K(208,1) * [PRKCA_p] * [OCLN] -K(208,2) * [PRKCA_p |OCLN];
  R208: PRKCA_p => OCLN; 1;
  // V(209) = K(209,1) * [PRKCA_p |OCLN];
  R209: PRKCA_p => OCLN; 1;
  // V(210) = K(210,1) * [RPS6KA3_p] * [TP53] -K(210,2) * [RPS6KA3_p |TP53];
  R210: TP53 => RPS6KA3_p; 1;
  // V(211) = K(211,1) * [RPS6KA3_p |TP53];
  R211: TP53 => RPS6KA3_p; 1;
  // V(212) = K(212,1) * [MAPK8_p] * [SIGNOR-C154] -K(212,2) * [MAPK8_p |SIGNOR-C154];
  R212: MAPK8_p => ; 1;
  // V(213) = K(213,1) * [MAPK8_p |SIGNOR-C154];
  R213: MAPK8_p => ; 1;
  // V(214) = K(214,1) * [INSR_p] * [FABP4] -K(214,2) * [INSR_p |FABP4];
  R214: INSR_p => FABP4; 1;
  // V(215) = K(215,1) * [INSR_p |FABP4];
  R215: INSR_p => FABP4; 1;
  // V(216) = K(216,1) * [PKM_p] * [STAT3] -K(216,2) * [PKM_p |STAT3];
  R216: PKM_p => STAT3; 1;
  // V(217) = K(217,1) * [PKM_p |STAT3];
  R217: PKM_p => STAT3; 1;
  // V(218) = K(218,1) * [MAPK12_p] * [BCL2] -K(218,2) * [MAPK12_p |BCL2];
  R218: MAPK12_p => BCL2; 1;
  // V(219) = K(219,1) * [MAPK12_p |BCL2];
  R219: MAPK12_p => BCL2; 1;
  // V(220) = K(220,1) * [PINK1] * [TP53] -K(220,2) * [PINK1 |TP53];
  R220: TP53 => PINK1; 1;
  // V(221) = K(221,1) * [PINK1 |TP53];
  R221: TP53 => PINK1; 1;
  // V(222) = K(222,1) * [EGFR_p] * [STAT1] -K(222,2) * [EGFR_p |STAT1];
  R222: EGFR_p => STAT1; 1;
  // V(223) = K(223,1) * [EGFR_p |STAT1];
  R223: EGFR_p => STAT1; 1;
  // V(224) = K(224,1) * [INSR_p] * [PTEN] -K(224,2) * [INSR_p |PTEN];
  R224: PTEN => INSR_p; 1;
  // V(225) = K(225,1) * [INSR_p |PTEN];
  R225: PTEN => INSR_p; 1;
  // V(226) = K(226,1) * [STK11_p] * [TP53] -K(226,2) * [STK11_p |TP53];
  R226: TP53 => STK11_p; 1;
  // V(227) = K(227,1) * [STK11_p |TP53];
  R227: TP53 => STK11_p; 1;
  // V(228) = K(228,1) * [INSR_p] * [PIK3R1] -K(228,2) * [INSR_p |PIK3R1];
  R228: PIK3R1 => INSR_p; 1;
  // V(229) = K(229,1) * [INSR_p |PIK3R1];
  R229: PIK3R1 => INSR_p; 1;
  // V(230) = K(230,1) * [MAPK8_p] * [STAT3] -K(230,2) * [MAPK8_p |STAT3];
  R230: MAPK8_p => STAT3; 1;
  // V(231) = K(231,1) * [MAPK8_p |STAT3];
  R231: MAPK8_p => STAT3; 1;
  // V(232) = K(232,1) * [PRKCA_p] * [ADD3] -K(232,2) * [PRKCA_p |ADD3];
  R232: ADD3 => PRKCA_p; 1;
  // V(233) = K(233,1) * [PRKCA_p |ADD3];
  R233: ADD3 => PRKCA_p; 1;
  // V(234) = K(234,1) * [LYN_p] * [GLO1] -K(234,2) * [LYN_p |GLO1];
  R234: GLO1 => LYN_p; 1;
  // V(235) = K(235,1) * [LYN_p |GLO1];
  R235: GLO1 => LYN_p; 1;
  // V(236) = K(236,1) * [IKBKB_p] * [RELA] -K(236,2) * [IKBKB_p |RELA];
  R236: RELA => IKBKB_p; 1;
  // V(237) = K(237,1) * [IKBKB_p |RELA];
  R237: RELA => IKBKB_p; 1;
  // V(238) = K(238,1) * [PRKCA_p] * [NFE2L2] -K(238,2) * [PRKCA_p |NFE2L2];
  R238: PRKCA_p => NFE2L2; 1;
  // V(239) = K(239,1) * [PRKCA_p |NFE2L2];
  R239: PRKCA_p => NFE2L2; 1;
  // V(240) = K(240,1) * [PRKCZ_p] * [IKBKB] -K(240,2) * [PRKCZ_p |IKBKB];
  R240: PRKCZ_p => IKBKB; 1;
  // V(241) = K(241,1) * [PRKCZ_p |IKBKB];
  R241: PRKCZ_p => IKBKB; 1;
  // V(242) = K(242,1) * [MAPK8_p] * [STAT1] -K(242,2) * [MAPK8_p |STAT1];
  R242: MAPK8_p => STAT1; 1;
  // V(243) = K(243,1) * [MAPK8_p |STAT1];
  R243: MAPK8_p => STAT1; 1;
  // V(244) = K(244,1) * [IKBKB_p] * [TP53] -K(244,2) * [IKBKB_p |TP53];
  R244: TP53 => IKBKB_p; 1;
  // V(245) = K(245,1) * [IKBKB_p |TP53];
  R245: TP53 => IKBKB_p; 1;
  // V(246) = K(246,1) * [MAPK8_p] * [NR4A1] -K(246,2) * [MAPK8_p |NR4A1];
  R246: NR4A1 => MAPK8_p; 1;
  // V(247) = K(247,1) * [MAPK8_p |NR4A1];
  R247: NR4A1 => MAPK8_p; 1;
  // V(248) = K(248,1) * [ATR] * [TP53] -K(248,2) * [ATR |TP53];
  R248: TP53 => ATR; 1;
  // V(249) = K(249,1) * [ATR |TP53];
  R249: TP53 => ATR; 1;
  // V(250) = K(250,1) * [ATR] * [CREB1] -K(250,2) * [ATR |CREB1];
  R250: ATR => CREB1; 1;
  // V(251) = K(251,1) * [ATR |CREB1];
  R251: ATR => CREB1; 1;
  // V(252) = K(252,1) * [EGFR_p] * [AGO2] -K(252,2) * [EGFR_p |AGO2];
  R252: EGFR_p => AGO2; 1;
  // V(253) = K(253,1) * [EGFR_p |AGO2];
  R253: EGFR_p => AGO2; 1;
  // V(254) = K(254,1) * [EGFR_p] * [TLR3] -K(254,2) * [EGFR_p |TLR3];
  R254: EGFR_p => TLR3; 1;
  // V(255) = K(255,1) * [EGFR_p |TLR3];
  R255: EGFR_p => TLR3; 1;
  // V(256) = K(256,1) * [EGFR_p] * [LYN] -K(256,2) * [EGFR_p |LYN];
  R256: EGFR_p => LYN; 1;
  // V(257) = K(257,1) * [EGFR_p |LYN];
  R257: EGFR_p => LYN; 1;
  // V(258) = K(258,1) * [TGFBR1] * [SMAD3] -K(258,2) * [TGFBR1 |SMAD3];
  R258: TGFBR1 => SMAD3; 1;
  // V(259) = K(259,1) * [TGFBR1 |SMAD3];
  R259: TGFBR1 => SMAD3; 1;
  // V(260) = K(260,1) * [STK11_p] * [PRKAA1] -K(260,2) * [STK11_p |PRKAA1];
  R260: PRKAA1 => STK11_p; 1;
  // V(261) = K(261,1) * [STK11_p |PRKAA1];
  R261: PRKAA1 => STK11_p; 1;
  // V(262) = K(262,1) * [EGFR_p] * [ANXA1] -K(262,2) * [EGFR_p |ANXA1];
  R262: EGFR_p => ANXA1; 1;
  // V(263) = K(263,1) * [EGFR_p |ANXA1];
  R263: EGFR_p => ANXA1; 1;
  // V(264) = K(264,1) * [MAPK9_p] * [CTNNB1] -K(264,2) * [MAPK9_p |CTNNB1];
  R264: CTNNB1 => MAPK9_p; 1;
  // V(265) = K(265,1) * [MAPK9_p |CTNNB1];
  R265: CTNNB1 => MAPK9_p; 1;
  // V(266) = K(266,1) * [PRKCZ_p] * [RELA] -K(266,2) * [PRKCZ_p |RELA];
  R266: PRKCZ_p => RELA; 1;
  // V(267) = K(267,1) * [PRKCZ_p |RELA];
  R267: PRKCZ_p => RELA; 1;
  // V(268) = K(268,1) * [TLR4] * [MAPK12] -K(268,2) * [TLR4 |MAPK12];
  R268: MAPK12 => TLR4; 1;
  // V(269) = K(269,1) * [TLR4 |MAPK12];
  R269: MAPK12 => TLR4; 1;
  // V(270) = K(270,1) * [PRKCA_p] * [BCL2] -K(270,2) * [PRKCA_p |BCL2];
  R270: PRKCA_p => BCL2; 1;
  // V(271) = K(271,1) * [PRKCA_p |BCL2];
  R271: PRKCA_p => BCL2; 1;
  // V(272) = K(272,1) * [EGFR_p] * [STAT3] -K(272,2) * [EGFR_p |STAT3];
  R272: EGFR_p => STAT3; 1;
  // V(273) = K(273,1) * [EGFR_p |STAT3];
  R273: EGFR_p => STAT3; 1;
  // V(274) = K(274,1) * [MAPK1_p] * [TP53] -K(274,2) * [MAPK1_p |TP53];
  R274: TP53 => MAPK1_p; 1;
  // V(275) = K(275,1) * [MAPK1_p |TP53];
  R275: TP53 => MAPK1_p; 1;
  // V(276) = K(276,1) * [LYN_p] * [STAT3] -K(276,2) * [LYN_p |STAT3];
  R276: STAT3 => LYN_p; 1;
  // V(277) = K(277,1) * [LYN_p |STAT3];
  R277: STAT3 => LYN_p; 1;
  // V(278) = K(278,1) * [PRKAA1_p] * [NFE2L2] -K(278,2) * [PRKAA1_p |NFE2L2];
  R278: PRKAA1_p => NFE2L2; 1;
  // V(279) = K(279,1) * [PRKAA1_p |NFE2L2];
  R279: PRKAA1_p => NFE2L2; 1;
  // V(280) = K(280,1) * [PRKAA1_p] * [PRKAA1] -K(280,2) * [PRKAA1_p |PRKAA1];
  R280: PRKAA1 => PRKAA1_p; 1;
  // V(281) = K(281,1) * [PRKAA1_p |PRKAA1];
  R281: PRKAA1 => PRKAA1_p; 1;
  // V(282) = K(282,1) * [RPS6KA3_p] * [STK11] -K(282,2) * [RPS6KA3_p |STK11];
  R282: RPS6KA3_p => STK11; 1;
  // V(283) = K(283,1) * [RPS6KA3_p |STK11];
  R283: RPS6KA3_p => STK11; 1;
  // V(284) = K(284,1) * [IKBKB_p] * [TRIM23] -K(284,2) * [IKBKB_p |TRIM23];
  R284: TRIM23 => IKBKB_p; 1;
  // V(285) = K(285,1) * [IKBKB_p |TRIM23];
  R285: TRIM23 => IKBKB_p; 1;
  // V(286) = K(286,1) * [TLR4] * [MAPK1] -K(286,2) * [TLR4 |MAPK1];
  R286: MAPK1 => TLR4; 1;
  // V(287) = K(287,1) * [TLR4 |MAPK1];
  R287: MAPK1 => TLR4; 1;
  // V(288) = K(288,1) * [PRKCA_p] * [NOS3] -K(288,2) * [PRKCA_p |NOS3];
  R288: PRKCA_p => NOS3; 1;
  // V(289) = K(289,1) * [PRKCA_p |NOS3];
  R289: PRKCA_p => NOS3; 1;
  // V(290) = K(290,1) * [LEPR] * [STAT3] -K(290,2) * [LEPR |STAT3];
  R290: LEPR => STAT3; 1;
  // V(291) = K(291,1) * [LEPR |STAT3];
  R291: LEPR => STAT3; 1;
  // V(292) = K(292,1) * [PRKCA_p] * [RORA] -K(292,2) * [PRKCA_p |RORA];
  R292: PRKCA_p => RORA; 1;
  // V(293) = K(293,1) * [PRKCA_p |RORA];
  R293: PRKCA_p => RORA; 1;
  // V(294) = K(294,1) * [LYN_p] * [SOCS1] -K(294,2) * [LYN_p |SOCS1];
  R294: SOCS1 => LYN_p; 1;
  // V(295) = K(295,1) * [LYN_p |SOCS1];
  R295: SOCS1 => LYN_p; 1;
  // V(296) = K(296,1) * [PRKCZ_p] * [NOS3] -K(296,2) * [PRKCZ_p |NOS3];
  R296: PRKCZ_p => NOS3; 1;
  // V(297) = K(297,1) * [PRKCZ_p |NOS3];
  R297: PRKCZ_p => NOS3; 1;
  // V(298) = K(298,1) * [LYN_p] * [EGFR] -K(298,2) * [LYN_p |EGFR];
  R298: EGFR => LYN_p; 1;
  // V(299) = K(299,1) * [LYN_p |EGFR];
  R299: EGFR => LYN_p; 1;
  // V(300) = K(300,1) * [EGFR_p] * [CTNNB1] -K(300,2) * [EGFR_p |CTNNB1];
  R300: EGFR_p => CTNNB1; 1;
  // V(301) = K(301,1) * [EGFR_p |CTNNB1];
  R301: EGFR_p => CTNNB1; 1;
  // V(302) = K(302,1) * [MAPK1_p] * [STAT3] -K(302,2) * [MAPK1_p |STAT3];
  R302: STAT3 => MAPK1_p; 1;
  // V(303) = K(303,1) * [MAPK1_p |STAT3];
  R303: STAT3 => MAPK1_p; 1;
  // V(304) = K(304,1) * [MAPK1_p] * [NR4A1] -K(304,2) * [MAPK1_p |NR4A1];
  R304: NR4A1 => MAPK1_p; 1;
  // V(305) = K(305,1) * [MAPK1_p |NR4A1];
  R305: NR4A1 => MAPK1_p; 1;
  // V(306) = K(306,1) * [PINK1] * [PTEN] -K(306,2) * [PINK1 |PTEN];
  R306: PTEN => PINK1; 1;
  // V(307) = K(307,1) * [PINK1 |PTEN];
  R307: PTEN => PINK1; 1;
  // V(308) = K(308,1) * [EGFR_p] * [ABCA1] -K(308,2) * [EGFR_p |ABCA1];
  R308: EGFR_p => ABCA1; 1;
  // V(309) = K(309,1) * [EGFR_p |ABCA1];
  R309: EGFR_p => ABCA1; 1;
  // V(310) = K(310,1) * [MAPK1_p] * [TXNIP] -K(310,2) * [MAPK1_p |TXNIP];
  R310: TXNIP => MAPK1_p; 1;
  // V(311) = K(311,1) * [MAPK1_p |TXNIP];
  R311: TXNIP => MAPK1_p; 1;
  // V(312) = K(312,1) * [STK11_p] * [CDKN1A] -K(312,2) * [STK11_p |CDKN1A];
  R312: STK11_p => CDKN1A; 1;
  // V(313) = K(313,1) * [STK11_p |CDKN1A];
  R313: STK11_p => CDKN1A; 1;
  // V(314) = K(314,1) * [MAPK9_p] * [STAT3] -K(314,2) * [MAPK9_p |STAT3];
  R314: STAT3 => MAPK9_p; 1;
  // V(315) = K(315,1) * [MAPK9_p |STAT3];
  R315: STAT3 => MAPK9_p; 1;
  // V(316) = K(316,1) * [EGFR_p] * [PKM] -K(316,2) * [EGFR_p |PKM];
  R316: EGFR_p => PKM; 1;
  // V(317) = K(317,1) * [EGFR_p |PKM];
  R317: EGFR_p => PKM; 1;
  // V(318) = K(318,1) * [PRKCA_p] * [TP53] -K(318,2) * [PRKCA_p |TP53];
  R318: TP53 => PRKCA_p; 1;
  // V(319) = K(319,1) * [PRKCA_p |TP53];
  R319: TP53 => PRKCA_p; 1;
  // V(320) = K(320,1) * [TLR4] * [MAPK8] -K(320,2) * [TLR4 |MAPK8];
  R320: MAPK8 => TLR4; 1;
  // V(321) = K(321,1) * [TLR4 |MAPK8];
  R321: MAPK8 => TLR4; 1;
  // V(322) = K(322,1) * [PRKCA_p] * [IRS1] -K(322,2) * [PRKCA_p |IRS1];
  R322: IRS1 => PRKCA_p; 1;
  // V(323) = K(323,1) * [PRKCA_p |IRS1];
  R323: IRS1 => PRKCA_p; 1;
  // V(324) = K(324,1) * [PRKAA1_p] * [TP53] -K(324,2) * [PRKAA1_p |TP53];
  R324: TP53 => PRKAA1_p; 1;
  // V(325) = K(325,1) * [PRKAA1_p |TP53];
  R325: TP53 => PRKAA1_p; 1;
  // V(326) = K(326,1) * [RPS6KA3_p] * [IRS1] -K(326,2) * [RPS6KA3_p |IRS1];
  R326: IRS1 => RPS6KA3_p; 1;
  // V(327) = K(327,1) * [RPS6KA3_p |IRS1];
  R327: IRS1 => RPS6KA3_p; 1;
  // V(328) = K(328,1) * [PTPRJ] * [INSR_p] -K(328,2) * [PTPRJ |INSR_p];
  R328: INSR_p => PTPRJ; 1;
  // V(329) = K(329,1) * [PTPRJ |INSR_p];
  R329: INSR_p => PTPRJ; 1;
  // V(330) = K(330,1) * [PTPRJ] * [MAPK1_p] -K(330,2) * [PTPRJ |MAPK1_p];
  R330: PTPRJ => MAPK1_p; 1;
  // V(331) = K(331,1) * [PTPRJ |MAPK1_p];
  R331: PTPRJ => MAPK1_p; 1;
  // V(332) = K(332,1) * [PTPRJ] * [CTNNB1_p] -K(332,2) * [PTPRJ |CTNNB1_p];
  R332: CTNNB1_p => PTPRJ; 1;
  // V(333) = K(333,1) * [PTPRJ |CTNNB1_p];
  R333: CTNNB1_p => PTPRJ; 1;
  // V(334) = K(334,1) * [PTPRB] * [GHR_p] -K(334,2) * [PTPRB |GHR_p];
  R334: GHR_p => PTPRB; 1;
  // V(335) = K(335,1) * [PTPRB |GHR_p];
  R335: GHR_p => PTPRB; 1;
  // V(336) = K(336,1) * [PTPRJ] * [KDR_p] -K(336,2) * [PTPRJ |KDR_p];
  R336: PTPRJ => KDR_p; 1;
  // V(337) = K(337,1) * [PTPRJ |KDR_p];
  R337: PTPRJ => KDR_p; 1;
  // V(338) = K(338,1) * [DUSP1_p] * [MAPK9_p] -K(338,2) * [DUSP1_p |MAPK9_p];
  R338: DUSP1_p => MAPK9_p; 1;
  // V(339) = K(339,1) * [DUSP1_p |MAPK9_p];
  R339: DUSP1_p => MAPK9_p; 1;
  // V(340) = K(340,1) * [DUSP1_p] * [MAPK1_p] -K(340,2) * [DUSP1_p |MAPK1_p];
  R340: DUSP1_p => MAPK1_p; 1;
  // V(341) = K(341,1) * [DUSP1_p |MAPK1_p];
  R341: DUSP1_p => MAPK1_p; 1;
  // V(342) = K(342,1) * [PTPRB] * [INSR_p] -K(342,2) * [PTPRB |INSR_p];
  R342: INSR_p => PTPRB; 1;
  // V(343) = K(343,1) * [PTPRB |INSR_p];
  R343: INSR_p => PTPRB; 1;
  // V(344) = K(344,1) * [PTEN] * [SP1_p] -K(344,2) * [PTEN |SP1_p];
  R344: PTEN => SP1_p; 1;
  // V(345) = K(345,1) * [PTEN |SP1_p];
  R345: PTEN => SP1_p; 1;
  // V(346) = K(346,1) * [DUSP1_p] * [MAPK8_p] -K(346,2) * [DUSP1_p |MAPK8_p];
  R346: MAPK8_p => DUSP1_p; 1;
  // V(347) = K(347,1) * [DUSP1_p |MAPK8_p];
  R347: MAPK8_p => DUSP1_p; 1;
  // V(348) = K(348,1) * [PTPRB] * [MAPK1_p] -K(348,2) * [PTPRB |MAPK1_p];
  R348: PTPRB => MAPK1_p; 1;
  // V(349) = K(349,1) * [PTPRB |MAPK1_p];
  R349: PTPRB => MAPK1_p; 1;
  // V(350) = K(350,1) * [PTEN] * [PTEN_p] -K(350,2) * [PTEN |PTEN_p];
  R350: PTEN => PTEN_p; 1;
  // V(351) = K(351,1) * [PTEN |PTEN_p];
  R351: PTEN => PTEN_p; 1;
  // V(352) = K(352,1) * [PTPRJ] * [PIK3R1_p] -K(352,2) * [PTPRJ |PIK3R1_p];
  R352: PIK3R1_p => PTPRJ; 1;
  // V(353) = K(353,1) * [PTPRJ |PIK3R1_p];
  R353: PIK3R1_p => PTPRJ; 1;
  // V(354) = K(354,1) * [PTPRB] * [NOS3_p] -K(354,2) * [PTPRB |NOS3_p];
  R354: NOS3_p => PTPRB; 1;
  // V(355) = K(355,1) * [PTPRB |NOS3_p];
  R355: NOS3_p => PTPRB; 1;
  // V(356) = K(356,1) * [PTPRJ] * [EGFR_p] -K(356,2) * [PTPRJ |EGFR_p];
  R356: EGFR_p => PTPRJ; 1;
  // V(357) = K(357,1) * [PTPRJ |EGFR_p];
  R357: EGFR_p => PTPRJ; 1;
  // V(358) = K(358,1) * [PTPRB] * [KDR_p] -K(358,2) * [PTPRB |KDR_p];
  R358: PTPRB => KDR_p; 1;
  // V(359) = K(359,1) * [PTPRB |KDR_p];
  R359: PTPRB => KDR_p; 1;
  // V(360) = K(360,1) * [PTEN] * [STAT5A_p] -K(360,2) * [PTEN |STAT5A_p];
  R360: PTEN => STAT5A_p; 1;
  // V(361) = K(361,1) * [PTEN |STAT5A_p];
  R361: PTEN => STAT5A_p; 1;
  // V(362) = K(362,1) * [PTEN] * [IRS1_p] -K(362,2) * [PTEN |IRS1_p];
  R362: PTEN => IRS1_p; 1;
  // V(363) = K(363,1) * [PTEN |IRS1_p];
  R363: PTEN => IRS1_p; 1;
  // V(364) = K(364,1) * [PTEN] * [CREB1_p] -K(364,2) * [PTEN |CREB1_p];
  R364: PTEN => CREB1_p; 1;
  // V(365) = K(365,1) * [PTEN |CREB1_p];
  R365: PTEN => CREB1_p; 1;
  // V(366) = K(366,1) * [DUSP1_p] * [JUN_p] -K(366,2) * [DUSP1_p |JUN_p];
  R366: JUN_p => DUSP1_p; 1;
  // V(367) = K(367,1) * [DUSP1_p |JUN_p];
  R367: JUN_p => DUSP1_p; 1;
  // V(368) = K(368,1) * [MYLIP] * [LDLR] -K(368,2) * [MYLIP |LDLR];
  R368: MYLIP => LDLR; 1;
  // V(369) = K(369,1) * [MYLIP |LDLR];
  R369: MYLIP => LDLR; 1;
  // V(370) = K(370,1) * [MDM2] * [NOTCH1] -K(370,2) * [MDM2 |NOTCH1];
  R370: NOTCH1 => MDM2; 1;
  // V(371) = K(371,1) * [MDM2 |NOTCH1];
  R371: NOTCH1 => MDM2; 1;
  // V(372) = K(372,1) * [RNF7] * [DEPTOR] -K(372,2) * [RNF7 |DEPTOR];
  R372: DEPTOR => RNF7; 1;
  // V(373) = K(373,1) * [RNF7 |DEPTOR];
  R373: DEPTOR => RNF7; 1;
  // V(374) = K(374,1) * [MDM2] * [TP53] -K(374,2) * [MDM2 |TP53];
  R374: TP53 => MDM2; 1;
  // V(375) = K(375,1) * [MDM2 |TP53];
  R375: TP53 => MDM2; 1;
  // V(376) = K(376,1) * [SYVN1] * [NFE2L2] -K(376,2) * [SYVN1 |NFE2L2];
  R376: SYVN1 => NFE2L2; 1;
  // V(377) = K(377,1) * [SYVN1 |NFE2L2];
  R377: SYVN1 => NFE2L2; 1;
  // V(378) = K(378,1) * [MYLIP] * [MYLIP] -K(378,2) * [MYLIP |MYLIP];
  R378: MYLIP => ; 1;
  // V(379) = K(379,1) * [MYLIP |MYLIP];
  R379: MYLIP => ; 1;
  // V(380) = K(380,1) * [RNF7] * [JUN] -K(380,2) * [RNF7 |JUN];
  R380: JUN => RNF7; 1;
  // V(381) = K(381,1) * [RNF7 |JUN];
  R381: JUN => RNF7; 1;
  // V(382) = K(382,1) * [SYVN1] * [PTEN] -K(382,2) * [SYVN1 |PTEN];
  R382: PTEN => SYVN1; 1;
  // V(383) = K(383,1) * [SYVN1 |PTEN];
  R383: PTEN => SYVN1; 1;
  // V(384) = K(384,1) * [JUN_p] * [SP1_p] * [TGFB1_g] -K(384,2) * [JUN_p |SP1_p |TGFB1_g];
  R384: SP1_p => TGFB1_g; 1;
  // V(385) = K(385,1) * [JUN_p |SP1_p |TGFB1_g];
  R385: SP1_p => TGFB1_g; 1;
  // V(386) = K(386,1) * [TGFB1_rna];
  R386: TGFB1_rna => ; 1;
  // V(387) = K(387,1) * [TP53_p] * [VCAN_g] -K(387,2) * [TP53_p |VCAN_g];
  R387: VCAN_g => TP53_p; 1;
  // V(388) = K(388,1) * [TP53_p |VCAN_g];
  R388: VCAN_g => TP53_p; 1;
  // V(389) = K(389,1) * [VCAN_rna];
  R389: VCAN_rna => ; 1;
  // V(390) = K(390,1) * [TP53_p] * [CDKN1A_g] -K(390,2) * [TP53_p |CDKN1A_g];
  R390: CDKN1A_g => TP53_p; 1;
  // V(391) = K(391,1) * [TP53_p |CDKN1A_g];
  R391: CDKN1A_g => TP53_p; 1;
  // V(392) = K(392,1) * [CDKN1A_rna];
  R392: CDKN1A_rna => ; 1;
  // V(393) = K(393,1) * [NFE2L2_p] * [SOD1_g] -K(393,2) * [NFE2L2_p |SOD1_g];
  R393: SOD1_g => NFE2L2_p; 1;
  // V(394) = K(394,1) * [NFE2L2_p |SOD1_g];
  R394: SOD1_g => NFE2L2_p; 1;
  // V(395) = K(395,1) * [SOD1_rna];
  R395: SOD1_rna => ; 1;
  // V(396) = K(396,1) * [TGFB2] * [SNAI1_g] -K(396,2) * [TGFB2 |SNAI1_g];
  R396: TGFB2 => SNAI1_g; 1;
  // V(397) = K(397,1) * [TGFB2 |SNAI1_g];
  R397: TGFB2 => SNAI1_g; 1;
  // V(398) = K(398,1) * [SNAI1_rna];
  R398: SNAI1_rna => ; 1;
  // V(399) = K(399,1) * [STAT3_p] * [STAT1_p] * [STAT5A_p] * [SOCS3_g] -K(399,2) * [STAT3_p |STAT1_p |STAT5A_p |SOCS3_g];
  R399: STAT3_p => STAT5A_p; 1;
  // V(400) = K(400,1) * [STAT3_p |STAT1_p |STAT5A_p |SOCS3_g];
  R400: STAT3_p => STAT5A_p; 1;
  // V(401) = K(401,1) * [SOCS3_rna];
  R401: SOCS3_rna => ; 1;
  // V(402) = K(402,1) * [SREBF1_p] * [PKM_g] -K(402,2) * [SREBF1_p |PKM_g];
  R402: PKM_g => SREBF1_p; 1;
  // V(403) = K(403,1) * [SREBF1_p |PKM_g];
  R403: PKM_g => SREBF1_p; 1;
  // V(404) = K(404,1) * [PKM_rna];
  R404: PKM_rna => ; 1;
  // V(405) = K(405,1) * [STAT1_p] * [NOS2_g] -K(405,2) * [STAT1_p |NOS2_g];
  R405: NOS2_g => STAT1_p; 1;
  // V(406) = K(406,1) * [STAT1_p |NOS2_g];
  R406: NOS2_g => STAT1_p; 1;
  // V(407) = K(407,1) * [NOS2_rna];
  R407: NOS2_rna => ; 1;
  // V(408) = K(408,1) * [NFE2L2_p] * [GCLC_g] -K(408,2) * [NFE2L2_p |GCLC_g];
  R408: GCLC_g => NFE2L2_p; 1;
  // V(409) = K(409,1) * [NFE2L2_p |GCLC_g];
  R409: GCLC_g => NFE2L2_p; 1;
  // V(410) = K(410,1) * [GCLC_rna];
  R410: GCLC_rna => ; 1;
  // V(411) = K(411,1) * [STAT3_p] * [SP1_p] * [HGF_g] -K(411,2) * [STAT3_p |SP1_p |HGF_g];
  R411: STAT3_p => HGF_g; 1;
  // V(412) = K(412,1) * [STAT3_p |SP1_p |HGF_g];
  R412: STAT3_p => HGF_g; 1;
  // V(413) = K(413,1) * [HGF_rna];
  R413: HGF_rna => ; 1;
  // V(414) = K(414,1) * [NR3C1] * [KLF9_g] -K(414,2) * [NR3C1 |KLF9_g];
  R414: KLF9_g => NR3C1; 1;
  // V(415) = K(415,1) * [NR3C1 |KLF9_g];
  R415: KLF9_g => NR3C1; 1;
  // V(416) = K(416,1) * [KLF9_rna];
  R416: KLF9_rna => ; 1;
  // V(417) = K(417,1) * [SP1_p] * [CD34_g] -K(417,2) * [SP1_p |CD34_g];
  R417: SP1_p => CD34_g; 1;
  // V(418) = K(418,1) * [SP1_p |CD34_g];
  R418: SP1_p => CD34_g; 1;
  // V(419) = K(419,1) * [CD34_rna];
  R419: CD34_rna => ; 1;
  // V(420) = K(420,1) * [STAT6] * [SOCS1_g] -K(420,2) * [STAT6 |SOCS1_g];
  R420: STAT6 => SOCS1_g; 1;
  // V(421) = K(421,1) * [STAT6 |SOCS1_g];
  R421: STAT6 => SOCS1_g; 1;
  // V(422) = K(422,1) * [SOCS1_rna];
  R422: SOCS1_rna => ; 1;
  // V(423) = K(423,1) * [NFE2L2_p] * [GSTA1_g] -K(423,2) * [NFE2L2_p |GSTA1_g];
  R423: GSTA1_g => NFE2L2_p; 1;
  // V(424) = K(424,1) * [NFE2L2_p |GSTA1_g];
  R424: GSTA1_g => NFE2L2_p; 1;
  // V(425) = K(425,1) * [GSTA1_rna];
  R425: GSTA1_rna => ; 1;
  // V(426) = K(426,1) * [STAT5A_p] * [SOCS2_g] -K(426,2) * [STAT5A_p |SOCS2_g];
  R426: STAT5A_p => SOCS2_g; 1;
  // V(427) = K(427,1) * [STAT5A_p |SOCS2_g];
  R427: STAT5A_p => SOCS2_g; 1;
  // V(428) = K(428,1) * [SOCS2_rna];
  R428: SOCS2_rna => ; 1;
  // V(429) = K(429,1) * [SP1_p] * [TNC_g] -K(429,2) * [SP1_p |TNC_g];
  R429: TNC_g => SP1_p; 1;
  // V(430) = K(430,1) * [SP1_p |TNC_g];
  R430: TNC_g => SP1_p; 1;
  // V(431) = K(431,1) * [TNC_rna];
  R431: TNC_rna => ; 1;
  // V(432) = K(432,1) * [RELA_p] * [IL6_g] -K(432,2) * [RELA_p |IL6_g];
  R432: IL6_g => RELA_p; 1;
  // V(433) = K(433,1) * [RELA_p |IL6_g];
  R433: IL6_g => RELA_p; 1;
  // V(434) = K(434,1) * [IL6_rna];
  R434: IL6_rna => ; 1;
  // V(435) = K(435,1) * [STAT3_p] * [STAT1_g] -K(435,2) * [STAT3_p |STAT1_g];
  R435: STAT3_p => STAT1_g; 1;
  // V(436) = K(436,1) * [STAT3_p |STAT1_g];
  R436: STAT3_p => STAT1_g; 1;
  // V(437) = K(437,1) * [STAT1_rna];
  R437: STAT1_rna => ; 1;
  // V(438) = K(438,1) * [MECP2] * [NOTCH1_g] -K(438,2) * [MECP2 |NOTCH1_g];
  R438: MECP2 => NOTCH1_g; 1;
  // V(439) = K(439,1) * [NOTCH1_g];
  R439: NOTCH1_g => ; 1;
  // V(440) = K(440,1) * [NOTCH1_rna];
  R440: NOTCH1_rna => ; 1;
  // V(441) = K(441,1) * [HES1] * [NR3C1_g] -K(441,2) * [HES1 |NR3C1_g];
  R441: HES1 => NR3C1_g; 1;
  // V(442) = K(442,1) * [NR3C1_g];
  R442: NR3C1_g => ; 1;
  // V(443) = K(443,1) * [NR3C1_rna];
  R443: NR3C1_rna => ; 1;
  // V(444) = K(444,1) * [NR3C1] * [JUN_g] -K(444,2) * [NR3C1 |JUN_g];
  R444: JUN_g => NR3C1; 1;
  // V(445) = K(445,1) * [JUN_g];
  R445: JUN_g => ; 1;
  // V(446) = K(446,1) * [JUN_rna];
  R446: JUN_rna => ; 1;
  // V(447) = K(447,1) * [SMAD7] * [SMAD3_g] -K(447,2) * [SMAD7 |SMAD3_g];
  R447: SMAD7 => SMAD3_g; 1;
  // V(448) = K(448,1) * [SMAD3_g];
  R448: SMAD3_g => ; 1;
  // V(449) = K(449,1) * [SMAD3_rna];
  R449: SMAD3_rna => ; 1;
  // V(450) = K(450,1) * [RELA_p] * [BMP4_g] -K(450,2) * [RELA_p |BMP4_g];
  R450: BMP4_g => RELA_p; 1;
  // V(451) = K(451,1) * [BMP4_g];
  R451: BMP4_g => ; 1;
  // V(452) = K(452,1) * [BMP4_rna];
  R452: BMP4_rna => ; 1;
  // V(453) = K(453,1) * [HES1] * [RCAN1_g] -K(453,2) * [HES1 |RCAN1_g];
  R453: HES1 => RCAN1_g; 1;
  // V(454) = K(454,1) * [RCAN1_g];
  R454: RCAN1_g => ; 1;
  // V(455) = K(455,1) * [RCAN1_rna];
  R455: RCAN1_rna => ; 1;
  // V(456) = K(456,1) * [TP53_p] * [SLC2A1_g] -K(456,2) * [TP53_p |SLC2A1_g];
  R456: SLC2A1_g => TP53_p; 1;
  // V(457) = K(457,1) * [SLC2A1_g];
  R457: SLC2A1_g => ; 1;
  // V(458) = K(458,1) * [SLC2A1_rna];
  R458: SLC2A1_rna => ; 1;
  // V(459) = K(459,1) * [TLR4];
  R459: TLR4 => ; 1;
  // V(460) = K(460,1) * [SOCS2];
  R460: SOCS2 => ; 1;
  // V(461) = K(461,1) * [SOCS3];
  R461: SOCS3 => ; 1;
  // V(462) = K(462,1) * [IKBKB];
  R462: IKBKB => ; 1;
  // V(463) = K(463,1) * [SMAD7];
  R463: SMAD7 => ; 1;
  // V(464) = K(464,1) * [TLR3];
  R464: TLR3 => ; 1;
  // V(465) = K(465,1) * [SOCS1];
  R465: SOCS1 => ; 1;
  // V(466) = K(466,1) * [ABCA1];
  R466: ABCA1 => ; 1;
  // V(467) = K(467,1) * [SNAI1];
  R467: SNAI1 => ; 1;
  // V(468) = K(468,1) * [SOD1];
  R468: SOD1 => ; 1;
  // V(469) = K(469,1) * [EGFR];
  R469: EGFR => ; 1;
  // V(470) = K(470,1) * [FOS];
  R470: FOS => ; 1;
  // V(471) = K(471,1) * [LDLR];
  R471: LDLR => ; 1;
  // V(472) = K(472,1) * [EGF];
  R472: EGF => ; 1;
  // V(473) = K(473,1) * [TGFB1];
  R473: TGFB1 => ; 1;
  // V(474) = K(474,1) * [ANXA1];
  R474: ANXA1 => ; 1;
  // V(475) = K(475,1) * [NR3C1];
  R475: NR3C1 => ; 1;
  // V(476) = K(476,1) * [TP53];
  R476: TP53 => ; 1;
  // V(477) = K(477,1) * [HMGN1];
  R477: HMGN1 => ; 1;
  // V(478) = K(478,1) * [IL6];
  R478: IL6 => ; 1;
  // V(479) = K(479,1) * [JUN];
  R479: JUN => ; 1;
  // V(480) = K(480,1) * [INSR];
  R480: INSR => ; 1;
  // V(481) = K(481,1) * [LYN];
  R481: LYN => ; 1;
  // V(482) = K(482,1) * [SP1];
  R482: SP1 => ; 1;
  // V(483) = K(483,1) * [NR3C2];
  R483: NR3C2 => ; 1;
  // V(484) = K(484,1) * [GSTA1];
  R484: GSTA1 => ; 1;
  // V(485) = K(485,1) * [VIM];
  R485: VIM => ; 1;
  // V(486) = K(486,1) * [FGF2];
  R486: FGF2 => ; 1;
  // V(487) = K(487,1) * [UBC];
  R487: UBC => ; 1;
  // V(488) = K(488,1) * [CALM1];
  R488: CALM1 => ; 1;
  // V(489) = K(489,1) * [BCL2];
  R489: BCL2 => ; 1;
  // V(490) = K(490,1) * [KIT];
  R490: KIT => ; 1;
  // V(491) = K(491,1) * [GHR];
  R491: GHR => ; 1;
  // V(492) = K(492,1) * [SLC2A1];
  R492: SLC2A1 => ; 1;
  // V(493) = K(493,1) * [BMP4];
  R493: BMP4 => ; 1;
  // V(494) = K(494,1) * [VCAN];
  R494: VCAN => ; 1;
  // V(495) = K(495,1) * [HGF];
  R495: HGF => ; 1;
  // V(496) = K(496,1) * [PKM];
  R496: PKM => ; 1;
  // V(497) = K(497,1) * [FABP4];
  R497: FABP4 => ; 1;
  // V(498) = K(498,1) * [CREB1];
  R498: CREB1 => ; 1;
  // V(499) = K(499,1) * [PRKCA];
  R499: PRKCA => ; 1;
  // V(500) = K(500,1) * [JUNB];
  R500: JUNB => ; 1;
  // V(501) = K(501,1) * [GJA1];
  R501: GJA1 => ; 1;
  // V(502) = K(502,1) * [TFEB];
  R502: TFEB => ; 1;
  // V(503) = K(503,1) * [NR4A1];
  R503: NR4A1 => ; 1;
  // V(504) = K(504,1) * [PTPRB];
  R504: PTPRB => ; 1;
  // V(505) = K(505,1) * [TNC];
  R505: TNC => ; 1;
  // V(506) = K(506,1) * [ZFP36];
  R506: ZFP36 => ; 1;
  // V(507) = K(507,1) * [PIK3R1];
  R507: PIK3R1 => ; 1;
  // V(508) = K(508,1) * [MAPK1];
  R508: MAPK1 => ; 1;
  // V(509) = K(509,1) * [DUSP1];
  R509: DUSP1 => ; 1;
  // V(510) = K(510,1) * [CD34];
  R510: CD34 => ; 1;
  // V(511) = K(511,1) * [NOS3];
  R511: NOS3 => ; 1;
  // V(512) = K(512,1) * [CTNNB1];
  R512: CTNNB1 => ; 1;
  // V(513) = K(513,1) * [NOS2];
  R513: NOS2 => ; 1;
  // V(514) = K(514,1) * [RORA];
  R514: RORA => ; 1;
  // V(515) = K(515,1) * [IRS1];
  R515: IRS1 => ; 1;
  // V(516) = K(516,1) * [KDR];
  R516: KDR => ; 1;
  // V(517) = K(517,1) * [TRIM23];
  R517: TRIM23 => ; 1;
  // V(518) = K(518,1) * [TGFBR1];
  R518: TGFBR1 => ; 1;
  // V(519) = K(519,1) * [SREBF1];
  R519: SREBF1 => ; 1;
  // V(520) = K(520,1) * [CDKN1A];
  R520: CDKN1A => ; 1;
  // V(521) = K(521,1) * [STAT3];
  R521: STAT3 => ; 1;
  // V(522) = K(522,1) * [STAT1];
  R522: STAT1 => ; 1;
  // V(523) = K(523,1) * [STAT6];
  R523: STAT6 => ; 1;
  // V(524) = K(524,1) * [STAT5A];
  R524: STAT5A => ; 1;
  // V(525) = K(525,1) * [MAPK8];
  R525: MAPK8 => ; 1;
  // V(526) = K(526,1) * [MAPK9];
  R526: MAPK9 => ; 1;
  // V(527) = K(527,1) * [NOTCH1];
  R527: NOTCH1 => ; 1;
  // V(528) = K(528,1) * [YAP1];
  R528: YAP1 => ; 1;
  // V(529) = K(529,1) * [LEPR];
  R529: LEPR => ; 1;
  // V(530) = K(530,1) * [GCLC];
  R530: GCLC => ; 1;
  // V(531) = K(531,1) * [MECP2];
  R531: MECP2 => ; 1;
  // V(532) = K(532,1) * [RPS6KA3];
  R532: RPS6KA3 => ; 1;
  // V(533) = K(533,1) * [MAPK12];
  R533: MAPK12 => ; 1;
  // V(534) = K(534,1) * [RCAN1];
  R534: RCAN1 => ; 1;
  // V(535) = K(535,1) * [PTEN];
  R535: PTEN => ; 1;
  // V(536) = K(536,1) * [TGFB2];
  R536: TGFB2 => ; 1;
  // V(537) = K(537,1) * [SMAD3];
  R537: SMAD3 => ; 1;
  // V(538) = K(538,1) * [MDM2];
  R538: MDM2 => ; 1;
  // V(539) = K(539,1) * [RELA];
  R539: RELA => ; 1;
  // V(540) = K(540,1) * [GLO1];
  R540: GLO1 => ; 1;
  // V(541) = K(541,1) * [PRKCZ];
  R541: PRKCZ => ; 1;
  // V(542) = K(542,1) * [PPARA];
  R542: PPARA => ; 1;
  // V(543) = K(543,1) * [EP300];
  R543: EP300 => ; 1;
  // V(544) = K(544,1) * [PTPRJ];
  R544: PTPRJ => ; 1;
  // V(545) = K(545,1) * [PRKAA1];
  R545: PRKAA1 => ; 1;
  // V(546) = K(546,1) * [SMAD4];
  R546: SMAD4 => ; 1;
  // V(547) = K(547,1) * [ATR];
  R547: ATR => ; 1;
  // V(548) = K(548,1) * [KLF9];
  R548: KLF9 => ; 1;
  // V(549) = K(549,1) * [HES1];
  R549: HES1 => ; 1;
  // V(550) = K(550,1) * [SMAD2];
  R550: SMAD2 => ; 1;
  // V(551) = K(551,1) * [SMAD1];
  R551: SMAD1 => ; 1;
  // V(552) = K(552,1) * [STK11];
  R552: STK11 => ; 1;
  // V(553) = K(553,1) * [NFE2L2];
  R553: NFE2L2 => ; 1;
  // V(554) = K(554,1) * [PKN1];
  R554: PKN1 => ; 1;
  // V(555) = K(555,1) * [OCLN];
  R555: OCLN => ; 1;
  // V(556) = K(556,1) * [SYVN1];
  R556: SYVN1 => ; 1;
  // V(557) = K(557,1) * [DEPTOR];
  R557: DEPTOR => ; 1;
  // V(558) = K(558,1) * [MYLIP];
  R558: MYLIP => ; 1;
  // V(559) = K(559,1) * [PINK1];
  R559: PINK1 => ; 1;
  // V(560) = K(560,1) * [TXNIP];
  R560: TXNIP => ; 1;
  // V(561) = K(561,1) * [PLK2];
  R561: PLK2 => ; 1;
  // V(562) = K(562,1) * [RNF7];
  R562: RNF7 => ; 1;
  // V(563) = K(563,1) * [ADD3];
  R563: ADD3 => ; 1;
  // V(564) = K(564,1) * [AGO2];
  R564: AGO2 => ; 1;
  // V(565) = K(565,1) * [SOCS2_rna];
  R565: SOCS2_rna => ; 1;
  // V(566) = K(566,1) * [SOCS3_rna];
  R566: SOCS3_rna => ; 1;
  // V(567) = K(567,1) * [SOCS1_rna];
  R567: SOCS1_rna => ; 1;
  // V(568) = K(568,1) * [SNAI1_rna];
  R568: SNAI1_rna => ; 1;
  // V(569) = K(569,1) * [SOD1_rna];
  R569: SOD1_rna => ; 1;
  // V(570) = K(570,1) * [TGFB1_rna];
  R570: TGFB1_rna => ; 1;
  // V(571) = K(571,1) * [NR3C1_rna];
  R571: NR3C1_rna => ; 1;
  // V(572) = K(572,1) * [IL6_rna];
  R572: IL6_rna => ; 1;
  // V(573) = K(573,1) * [JUN_rna];
  R573: JUN_rna => ; 1;
  // V(574) = K(574,1) * [GSTA1_rna];
  R574: GSTA1_rna => ; 1;
  // V(575) = K(575,1) * [SLC2A1_rna];
  R575: SLC2A1_rna => ; 1;
  // V(576) = K(576,1) * [BMP4_rna];
  R576: BMP4_rna => ; 1;
  // V(577) = K(577,1) * [VCAN_rna];
  R577: VCAN_rna => ; 1;
  // V(578) = K(578,1) * [HGF_rna];
  R578: HGF_rna => ; 1;
  // V(579) = K(579,1) * [PKM_rna];
  R579: PKM_rna => ; 1;
  // V(580) = K(580,1) * [TNC_rna];
  R580: TNC_rna => ; 1;
  // V(581) = K(581,1) * [CD34_rna];
  R581: CD34_rna => ; 1;
  // V(582) = K(582,1) * [NOS2_rna];
  R582: NOS2_rna => ; 1;
  // V(583) = K(583,1) * [CDKN1A_rna];
  R583: CDKN1A_rna => ; 1;
  // V(584) = K(584,1) * [STAT1_rna];
  R584: STAT1_rna => ; 1;
  // V(585) = K(585,1) * [NOTCH1_rna];
  R585: NOTCH1_rna => ; 1;
  // V(586) = K(586,1) * [GCLC_rna];
  R586: GCLC_rna => ; 1;
  // V(587) = K(587,1) * [RCAN1_rna];
  R587: RCAN1_rna => ; 1;
  // V(588) = K(588,1) * [SMAD3_rna];
  R588: SMAD3_rna => ; 1;
  // V(589) = K(589,1) * [KLF9_rna];
  R589: KLF9_rna => ; 1;
  // V(590) = K(590,1) * [TLR4_g];
  R590: TLR4_g => ; 1;
  // V(591) = K(591,1) * [TLR4_rna];
  R591: TLR4_rna => ; 1;
  // V(592) = K(592,1) * [IKBKB_g];
  R592: IKBKB_g => ; 1;
  // V(593) = K(593,1) * [IKBKB_rna];
  R593: IKBKB_rna => ; 1;
  // V(594) = K(594,1) * [SMAD7_g];
  R594: SMAD7_g => ; 1;
  // V(595) = K(595,1) * [SMAD7_rna];
  R595: SMAD7_rna => ; 1;
  // V(596) = K(596,1) * [TLR3_g];
  R596: TLR3_g => ; 1;
  // V(597) = K(597,1) * [TLR3_rna];
  R597: TLR3_rna => ; 1;
  // V(598) = K(598,1) * [ABCA1_g];
  R598: ABCA1_g => ; 1;
  // V(599) = K(599,1) * [ABCA1_rna];
  R599: ABCA1_rna => ; 1;
  // V(600) = K(600,1) * [EGFR_g];
  R600: EGFR_g => ; 1;
  // V(601) = K(601,1) * [EGFR_rna];
  R601: EGFR_rna => ; 1;
  // V(602) = K(602,1) * [FOS_g];
  R602: FOS_g => ; 1;
  // V(603) = K(603,1) * [FOS_rna];
  R603: FOS_rna => ; 1;
  // V(604) = K(604,1) * [LDLR_g];
  R604: LDLR_g => ; 1;
  // V(605) = K(605,1) * [LDLR_rna];
  R605: LDLR_rna => ; 1;
  // V(606) = K(606,1) * [EGF_g];
  R606: EGF_g => ; 1;
  // V(607) = K(607,1) * [EGF_rna];
  R607: EGF_rna => ; 1;
  // V(608) = K(608,1) * [ANXA1_g];
  R608: ANXA1_g => ; 1;
  // V(609) = K(609,1) * [ANXA1_rna];
  R609: ANXA1_rna => ; 1;
  // V(610) = K(610,1) * [TP53_g];
  R610: TP53_g => ; 1;
  // V(611) = K(611,1) * [TP53_rna];
  R611: TP53_rna => ; 1;
  // V(612) = K(612,1) * [HMGN1_g];
  R612: HMGN1_g => ; 1;
  // V(613) = K(613,1) * [HMGN1_rna];
  R613: HMGN1_rna => ; 1;
  // V(614) = K(614,1) * [INSR_g];
  R614: INSR_g => ; 1;
  // V(615) = K(615,1) * [INSR_rna];
  R615: INSR_rna => ; 1;
  // V(616) = K(616,1) * [LYN_g];
  R616: LYN_g => ; 1;
  // V(617) = K(617,1) * [LYN_rna];
  R617: LYN_rna => ; 1;
  // V(618) = K(618,1) * [SP1_g];
  R618: SP1_g => ; 1;
  // V(619) = K(619,1) * [SP1_rna];
  R619: SP1_rna => ; 1;
  // V(620) = K(620,1) * [NR3C2_g];
  R620: NR3C2_g => ; 1;
  // V(621) = K(621,1) * [NR3C2_rna];
  R621: NR3C2_rna => ; 1;
  // V(622) = K(622,1) * [VIM_g];
  R622: VIM_g => ; 1;
  // V(623) = K(623,1) * [VIM_rna];
  R623: VIM_rna => ; 1;
  // V(624) = K(624,1) * [FGF2_g];
  R624: FGF2_g => ; 1;
  // V(625) = K(625,1) * [FGF2_rna];
  R625: FGF2_rna => ; 1;
  // V(626) = K(626,1) * [UBC_g];
  R626: UBC_g => ; 1;
  // V(627) = K(627,1) * [UBC_rna];
  R627: UBC_rna => ; 1;
  // V(628) = K(628,1) * [CALM1_g];
  R628: CALM1_g => ; 1;
  // V(629) = K(629,1) * [CALM1_rna];
  R629: CALM1_rna => ; 1;
  // V(630) = K(630,1) * [BCL2_g];
  R630: BCL2_g => ; 1;
  // V(631) = K(631,1) * [BCL2_rna];
  R631: BCL2_rna => ; 1;
  // V(632) = K(632,1) * [KIT_g];
  R632: KIT_g => ; 1;
  // V(633) = K(633,1) * [KIT_rna];
  R633: KIT_rna => ; 1;
  // V(634) = K(634,1) * [GHR_g];
  R634: GHR_g => ; 1;
  // V(635) = K(635,1) * [GHR_rna];
  R635: GHR_rna => ; 1;
  // V(636) = K(636,1) * [FABP4_g];
  R636: FABP4_g => ; 1;
  // V(637) = K(637,1) * [FABP4_rna];
  R637: FABP4_rna => ; 1;
  // V(638) = K(638,1) * [CREB1_g];
  R638: CREB1_g => ; 1;
  // V(639) = K(639,1) * [CREB1_rna];
  R639: CREB1_rna => ; 1;
  // V(640) = K(640,1) * [PRKCA_g];
  R640: PRKCA_g => ; 1;
  // V(641) = K(641,1) * [PRKCA_rna];
  R641: PRKCA_rna => ; 1;
  // V(642) = K(642,1) * [JUNB_g];
  R642: JUNB_g => ; 1;
  // V(643) = K(643,1) * [JUNB_rna];
  R643: JUNB_rna => ; 1;
  // V(644) = K(644,1) * [GJA1_g];
  R644: GJA1_g => ; 1;
  // V(645) = K(645,1) * [GJA1_rna];
  R645: GJA1_rna => ; 1;
  // V(646) = K(646,1) * [TFEB_g];
  R646: TFEB_g => ; 1;
  // V(647) = K(647,1) * [TFEB_rna];
  R647: TFEB_rna => ; 1;
  // V(648) = K(648,1) * [NR4A1_g];
  R648: NR4A1_g => ; 1;
  // V(649) = K(649,1) * [NR4A1_rna];
  R649: NR4A1_rna => ; 1;
  // V(650) = K(650,1) * [PTPRB_g];
  R650: PTPRB_g => ; 1;
  // V(651) = K(651,1) * [PTPRB_rna];
  R651: PTPRB_rna => ; 1;
  // V(652) = K(652,1) * [ZFP36_g];
  R652: ZFP36_g => ; 1;
  // V(653) = K(653,1) * [ZFP36_rna];
  R653: ZFP36_rna => ; 1;
  // V(654) = K(654,1) * [PIK3R1_g];
  R654: PIK3R1_g => ; 1;
  // V(655) = K(655,1) * [PIK3R1_rna];
  R655: PIK3R1_rna => ; 1;
  // V(656) = K(656,1) * [MAPK1_g];
  R656: MAPK1_g => ; 1;
  // V(657) = K(657,1) * [MAPK1_rna];
  R657: MAPK1_rna => ; 1;
  // V(658) = K(658,1) * [DUSP1_g];
  R658: DUSP1_g => ; 1;
  // V(659) = K(659,1) * [DUSP1_rna];
  R659: DUSP1_rna => ; 1;
  // V(660) = K(660,1) * [NOS3_g];
  R660: NOS3_g => ; 1;
  // V(661) = K(661,1) * [NOS3_rna];
  R661: NOS3_rna => ; 1;
  // V(662) = K(662,1) * [CTNNB1_g];
  R662: CTNNB1_g => ; 1;
  // V(663) = K(663,1) * [CTNNB1_rna];
  R663: CTNNB1_rna => ; 1;
  // V(664) = K(664,1) * [RORA_g];
  R664: RORA_g => ; 1;
  // V(665) = K(665,1) * [RORA_rna];
  R665: RORA_rna => ; 1;
  // V(666) = K(666,1) * [IRS1_g];
  R666: IRS1_g => ; 1;
  // V(667) = K(667,1) * [IRS1_rna];
  R667: IRS1_rna => ; 1;
  // V(668) = K(668,1) * [KDR_g];
  R668: KDR_g => ; 1;
  // V(669) = K(669,1) * [KDR_rna];
  R669: KDR_rna => ; 1;
  // V(670) = K(670,1) * [TRIM23_g];
  R670: TRIM23_g => ; 1;
  // V(671) = K(671,1) * [TRIM23_rna];
  R671: TRIM23_rna => ; 1;
  // V(672) = K(672,1) * [TGFBR1_g];
  R672: TGFBR1_g => ; 1;
  // V(673) = K(673,1) * [TGFBR1_rna];
  R673: TGFBR1_rna => ; 1;
  // V(674) = K(674,1) * [SREBF1_g];
  R674: SREBF1_g => ; 1;
  // V(675) = K(675,1) * [SREBF1_rna];
  R675: SREBF1_rna => ; 1;
  // V(676) = K(676,1) * [STAT3_g];
  R676: STAT3_g => ; 1;
  // V(677) = K(677,1) * [STAT3_rna];
  R677: STAT3_rna => ; 1;
  // V(678) = K(678,1) * [STAT6_g];
  R678: STAT6_g => ; 1;
  // V(679) = K(679,1) * [STAT6_rna];
  R679: STAT6_rna => ; 1;
  // V(680) = K(680,1) * [STAT5A_g];
  R680: STAT5A_g => ; 1;
  // V(681) = K(681,1) * [STAT5A_rna];
  R681: STAT5A_rna => ; 1;
  // V(682) = K(682,1) * [MAPK8_g];
  R682: MAPK8_g => ; 1;
  // V(683) = K(683,1) * [MAPK8_rna];
  R683: MAPK8_rna => ; 1;
  // V(684) = K(684,1) * [MAPK9_g];
  R684: MAPK9_g => ; 1;
  // V(685) = K(685,1) * [MAPK9_rna];
  R685: MAPK9_rna => ; 1;
  // V(686) = K(686,1) * [YAP1_g];
  R686: YAP1_g => ; 1;
  // V(687) = K(687,1) * [YAP1_rna];
  R687: YAP1_rna => ; 1;
  // V(688) = K(688,1) * [LEPR_g];
  R688: LEPR_g => ; 1;
  // V(689) = K(689,1) * [LEPR_rna];
  R689: LEPR_rna => ; 1;
  // V(690) = K(690,1) * [MECP2_g];
  R690: MECP2_g => ; 1;
  // V(691) = K(691,1) * [MECP2_rna];
  R691: MECP2_rna => ; 1;
  // V(692) = K(692,1) * [RPS6KA3_g];
  R692: RPS6KA3_g => ; 1;
  // V(693) = K(693,1) * [RPS6KA3_rna];
  R693: RPS6KA3_rna => ; 1;
  // V(694) = K(694,1) * [MAPK12_g];
  R694: MAPK12_g => ; 1;
  // V(695) = K(695,1) * [MAPK12_rna];
  R695: MAPK12_rna => ; 1;
  // V(696) = K(696,1) * [PTEN_g];
  R696: PTEN_g => ; 1;
  // V(697) = K(697,1) * [PTEN_rna];
  R697: PTEN_rna => ; 1;
  // V(698) = K(698,1) * [TGFB2_g];
  R698: TGFB2_g => ; 1;
  // V(699) = K(699,1) * [TGFB2_rna];
  R699: TGFB2_rna => ; 1;
  // V(700) = K(700,1) * [MDM2_g];
  R700: MDM2_g => ; 1;
  // V(701) = K(701,1) * [MDM2_rna];
  R701: MDM2_rna => ; 1;
  // V(702) = K(702,1) * [RELA_g];
  R702: RELA_g => ; 1;
  // V(703) = K(703,1) * [RELA_rna];
  R703: RELA_rna => ; 1;
  // V(704) = K(704,1) * [GLO1_g];
  R704: GLO1_g => ; 1;
  // V(705) = K(705,1) * [GLO1_rna];
  R705: GLO1_rna => ; 1;
  // V(706) = K(706,1) * [PRKCZ_g];
  R706: PRKCZ_g => ; 1;
  // V(707) = K(707,1) * [PRKCZ_rna];
  R707: PRKCZ_rna => ; 1;
  // V(708) = K(708,1) * [PPARA_g];
  R708: PPARA_g => ; 1;
  // V(709) = K(709,1) * [PPARA_rna];
  R709: PPARA_rna => ; 1;
  // V(710) = K(710,1) * [EP300_g];
  R710: EP300_g => ; 1;
  // V(711) = K(711,1) * [EP300_rna];
  R711: EP300_rna => ; 1;
  // V(712) = K(712,1) * [PTPRJ_g];
  R712: PTPRJ_g => ; 1;
  // V(713) = K(713,1) * [PTPRJ_rna];
  R713: PTPRJ_rna => ; 1;
  // V(714) = K(714,1) * [PRKAA1_g];
  R714: PRKAA1_g => ; 1;
  // V(715) = K(715,1) * [PRKAA1_rna];
  R715: PRKAA1_rna => ; 1;
  // V(716) = K(716,1) * [SMAD4_g];
  R716: SMAD4_g => ; 1;
  // V(717) = K(717,1) * [SMAD4_rna];
  R717: SMAD4_rna => ; 1;
  // V(718) = K(718,1) * [ATR_g];
  R718: ATR_g => ; 1;
  // V(719) = K(719,1) * [ATR_rna];
  R719: ATR_rna => ; 1;
  // V(720) = K(720,1) * [HES1_g];
  R720: HES1_g => ; 1;
  // V(721) = K(721,1) * [HES1_rna];
  R721: HES1_rna => ; 1;
  // V(722) = K(722,1) * [SMAD2_g];
  R722: SMAD2_g => ; 1;
  // V(723) = K(723,1) * [SMAD2_rna];
  R723: SMAD2_rna => ; 1;
  // V(724) = K(724,1) * [SMAD1_g];
  R724: SMAD1_g => ; 1;
  // V(725) = K(725,1) * [SMAD1_rna];
  R725: SMAD1_rna => ; 1;
  // V(726) = K(726,1) * [STK11_g];
  R726: STK11_g => ; 1;
  // V(727) = K(727,1) * [STK11_rna];
  R727: STK11_rna => ; 1;
  // V(728) = K(728,1) * [NFE2L2_g];
  R728: NFE2L2_g => ; 1;
  // V(729) = K(729,1) * [NFE2L2_rna];
  R729: NFE2L2_rna => ; 1;
  // V(730) = K(730,1) * [PKN1_g];
  R730: PKN1_g => ; 1;
  // V(731) = K(731,1) * [PKN1_rna];
  R731: PKN1_rna => ; 1;
  // V(732) = K(732,1) * [OCLN_g];
  R732: OCLN_g => ; 1;
  // V(733) = K(733,1) * [OCLN_rna];
  R733: OCLN_rna => ; 1;
  // V(734) = K(734,1) * [SYVN1_g];
  R734: SYVN1_g => ; 1;
  // V(735) = K(735,1) * [SYVN1_rna];
  R735: SYVN1_rna => ; 1;
  // V(736) = K(736,1) * [DEPTOR_g];
  R736: DEPTOR_g => ; 1;
  // V(737) = K(737,1) * [DEPTOR_rna];
  R737: DEPTOR_rna => ; 1;
  // V(738) = K(738,1) * [MYLIP_g];
  R738: MYLIP_g => ; 1;
  // V(739) = K(739,1) * [MYLIP_rna];
  R739: MYLIP_rna => ; 1;
  // V(740) = K(740,1) * [PINK1_g];
  R740: PINK1_g => ; 1;
  // V(741) = K(741,1) * [PINK1_rna];
  R741: PINK1_rna => ; 1;
  // V(742) = K(742,1) * [TXNIP_g];
  R742: TXNIP_g => ; 1;
  // V(743) = K(743,1) * [TXNIP_rna];
  R743: TXNIP_rna => ; 1;
  // V(744) = K(744,1) * [PLK2_g];
  R744: PLK2_g => ; 1;
  // V(745) = K(745,1) * [PLK2_rna];
  R745: PLK2_rna => ; 1;
  // V(746) = K(746,1) * [RNF7_g];
  R746: RNF7_g => ; 1;
  // V(747) = K(747,1) * [RNF7_rna];
  R747: RNF7_rna => ; 1;
  // V(748) = K(748,1) * [ADD3_g];
  R748: ADD3_g => ; 1;
  // V(749) = K(749,1) * [ADD3_rna];
  R749: ADD3_rna => ; 1;
  // V(750) = K(750,1) * [AGO2_g];
  R750: AGO2_g => ; 1;
  // V(751) = K(751,1) * [AGO2_rna];
  R751: AGO2_rna => ; 1;
  // V(752) = K(752,1) * [IKBKB_p];
  R752: IKBKB_p => ; 1;
  // V(753) = K(753,1) * [TLR3_p];
  R753: TLR3_p => ; 1;
  // V(754) = K(754,1) * [SOCS1_p];
  R754: SOCS1_p => ; 1;
  // V(755) = K(755,1) * [ABCA1_p];
  R755: ABCA1_p => ; 1;
  // V(756) = K(756,1) * [SNAI1_p];
  R756: SNAI1_p => ; 1;
  // V(757) = K(757,1) * [EGFR_p];
  R757: EGFR_p => ; 1;
  // V(758) = K(758,1) * [FOS_p];
  R758: FOS_p => ; 1;
  // V(759) = K(759,1) * [ANXA1_p];
  R759: ANXA1_p => ; 1;
  // V(760) = K(760,1) * [NR3C1_p];
  R760: NR3C1_p => ; 1;
  // V(761) = K(761,1) * [TP53_p];
  R761: TP53_p => ; 1;
  // V(762) = K(762,1) * [HMGN1_p];
  R762: HMGN1_p => ; 1;
  // V(763) = K(763,1) * [JUN_p];
  R763: JUN_p => ; 1;
  // V(764) = K(764,1) * [INSR_p];
  R764: INSR_p => ; 1;
  // V(765) = K(765,1) * [LYN_p];
  R765: LYN_p => ; 1;
  // V(766) = K(766,1) * [SP1_p];
  R766: SP1_p => ; 1;
  // V(767) = K(767,1) * [NR3C2_p];
  R767: NR3C2_p => ; 1;
  // V(768) = K(768,1) * [VIM_p];
  R768: VIM_p => ; 1;
  // V(769) = K(769,1) * [UBC_p];
  R769: UBC_p => ; 1;
  // V(770) = K(770,1) * [CALM1_p];
  R770: CALM1_p => ; 1;
  // V(771) = K(771,1) * [BCL2_p];
  R771: BCL2_p => ; 1;
  // V(772) = K(772,1) * [KIT_p];
  R772: KIT_p => ; 1;
  // V(773) = K(773,1) * [GHR_p];
  R773: GHR_p => ; 1;
  // V(774) = K(774,1) * [PKM_p];
  R774: PKM_p => ; 1;
  // V(775) = K(775,1) * [FABP4_p];
  R775: FABP4_p => ; 1;
  // V(776) = K(776,1) * [CREB1_p];
  R776: CREB1_p => ; 1;
  // V(777) = K(777,1) * [PRKCA_p];
  R777: PRKCA_p => ; 1;
  // V(778) = K(778,1) * [JUNB_p];
  R778: JUNB_p => ; 1;
  // V(779) = K(779,1) * [GJA1_p];
  R779: GJA1_p => ; 1;
  // V(780) = K(780,1) * [TFEB_p];
  R780: TFEB_p => ; 1;
  // V(781) = K(781,1) * [NR4A1_p];
  R781: NR4A1_p => ; 1;
  // V(782) = K(782,1) * [ZFP36_p];
  R782: ZFP36_p => ; 1;
  // V(783) = K(783,1) * [PIK3R1_p];
  R783: PIK3R1_p => ; 1;
  // V(784) = K(784,1) * [MAPK1_p];
  R784: MAPK1_p => ; 1;
  // V(785) = K(785,1) * [DUSP1_p];
  R785: DUSP1_p => ; 1;
  // V(786) = K(786,1) * [NOS3_p];
  R786: NOS3_p => ; 1;
  // V(787) = K(787,1) * [CTNNB1_p];
  R787: CTNNB1_p => ; 1;
  // V(788) = K(788,1) * [RORA_p];
  R788: RORA_p => ; 1;
  // V(789) = K(789,1) * [IRS1_p];
  R789: IRS1_p => ; 1;
  // V(790) = K(790,1) * [KDR_p];
  R790: KDR_p => ; 1;
  // V(791) = K(791,1) * [TRIM23_p];
  R791: TRIM23_p => ; 1;
  // V(792) = K(792,1) * [SREBF1_p];
  R792: SREBF1_p => ; 1;
  // V(793) = K(793,1) * [CDKN1A_p];
  R793: CDKN1A_p => ; 1;
  // V(794) = K(794,1) * [STAT3_p];
  R794: STAT3_p => ; 1;
  // V(795) = K(795,1) * [STAT1_p];
  R795: STAT1_p => ; 1;
  // V(796) = K(796,1) * [STAT6_p];
  R796: STAT6_p => ; 1;
  // V(797) = K(797,1) * [STAT5A_p];
  R797: STAT5A_p => ; 1;
  // V(798) = K(798,1) * [MAPK8_p];
  R798: MAPK8_p => ; 1;
  // V(799) = K(799,1) * [MAPK9_p];
  R799: MAPK9_p => ; 1;
  // V(800) = K(800,1) * [YAP1_p];
  R800: YAP1_p => ; 1;
  // V(801) = K(801,1) * [RPS6KA3_p];
  R801: RPS6KA3_p => ; 1;
  // V(802) = K(802,1) * [MAPK12_p];
  R802: MAPK12_p => ; 1;
  // V(803) = K(803,1) * [RCAN1_p];
  R803: RCAN1_p => ; 1;
  // V(804) = K(804,1) * [PTEN_p];
  R804: PTEN_p => ; 1;
  // V(805) = K(805,1) * [SMAD3_p];
  R805: SMAD3_p => ; 1;
  // V(806) = K(806,1) * [MDM2_p];
  R806: MDM2_p => ; 1;
  // V(807) = K(807,1) * [RELA_p];
  R807: RELA_p => ; 1;
  // V(808) = K(808,1) * [GLO1_p];
  R808: GLO1_p => ; 1;
  // V(809) = K(809,1) * [PRKCZ_p];
  R809: PRKCZ_p => ; 1;
  // V(810) = K(810,1) * [PPARA_p];
  R810: PPARA_p => ; 1;
  // V(811) = K(811,1) * [EP300_p];
  R811: EP300_p => ; 1;
  // V(812) = K(812,1) * [PRKAA1_p];
  R812: PRKAA1_p => ; 1;
  // V(813) = K(813,1) * [SMAD4_p];
  R813: SMAD4_p => ; 1;
  // V(814) = K(814,1) * [HES1_p];
  R814: HES1_p => ; 1;
  // V(815) = K(815,1) * [SMAD2_p];
  R815: SMAD2_p => ; 1;
  // V(816) = K(816,1) * [SMAD1_p];
  R816: SMAD1_p => ; 1;
  // V(817) = K(817,1) * [STK11_p];
  R817: STK11_p => ; 1;
  // V(818) = K(818,1) * [NFE2L2_p];
  R818: NFE2L2_p => ; 1;
  // V(819) = K(819,1) * [PKN1_p];
  R819: PKN1_p => ; 1;
  // V(820) = K(820,1) * [OCLN_p];
  R820: OCLN_p => ; 1;
  // V(821) = K(821,1) * [DEPTOR_p];
  R821: DEPTOR_p => ; 1;
  // V(822) = K(822,1) * [TXNIP_p];
  R822: TXNIP_p => ; 1;
  // V(823) = K(823,1) * [ADD3_p];
  R823: ADD3_p => ; 1;
  // V(824) = K(824,1) * [AGO2_p];
  R824: AGO2_p => ; 1;
  // V(825) = K(825,1) * [SIGNOR-C154_p];
  R825: => ; 1;
  // V(826) = K(826,1) * [TLR4_rna];
  R826: TLR4_rna => ; 1;
  // V(827) = K(827,1) * [IKBKB_rna];
  R827: IKBKB_rna => ; 1;
  // V(828) = K(828,1) * [SMAD7_rna];
  R828: SMAD7_rna => ; 1;
  // V(829) = K(829,1) * [TLR3_rna];
  R829: TLR3_rna => ; 1;
  // V(830) = K(830,1) * [ABCA1_rna];
  R830: ABCA1_rna => ; 1;
  // V(831) = K(831,1) * [EGFR_rna];
  R831: EGFR_rna => ; 1;
  // V(832) = K(832,1) * [FOS_rna];
  R832: FOS_rna => ; 1;
  // V(833) = K(833,1) * [LDLR_rna];
  R833: LDLR_rna => ; 1;
  // V(834) = K(834,1) * [EGF_rna];
  R834: EGF_rna => ; 1;
  // V(835) = K(835,1) * [ANXA1_rna];
  R835: ANXA1_rna => ; 1;
  // V(836) = K(836,1) * [TP53_rna];
  R836: TP53_rna => ; 1;
  // V(837) = K(837,1) * [HMGN1_rna];
  R837: HMGN1_rna => ; 1;
  // V(838) = K(838,1) * [INSR_rna];
  R838: INSR_rna => ; 1;
  // V(839) = K(839,1) * [LYN_rna];
  R839: LYN_rna => ; 1;
  // V(840) = K(840,1) * [SP1_rna];
  R840: SP1_rna => ; 1;
  // V(841) = K(841,1) * [NR3C2_rna];
  R841: NR3C2_rna => ; 1;
  // V(842) = K(842,1) * [VIM_rna];
  R842: VIM_rna => ; 1;
  // V(843) = K(843,1) * [FGF2_rna];
  R843: FGF2_rna => ; 1;
  // V(844) = K(844,1) * [UBC_rna];
  R844: UBC_rna => ; 1;
  // V(845) = K(845,1) * [CALM1_rna];
  R845: CALM1_rna => ; 1;
  // V(846) = K(846,1) * [BCL2_rna];
  R846: BCL2_rna => ; 1;
  // V(847) = K(847,1) * [KIT_rna];
  R847: KIT_rna => ; 1;
  // V(848) = K(848,1) * [GHR_rna];
  R848: GHR_rna => ; 1;
  // V(849) = K(849,1) * [FABP4_rna];
  R849: FABP4_rna => ; 1;
  // V(850) = K(850,1) * [CREB1_rna];
  R850: CREB1_rna => ; 1;
  // V(851) = K(851,1) * [PRKCA_rna];
  R851: PRKCA_rna => ; 1;
  // V(852) = K(852,1) * [JUNB_rna];
  R852: JUNB_rna => ; 1;
  // V(853) = K(853,1) * [GJA1_rna];
  R853: GJA1_rna => ; 1;
  // V(854) = K(854,1) * [TFEB_rna];
  R854: TFEB_rna => ; 1;
  // V(855) = K(855,1) * [NR4A1_rna];
  R855: NR4A1_rna => ; 1;
  // V(856) = K(856,1) * [PTPRB_rna];
  R856: PTPRB_rna => ; 1;
  // V(857) = K(857,1) * [ZFP36_rna];
  R857: ZFP36_rna => ; 1;
  // V(858) = K(858,1) * [PIK3R1_rna];
  R858: PIK3R1_rna => ; 1;
  // V(859) = K(859,1) * [MAPK1_rna];
  R859: MAPK1_rna => ; 1;
  // V(860) = K(860,1) * [DUSP1_rna];
  R860: DUSP1_rna => ; 1;
  // V(861) = K(861,1) * [NOS3_rna];
  R861: NOS3_rna => ; 1;
  // V(862) = K(862,1) * [CTNNB1_rna];
  R862: CTNNB1_rna => ; 1;
  // V(863) = K(863,1) * [RORA_rna];
  R863: RORA_rna => ; 1;
  // V(864) = K(864,1) * [IRS1_rna];
  R864: IRS1_rna => ; 1;
  // V(865) = K(865,1) * [KDR_rna];
  R865: KDR_rna => ; 1;
  // V(866) = K(866,1) * [TRIM23_rna];
  R866: TRIM23_rna => ; 1;
  // V(867) = K(867,1) * [TGFBR1_rna];
  R867: TGFBR1_rna => ; 1;
  // V(868) = K(868,1) * [SREBF1_rna];
  R868: SREBF1_rna => ; 1;
  // V(869) = K(869,1) * [STAT3_rna];
  R869: STAT3_rna => ; 1;
  // V(870) = K(870,1) * [STAT6_rna];
  R870: STAT6_rna => ; 1;
  // V(871) = K(871,1) * [STAT5A_rna];
  R871: STAT5A_rna => ; 1;
  // V(872) = K(872,1) * [MAPK8_rna];
  R872: MAPK8_rna => ; 1;
  // V(873) = K(873,1) * [MAPK9_rna];
  R873: MAPK9_rna => ; 1;
  // V(874) = K(874,1) * [YAP1_rna];
  R874: YAP1_rna => ; 1;
  // V(875) = K(875,1) * [LEPR_rna];
  R875: LEPR_rna => ; 1;
  // V(876) = K(876,1) * [MECP2_rna];
  R876: MECP2_rna => ; 1;
  // V(877) = K(877,1) * [RPS6KA3_rna];
  R877: RPS6KA3_rna => ; 1;
  // V(878) = K(878,1) * [MAPK12_rna];
  R878: MAPK12_rna => ; 1;
  // V(879) = K(879,1) * [PTEN_rna];
  R879: PTEN_rna => ; 1;
  // V(880) = K(880,1) * [TGFB2_rna];
  R880: TGFB2_rna => ; 1;
  // V(881) = K(881,1) * [MDM2_rna];
  R881: MDM2_rna => ; 1;
  // V(882) = K(882,1) * [RELA_rna];
  R882: RELA_rna => ; 1;
  // V(883) = K(883,1) * [GLO1_rna];
  R883: GLO1_rna => ; 1;
  // V(884) = K(884,1) * [PRKCZ_rna];
  R884: PRKCZ_rna => ; 1;
  // V(885) = K(885,1) * [PPARA_rna];
  R885: PPARA_rna => ; 1;
  // V(886) = K(886,1) * [EP300_rna];
  R886: EP300_rna => ; 1;
  // V(887) = K(887,1) * [PTPRJ_rna];
  R887: PTPRJ_rna => ; 1;
  // V(888) = K(888,1) * [PRKAA1_rna];
  R888: PRKAA1_rna => ; 1;
  // V(889) = K(889,1) * [SMAD4_rna];
  R889: SMAD4_rna => ; 1;
  // V(890) = K(890,1) * [ATR_rna];
  R890: ATR_rna => ; 1;
  // V(891) = K(891,1) * [HES1_rna];
  R891: HES1_rna => ; 1;
  // V(892) = K(892,1) * [SMAD2_rna];
  R892: SMAD2_rna => ; 1;
  // V(893) = K(893,1) * [SMAD1_rna];
  R893: SMAD1_rna => ; 1;
  // V(894) = K(894,1) * [STK11_rna];
  R894: STK11_rna => ; 1;
  // V(895) = K(895,1) * [NFE2L2_rna];
  R895: NFE2L2_rna => ; 1;
  // V(896) = K(896,1) * [PKN1_rna];
  R896: PKN1_rna => ; 1;
  // V(897) = K(897,1) * [OCLN_rna];
  R897: OCLN_rna => ; 1;
  // V(898) = K(898,1) * [SYVN1_rna];
  R898: SYVN1_rna => ; 1;
  // V(899) = K(899,1) * [DEPTOR_rna];
  R899: DEPTOR_rna => ; 1;
  // V(900) = K(900,1) * [MYLIP_rna];
  R900: MYLIP_rna => ; 1;
  // V(901) = K(901,1) * [PINK1_rna];
  R901: PINK1_rna => ; 1;
  // V(902) = K(902,1) * [TXNIP_rna];
  R902: TXNIP_rna => ; 1;
  // V(903) = K(903,1) * [PLK2_rna];
  R903: PLK2_rna => ; 1;
  // V(904) = K(904,1) * [RNF7_rna];
  R904: RNF7_rna => ; 1;
  // V(905) = K(905,1) * [ADD3_rna];
  R905: ADD3_rna => ; 1;
  // V(906) = K(906,1) * [AGO2_rna];
  R906: AGO2_rna => ; 1;
end
