// SBML level 3 version 2

model GlomerularCapillary()

  // Compartments:
  compartment cell = 1;

  // Species:
  species ADD3 in cell = 1/cell;
  species ADD3_g in cell = 1/cell;
  species ADD3_p in cell = 1/cell;
  species ADD3_rna in cell = 1/cell;
  species AEBP1 in cell = 1/cell;
  species AEBP1_g in cell = 1/cell;
  species AEBP1_p in cell = 1/cell;
  species AEBP1_rna in cell = 1/cell;
  species AGO2 in cell = 1/cell;
  species AGO2_g in cell = 1/cell;
  species AGO2_p in cell = 1/cell;
  species AGO2_rna in cell = 1/cell;
  species AKT1 in cell = 1/cell;
  species AKT1S1 in cell = 1/cell;
  species AKT1S1_g in cell = 1/cell;
  species AKT1S1_p in cell = 1/cell;
  species AKT1S1_rna in cell = 1/cell;
  species AKT1_g in cell = 1/cell;
  species AKT1_p in cell = 1/cell;
  species AKT1_rna in cell = 1/cell;
  species ANXA1 in cell = 1/cell;
  species ANXA1_g in cell = 1/cell;
  species ANXA1_p in cell = 1/cell;
  species ANXA1_rna in cell = 1/cell;
  species AQP1 in cell = 1/cell;
  species AQP1_g in cell = 1/cell;
  species AQP1_p in cell = 1/cell;
  species AQP1_rna in cell = 1/cell;
  species AR in cell = 1/cell;
  species AR_g in cell = 1/cell;
  species AR_p in cell = 1/cell;
  species AR_rna in cell = 1/cell;
  species ATR in cell = 1/cell;
  species ATR_g in cell = 1/cell;
  species ATR_rna in cell = 1/cell;
  species BAD in cell = 1/cell;
  species BAD_g in cell = 1/cell;
  species BAD_p in cell = 1/cell;
  species BAD_rna in cell = 1/cell;
  species BECN1 in cell = 1/cell;
  species BECN1_g in cell = 1/cell;
  species BECN1_p in cell = 1/cell;
  species BECN1_rna in cell = 1/cell;
  species CCL2 in cell = 1/cell;
  species CCL2_g in cell = 1/cell;
  species CCL2_rna in cell = 1/cell;
  species CCND1 in cell = 1/cell;
  species CCND1_g in cell = 1/cell;
  species CCND1_rna in cell = 1/cell;
  species CD34 in cell = 1/cell;
  species CD34_g in cell = 1/cell;
  species CD34_rna in cell = 1/cell;
  species CDKN1A in cell = 1/cell;
  species CDKN1A_g in cell = 1/cell;
  species CDKN1A_p in cell = 1/cell;
  species CDKN1A_rna in cell = 1/cell;
  species CLDN5 in cell = 1/cell;
  species CLDN5_g in cell = 1/cell;
  species CLDN5_rna in cell = 1/cell;
  species CREB1 in cell = 1/cell;
  species CREB1_g in cell = 1/cell;
  species CREB1_p in cell = 1/cell;
  species CREB1_rna in cell = 1/cell;
  species CTNNB1 in cell = 1/cell;
  species CTNNB1_g in cell = 1/cell;
  species CTNNB1_p in cell = 1/cell;
  species CTNNB1_rna in cell = 1/cell;
  species DDIT3 in cell = 1/cell;
  species DDIT3_g in cell = 1/cell;
  species DDIT3_p in cell = 1/cell;
  species DDIT3_rna in cell = 1/cell;
  species DNM1L in cell = 1/cell;
  species DNM1L_g in cell = 1/cell;
  species DNM1L_p in cell = 1/cell;
  species DNM1L_rna in cell = 1/cell;
  species DUSP1 in cell = 1/cell;
  species DUSP1_g in cell = 1/cell;
  species DUSP1_p in cell = 1/cell;
  species DUSP1_rna in cell = 1/cell;
  species EGF in cell = 1/cell;
  species EGFR in cell = 1/cell;
  species EGFR_g in cell = 1/cell;
  species EGFR_p in cell = 1/cell;
  species EGFR_rna in cell = 1/cell;
  species EGF_g in cell = 1/cell;
  species EGF_rna in cell = 1/cell;
  species EP300 in cell = 1/cell;
  species EP300_g in cell = 1/cell;
  species EP300_p in cell = 1/cell;
  species EP300_rna in cell = 1/cell;
  species ERG in cell = 1/cell;
  species ERG_g in cell = 1/cell;
  species ERG_rna in cell = 1/cell;
  species ERN1 in cell = 1/cell;
  species ERN1_g in cell = 1/cell;
  species ERN1_p in cell = 1/cell;
  species ERN1_rna in cell = 1/cell;
  species FABP4 in cell = 1/cell;
  species FABP4_g in cell = 1/cell;
  species FABP4_p in cell = 1/cell;
  species FABP4_rna in cell = 1/cell;
  species FAS in cell = 1/cell;
  species FAS_g in cell = 1/cell;
  species FAS_rna in cell = 1/cell;
  species FGF1 in cell = 1/cell;
  species FGF1_g in cell = 1/cell;
  species FGF1_rna in cell = 1/cell;
  species FGF2 in cell = 1/cell;
  species FGF2_g in cell = 1/cell;
  species FGF2_rna in cell = 1/cell;
  species HDAC1 in cell = 1/cell;
  species HDAC1_g in cell = 1/cell;
  species HDAC1_rna in cell = 1/cell;
  species HES1 in cell = 1/cell;
  species HES1_g in cell = 1/cell;
  species HES1_p in cell = 1/cell;
  species HES1_rna in cell = 1/cell;
  species HIF1A in cell = 1/cell;
  species HIF1A_g in cell = 1/cell;
  species HIF1A_p in cell = 1/cell;
  species HIF1A_rna in cell = 1/cell;
  species HMGN1 in cell = 1/cell;
  species HMGN1_g in cell = 1/cell;
  species HMGN1_p in cell = 1/cell;
  species HMGN1_rna in cell = 1/cell;
  species HSPB1 in cell = 1/cell;
  species HSPB1_g in cell = 1/cell;
  species HSPB1_p in cell = 1/cell;
  species HSPB1_rna in cell = 1/cell;
  species IGF1R in cell = 1/cell;
  species IGF1R_g in cell = 1/cell;
  species IGF1R_p in cell = 1/cell;
  species IGF1R_rna in cell = 1/cell;
  species IKBKB in cell = 1/cell;
  species IKBKB_g in cell = 1/cell;
  species IKBKB_p in cell = 1/cell;
  species IKBKB_rna in cell = 1/cell;
  species ILK in cell = 1/cell;
  species ILK_g in cell = 1/cell;
  species ILK_p in cell = 1/cell;
  species ILK_rna in cell = 1/cell;
  species INSR in cell = 1/cell;
  species INSR_g in cell = 1/cell;
  species INSR_p in cell = 1/cell;
  species INSR_rna in cell = 1/cell;
  species IRF1 in cell = 1/cell;
  species IRF1_g in cell = 1/cell;
  species IRF1_rna in cell = 1/cell;
  species IRF3 in cell = 1/cell;
  species IRF3_g in cell = 1/cell;
  species IRF3_p in cell = 1/cell;
  species IRF3_rna in cell = 1/cell;
  species JAK1 in cell = 1/cell;
  species JAK1_g in cell = 1/cell;
  species JAK1_p in cell = 1/cell;
  species JAK1_rna in cell = 1/cell;
  species KDM6A in cell = 1/cell;
  species KDM6A_g in cell = 1/cell;
  species KDM6A_rna in cell = 1/cell;
  species KDM6B in cell = 1/cell;
  species KDM6B_g in cell = 1/cell;
  species KDM6B_rna in cell = 1/cell;
  species KDR in cell = 1/cell;
  species KDR_g in cell = 1/cell;
  species KDR_p in cell = 1/cell;
  species KDR_rna in cell = 1/cell;
  species KLF9 in cell = 1/cell;
  species KLF9_g in cell = 1/cell;
  species KLF9_rna in cell = 1/cell;
  species LDLR in cell = 1/cell;
  species LDLR_g in cell = 1/cell;
  species LDLR_rna in cell = 1/cell;
  species LYN in cell = 1/cell;
  species LYN_g in cell = 1/cell;
  species LYN_p in cell = 1/cell;
  species LYN_rna in cell = 1/cell;
  species MAP4K2 in cell = 1/cell;
  species MAP4K2_g in cell = 1/cell;
  species MAP4K2_p in cell = 1/cell;
  species MAP4K2_rna in cell = 1/cell;
  species MAPK1 in cell = 1/cell;
  species MAPK1_g in cell = 1/cell;
  species MAPK1_p in cell = 1/cell;
  species MAPK1_rna in cell = 1/cell;
  species MAPK6 in cell = 1/cell;
  species MAPK6_g in cell = 1/cell;
  species MAPK6_p in cell = 1/cell;
  species MAPK6_rna in cell = 1/cell;
  species MAPK8 in cell = 1/cell;
  species MAPK8_g in cell = 1/cell;
  species MAPK8_p in cell = 1/cell;
  species MAPK8_rna in cell = 1/cell;
  species MDM2 in cell = 1/cell;
  species MDM2_g in cell = 1/cell;
  species MDM2_p in cell = 1/cell;
  species MDM2_rna in cell = 1/cell;
  species MECP2 in cell = 1/cell;
  species MECP2_g in cell = 1/cell;
  species MECP2_rna in cell = 1/cell;
  species MFN1 in cell = 1/cell;
  species MFN1_g in cell = 1/cell;
  species MFN1_p in cell = 1/cell;
  species MFN1_rna in cell = 1/cell;
  species MFN2 in cell = 1/cell;
  species MFN2_g in cell = 1/cell;
  species MFN2_p in cell = 1/cell;
  species MFN2_rna in cell = 1/cell;
  species MYLIP in cell = 1/cell;
  species MYLIP_g in cell = 1/cell;
  species MYLIP_rna in cell = 1/cell;
  species NOS3 in cell = 1/cell;
  species NOS3_g in cell = 1/cell;
  species NOS3_p in cell = 1/cell;
  species NOS3_rna in cell = 1/cell;
  species NOTCH1 in cell = 1/cell;
  species NOTCH1_g in cell = 1/cell;
  species NOTCH1_rna in cell = 1/cell;
  species NOTCH4 in cell = 1/cell;
  species NOTCH4_g in cell = 1/cell;
  species NOTCH4_rna in cell = 1/cell;
  species NR3C1 in cell = 1/cell;
  species NR3C1_g in cell = 1/cell;
  species NR3C1_p in cell = 1/cell;
  species NR3C1_rna in cell = 1/cell;
  species NR4A1 in cell = 1/cell;
  species NR4A1_g in cell = 1/cell;
  species NR4A1_p in cell = 1/cell;
  species NR4A1_rna in cell = 1/cell;
  species NUMB in cell = 1/cell;
  species NUMB_g in cell = 1/cell;
  species NUMB_rna in cell = 1/cell;
  species OCLN in cell = 1/cell;
  species OCLN_g in cell = 1/cell;
  species OCLN_p in cell = 1/cell;
  species OCLN_rna in cell = 1/cell;
  species PARK7 in cell = 1/cell;
  species PARK7_g in cell = 1/cell;
  species PARK7_p in cell = 1/cell;
  species PARK7_rna in cell = 1/cell;
  species PIK3CA in cell = 1/cell;
  species PIK3CA_g in cell = 1/cell;
  species PIK3CA_rna in cell = 1/cell;
  species PIK3R1 in cell = 1/cell;
  species PIK3R1_g in cell = 1/cell;
  species PIK3R1_p in cell = 1/cell;
  species PIK3R1_rna in cell = 1/cell;
  species PINK1 in cell = 1/cell;
  species PINK1_g in cell = 1/cell;
  species PINK1_rna in cell = 1/cell;
  species PKM in cell = 1/cell;
  species PKM_g in cell = 1/cell;
  species PKM_p in cell = 1/cell;
  species PKM_rna in cell = 1/cell;
  species PKN1 in cell = 1/cell;
  species PKN1_g in cell = 1/cell;
  species PKN1_p in cell = 1/cell;
  species PKN1_rna in cell = 1/cell;
  species PLK2 in cell = 1/cell;
  species PLK2_g in cell = 1/cell;
  species PLK2_rna in cell = 1/cell;
  species PPARG in cell = 1/cell;
  species PPARG_g in cell = 1/cell;
  species PPARG_p in cell = 1/cell;
  species PPARG_rna in cell = 1/cell;
  species PRKAA1 in cell = 1/cell;
  species PRKAA1_g in cell = 1/cell;
  species PRKAA1_p in cell = 1/cell;
  species PRKAA1_rna in cell = 1/cell;
  species PRKCA in cell = 1/cell;
  species PRKCA_g in cell = 1/cell;
  species PRKCA_p in cell = 1/cell;
  species PRKCA_rna in cell = 1/cell;
  species PTEN in cell = 1/cell;
  species PTEN_g in cell = 1/cell;
  species PTEN_p in cell = 1/cell;
  species PTEN_rna in cell = 1/cell;
  species PTPN2 in cell = 1/cell;
  species PTPN2_g in cell = 1/cell;
  species PTPN2_rna in cell = 1/cell;
  species RAC1 in cell = 1/cell;
  species RAC1_g in cell = 1/cell;
  species RAC1_p in cell = 1/cell;
  species RAC1_rna in cell = 1/cell;
  species ROCK1 in cell = 1/cell;
  species ROCK1_g in cell = 1/cell;
  species ROCK1_rna in cell = 1/cell;
  species RPS6KA3 in cell = 1/cell;
  species RPS6KA3_g in cell = 1/cell;
  species RPS6KA3_p in cell = 1/cell;
  species RPS6KA3_rna in cell = 1/cell;
  species SIRT1 in cell = 1/cell;
  species SIRT1_g in cell = 1/cell;
  species SIRT1_p in cell = 1/cell;
  species SIRT1_rna in cell = 1/cell;
  species SMAD1 in cell = 1/cell;
  species SMAD1_g in cell = 1/cell;
  species SMAD1_p in cell = 1/cell;
  species SMAD1_rna in cell = 1/cell;
  species SMAD2 in cell = 1/cell;
  species SMAD2_g in cell = 1/cell;
  species SMAD2_p in cell = 1/cell;
  species SMAD2_rna in cell = 1/cell;
  species SMAD3 in cell = 1/cell;
  species SMAD3_g in cell = 1/cell;
  species SMAD3_p in cell = 1/cell;
  species SMAD3_rna in cell = 1/cell;
  species SMAD4 in cell = 1/cell;
  species SMAD4_g in cell = 1/cell;
  species SMAD4_p in cell = 1/cell;
  species SMAD4_rna in cell = 1/cell;
  species SMAD7 in cell = 1/cell;
  species SMAD7_g in cell = 1/cell;
  species SMAD7_rna in cell = 1/cell;
  species SMURF1 in cell = 1/cell;
  species SMURF1_g in cell = 1/cell;
  species SMURF1_p in cell = 1/cell;
  species SMURF1_rna in cell = 1/cell;
  species SOCS1 in cell = 1/cell;
  species SOCS1_g in cell = 1/cell;
  species SOCS1_p in cell = 1/cell;
  species SOCS1_rna in cell = 1/cell;
  species SP1 in cell = 1/cell;
  species SP1_g in cell = 1/cell;
  species SP1_p in cell = 1/cell;
  species SP1_rna in cell = 1/cell;
  species STAT1 in cell = 1/cell;
  species STAT1_g in cell = 1/cell;
  species STAT1_p in cell = 1/cell;
  species STAT1_rna in cell = 1/cell;
  species STAT6 in cell = 1/cell;
  species STAT6_g in cell = 1/cell;
  species STAT6_p in cell = 1/cell;
  species STAT6_rna in cell = 1/cell;
  species TGFB2 in cell = 1/cell;
  species TGFB2_g in cell = 1/cell;
  species TGFB2_rna in cell = 1/cell;
  species TGFBR1 in cell = 1/cell;
  species TGFBR1_g in cell = 1/cell;
  species TGFBR1_rna in cell = 1/cell;
  species TLR3 in cell = 1/cell;
  species TLR3_g in cell = 1/cell;
  species TLR3_p in cell = 1/cell;
  species TLR3_rna in cell = 1/cell;
  species TLR4 in cell = 1/cell;
  species TLR4_g in cell = 1/cell;
  species TLR4_rna in cell = 1/cell;
  species TP53 in cell = 1/cell;
  species TP53_g in cell = 1/cell;
  species TP53_p in cell = 1/cell;
  species TP53_rna in cell = 1/cell;
  species TRIM23 in cell = 1/cell;
  species TRIM23_g in cell = 1/cell;
  species TRIM23_p in cell = 1/cell;
  species TRIM23_rna in cell = 1/cell;
  species TSC2 in cell = 1/cell;
  species TSC2_g in cell = 1/cell;
  species TSC2_p in cell = 1/cell;
  species TSC2_rna in cell = 1/cell;
  species UBC in cell = 1/cell;
  species UBC_g in cell = 1/cell;
  species UBC_p in cell = 1/cell;
  species UBC_rna in cell = 1/cell;
  species VEGFA in cell = 1/cell;
  species VEGFA_g in cell = 1/cell;
  species VEGFA_rna in cell = 1/cell;
  species VIM in cell = 1/cell;
  species VIM_g in cell = 1/cell;
  species VIM_p in cell = 1/cell;
  species VIM_rna in cell = 1/cell;
  species XBP1 in cell = 1/cell;
  species XBP1_g in cell = 1/cell;
  species XBP1_p in cell = 1/cell;
  species XBP1_rna in cell = 1/cell;
  species YAP1 in cell = 1/cell;
  species YAP1_g in cell = 1/cell;
  species YAP1_p in cell = 1/cell;
  species YAP1_rna in cell = 1/cell;
  species ZFP36 in cell = 1/cell;
  species ZFP36_g in cell = 1/cell;
  species ZFP36_p in cell = 1/cell;
  species ZFP36_rna in cell = 1/cell;

  // Reactions:
  // V(1) = K(1,1) * [SMAD2_p] * [SMAD4_p] -K(1,2) * [SIGNOR-C8];
  R1: SMAD2_p => SMAD4_p; 1;
  // V(2) = K(2,1) * [SMAD4_p] * [SMAD3_p] -K(2,2) * [SIGNOR-C9];
  R2: SMAD4_p => SMAD3_p; 1;
  // V(3) = K(3,1) * [SMAD4_p] * [SMAD1] * [SMAD1] -K(3,2) * [SIGNOR-C85];
  R3: SMAD1 => SMAD4_p; 1;
  // V(4) = K(4,1) * [PIK3R1_p] * [PIK3CA] -K(4,2) * [SIGNOR-C156];
  R4: PIK3CA => PIK3R1_p; 1;
  // V(5) = K(5,1) * [TGFBR1] * [SMAD2] -K(5,2) * [TGFBR1 |SMAD2];
  R5: TGFBR1 => SMAD2; 1;
  // V(6) = K(6,1) * [TGFBR1 |SMAD2];
  R6: TGFBR1 => SMAD2; 1;
  // V(7) = K(7,1) * [MAPK1_p] * [EP300] -K(7,2) * [MAPK1_p |EP300];
  R7: EP300 => MAPK1_p; 1;
  // V(8) = K(8,1) * [MAPK1_p |EP300];
  R8: EP300 => MAPK1_p; 1;
  // V(9) = K(9,1) * [MAPK1_p] * [HIF1A] -K(9,2) * [MAPK1_p |HIF1A];
  R9: HIF1A => MAPK1_p; 1;
  // V(10) = K(10,1) * [MAPK1_p |HIF1A];
  R10: HIF1A => MAPK1_p; 1;
  // V(11) = K(11,1) * [MAPK1_p] * [NR3C1] -K(11,2) * [MAPK1_p |NR3C1];
  R11: NR3C1 => MAPK1_p; 1;
  // V(12) = K(12,1) * [MAPK1_p |NR3C1];
  R12: NR3C1 => MAPK1_p; 1;
  // V(13) = K(13,1) * [MAPK1_p] * [RPS6KA3] -K(13,2) * [MAPK1_p |RPS6KA3];
  R13: RPS6KA3 => MAPK1_p; 1;
  // V(14) = K(14,1) * [MAPK1_p |RPS6KA3];
  R14: RPS6KA3 => MAPK1_p; 1;
  // V(15) = K(15,1) * [PRKCA_p] * [CTNNB1] -K(15,2) * [PRKCA_p |CTNNB1];
  R15: CTNNB1 => PRKCA_p; 1;
  // V(16) = K(16,1) * [PRKCA_p |CTNNB1];
  R16: CTNNB1 => PRKCA_p; 1;
  // V(17) = K(17,1) * [MAPK1_p] * [SMAD1] -K(17,2) * [MAPK1_p |SMAD1];
  R17: SMAD1 => MAPK1_p; 1;
  // V(18) = K(18,1) * [MAPK1_p |SMAD1];
  R18: SMAD1 => MAPK1_p; 1;
  // V(19) = K(19,1) * [AKT1_p] * [MDM2] -K(19,2) * [AKT1_p |MDM2];
  R19: AKT1_p => MDM2; 1;
  // V(20) = K(20,1) * [AKT1_p |MDM2];
  R20: AKT1_p => MDM2; 1;
  // V(21) = K(21,1) * [AKT1_p] * [NOS3] -K(21,2) * [AKT1_p |NOS3];
  R21: NOS3 => AKT1_p; 1;
  // V(22) = K(22,1) * [AKT1_p |NOS3];
  R22: NOS3 => AKT1_p; 1;
  // V(23) = K(23,1) * [AKT1_p] * [PRKAA1] -K(23,2) * [AKT1_p |PRKAA1];
  R23: PRKAA1 => AKT1_p; 1;
  // V(24) = K(24,1) * [AKT1_p |PRKAA1];
  R24: PRKAA1 => AKT1_p; 1;
  // V(25) = K(25,1) * [EGFR_p] * [EGFR] -K(25,2) * [EGFR_p |EGFR];
  R25: EGFR_p => EGFR; 1;
  // V(26) = K(26,1) * [EGFR_p |EGFR];
  R26: EGFR_p => EGFR; 1;
  // V(27) = K(27,1) * [IKBKB] * [IKBKB] -K(27,2) * [IKBKB |IKBKB];
  R27: IKBKB => ; 1;
  // V(28) = K(28,1) * [IKBKB |IKBKB];
  R28: IKBKB => ; 1;
  // V(29) = K(29,1) * [PRKCA_p] * [VIM] -K(29,2) * [PRKCA_p |VIM];
  R29: PRKCA_p => VIM; 1;
  // V(30) = K(30,1) * [PRKCA_p |VIM];
  R30: PRKCA_p => VIM; 1;
  // V(31) = K(31,1) * [MAPK1_p] * [SMAD4] -K(31,2) * [MAPK1_p |SMAD4];
  R31: SMAD4 => MAPK1_p; 1;
  // V(32) = K(32,1) * [MAPK1_p |SMAD4];
  R32: SMAD4 => MAPK1_p; 1;
  // V(33) = K(33,1) * [ROCK1] * [DNM1L] -K(33,2) * [ROCK1 |DNM1L];
  R33: ROCK1 => DNM1L; 1;
  // V(34) = K(34,1) * [ROCK1 |DNM1L];
  R34: ROCK1 => DNM1L; 1;
  // V(35) = K(35,1) * [AKT1_p] * [NR4A1] -K(35,2) * [AKT1_p |NR4A1];
  R35: NR4A1 => AKT1_p; 1;
  // V(36) = K(36,1) * [AKT1_p |NR4A1];
  R36: NR4A1 => AKT1_p; 1;
  // V(37) = K(37,1) * [PRKCA_p] * [EGFR] -K(37,2) * [PRKCA_p |EGFR];
  R37: EGFR => PRKCA_p; 1;
  // V(38) = K(38,1) * [PRKCA_p |EGFR];
  R38: EGFR => PRKCA_p; 1;
  // V(39) = K(39,1) * [KDR_p] * [KDR] -K(39,2) * [KDR_p |KDR];
  R39: KDR => KDR_p; 1;
  // V(40) = K(40,1) * [KDR_p |KDR];
  R40: KDR => KDR_p; 1;
  // V(41) = K(41,1) * [AKT1_p] * [AR] -K(41,2) * [AKT1_p |AR];
  R41: AR => AKT1_p; 1;
  // V(42) = K(42,1) * [AKT1_p |AR];
  R42: AR => AKT1_p; 1;
  // V(43) = K(43,1) * [MAPK1_p] * [SMAD2] -K(43,2) * [MAPK1_p |SMAD2];
  R43: SMAD2 => MAPK1_p; 1;
  // V(44) = K(44,1) * [MAPK1_p |SMAD2];
  R44: SMAD2 => MAPK1_p; 1;
  // V(45) = K(45,1) * [INSR_p] * [INSR] -K(45,2) * [INSR_p |INSR];
  R45: INSR_p => INSR; 1;
  // V(46) = K(46,1) * [INSR_p |INSR];
  R46: INSR_p => INSR; 1;
  // V(47) = K(47,1) * [AKT1_p] * [BAD] -K(47,2) * [AKT1_p |BAD];
  R47: BAD => AKT1_p; 1;
  // V(48) = K(48,1) * [AKT1_p |BAD];
  R48: BAD => AKT1_p; 1;
  // V(49) = K(49,1) * [JAK1_p] * [STAT1] -K(49,2) * [JAK1_p |STAT1];
  R49: STAT1 => JAK1_p; 1;
  // V(50) = K(50,1) * [JAK1_p |STAT1];
  R50: STAT1 => JAK1_p; 1;
  // V(51) = K(51,1) * [MAPK1_p] * [DUSP1] -K(51,2) * [MAPK1_p |DUSP1];
  R51: DUSP1 => MAPK1_p; 1;
  // V(52) = K(52,1) * [MAPK1_p |DUSP1];
  R52: DUSP1 => MAPK1_p; 1;
  // V(53) = K(53,1) * [AKT1_p] * [HSPB1] -K(53,2) * [AKT1_p |HSPB1];
  R53: HSPB1 => AKT1_p; 1;
  // V(54) = K(54,1) * [AKT1_p |HSPB1];
  R54: HSPB1 => AKT1_p; 1;
  // V(55) = K(55,1) * [RPS6KA3_p] * [HMGN1] -K(55,2) * [RPS6KA3_p |HMGN1];
  R55: HMGN1 => RPS6KA3_p; 1;
  // V(56) = K(56,1) * [RPS6KA3_p |HMGN1];
  R56: HMGN1 => RPS6KA3_p; 1;
  // V(57) = K(57,1) * [PKN1_p] * [PKN1] -K(57,2) * [PKN1_p |PKN1];
  R57: PKN1 => PKN1_p; 1;
  // V(58) = K(58,1) * [PKN1_p |PKN1];
  R58: PKN1 => PKN1_p; 1;
  // V(59) = K(59,1) * [AKT1_p] * [CDKN1A] -K(59,2) * [AKT1_p |CDKN1A];
  R59: AKT1_p => CDKN1A; 1;
  // V(60) = K(60,1) * [AKT1_p |CDKN1A];
  R60: AKT1_p => CDKN1A; 1;
  // V(61) = K(61,1) * [PRKCA_p] * [AQP1] -K(61,2) * [PRKCA_p |AQP1];
  R61: PRKCA_p => AQP1; 1;
  // V(62) = K(62,1) * [PRKCA_p |AQP1];
  R62: PRKCA_p => AQP1; 1;
  // V(63) = K(63,1) * [MAPK8_p] * [TP53] -K(63,2) * [MAPK8_p |TP53];
  R63: TP53 => MAPK8_p; 1;
  // V(64) = K(64,1) * [MAPK8_p |TP53];
  R64: TP53 => MAPK8_p; 1;
  // V(65) = K(65,1) * [MAPK1_p] * [TSC2] -K(65,2) * [MAPK1_p |TSC2];
  R65: TSC2 => MAPK1_p; 1;
  // V(66) = K(66,1) * [MAPK1_p |TSC2];
  R66: TSC2 => MAPK1_p; 1;
  // V(67) = K(67,1) * [MAPK8_p] * [MFN2] -K(67,2) * [MAPK8_p |MFN2];
  R67: MAPK8_p => MFN2; 1;
  // V(68) = K(68,1) * [MAPK8_p |MFN2];
  R68: MAPK8_p => MFN2; 1;
  // V(69) = K(69,1) * [INSR_p] * [SIGNOR-C156] -K(69,2) * [INSR_p |SIGNOR-C156];
  R69: INSR_p => ; 1;
  // V(70) = K(70,1) * [INSR_p |SIGNOR-C156];
  R70: INSR_p => ; 1;
  // V(71) = K(71,1) * [MAPK8_p] * [NR3C1] -K(71,2) * [MAPK8_p |NR3C1];
  R71: MAPK8_p => NR3C1; 1;
  // V(72) = K(72,1) * [MAPK8_p |NR3C1];
  R72: MAPK8_p => NR3C1; 1;
  // V(73) = K(73,1) * [PRKCA_p] * [PRKCA] -K(73,2) * [PRKCA_p |PRKCA];
  R73: PRKCA => PRKCA_p; 1;
  // V(74) = K(74,1) * [PRKCA_p |PRKCA];
  R74: PRKCA => PRKCA_p; 1;
  // V(75) = K(75,1) * [MAPK1_p] * [PPARG] -K(75,2) * [MAPK1_p |PPARG];
  R75: PPARG => MAPK1_p; 1;
  // V(76) = K(76,1) * [MAPK1_p |PPARG];
  R76: PPARG => MAPK1_p; 1;
  // V(77) = K(77,1) * [MAPK1_p] * [SMAD3] -K(77,2) * [MAPK1_p |SMAD3];
  R77: SMAD3 => MAPK1_p; 1;
  // V(78) = K(78,1) * [MAPK1_p |SMAD3];
  R78: SMAD3 => MAPK1_p; 1;
  // V(79) = K(79,1) * [PRKCA_p] * [HMGN1] -K(79,2) * [PRKCA_p |HMGN1];
  R79: HMGN1 => PRKCA_p; 1;
  // V(80) = K(80,1) * [PRKCA_p |HMGN1];
  R80: HMGN1 => PRKCA_p; 1;
  // V(81) = K(81,1) * [PRKCA_p] * [CDKN1A] -K(81,2) * [PRKCA_p |CDKN1A];
  R81: PRKCA_p => CDKN1A; 1;
  // V(82) = K(82,1) * [PRKCA_p |CDKN1A];
  R82: PRKCA_p => CDKN1A; 1;
  // V(83) = K(83,1) * [ERN1_p] * [ERN1] -K(83,2) * [ERN1_p |ERN1];
  R83: ERN1_p => ERN1; 1;
  // V(84) = K(84,1) * [ERN1_p |ERN1];
  R84: ERN1_p => ERN1; 1;
  // V(85) = K(85,1) * [MAPK8_p] * [AKT1] -K(85,2) * [MAPK8_p |AKT1];
  R85: MAPK8_p => AKT1; 1;
  // V(86) = K(86,1) * [MAPK8_p |AKT1];
  R86: MAPK8_p => AKT1; 1;
  // V(87) = K(87,1) * [ATR] * [MDM2] -K(87,2) * [ATR |MDM2];
  R87: ATR => MDM2; 1;
  // V(88) = K(88,1) * [ATR |MDM2];
  R88: ATR => MDM2; 1;
  // V(89) = K(89,1) * [RPS6KA3_p] * [BAD] -K(89,2) * [RPS6KA3_p |BAD];
  R89: RPS6KA3_p => BAD; 1;
  // V(90) = K(90,1) * [RPS6KA3_p |BAD];
  R90: RPS6KA3_p => BAD; 1;
  // V(91) = K(91,1) * [MAPK8_p] * [CTNNB1] -K(91,2) * [MAPK8_p |CTNNB1];
  R91: MAPK8_p => CTNNB1; 1;
  // V(92) = K(92,1) * [MAPK8_p |CTNNB1];
  R92: MAPK8_p => CTNNB1; 1;
  // V(93) = K(93,1) * [PINK1] * [UBC] -K(93,2) * [PINK1 |UBC];
  R93: PINK1 => UBC; 1;
  // V(94) = K(94,1) * [PINK1 |UBC];
  R94: PINK1 => UBC; 1;
  // V(95) = K(95,1) * [AKT1_p] * [RAC1] -K(95,2) * [AKT1_p |RAC1];
  R95: RAC1 => AKT1_p; 1;
  // V(96) = K(96,1) * [AKT1_p |RAC1];
  R96: RAC1 => AKT1_p; 1;
  // V(97) = K(97,1) * [IGF1R_p] * [IGF1R] -K(97,2) * [IGF1R_p |IGF1R];
  R97: IGF1R_p => IGF1R; 1;
  // V(98) = K(98,1) * [IGF1R_p |IGF1R];
  R98: IGF1R_p => IGF1R; 1;
  // V(99) = K(99,1) * [RPS6KA3_p] * [CREB1] -K(99,2) * [RPS6KA3_p |CREB1];
  R99: RPS6KA3_p => CREB1; 1;
  // V(100) = K(100,1) * [RPS6KA3_p |CREB1];
  R100: RPS6KA3_p => CREB1; 1;
  // V(101) = K(101,1) * [PRKAA1] * [NOS3] -K(101,2) * [PRKAA1 |NOS3];
  R101: PRKAA1 => NOS3; 1;
  // V(102) = K(102,1) * [PRKAA1 |NOS3];
  R102: PRKAA1 => NOS3; 1;
  // V(103) = K(103,1) * [AKT1_p] * [TSC2] -K(103,2) * [AKT1_p |TSC2];
  R103: TSC2 => AKT1_p; 1;
  // V(104) = K(104,1) * [AKT1_p |TSC2];
  R104: TSC2 => AKT1_p; 1;
  // V(105) = K(105,1) * [MAPK8_p] * [PKM] -K(105,2) * [MAPK8_p |PKM];
  R105: PKM => MAPK8_p; 1;
  // V(106) = K(106,1) * [MAPK8_p |PKM];
  R106: PKM => MAPK8_p; 1;
  // V(107) = K(107,1) * [PRKCA_p] * [PRKAA1] -K(107,2) * [PRKCA_p |PRKAA1];
  R107: PRKAA1 => PRKCA_p; 1;
  // V(108) = K(108,1) * [PRKCA_p |PRKAA1];
  R108: PRKAA1 => PRKCA_p; 1;
  // V(109) = K(109,1) * [AKT1_p] * [EP300] -K(109,2) * [AKT1_p |EP300];
  R109: EP300 => AKT1_p; 1;
  // V(110) = K(110,1) * [AKT1_p |EP300];
  R110: EP300 => AKT1_p; 1;
  // V(111) = K(111,1) * [MAPK1_p] * [EGFR] -K(111,2) * [MAPK1_p |EGFR];
  R111: EGFR => MAPK1_p; 1;
  // V(112) = K(112,1) * [MAPK1_p |EGFR];
  R112: EGFR => MAPK1_p; 1;
  // V(113) = K(113,1) * [MAPK8_p] * [STAT6] -K(113,2) * [MAPK8_p |STAT6];
  R113: STAT6 => MAPK8_p; 1;
  // V(114) = K(114,1) * [MAPK8_p |STAT6];
  R114: STAT6 => MAPK8_p; 1;
  // V(115) = K(115,1) * [PRKCA_p] * [INSR] -K(115,2) * [PRKCA_p |INSR];
  R115: PRKCA_p => INSR; 1;
  // V(116) = K(116,1) * [PRKCA_p |INSR];
  R116: PRKCA_p => INSR; 1;
  // V(117) = K(117,1) * [SIGNOR-C156_p] * [BAD] -K(117,2) * [SIGNOR-C156_p |BAD];
  R117: BAD => ; 1;
  // V(118) = K(118,1) * [SIGNOR-C156_p |BAD];
  R118: BAD => ; 1;
  // V(119) = K(119,1) * [AKT1_p] * [VIM] -K(119,2) * [AKT1_p |VIM];
  R119: VIM => AKT1_p; 1;
  // V(120) = K(120,1) * [AKT1_p |VIM];
  R120: VIM => AKT1_p; 1;
  // V(121) = K(121,1) * [ILK_p] * [AKT1] -K(121,2) * [ILK_p |AKT1];
  R121: ILK_p => AKT1; 1;
  // V(122) = K(122,1) * [ILK_p |AKT1];
  R122: ILK_p => AKT1; 1;
  // V(123) = K(123,1) * [MAPK8_p] * [PPARG] -K(123,2) * [MAPK8_p |PPARG];
  R123: PPARG => MAPK8_p; 1;
  // V(124) = K(124,1) * [MAPK8_p |PPARG];
  R124: PPARG => MAPK8_p; 1;
  // V(125) = K(125,1) * [MAPK1_p] * [SP1] -K(125,2) * [MAPK1_p |SP1];
  R125: SP1 => MAPK1_p; 1;
  // V(126) = K(126,1) * [MAPK1_p |SP1];
  R126: SP1 => MAPK1_p; 1;
  // V(127) = K(127,1) * [ROCK1] * [PTEN] -K(127,2) * [ROCK1 |PTEN];
  R127: PTEN => ROCK1; 1;
  // V(128) = K(128,1) * [ROCK1 |PTEN];
  R128: PTEN => ROCK1; 1;
  // V(129) = K(129,1) * [MAPK8_p] * [CDKN1A] -K(129,2) * [MAPK8_p |CDKN1A];
  R129: MAPK8_p => CDKN1A; 1;
  // V(130) = K(130,1) * [MAPK8_p |CDKN1A];
  R130: MAPK8_p => CDKN1A; 1;
  // V(131) = K(131,1) * [MAPK1_p] * [BAD] -K(131,2) * [MAPK1_p |BAD];
  R131: BAD => MAPK1_p; 1;
  // V(132) = K(132,1) * [MAPK1_p |BAD];
  R132: BAD => MAPK1_p; 1;
  // V(133) = K(133,1) * [MAPK1_p] * [CDKN1A] -K(133,2) * [MAPK1_p |CDKN1A];
  R133: CDKN1A => MAPK1_p; 1;
  // V(134) = K(134,1) * [MAPK1_p |CDKN1A];
  R134: CDKN1A => MAPK1_p; 1;
  // V(135) = K(135,1) * [AKT1_p] * [AKT1S1] -K(135,2) * [AKT1_p |AKT1S1];
  R135: AKT1S1 => AKT1_p; 1;
  // V(136) = K(136,1) * [AKT1_p |AKT1S1];
  R136: AKT1S1 => AKT1_p; 1;
  // V(137) = K(137,1) * [MAPK8_p] * [BAD] -K(137,2) * [MAPK8_p |BAD];
  R137: MAPK8_p => BAD; 1;
  // V(138) = K(138,1) * [MAPK8_p |BAD];
  R138: MAPK8_p => BAD; 1;
  // V(139) = K(139,1) * [AKT1_p] * [NR3C1] -K(139,2) * [AKT1_p |NR3C1];
  R139: AKT1_p => NR3C1; 1;
  // V(140) = K(140,1) * [AKT1_p |NR3C1];
  R140: AKT1_p => NR3C1; 1;
  // V(141) = K(141,1) * [PRKCA_p] * [HES1] -K(141,2) * [PRKCA_p |HES1];
  R141: PRKCA_p => HES1; 1;
  // V(142) = K(142,1) * [PRKCA_p |HES1];
  R142: PRKCA_p => HES1; 1;
  // V(143) = K(143,1) * [MAPK8_p] * [YAP1] -K(143,2) * [MAPK8_p |YAP1];
  R143: MAPK8_p => YAP1; 1;
  // V(144) = K(144,1) * [MAPK8_p |YAP1];
  R144: MAPK8_p => YAP1; 1;
  // V(145) = K(145,1) * [PRKCA_p] * [ANXA1] -K(145,2) * [PRKCA_p |ANXA1];
  R145: PRKCA_p => ANXA1; 1;
  // V(146) = K(146,1) * [PRKCA_p |ANXA1];
  R146: PRKCA_p => ANXA1; 1;
  // V(147) = K(147,1) * [MAPK8_p] * [SP1] -K(147,2) * [MAPK8_p |SP1];
  R147: MAPK8_p => SP1; 1;
  // V(148) = K(148,1) * [MAPK8_p |SP1];
  R148: MAPK8_p => SP1; 1;
  // V(149) = K(149,1) * [EGFR_p] * [PPARG] -K(149,2) * [EGFR_p |PPARG];
  R149: EGFR_p => PPARG; 1;
  // V(150) = K(150,1) * [EGFR_p |PPARG];
  R150: EGFR_p => PPARG; 1;
  // V(151) = K(151,1) * [PLK2] * [TP53] -K(151,2) * [PLK2 |TP53];
  R151: TP53 => PLK2; 1;
  // V(152) = K(152,1) * [PLK2 |TP53];
  R152: TP53 => PLK2; 1;
  // V(153) = K(153,1) * [JAK1_p] * [STAT6] -K(153,2) * [JAK1_p |STAT6];
  R153: STAT6 => JAK1_p; 1;
  // V(154) = K(154,1) * [JAK1_p |STAT6];
  R154: STAT6 => JAK1_p; 1;
  // V(155) = K(155,1) * [AKT1_p] * [YAP1] -K(155,2) * [AKT1_p |YAP1];
  R155: YAP1 => AKT1_p; 1;
  // V(156) = K(156,1) * [AKT1_p |YAP1];
  R156: YAP1 => AKT1_p; 1;
  // V(157) = K(157,1) * [SIGNOR-C156_p] * [AKT1] -K(157,2) * [SIGNOR-C156_p |AKT1];
  R157: AKT1 => ; 1;
  // V(158) = K(158,1) * [SIGNOR-C156_p |AKT1];
  R158: AKT1 => ; 1;
  // V(159) = K(159,1) * [SMAD1] * [SMAD4] -K(159,2) * [SMAD1 |SMAD4];
  R159: SMAD4 => SMAD1; 1;
  // V(160) = K(160,1) * [SMAD1 |SMAD4];
  R160: SMAD4 => SMAD1; 1;
  // V(161) = K(161,1) * [AKT1_p] * [RPS6KA3] -K(161,2) * [AKT1_p |RPS6KA3];
  R161: RPS6KA3 => AKT1_p; 1;
  // V(162) = K(162,1) * [AKT1_p |RPS6KA3];
  R162: RPS6KA3 => AKT1_p; 1;
  // V(163) = K(163,1) * [RPS6KA3_p] * [RPS6KA3] -K(163,2) * [RPS6KA3_p |RPS6KA3];
  R163: RPS6KA3_p => RPS6KA3; 1;
  // V(164) = K(164,1) * [RPS6KA3_p |RPS6KA3];
  R164: RPS6KA3_p => RPS6KA3; 1;
  // V(165) = K(165,1) * [PRKAA1] * [EP300] -K(165,2) * [PRKAA1 |EP300];
  R165: PRKAA1 => EP300; 1;
  // V(166) = K(166,1) * [PRKAA1 |EP300];
  R166: PRKAA1 => EP300; 1;
  // V(167) = K(167,1) * [AKT1_p] * [CTNNB1] -K(167,2) * [AKT1_p |CTNNB1];
  R167: CTNNB1 => AKT1_p; 1;
  // V(168) = K(168,1) * [AKT1_p |CTNNB1];
  R168: CTNNB1 => AKT1_p; 1;
  // V(169) = K(169,1) * [MAP4K2_p] * [MAP4K2] -K(169,2) * [MAP4K2_p |MAP4K2];
  R169: MAP4K2_p => MAP4K2; 1;
  // V(170) = K(170,1) * [MAP4K2_p |MAP4K2];
  R170: MAP4K2_p => MAP4K2; 1;
  // V(171) = K(171,1) * [RPS6KA3_p] * [NR4A1] -K(171,2) * [RPS6KA3_p |NR4A1];
  R171: NR4A1 => RPS6KA3_p; 1;
  // V(172) = K(172,1) * [RPS6KA3_p |NR4A1];
  R172: NR4A1 => RPS6KA3_p; 1;
  // V(173) = K(173,1) * [PRKAA1] * [SIRT1] -K(173,2) * [PRKAA1 |SIRT1];
  R173: PRKAA1 => SIRT1; 1;
  // V(174) = K(174,1) * [PRKAA1 |SIRT1];
  R174: PRKAA1 => SIRT1; 1;
  // V(175) = K(175,1) * [PRKCA_p] * [BAD] -K(175,2) * [PRKCA_p |BAD];
  R175: PRKCA_p => BAD; 1;
  // V(176) = K(176,1) * [PRKCA_p |BAD];
  R176: PRKCA_p => BAD; 1;
  // V(177) = K(177,1) * [ROCK1] * [TP53] -K(177,2) * [ROCK1 |TP53];
  R177: TP53 => ROCK1; 1;
  // V(178) = K(178,1) * [ROCK1 |TP53];
  R178: TP53 => ROCK1; 1;
  // V(179) = K(179,1) * [MAPK1_p] * [MAPK1] -K(179,2) * [MAPK1_p |MAPK1];
  R179: MAPK1 => MAPK1_p; 1;
  // V(180) = K(180,1) * [MAPK1_p |MAPK1];
  R180: MAPK1 => MAPK1_p; 1;
  // V(181) = K(181,1) * [MAPK8_p] * [SMAD3] -K(181,2) * [MAPK8_p |SMAD3];
  R181: MAPK8_p => SMAD3; 1;
  // V(182) = K(182,1) * [MAPK8_p |SMAD3];
  R182: MAPK8_p => SMAD3; 1;
  // V(183) = K(183,1) * [PRKAA1] * [TSC2] -K(183,2) * [PRKAA1 |TSC2];
  R183: PRKAA1 => TSC2; 1;
  // V(184) = K(184,1) * [PRKAA1 |TSC2];
  R184: PRKAA1 => TSC2; 1;
  // V(185) = K(185,1) * [LYN_p] * [LYN] -K(185,2) * [LYN_p |LYN];
  R185: LYN => LYN_p; 1;
  // V(186) = K(186,1) * [LYN_p |LYN];
  R186: LYN => LYN_p; 1;
  // V(187) = K(187,1) * [MAPK1_p] * [ZFP36] -K(187,2) * [MAPK1_p |ZFP36];
  R187: ZFP36 => MAPK1_p; 1;
  // V(188) = K(188,1) * [MAPK1_p |ZFP36];
  R188: ZFP36 => MAPK1_p; 1;
  // V(189) = K(189,1) * [PKN1_p] * [EGFR] -K(189,2) * [PKN1_p |EGFR];
  R189: EGFR => PKN1_p; 1;
  // V(190) = K(190,1) * [PKN1_p |EGFR];
  R190: EGFR => PKN1_p; 1;
  // V(191) = K(191,1) * [MAPK1_p] * [AEBP1] -K(191,2) * [MAPK1_p |AEBP1];
  R191: AEBP1 => MAPK1_p; 1;
  // V(192) = K(192,1) * [MAPK1_p |AEBP1];
  R192: AEBP1 => MAPK1_p; 1;
  // V(193) = K(193,1) * [MAPK8_p] * [SIRT1] -K(193,2) * [MAPK8_p |SIRT1];
  R193: MAPK8_p => SIRT1; 1;
  // V(194) = K(194,1) * [MAPK8_p |SIRT1];
  R194: MAPK8_p => SIRT1; 1;
  // V(195) = K(195,1) * [PKN1_p] * [AR] -K(195,2) * [PKN1_p |AR];
  R195: AR => PKN1_p; 1;
  // V(196) = K(196,1) * [PKN1_p |AR];
  R196: AR => PKN1_p; 1;
  // V(197) = K(197,1) * [AKT1_p] * [PARK7] -K(197,2) * [AKT1_p |PARK7];
  R197: AKT1_p => PARK7; 1;
  // V(198) = K(198,1) * [AKT1_p |PARK7];
  R198: AKT1_p => PARK7; 1;
  // V(199) = K(199,1) * [MAPK8_p] * [IRF3] -K(199,2) * [MAPK8_p |IRF3];
  R199: MAPK8_p => IRF3; 1;
  // V(200) = K(200,1) * [MAPK8_p |IRF3];
  R200: MAPK8_p => IRF3; 1;
  // V(201) = K(201,1) * [PRKCA_p] * [OCLN] -K(201,2) * [PRKCA_p |OCLN];
  R201: PRKCA_p => OCLN; 1;
  // V(202) = K(202,1) * [PRKCA_p |OCLN];
  R202: PRKCA_p => OCLN; 1;
  // V(203) = K(203,1) * [MAPK1_p] * [DNM1L] -K(203,2) * [MAPK1_p |DNM1L];
  R203: DNM1L => MAPK1_p; 1;
  // V(204) = K(204,1) * [MAPK1_p |DNM1L];
  R204: DNM1L => MAPK1_p; 1;
  // V(205) = K(205,1) * [PRKAA1] * [DDIT3] -K(205,2) * [PRKAA1 |DDIT3];
  R205: PRKAA1 => DDIT3; 1;
  // V(206) = K(206,1) * [PRKAA1 |DDIT3];
  R206: PRKAA1 => DDIT3; 1;
  // V(207) = K(207,1) * [RPS6KA3_p] * [TP53] -K(207,2) * [RPS6KA3_p |TP53];
  R207: TP53 => RPS6KA3_p; 1;
  // V(208) = K(208,1) * [RPS6KA3_p |TP53];
  R208: TP53 => RPS6KA3_p; 1;
  // V(209) = K(209,1) * [ROCK1] * [BECN1] -K(209,2) * [ROCK1 |BECN1];
  R209: ROCK1 => BECN1; 1;
  // V(210) = K(210,1) * [ROCK1 |BECN1];
  R210: ROCK1 => BECN1; 1;
  // V(211) = K(211,1) * [MAPK1_p] * [XBP1] -K(211,2) * [MAPK1_p |XBP1];
  R211: XBP1 => MAPK1_p; 1;
  // V(212) = K(212,1) * [MAPK1_p |XBP1];
  R212: XBP1 => MAPK1_p; 1;
  // V(213) = K(213,1) * [INSR_p] * [FABP4] -K(213,2) * [INSR_p |FABP4];
  R213: INSR_p => FABP4; 1;
  // V(214) = K(214,1) * [INSR_p |FABP4];
  R214: INSR_p => FABP4; 1;
  // V(215) = K(215,1) * [MAPK1_p] * [AR] -K(215,2) * [MAPK1_p |AR];
  R215: AR => MAPK1_p; 1;
  // V(216) = K(216,1) * [MAPK1_p |AR];
  R216: AR => MAPK1_p; 1;
  // V(217) = K(217,1) * [AKT1_p] * [AKT1] -K(217,2) * [AKT1_p |AKT1];
  R217: AKT1 => AKT1_p; 1;
  // V(218) = K(218,1) * [AKT1_p |AKT1];
  R218: AKT1 => AKT1_p; 1;
  // V(219) = K(219,1) * [PINK1] * [TP53] -K(219,2) * [PINK1 |TP53];
  R219: TP53 => PINK1; 1;
  // V(220) = K(220,1) * [PINK1 |TP53];
  R220: TP53 => PINK1; 1;
  // V(221) = K(221,1) * [EGFR_p] * [STAT1] -K(221,2) * [EGFR_p |STAT1];
  R221: EGFR_p => STAT1; 1;
  // V(222) = K(222,1) * [EGFR_p |STAT1];
  R222: EGFR_p => STAT1; 1;
  // V(223) = K(223,1) * [INSR_p] * [PTEN] -K(223,2) * [INSR_p |PTEN];
  R223: PTEN => INSR_p; 1;
  // V(224) = K(224,1) * [INSR_p |PTEN];
  R224: PTEN => INSR_p; 1;
  // V(225) = K(225,1) * [INSR_p] * [PIK3R1] -K(225,2) * [INSR_p |PIK3R1];
  R225: PIK3R1 => INSR_p; 1;
  // V(226) = K(226,1) * [INSR_p |PIK3R1];
  R226: PIK3R1 => INSR_p; 1;
  // V(227) = K(227,1) * [PRKCA_p] * [ADD3] -K(227,2) * [PRKCA_p |ADD3];
  R227: ADD3 => PRKCA_p; 1;
  // V(228) = K(228,1) * [PRKCA_p |ADD3];
  R228: ADD3 => PRKCA_p; 1;
  // V(229) = K(229,1) * [PIK3CA] * [AKT1] -K(229,2) * [PIK3CA |AKT1];
  R229: PIK3CA => AKT1; 1;
  // V(230) = K(230,1) * [PIK3CA |AKT1];
  R230: PIK3CA => AKT1; 1;
  // V(231) = K(231,1) * [AKT1_p] * [CREB1] -K(231,2) * [AKT1_p |CREB1];
  R231: CREB1 => AKT1_p; 1;
  // V(232) = K(232,1) * [AKT1_p |CREB1];
  R232: CREB1 => AKT1_p; 1;
  // V(233) = K(233,1) * [AKT1_p] * [MAPK1] -K(233,2) * [AKT1_p |MAPK1];
  R233: MAPK1 => AKT1_p; 1;
  // V(234) = K(234,1) * [AKT1_p |MAPK1];
  R234: MAPK1 => AKT1_p; 1;
  // V(235) = K(235,1) * [PINK1] * [MFN2] -K(235,2) * [PINK1 |MFN2];
  R235: PINK1 => MFN2; 1;
  // V(236) = K(236,1) * [PINK1 |MFN2];
  R236: PINK1 => MFN2; 1;
  // V(237) = K(237,1) * [ROCK1] * [VIM] -K(237,2) * [ROCK1 |VIM];
  R237: ROCK1 => VIM; 1;
  // V(238) = K(238,1) * [ROCK1 |VIM];
  R238: ROCK1 => VIM; 1;
  // V(239) = K(239,1) * [MAPK8_p] * [STAT1] -K(239,2) * [MAPK8_p |STAT1];
  R239: MAPK8_p => STAT1; 1;
  // V(240) = K(240,1) * [MAPK8_p |STAT1];
  R240: MAPK8_p => STAT1; 1;
  // V(241) = K(241,1) * [IKBKB] * [TP53] -K(241,2) * [IKBKB |TP53];
  R241: TP53 => IKBKB; 1;
  // V(242) = K(242,1) * [IKBKB |TP53];
  R242: TP53 => IKBKB; 1;
  // V(243) = K(243,1) * [MAPK8_p] * [NR4A1] -K(243,2) * [MAPK8_p |NR4A1];
  R243: NR4A1 => MAPK8_p; 1;
  // V(244) = K(244,1) * [MAPK8_p |NR4A1];
  R244: NR4A1 => MAPK8_p; 1;
  // V(245) = K(245,1) * [ATR] * [TP53] -K(245,2) * [ATR |TP53];
  R245: TP53 => ATR; 1;
  // V(246) = K(246,1) * [ATR |TP53];
  R246: TP53 => ATR; 1;
  // V(247) = K(247,1) * [ATR] * [CREB1] -K(247,2) * [ATR |CREB1];
  R247: ATR => CREB1; 1;
  // V(248) = K(248,1) * [ATR |CREB1];
  R248: ATR => CREB1; 1;
  // V(249) = K(249,1) * [EGFR_p] * [AGO2] -K(249,2) * [EGFR_p |AGO2];
  R249: EGFR_p => AGO2; 1;
  // V(250) = K(250,1) * [EGFR_p |AGO2];
  R250: EGFR_p => AGO2; 1;
  // V(251) = K(251,1) * [EGFR_p] * [TLR3] -K(251,2) * [EGFR_p |TLR3];
  R251: EGFR_p => TLR3; 1;
  // V(252) = K(252,1) * [EGFR_p |TLR3];
  R252: EGFR_p => TLR3; 1;
  // V(253) = K(253,1) * [EGFR_p] * [LYN] -K(253,2) * [EGFR_p |LYN];
  R253: EGFR_p => LYN; 1;
  // V(254) = K(254,1) * [EGFR_p |LYN];
  R254: EGFR_p => LYN; 1;
  // V(255) = K(255,1) * [TGFBR1] * [SMAD3] -K(255,2) * [TGFBR1 |SMAD3];
  R255: TGFBR1 => SMAD3; 1;
  // V(256) = K(256,1) * [TGFBR1 |SMAD3];
  R256: TGFBR1 => SMAD3; 1;
  // V(257) = K(257,1) * [RPS6KA3_p] * [TSC2] -K(257,2) * [RPS6KA3_p |TSC2];
  R257: RPS6KA3_p => TSC2; 1;
  // V(258) = K(258,1) * [RPS6KA3_p |TSC2];
  R258: RPS6KA3_p => TSC2; 1;
  // V(259) = K(259,1) * [EGFR_p] * [ANXA1] -K(259,2) * [EGFR_p |ANXA1];
  R259: EGFR_p => ANXA1; 1;
  // V(260) = K(260,1) * [EGFR_p |ANXA1];
  R260: EGFR_p => ANXA1; 1;
  // V(261) = K(261,1) * [MAPK1_p] * [MFN1] -K(261,2) * [MAPK1_p |MFN1];
  R261: MFN1 => MAPK1_p; 1;
  // V(262) = K(262,1) * [MAPK1_p |MFN1];
  R262: MFN1 => MAPK1_p; 1;
  // V(263) = K(263,1) * [EGFR_p] * [BECN1] -K(263,2) * [EGFR_p |BECN1];
  R263: EGFR_p => BECN1; 1;
  // V(264) = K(264,1) * [EGFR_p |BECN1];
  R264: EGFR_p => BECN1; 1;
  // V(265) = K(265,1) * [MAPK1_p] * [TP53] -K(265,2) * [MAPK1_p |TP53];
  R265: TP53 => MAPK1_p; 1;
  // V(266) = K(266,1) * [MAPK1_p |TP53];
  R266: TP53 => MAPK1_p; 1;
  // V(267) = K(267,1) * [PRKAA1] * [PRKAA1] -K(267,2) * [PRKAA1 |PRKAA1];
  R267: PRKAA1 => ; 1;
  // V(268) = K(268,1) * [PRKAA1 |PRKAA1];
  R268: PRKAA1 => ; 1;
  // V(269) = K(269,1) * [ROCK1] * [MAPK8] -K(269,2) * [ROCK1 |MAPK8];
  R269: ROCK1 => MAPK8; 1;
  // V(270) = K(270,1) * [ROCK1 |MAPK8];
  R270: ROCK1 => MAPK8; 1;
  // V(271) = K(271,1) * [IKBKB] * [TRIM23] -K(271,2) * [IKBKB |TRIM23];
  R271: TRIM23 => IKBKB; 1;
  // V(272) = K(272,1) * [IKBKB |TRIM23];
  R272: TRIM23 => IKBKB; 1;
  // V(273) = K(273,1) * [PINK1] * [DNM1L] -K(273,2) * [PINK1 |DNM1L];
  R273: DNM1L => PINK1; 1;
  // V(274) = K(274,1) * [PINK1 |DNM1L];
  R274: DNM1L => PINK1; 1;
  // V(275) = K(275,1) * [ERN1_p] * [XBP1] -K(275,2) * [ERN1_p |XBP1];
  R275: ERN1_p => XBP1; 1;
  // V(276) = K(276,1) * [ERN1_p |XBP1];
  R276: ERN1_p => XBP1; 1;
  // V(277) = K(277,1) * [TLR4] * [MAPK1] -K(277,2) * [TLR4 |MAPK1];
  R277: MAPK1 => TLR4; 1;
  // V(278) = K(278,1) * [TLR4 |MAPK1];
  R278: MAPK1 => TLR4; 1;
  // V(279) = K(279,1) * [PRKCA_p] * [NOS3] -K(279,2) * [PRKCA_p |NOS3];
  R279: PRKCA_p => NOS3; 1;
  // V(280) = K(280,1) * [PRKCA_p |NOS3];
  R280: PRKCA_p => NOS3; 1;
  // V(281) = K(281,1) * [ILK_p] * [ILK] -K(281,2) * [ILK_p |ILK];
  R281: ILK_p => ILK; 1;
  // V(282) = K(282,1) * [ILK_p |ILK];
  R282: ILK_p => ILK; 1;
  // V(283) = K(283,1) * [LYN_p] * [SOCS1] -K(283,2) * [LYN_p |SOCS1];
  R283: SOCS1 => LYN_p; 1;
  // V(284) = K(284,1) * [LYN_p |SOCS1];
  R284: SOCS1 => LYN_p; 1;
  // V(285) = K(285,1) * [LYN_p] * [EGFR] -K(285,2) * [LYN_p |EGFR];
  R285: EGFR => LYN_p; 1;
  // V(286) = K(286,1) * [LYN_p |EGFR];
  R286: EGFR => LYN_p; 1;
  // V(287) = K(287,1) * [EGFR_p] * [CTNNB1] -K(287,2) * [EGFR_p |CTNNB1];
  R287: EGFR_p => CTNNB1; 1;
  // V(288) = K(288,1) * [EGFR_p |CTNNB1];
  R288: EGFR_p => CTNNB1; 1;
  // V(289) = K(289,1) * [AKT1_p] * [BECN1] -K(289,2) * [AKT1_p |BECN1];
  R289: BECN1 => AKT1_p; 1;
  // V(290) = K(290,1) * [AKT1_p |BECN1];
  R290: BECN1 => AKT1_p; 1;
  // V(291) = K(291,1) * [AKT1_p] * [SMURF1] -K(291,2) * [AKT1_p |SMURF1];
  R291: SMURF1 => AKT1_p; 1;
  // V(292) = K(292,1) * [AKT1_p |SMURF1];
  R292: SMURF1 => AKT1_p; 1;
  // V(293) = K(293,1) * [MAPK6_p] * [MAPK6] -K(293,2) * [MAPK6_p |MAPK6];
  R293: MAPK6_p => MAPK6; 1;
  // V(294) = K(294,1) * [MAPK6_p |MAPK6];
  R294: MAPK6_p => MAPK6; 1;
  // V(295) = K(295,1) * [MAPK1_p] * [NR4A1] -K(295,2) * [MAPK1_p |NR4A1];
  R295: NR4A1 => MAPK1_p; 1;
  // V(296) = K(296,1) * [MAPK1_p |NR4A1];
  R296: NR4A1 => MAPK1_p; 1;
  // V(297) = K(297,1) * [IKBKB] * [BAD] -K(297,2) * [IKBKB |BAD];
  R297: BAD => IKBKB; 1;
  // V(298) = K(298,1) * [IKBKB |BAD];
  R298: BAD => IKBKB; 1;
  // V(299) = K(299,1) * [PINK1] * [PTEN] -K(299,2) * [PINK1 |PTEN];
  R299: PTEN => PINK1; 1;
  // V(300) = K(300,1) * [PINK1 |PTEN];
  R300: PTEN => PINK1; 1;
  // V(301) = K(301,1) * [EGFR_p] * [PKM] -K(301,2) * [EGFR_p |PKM];
  R301: EGFR_p => PKM; 1;
  // V(302) = K(302,1) * [EGFR_p |PKM];
  R302: EGFR_p => PKM; 1;
  // V(303) = K(303,1) * [PRKCA_p] * [TP53] -K(303,2) * [PRKCA_p |TP53];
  R303: TP53 => PRKCA_p; 1;
  // V(304) = K(304,1) * [PRKCA_p |TP53];
  R304: TP53 => PRKCA_p; 1;
  // V(305) = K(305,1) * [TLR4] * [MAPK8] -K(305,2) * [TLR4 |MAPK8];
  R305: MAPK8 => TLR4; 1;
  // V(306) = K(306,1) * [TLR4 |MAPK8];
  R306: MAPK8 => TLR4; 1;
  // V(307) = K(307,1) * [PIK3CA] * [PIK3R1] -K(307,2) * [PIK3CA |PIK3R1];
  R307: PIK3CA => PIK3R1; 1;
  // V(308) = K(308,1) * [PIK3CA |PIK3R1];
  R308: PIK3CA => PIK3R1; 1;
  // V(309) = K(309,1) * [PRKAA1] * [TP53] -K(309,2) * [PRKAA1 |TP53];
  R309: TP53 => PRKAA1; 1;
  // V(310) = K(310,1) * [PRKAA1 |TP53];
  R310: TP53 => PRKAA1; 1;
  // V(311) = K(311,1) * [PTPN2] * [KDR_p] -K(311,2) * [PTPN2 |KDR_p];
  R311: PTPN2 => KDR_p; 1;
  // V(312) = K(312,1) * [PTPN2 |KDR_p];
  R312: PTPN2 => KDR_p; 1;
  // V(313) = K(313,1) * [PTPN2] * [INSR_p] -K(313,2) * [PTPN2 |INSR_p];
  R313: INSR_p => PTPN2; 1;
  // V(314) = K(314,1) * [PTPN2 |INSR_p];
  R314: INSR_p => PTPN2; 1;
  // V(315) = K(315,1) * [PTEN_p] * [AR_p] -K(315,2) * [PTEN_p |AR_p];
  R315: PTEN_p => AR_p; 1;
  // V(316) = K(316,1) * [PTEN_p |AR_p];
  R316: PTEN_p => AR_p; 1;
  // V(317) = K(317,1) * [DUSP1_p] * [MAPK1_p] -K(317,2) * [DUSP1_p |MAPK1_p];
  R317: DUSP1_p => MAPK1_p; 1;
  // V(318) = K(318,1) * [DUSP1_p |MAPK1_p];
  R318: DUSP1_p => MAPK1_p; 1;
  // V(319) = K(319,1) * [PTPN2] * [JAK1_p] -K(319,2) * [PTPN2 |JAK1_p];
  R319: PTPN2 => JAK1_p; 1;
  // V(320) = K(320,1) * [PTPN2 |JAK1_p];
  R320: PTPN2 => JAK1_p; 1;
  // V(321) = K(321,1) * [PTPN2] * [EGFR_p] -K(321,2) * [PTPN2 |EGFR_p];
  R321: EGFR_p => PTPN2; 1;
  // V(322) = K(322,1) * [PTPN2 |EGFR_p];
  R322: EGFR_p => PTPN2; 1;
  // V(323) = K(323,1) * [PTEN_p] * [SP1_p] -K(323,2) * [PTEN_p |SP1_p];
  R323: PTEN_p => SP1_p; 1;
  // V(324) = K(324,1) * [PTEN_p |SP1_p];
  R324: PTEN_p => SP1_p; 1;
  // V(325) = K(325,1) * [PTPN2] * [STAT6_p] -K(325,2) * [PTPN2 |STAT6_p];
  R325: STAT6_p => PTPN2; 1;
  // V(326) = K(326,1) * [PTPN2 |STAT6_p];
  R326: STAT6_p => PTPN2; 1;
  // V(327) = K(327,1) * [DUSP1_p] * [MAPK8_p] -K(327,2) * [DUSP1_p |MAPK8_p];
  R327: MAPK8_p => DUSP1_p; 1;
  // V(328) = K(328,1) * [DUSP1_p |MAPK8_p];
  R328: MAPK8_p => DUSP1_p; 1;
  // V(329) = K(329,1) * [PTEN_p] * [PTEN_p] -K(329,2) * [PTEN_p |PTEN_p];
  R329: PTEN_p => ; 1;
  // V(330) = K(330,1) * [PTEN_p |PTEN_p];
  R330: PTEN_p => ; 1;
  // V(331) = K(331,1) * [PTPN2] * [STAT1_p] -K(331,2) * [PTPN2 |STAT1_p];
  R331: STAT1_p => PTPN2; 1;
  // V(332) = K(332,1) * [PTPN2 |STAT1_p];
  R332: STAT1_p => PTPN2; 1;
  // V(333) = K(333,1) * [PTEN_p] * [IRF3_p] -K(333,2) * [PTEN_p |IRF3_p];
  R333: PTEN_p => IRF3_p; 1;
  // V(334) = K(334,1) * [PTEN_p |IRF3_p];
  R334: PTEN_p => IRF3_p; 1;
  // V(335) = K(335,1) * [PTEN_p] * [CREB1_p] -K(335,2) * [PTEN_p |CREB1_p];
  R335: PTEN_p => CREB1_p; 1;
  // V(336) = K(336,1) * [PTEN_p |CREB1_p];
  R336: PTEN_p => CREB1_p; 1;
  // V(337) = K(337,1) * [MDM2_p] * [IRF1] -K(337,2) * [MDM2_p |IRF1];
  R337: IRF1 => MDM2_p; 1;
  // V(338) = K(338,1) * [MDM2_p |IRF1];
  R338: IRF1 => MDM2_p; 1;
  // V(339) = K(339,1) * [MYLIP] * [LDLR] -K(339,2) * [MYLIP |LDLR];
  R339: MYLIP => LDLR; 1;
  // V(340) = K(340,1) * [MYLIP |LDLR];
  R340: MYLIP => LDLR; 1;
  // V(341) = K(341,1) * [MDM2_p] * [HIF1A] -K(341,2) * [MDM2_p |HIF1A];
  R341: HIF1A => MDM2_p; 1;
  // V(342) = K(342,1) * [MDM2_p |HIF1A];
  R342: HIF1A => MDM2_p; 1;
  // V(343) = K(343,1) * [MDM2_p] * [NOTCH1] -K(343,2) * [MDM2_p |NOTCH1];
  R343: MDM2_p => NOTCH1; 1;
  // V(344) = K(344,1) * [MDM2_p |NOTCH1];
  R344: MDM2_p => NOTCH1; 1;
  // V(345) = K(345,1) * [SMURF1_p] * [TGFBR1] -K(345,2) * [SMURF1_p |TGFBR1];
  R345: SMURF1_p => TGFBR1; 1;
  // V(346) = K(346,1) * [SMURF1_p |TGFBR1];
  R346: SMURF1_p => TGFBR1; 1;
  // V(347) = K(347,1) * [MDM2_p] * [NUMB] -K(347,2) * [MDM2_p |NUMB];
  R347: MDM2_p => NUMB; 1;
  // V(348) = K(348,1) * [MDM2_p |NUMB];
  R348: MDM2_p => NUMB; 1;
  // V(349) = K(349,1) * [SMURF1_p] * [SMAD1] -K(349,2) * [SMURF1_p |SMAD1];
  R349: SMURF1_p => SMAD1; 1;
  // V(350) = K(350,1) * [SMURF1_p |SMAD1];
  R350: SMURF1_p => SMAD1; 1;
  // V(351) = K(351,1) * [MDM2_p] * [TP53] -K(351,2) * [MDM2_p |TP53];
  R351: TP53 => MDM2_p; 1;
  // V(352) = K(352,1) * [MDM2_p |TP53];
  R352: TP53 => MDM2_p; 1;
  // V(353) = K(353,1) * [MDM2_p] * [PPARG] -K(353,2) * [MDM2_p |PPARG];
  R353: PPARG => MDM2_p; 1;
  // V(354) = K(354,1) * [MDM2_p |PPARG];
  R354: PPARG => MDM2_p; 1;
  // V(355) = K(355,1) * [MDM2_p] * [HDAC1] -K(355,2) * [MDM2_p |HDAC1];
  R355: MDM2_p => HDAC1; 1;
  // V(356) = K(356,1) * [MDM2_p |HDAC1];
  R356: MDM2_p => HDAC1; 1;
  // V(357) = K(357,1) * [SMURF1_p] * [SMAD7] -K(357,2) * [SMURF1_p |SMAD7];
  R357: SMURF1_p => SMAD7; 1;
  // V(358) = K(358,1) * [SMURF1_p |SMAD7];
  R358: SMURF1_p => SMAD7; 1;
  // V(359) = K(359,1) * [PINK1 |MFN2];
  R359: PINK1 => MFN2; 1;
  // V(360) = K(360,1) * [SMURF1_p] * [SMAD4] -K(360,2) * [SMURF1_p |SMAD4];
  R360: SMURF1_p => SMAD4; 1;
  // V(361) = K(361,1) * [SMURF1_p |SMAD4];
  R361: SMURF1_p => SMAD4; 1;
  // V(362) = K(362,1) * [MYLIP] * [MYLIP] -K(362,2) * [MYLIP |MYLIP];
  R362: MYLIP => ; 1;
  // V(363) = K(363,1) * [MYLIP |MYLIP];
  R363: MYLIP => ; 1;
  // V(364) = K(364,1) * [MDM2_p] * [NOTCH4] -K(364,2) * [MDM2_p |NOTCH4];
  R364: MDM2_p => NOTCH4; 1;
  // V(365) = K(365,1) * [MDM2_p |NOTCH4];
  R365: MDM2_p => NOTCH4; 1;
  // V(366) = K(366,1) * [MDM2_p] * [IGF1R] -K(366,2) * [MDM2_p |IGF1R];
  R366: MDM2_p => IGF1R; 1;
  // V(367) = K(367,1) * [MDM2_p |IGF1R];
  R367: MDM2_p => IGF1R; 1;
  // V(368) = K(368,1) * [PINK1] * [MFN1] -K(368,2) * [PINK1 |MFN1];
  R368: PINK1 => MFN1; 1;
  // V(369) = K(369,1) * [PINK1 |MFN1];
  R369: PINK1 => MFN1; 1;
  // V(370) = K(370,1) * [SMURF1_p] * [SMAD2] -K(370,2) * [SMURF1_p |SMAD2];
  R370: SMURF1_p => SMAD2; 1;
  // V(371) = K(371,1) * [SMURF1_p |SMAD2];
  R371: SMURF1_p => SMAD2; 1;
  // V(372) = K(372,1) * [MYLIP] * [AR] -K(372,2) * [MYLIP |AR];
  R372: MYLIP => AR; 1;
  // V(373) = K(373,1) * [MYLIP |AR];
  R373: MYLIP => AR; 1;
  // V(374) = K(374,1) * [NUMB] * [NOTCH1] -K(374,2) * [NUMB |NOTCH1];
  R374: NOTCH1 => NUMB; 1;
  // V(375) = K(375,1) * [NUMB |NOTCH1];
  R375: NOTCH1 => NUMB; 1;
  // V(376) = K(376,1) * [TRIM23] * [PPARG] -K(376,2) * [TRIM23 |PPARG];
  R376: PPARG => TRIM23; 1;
  // V(377) = K(377,1) * [TRIM23 |PPARG];
  R377: PPARG => TRIM23; 1;
  // V(378) = K(378,1) * [TP53_p] * [CDKN1A_g] -K(378,2) * [TP53_p |CDKN1A_g];
  R378: CDKN1A_g => TP53_p; 1;
  // V(379) = K(379,1) * [TP53_p |CDKN1A_g];
  R379: CDKN1A_g => TP53_p; 1;
  // V(380) = K(380,1) * [CDKN1A_rna];
  R380: CDKN1A_rna => ; 1;
  // V(381) = K(381,1) * [HIF1A_p] * [CCL2_g] -K(381,2) * [HIF1A_p |CCL2_g];
  R381: CCL2_g => HIF1A_p; 1;
  // V(382) = K(382,1) * [HIF1A_p |CCL2_g];
  R382: CCL2_g => HIF1A_p; 1;
  // V(383) = K(383,1) * [CCL2_rna];
  R383: CCL2_rna => ; 1;
  // V(384) = K(384,1) * [CTNNB1_p] * [CCND1_g] -K(384,2) * [CTNNB1_p |CCND1_g];
  R384: CTNNB1_p => CCND1_g; 1;
  // V(385) = K(385,1) * [CTNNB1_p |CCND1_g];
  R385: CTNNB1_p => CCND1_g; 1;
  // V(386) = K(386,1) * [CCND1_rna];
  R386: CCND1_rna => ; 1;
  // V(387) = K(387,1) * [HIF1A_p] * [VEGFA_g] -K(387,2) * [HIF1A_p |VEGFA_g];
  R387: VEGFA_g => HIF1A_p; 1;
  // V(388) = K(388,1) * [HIF1A_p |VEGFA_g];
  R388: VEGFA_g => HIF1A_p; 1;
  // V(389) = K(389,1) * [VEGFA_rna];
  R389: VEGFA_rna => ; 1;
  // V(390) = K(390,1) * [TP53_p] * [FAS_g] -K(390,2) * [TP53_p |FAS_g];
  R390: FAS_g => TP53_p; 1;
  // V(391) = K(391,1) * [TP53_p |FAS_g];
  R391: FAS_g => TP53_p; 1;
  // V(392) = K(392,1) * [FAS_rna];
  R392: FAS_rna => ; 1;
  // V(393) = K(393,1) * [HIF1A_p] * [KDM6B_g] -K(393,2) * [HIF1A_p |KDM6B_g];
  R393: KDM6B_g => HIF1A_p; 1;
  // V(394) = K(394,1) * [HIF1A_p |KDM6B_g];
  R394: KDM6B_g => HIF1A_p; 1;
  // V(395) = K(395,1) * [KDM6B_rna];
  R395: KDM6B_rna => ; 1;
  // V(396) = K(396,1) * [NR3C1] * [KLF9_g] -K(396,2) * [NR3C1 |KLF9_g];
  R396: KLF9_g => NR3C1; 1;
  // V(397) = K(397,1) * [NR3C1 |KLF9_g];
  R397: KLF9_g => NR3C1; 1;
  // V(398) = K(398,1) * [KLF9_rna];
  R398: KLF9_rna => ; 1;
  // V(399) = K(399,1) * [SP1_p] * [CD34_g] -K(399,2) * [SP1_p |CD34_g];
  R399: SP1_p => CD34_g; 1;
  // V(400) = K(400,1) * [SP1_p |CD34_g];
  R400: SP1_p => CD34_g; 1;
  // V(401) = K(401,1) * [CD34_rna];
  R401: CD34_rna => ; 1;
  // V(402) = K(402,1) * [STAT6_p] * [SOCS1_g] -K(402,2) * [STAT6_p |SOCS1_g];
  R402: STAT6_p => SOCS1_g; 1;
  // V(403) = K(403,1) * [STAT6_p |SOCS1_g];
  R403: STAT6_p => SOCS1_g; 1;
  // V(404) = K(404,1) * [SOCS1_rna];
  R404: SOCS1_rna => ; 1;
  // V(405) = K(405,1) * [ERG] * [CLDN5_g] -K(405,2) * [ERG |CLDN5_g];
  R405: CLDN5_g => ERG; 1;
  // V(406) = K(406,1) * [ERG |CLDN5_g];
  R406: CLDN5_g => ERG; 1;
  // V(407) = K(407,1) * [CLDN5_rna];
  R407: CLDN5_rna => ; 1;
  // V(408) = K(408,1) * [MECP2] * [NOTCH1_g] -K(408,2) * [MECP2 |NOTCH1_g];
  R408: MECP2 => NOTCH1_g; 1;
  // V(409) = K(409,1) * [NOTCH1_g];
  R409: NOTCH1_g => ; 1;
  // V(410) = K(410,1) * [NOTCH1_rna];
  R410: NOTCH1_rna => ; 1;
  // V(411) = K(411,1) * [HES1] * [NR3C1_g] -K(411,2) * [HES1 |NR3C1_g];
  R411: HES1 => NR3C1_g; 1;
  // V(412) = K(412,1) * [NR3C1_g];
  R412: NR3C1_g => ; 1;
  // V(413) = K(413,1) * [NR3C1_rna];
  R413: NR3C1_rna => ; 1;
  // V(414) = K(414,1) * [SMAD7] * [SMAD3_g] -K(414,2) * [SMAD7 |SMAD3_g];
  R414: SMAD7 => SMAD3_g; 1;
  // V(415) = K(415,1) * [SMAD3_g];
  R415: SMAD3_g => ; 1;
  // V(416) = K(416,1) * [SMAD3_rna];
  R416: SMAD3_rna => ; 1;
  // V(417) = K(417,1) * [HES1] * [SIRT1_p] * [PPARG_g] -K(417,2) * [HES1 |SIRT1_p |PPARG_g];
  R417: HES1 => PPARG_g; 1;
  // V(418) = K(418,1) * [PPARG_g];
  R418: PPARG_g => ; 1;
  // V(419) = K(419,1) * [PPARG_rna];
  R419: PPARG_rna => ; 1;
  // V(420) = K(420,1) * [KDM6A] * [ERG_g] -K(420,2) * [KDM6A |ERG_g];
  R420: ERG_g => KDM6A; 1;
  // V(421) = K(421,1) * [ERG_g];
  R421: ERG_g => ; 1;
  // V(422) = K(422,1) * [ERG_rna];
  R422: ERG_rna => ; 1;
  // V(423) = K(423,1) * [TLR4];
  R423: TLR4 => ; 1;
  // V(424) = K(424,1) * [DNM1L];
  R424: DNM1L => ; 1;
  // V(425) = K(425,1) * [CLDN5];
  R425: CLDN5 => ; 1;
  // V(426) = K(426,1) * [IKBKB];
  R426: IKBKB => ; 1;
  // V(427) = K(427,1) * [KDM6B];
  R427: KDM6B => ; 1;
  // V(428) = K(428,1) * [SMAD7];
  R428: SMAD7 => ; 1;
  // V(429) = K(429,1) * [TLR3];
  R429: TLR3 => ; 1;
  // V(430) = K(430,1) * [SOCS1];
  R430: SOCS1 => ; 1;
  // V(431) = K(431,1) * [KDM6A];
  R431: KDM6A => ; 1;
  // V(432) = K(432,1) * [ERN1];
  R432: ERN1 => ; 1;
  // V(433) = K(433,1) * [MFN2];
  R433: MFN2 => ; 1;
  // V(434) = K(434,1) * [EGFR];
  R434: EGFR => ; 1;
  // V(435) = K(435,1) * [LDLR];
  R435: LDLR => ; 1;
  // V(436) = K(436,1) * [EGF];
  R436: EGF => ; 1;
  // V(437) = K(437,1) * [ANXA1];
  R437: ANXA1 => ; 1;
  // V(438) = K(438,1) * [NR3C1];
  R438: NR3C1 => ; 1;
  // V(439) = K(439,1) * [TP53];
  R439: TP53 => ; 1;
  // V(440) = K(440,1) * [HSPB1];
  R440: HSPB1 => ; 1;
  // V(441) = K(441,1) * [HMGN1];
  R441: HMGN1 => ; 1;
  // V(442) = K(442,1) * [FGF1];
  R442: FGF1 => ; 1;
  // V(443) = K(443,1) * [INSR];
  R443: INSR => ; 1;
  // V(444) = K(444,1) * [LYN];
  R444: LYN => ; 1;
  // V(445) = K(445,1) * [SP1];
  R445: SP1 => ; 1;
  // V(446) = K(446,1) * [IGF1R];
  R446: IGF1R => ; 1;
  // V(447) = K(447,1) * [VIM];
  R447: VIM => ; 1;
  // V(448) = K(448,1) * [FGF2];
  R448: FGF2 => ; 1;
  // V(449) = K(449,1) * [UBC];
  R449: UBC => ; 1;
  // V(450) = K(450,1) * [AR];
  R450: AR => ; 1;
  // V(451) = K(451,1) * [IRF1];
  R451: IRF1 => ; 1;
  // V(452) = K(452,1) * [ERG];
  R452: ERG => ; 1;
  // V(453) = K(453,1) * [CCL2];
  R453: CCL2 => ; 1;
  // V(454) = K(454,1) * [PKM];
  R454: PKM => ; 1;
  // V(455) = K(455,1) * [FABP4];
  R455: FABP4 => ; 1;
  // V(456) = K(456,1) * [VEGFA];
  R456: VEGFA => ; 1;
  // V(457) = K(457,1) * [CREB1];
  R457: CREB1 => ; 1;
  // V(458) = K(458,1) * [PRKCA];
  R458: PRKCA => ; 1;
  // V(459) = K(459,1) * [PTPN2];
  R459: PTPN2 => ; 1;
  // V(460) = K(460,1) * [XBP1];
  R460: XBP1 => ; 1;
  // V(461) = K(461,1) * [NR4A1];
  R461: NR4A1 => ; 1;
  // V(462) = K(462,1) * [JAK1];
  R462: JAK1 => ; 1;
  // V(463) = K(463,1) * [CCND1];
  R463: CCND1 => ; 1;
  // V(464) = K(464,1) * [FAS];
  R464: FAS => ; 1;
  // V(465) = K(465,1) * [ZFP36];
  R465: ZFP36 => ; 1;
  // V(466) = K(466,1) * [PIK3R1];
  R466: PIK3R1 => ; 1;
  // V(467) = K(467,1) * [MAPK1];
  R467: MAPK1 => ; 1;
  // V(468) = K(468,1) * [DUSP1];
  R468: DUSP1 => ; 1;
  // V(469) = K(469,1) * [CD34];
  R469: CD34 => ; 1;
  // V(470) = K(470,1) * [NOS3];
  R470: NOS3 => ; 1;
  // V(471) = K(471,1) * [AQP1];
  R471: AQP1 => ; 1;
  // V(472) = K(472,1) * [AKT1];
  R472: AKT1 => ; 1;
  // V(473) = K(473,1) * [CTNNB1];
  R473: CTNNB1 => ; 1;
  // V(474) = K(474,1) * [DDIT3];
  R474: DDIT3 => ; 1;
  // V(475) = K(475,1) * [KDR];
  R475: KDR => ; 1;
  // V(476) = K(476,1) * [TRIM23];
  R476: TRIM23 => ; 1;
  // V(477) = K(477,1) * [TGFBR1];
  R477: TGFBR1 => ; 1;
  // V(478) = K(478,1) * [PPARG];
  R478: PPARG => ; 1;
  // V(479) = K(479,1) * [CDKN1A];
  R479: CDKN1A => ; 1;
  // V(480) = K(480,1) * [STAT1];
  R480: STAT1 => ; 1;
  // V(481) = K(481,1) * [STAT6];
  R481: STAT6 => ; 1;
  // V(482) = K(482,1) * [PIK3CA];
  R482: PIK3CA => ; 1;
  // V(483) = K(483,1) * [MAPK8];
  R483: MAPK8 => ; 1;
  // V(484) = K(484,1) * [NOTCH1];
  R484: NOTCH1 => ; 1;
  // V(485) = K(485,1) * [YAP1];
  R485: YAP1 => ; 1;
  // V(486) = K(486,1) * [NUMB];
  R486: NUMB => ; 1;
  // V(487) = K(487,1) * [TSC2];
  R487: TSC2 => ; 1;
  // V(488) = K(488,1) * [MECP2];
  R488: MECP2 => ; 1;
  // V(489) = K(489,1) * [RPS6KA3];
  R489: RPS6KA3 => ; 1;
  // V(490) = K(490,1) * [PTEN];
  R490: PTEN => ; 1;
  // V(491) = K(491,1) * [TGFB2];
  R491: TGFB2 => ; 1;
  // V(492) = K(492,1) * [RAC1];
  R492: RAC1 => ; 1;
  // V(493) = K(493,1) * [SMAD3];
  R493: SMAD3 => ; 1;
  // V(494) = K(494,1) * [MDM2];
  R494: MDM2 => ; 1;
  // V(495) = K(495,1) * [EP300];
  R495: EP300 => ; 1;
  // V(496) = K(496,1) * [MAP4K2];
  R496: MAP4K2 => ; 1;
  // V(497) = K(497,1) * [PRKAA1];
  R497: PRKAA1 => ; 1;
  // V(498) = K(498,1) * [ILK];
  R498: ILK => ; 1;
  // V(499) = K(499,1) * [ROCK1];
  R499: ROCK1 => ; 1;
  // V(500) = K(500,1) * [SMAD4];
  R500: SMAD4 => ; 1;
  // V(501) = K(501,1) * [ATR];
  R501: ATR => ; 1;
  // V(502) = K(502,1) * [HDAC1];
  R502: HDAC1 => ; 1;
  // V(503) = K(503,1) * [KLF9];
  R503: KLF9 => ; 1;
  // V(504) = K(504,1) * [BECN1];
  R504: BECN1 => ; 1;
  // V(505) = K(505,1) * [HES1];
  R505: HES1 => ; 1;
  // V(506) = K(506,1) * [IRF3];
  R506: IRF3 => ; 1;
  // V(507) = K(507,1) * [SMAD2];
  R507: SMAD2 => ; 1;
  // V(508) = K(508,1) * [SMAD1];
  R508: SMAD1 => ; 1;
  // V(509) = K(509,1) * [PKN1];
  R509: PKN1 => ; 1;
  // V(510) = K(510,1) * [OCLN];
  R510: OCLN => ; 1;
  // V(511) = K(511,1) * [MAPK6];
  R511: MAPK6 => ; 1;
  // V(512) = K(512,1) * [HIF1A];
  R512: HIF1A => ; 1;
  // V(513) = K(513,1) * [AEBP1];
  R513: AEBP1 => ; 1;
  // V(514) = K(514,1) * [MFN1];
  R514: MFN1 => ; 1;
  // V(515) = K(515,1) * [MYLIP];
  R515: MYLIP => ; 1;
  // V(516) = K(516,1) * [BAD];
  R516: BAD => ; 1;
  // V(517) = K(517,1) * [AKT1S1];
  R517: AKT1S1 => ; 1;
  // V(518) = K(518,1) * [SIRT1];
  R518: SIRT1 => ; 1;
  // V(519) = K(519,1) * [NOTCH4];
  R519: NOTCH4 => ; 1;
  // V(520) = K(520,1) * [PARK7];
  R520: PARK7 => ; 1;
  // V(521) = K(521,1) * [PINK1];
  R521: PINK1 => ; 1;
  // V(522) = K(522,1) * [SMURF1];
  R522: SMURF1 => ; 1;
  // V(523) = K(523,1) * [PLK2];
  R523: PLK2 => ; 1;
  // V(524) = K(524,1) * [ADD3];
  R524: ADD3 => ; 1;
  // V(525) = K(525,1) * [AGO2];
  R525: AGO2 => ; 1;
  // V(526) = K(526,1) * [CLDN5_rna];
  R526: CLDN5_rna => ; 1;
  // V(527) = K(527,1) * [KDM6B_rna];
  R527: KDM6B_rna => ; 1;
  // V(528) = K(528,1) * [SOCS1_rna];
  R528: SOCS1_rna => ; 1;
  // V(529) = K(529,1) * [NR3C1_rna];
  R529: NR3C1_rna => ; 1;
  // V(530) = K(530,1) * [ERG_rna];
  R530: ERG_rna => ; 1;
  // V(531) = K(531,1) * [CCL2_rna];
  R531: CCL2_rna => ; 1;
  // V(532) = K(532,1) * [VEGFA_rna];
  R532: VEGFA_rna => ; 1;
  // V(533) = K(533,1) * [CCND1_rna];
  R533: CCND1_rna => ; 1;
  // V(534) = K(534,1) * [FAS_rna];
  R534: FAS_rna => ; 1;
  // V(535) = K(535,1) * [CD34_rna];
  R535: CD34_rna => ; 1;
  // V(536) = K(536,1) * [PPARG_rna];
  R536: PPARG_rna => ; 1;
  // V(537) = K(537,1) * [CDKN1A_rna];
  R537: CDKN1A_rna => ; 1;
  // V(538) = K(538,1) * [NOTCH1_rna];
  R538: NOTCH1_rna => ; 1;
  // V(539) = K(539,1) * [SMAD3_rna];
  R539: SMAD3_rna => ; 1;
  // V(540) = K(540,1) * [KLF9_rna];
  R540: KLF9_rna => ; 1;
  // V(541) = K(541,1) * [TLR4_g];
  R541: TLR4_g => ; 1;
  // V(542) = K(542,1) * [TLR4_rna];
  R542: TLR4_rna => ; 1;
  // V(543) = K(543,1) * [DNM1L_g];
  R543: DNM1L_g => ; 1;
  // V(544) = K(544,1) * [DNM1L_rna];
  R544: DNM1L_rna => ; 1;
  // V(545) = K(545,1) * [IKBKB_g];
  R545: IKBKB_g => ; 1;
  // V(546) = K(546,1) * [IKBKB_rna];
  R546: IKBKB_rna => ; 1;
  // V(547) = K(547,1) * [SMAD7_g];
  R547: SMAD7_g => ; 1;
  // V(548) = K(548,1) * [SMAD7_rna];
  R548: SMAD7_rna => ; 1;
  // V(549) = K(549,1) * [TLR3_g];
  R549: TLR3_g => ; 1;
  // V(550) = K(550,1) * [TLR3_rna];
  R550: TLR3_rna => ; 1;
  // V(551) = K(551,1) * [KDM6A_g];
  R551: KDM6A_g => ; 1;
  // V(552) = K(552,1) * [KDM6A_rna];
  R552: KDM6A_rna => ; 1;
  // V(553) = K(553,1) * [ERN1_g];
  R553: ERN1_g => ; 1;
  // V(554) = K(554,1) * [ERN1_rna];
  R554: ERN1_rna => ; 1;
  // V(555) = K(555,1) * [MFN2_g];
  R555: MFN2_g => ; 1;
  // V(556) = K(556,1) * [MFN2_rna];
  R556: MFN2_rna => ; 1;
  // V(557) = K(557,1) * [EGFR_g];
  R557: EGFR_g => ; 1;
  // V(558) = K(558,1) * [EGFR_rna];
  R558: EGFR_rna => ; 1;
  // V(559) = K(559,1) * [LDLR_g];
  R559: LDLR_g => ; 1;
  // V(560) = K(560,1) * [LDLR_rna];
  R560: LDLR_rna => ; 1;
  // V(561) = K(561,1) * [EGF_g];
  R561: EGF_g => ; 1;
  // V(562) = K(562,1) * [EGF_rna];
  R562: EGF_rna => ; 1;
  // V(563) = K(563,1) * [ANXA1_g];
  R563: ANXA1_g => ; 1;
  // V(564) = K(564,1) * [ANXA1_rna];
  R564: ANXA1_rna => ; 1;
  // V(565) = K(565,1) * [TP53_g];
  R565: TP53_g => ; 1;
  // V(566) = K(566,1) * [TP53_rna];
  R566: TP53_rna => ; 1;
  // V(567) = K(567,1) * [HSPB1_g];
  R567: HSPB1_g => ; 1;
  // V(568) = K(568,1) * [HSPB1_rna];
  R568: HSPB1_rna => ; 1;
  // V(569) = K(569,1) * [HMGN1_g];
  R569: HMGN1_g => ; 1;
  // V(570) = K(570,1) * [HMGN1_rna];
  R570: HMGN1_rna => ; 1;
  // V(571) = K(571,1) * [FGF1_g];
  R571: FGF1_g => ; 1;
  // V(572) = K(572,1) * [FGF1_rna];
  R572: FGF1_rna => ; 1;
  // V(573) = K(573,1) * [INSR_g];
  R573: INSR_g => ; 1;
  // V(574) = K(574,1) * [INSR_rna];
  R574: INSR_rna => ; 1;
  // V(575) = K(575,1) * [LYN_g];
  R575: LYN_g => ; 1;
  // V(576) = K(576,1) * [LYN_rna];
  R576: LYN_rna => ; 1;
  // V(577) = K(577,1) * [SP1_g];
  R577: SP1_g => ; 1;
  // V(578) = K(578,1) * [SP1_rna];
  R578: SP1_rna => ; 1;
  // V(579) = K(579,1) * [IGF1R_g];
  R579: IGF1R_g => ; 1;
  // V(580) = K(580,1) * [IGF1R_rna];
  R580: IGF1R_rna => ; 1;
  // V(581) = K(581,1) * [VIM_g];
  R581: VIM_g => ; 1;
  // V(582) = K(582,1) * [VIM_rna];
  R582: VIM_rna => ; 1;
  // V(583) = K(583,1) * [FGF2_g];
  R583: FGF2_g => ; 1;
  // V(584) = K(584,1) * [FGF2_rna];
  R584: FGF2_rna => ; 1;
  // V(585) = K(585,1) * [UBC_g];
  R585: UBC_g => ; 1;
  // V(586) = K(586,1) * [UBC_rna];
  R586: UBC_rna => ; 1;
  // V(587) = K(587,1) * [AR_g];
  R587: AR_g => ; 1;
  // V(588) = K(588,1) * [AR_rna];
  R588: AR_rna => ; 1;
  // V(589) = K(589,1) * [IRF1_g];
  R589: IRF1_g => ; 1;
  // V(590) = K(590,1) * [IRF1_rna];
  R590: IRF1_rna => ; 1;
  // V(591) = K(591,1) * [PKM_g];
  R591: PKM_g => ; 1;
  // V(592) = K(592,1) * [PKM_rna];
  R592: PKM_rna => ; 1;
  // V(593) = K(593,1) * [FABP4_g];
  R593: FABP4_g => ; 1;
  // V(594) = K(594,1) * [FABP4_rna];
  R594: FABP4_rna => ; 1;
  // V(595) = K(595,1) * [CREB1_g];
  R595: CREB1_g => ; 1;
  // V(596) = K(596,1) * [CREB1_rna];
  R596: CREB1_rna => ; 1;
  // V(597) = K(597,1) * [PRKCA_g];
  R597: PRKCA_g => ; 1;
  // V(598) = K(598,1) * [PRKCA_rna];
  R598: PRKCA_rna => ; 1;
  // V(599) = K(599,1) * [PTPN2_g];
  R599: PTPN2_g => ; 1;
  // V(600) = K(600,1) * [PTPN2_rna];
  R600: PTPN2_rna => ; 1;
  // V(601) = K(601,1) * [XBP1_g];
  R601: XBP1_g => ; 1;
  // V(602) = K(602,1) * [XBP1_rna];
  R602: XBP1_rna => ; 1;
  // V(603) = K(603,1) * [NR4A1_g];
  R603: NR4A1_g => ; 1;
  // V(604) = K(604,1) * [NR4A1_rna];
  R604: NR4A1_rna => ; 1;
  // V(605) = K(605,1) * [JAK1_g];
  R605: JAK1_g => ; 1;
  // V(606) = K(606,1) * [JAK1_rna];
  R606: JAK1_rna => ; 1;
  // V(607) = K(607,1) * [ZFP36_g];
  R607: ZFP36_g => ; 1;
  // V(608) = K(608,1) * [ZFP36_rna];
  R608: ZFP36_rna => ; 1;
  // V(609) = K(609,1) * [PIK3R1_g];
  R609: PIK3R1_g => ; 1;
  // V(610) = K(610,1) * [PIK3R1_rna];
  R610: PIK3R1_rna => ; 1;
  // V(611) = K(611,1) * [MAPK1_g];
  R611: MAPK1_g => ; 1;
  // V(612) = K(612,1) * [MAPK1_rna];
  R612: MAPK1_rna => ; 1;
  // V(613) = K(613,1) * [DUSP1_g];
  R613: DUSP1_g => ; 1;
  // V(614) = K(614,1) * [DUSP1_rna];
  R614: DUSP1_rna => ; 1;
  // V(615) = K(615,1) * [NOS3_g];
  R615: NOS3_g => ; 1;
  // V(616) = K(616,1) * [NOS3_rna];
  R616: NOS3_rna => ; 1;
  // V(617) = K(617,1) * [AQP1_g];
  R617: AQP1_g => ; 1;
  // V(618) = K(618,1) * [AQP1_rna];
  R618: AQP1_rna => ; 1;
  // V(619) = K(619,1) * [AKT1_g];
  R619: AKT1_g => ; 1;
  // V(620) = K(620,1) * [AKT1_rna];
  R620: AKT1_rna => ; 1;
  // V(621) = K(621,1) * [CTNNB1_g];
  R621: CTNNB1_g => ; 1;
  // V(622) = K(622,1) * [CTNNB1_rna];
  R622: CTNNB1_rna => ; 1;
  // V(623) = K(623,1) * [DDIT3_g];
  R623: DDIT3_g => ; 1;
  // V(624) = K(624,1) * [DDIT3_rna];
  R624: DDIT3_rna => ; 1;
  // V(625) = K(625,1) * [KDR_g];
  R625: KDR_g => ; 1;
  // V(626) = K(626,1) * [KDR_rna];
  R626: KDR_rna => ; 1;
  // V(627) = K(627,1) * [TRIM23_g];
  R627: TRIM23_g => ; 1;
  // V(628) = K(628,1) * [TRIM23_rna];
  R628: TRIM23_rna => ; 1;
  // V(629) = K(629,1) * [TGFBR1_g];
  R629: TGFBR1_g => ; 1;
  // V(630) = K(630,1) * [TGFBR1_rna];
  R630: TGFBR1_rna => ; 1;
  // V(631) = K(631,1) * [STAT1_g];
  R631: STAT1_g => ; 1;
  // V(632) = K(632,1) * [STAT1_rna];
  R632: STAT1_rna => ; 1;
  // V(633) = K(633,1) * [STAT6_g];
  R633: STAT6_g => ; 1;
  // V(634) = K(634,1) * [STAT6_rna];
  R634: STAT6_rna => ; 1;
  // V(635) = K(635,1) * [PIK3CA_g];
  R635: PIK3CA_g => ; 1;
  // V(636) = K(636,1) * [PIK3CA_rna];
  R636: PIK3CA_rna => ; 1;
  // V(637) = K(637,1) * [MAPK8_g];
  R637: MAPK8_g => ; 1;
  // V(638) = K(638,1) * [MAPK8_rna];
  R638: MAPK8_rna => ; 1;
  // V(639) = K(639,1) * [YAP1_g];
  R639: YAP1_g => ; 1;
  // V(640) = K(640,1) * [YAP1_rna];
  R640: YAP1_rna => ; 1;
  // V(641) = K(641,1) * [NUMB_g];
  R641: NUMB_g => ; 1;
  // V(642) = K(642,1) * [NUMB_rna];
  R642: NUMB_rna => ; 1;
  // V(643) = K(643,1) * [TSC2_g];
  R643: TSC2_g => ; 1;
  // V(644) = K(644,1) * [TSC2_rna];
  R644: TSC2_rna => ; 1;
  // V(645) = K(645,1) * [MECP2_g];
  R645: MECP2_g => ; 1;
  // V(646) = K(646,1) * [MECP2_rna];
  R646: MECP2_rna => ; 1;
  // V(647) = K(647,1) * [RPS6KA3_g];
  R647: RPS6KA3_g => ; 1;
  // V(648) = K(648,1) * [RPS6KA3_rna];
  R648: RPS6KA3_rna => ; 1;
  // V(649) = K(649,1) * [PTEN_g];
  R649: PTEN_g => ; 1;
  // V(650) = K(650,1) * [PTEN_rna];
  R650: PTEN_rna => ; 1;
  // V(651) = K(651,1) * [TGFB2_g];
  R651: TGFB2_g => ; 1;
  // V(652) = K(652,1) * [TGFB2_rna];
  R652: TGFB2_rna => ; 1;
  // V(653) = K(653,1) * [RAC1_g];
  R653: RAC1_g => ; 1;
  // V(654) = K(654,1) * [RAC1_rna];
  R654: RAC1_rna => ; 1;
  // V(655) = K(655,1) * [MDM2_g];
  R655: MDM2_g => ; 1;
  // V(656) = K(656,1) * [MDM2_rna];
  R656: MDM2_rna => ; 1;
  // V(657) = K(657,1) * [EP300_g];
  R657: EP300_g => ; 1;
  // V(658) = K(658,1) * [EP300_rna];
  R658: EP300_rna => ; 1;
  // V(659) = K(659,1) * [MAP4K2_g];
  R659: MAP4K2_g => ; 1;
  // V(660) = K(660,1) * [MAP4K2_rna];
  R660: MAP4K2_rna => ; 1;
  // V(661) = K(661,1) * [PRKAA1_g];
  R661: PRKAA1_g => ; 1;
  // V(662) = K(662,1) * [PRKAA1_rna];
  R662: PRKAA1_rna => ; 1;
  // V(663) = K(663,1) * [ILK_g];
  R663: ILK_g => ; 1;
  // V(664) = K(664,1) * [ILK_rna];
  R664: ILK_rna => ; 1;
  // V(665) = K(665,1) * [ROCK1_g];
  R665: ROCK1_g => ; 1;
  // V(666) = K(666,1) * [ROCK1_rna];
  R666: ROCK1_rna => ; 1;
  // V(667) = K(667,1) * [SMAD4_g];
  R667: SMAD4_g => ; 1;
  // V(668) = K(668,1) * [SMAD4_rna];
  R668: SMAD4_rna => ; 1;
  // V(669) = K(669,1) * [ATR_g];
  R669: ATR_g => ; 1;
  // V(670) = K(670,1) * [ATR_rna];
  R670: ATR_rna => ; 1;
  // V(671) = K(671,1) * [HDAC1_g];
  R671: HDAC1_g => ; 1;
  // V(672) = K(672,1) * [HDAC1_rna];
  R672: HDAC1_rna => ; 1;
  // V(673) = K(673,1) * [BECN1_g];
  R673: BECN1_g => ; 1;
  // V(674) = K(674,1) * [BECN1_rna];
  R674: BECN1_rna => ; 1;
  // V(675) = K(675,1) * [HES1_g];
  R675: HES1_g => ; 1;
  // V(676) = K(676,1) * [HES1_rna];
  R676: HES1_rna => ; 1;
  // V(677) = K(677,1) * [IRF3_g];
  R677: IRF3_g => ; 1;
  // V(678) = K(678,1) * [IRF3_rna];
  R678: IRF3_rna => ; 1;
  // V(679) = K(679,1) * [SMAD2_g];
  R679: SMAD2_g => ; 1;
  // V(680) = K(680,1) * [SMAD2_rna];
  R680: SMAD2_rna => ; 1;
  // V(681) = K(681,1) * [SMAD1_g];
  R681: SMAD1_g => ; 1;
  // V(682) = K(682,1) * [SMAD1_rna];
  R682: SMAD1_rna => ; 1;
  // V(683) = K(683,1) * [PKN1_g];
  R683: PKN1_g => ; 1;
  // V(684) = K(684,1) * [PKN1_rna];
  R684: PKN1_rna => ; 1;
  // V(685) = K(685,1) * [OCLN_g];
  R685: OCLN_g => ; 1;
  // V(686) = K(686,1) * [OCLN_rna];
  R686: OCLN_rna => ; 1;
  // V(687) = K(687,1) * [MAPK6_g];
  R687: MAPK6_g => ; 1;
  // V(688) = K(688,1) * [MAPK6_rna];
  R688: MAPK6_rna => ; 1;
  // V(689) = K(689,1) * [HIF1A_g];
  R689: HIF1A_g => ; 1;
  // V(690) = K(690,1) * [HIF1A_rna];
  R690: HIF1A_rna => ; 1;
  // V(691) = K(691,1) * [AEBP1_g];
  R691: AEBP1_g => ; 1;
  // V(692) = K(692,1) * [AEBP1_rna];
  R692: AEBP1_rna => ; 1;
  // V(693) = K(693,1) * [MFN1_g];
  R693: MFN1_g => ; 1;
  // V(694) = K(694,1) * [MFN1_rna];
  R694: MFN1_rna => ; 1;
  // V(695) = K(695,1) * [MYLIP_g];
  R695: MYLIP_g => ; 1;
  // V(696) = K(696,1) * [MYLIP_rna];
  R696: MYLIP_rna => ; 1;
  // V(697) = K(697,1) * [BAD_g];
  R697: BAD_g => ; 1;
  // V(698) = K(698,1) * [BAD_rna];
  R698: BAD_rna => ; 1;
  // V(699) = K(699,1) * [AKT1S1_g];
  R699: AKT1S1_g => ; 1;
  // V(700) = K(700,1) * [AKT1S1_rna];
  R700: AKT1S1_rna => ; 1;
  // V(701) = K(701,1) * [SIRT1_g];
  R701: SIRT1_g => ; 1;
  // V(702) = K(702,1) * [SIRT1_rna];
  R702: SIRT1_rna => ; 1;
  // V(703) = K(703,1) * [NOTCH4_g];
  R703: NOTCH4_g => ; 1;
  // V(704) = K(704,1) * [NOTCH4_rna];
  R704: NOTCH4_rna => ; 1;
  // V(705) = K(705,1) * [PARK7_g];
  R705: PARK7_g => ; 1;
  // V(706) = K(706,1) * [PARK7_rna];
  R706: PARK7_rna => ; 1;
  // V(707) = K(707,1) * [PINK1_g];
  R707: PINK1_g => ; 1;
  // V(708) = K(708,1) * [PINK1_rna];
  R708: PINK1_rna => ; 1;
  // V(709) = K(709,1) * [SMURF1_g];
  R709: SMURF1_g => ; 1;
  // V(710) = K(710,1) * [SMURF1_rna];
  R710: SMURF1_rna => ; 1;
  // V(711) = K(711,1) * [PLK2_g];
  R711: PLK2_g => ; 1;
  // V(712) = K(712,1) * [PLK2_rna];
  R712: PLK2_rna => ; 1;
  // V(713) = K(713,1) * [ADD3_g];
  R713: ADD3_g => ; 1;
  // V(714) = K(714,1) * [ADD3_rna];
  R714: ADD3_rna => ; 1;
  // V(715) = K(715,1) * [AGO2_g];
  R715: AGO2_g => ; 1;
  // V(716) = K(716,1) * [AGO2_rna];
  R716: AGO2_rna => ; 1;
  // V(717) = K(717,1) * [DNM1L_p];
  R717: DNM1L_p => ; 1;
  // V(718) = K(718,1) * [IKBKB_p];
  R718: IKBKB_p => ; 1;
  // V(719) = K(719,1) * [TLR3_p];
  R719: TLR3_p => ; 1;
  // V(720) = K(720,1) * [SOCS1_p];
  R720: SOCS1_p => ; 1;
  // V(721) = K(721,1) * [ERN1_p];
  R721: ERN1_p => ; 1;
  // V(722) = K(722,1) * [MFN2_p];
  R722: MFN2_p => ; 1;
  // V(723) = K(723,1) * [EGFR_p];
  R723: EGFR_p => ; 1;
  // V(724) = K(724,1) * [ANXA1_p];
  R724: ANXA1_p => ; 1;
  // V(725) = K(725,1) * [NR3C1_p];
  R725: NR3C1_p => ; 1;
  // V(726) = K(726,1) * [TP53_p];
  R726: TP53_p => ; 1;
  // V(727) = K(727,1) * [HSPB1_p];
  R727: HSPB1_p => ; 1;
  // V(728) = K(728,1) * [HMGN1_p];
  R728: HMGN1_p => ; 1;
  // V(729) = K(729,1) * [INSR_p];
  R729: INSR_p => ; 1;
  // V(730) = K(730,1) * [LYN_p];
  R730: LYN_p => ; 1;
  // V(731) = K(731,1) * [SP1_p];
  R731: SP1_p => ; 1;
  // V(732) = K(732,1) * [IGF1R_p];
  R732: IGF1R_p => ; 1;
  // V(733) = K(733,1) * [VIM_p];
  R733: VIM_p => ; 1;
  // V(734) = K(734,1) * [UBC_p];
  R734: UBC_p => ; 1;
  // V(735) = K(735,1) * [AR_p];
  R735: AR_p => ; 1;
  // V(736) = K(736,1) * [PKM_p];
  R736: PKM_p => ; 1;
  // V(737) = K(737,1) * [FABP4_p];
  R737: FABP4_p => ; 1;
  // V(738) = K(738,1) * [CREB1_p];
  R738: CREB1_p => ; 1;
  // V(739) = K(739,1) * [PRKCA_p];
  R739: PRKCA_p => ; 1;
  // V(740) = K(740,1) * [XBP1_p];
  R740: XBP1_p => ; 1;
  // V(741) = K(741,1) * [NR4A1_p];
  R741: NR4A1_p => ; 1;
  // V(742) = K(742,1) * [JAK1_p];
  R742: JAK1_p => ; 1;
  // V(743) = K(743,1) * [ZFP36_p];
  R743: ZFP36_p => ; 1;
  // V(744) = K(744,1) * [PIK3R1_p];
  R744: PIK3R1_p => ; 1;
  // V(745) = K(745,1) * [MAPK1_p];
  R745: MAPK1_p => ; 1;
  // V(746) = K(746,1) * [DUSP1_p];
  R746: DUSP1_p => ; 1;
  // V(747) = K(747,1) * [NOS3_p];
  R747: NOS3_p => ; 1;
  // V(748) = K(748,1) * [AQP1_p];
  R748: AQP1_p => ; 1;
  // V(749) = K(749,1) * [AKT1_p];
  R749: AKT1_p => ; 1;
  // V(750) = K(750,1) * [CTNNB1_p];
  R750: CTNNB1_p => ; 1;
  // V(751) = K(751,1) * [DDIT3_p];
  R751: DDIT3_p => ; 1;
  // V(752) = K(752,1) * [KDR_p];
  R752: KDR_p => ; 1;
  // V(753) = K(753,1) * [TRIM23_p];
  R753: TRIM23_p => ; 1;
  // V(754) = K(754,1) * [PPARG_p];
  R754: PPARG_p => ; 1;
  // V(755) = K(755,1) * [CDKN1A_p];
  R755: CDKN1A_p => ; 1;
  // V(756) = K(756,1) * [STAT1_p];
  R756: STAT1_p => ; 1;
  // V(757) = K(757,1) * [STAT6_p];
  R757: STAT6_p => ; 1;
  // V(758) = K(758,1) * [MAPK8_p];
  R758: MAPK8_p => ; 1;
  // V(759) = K(759,1) * [YAP1_p];
  R759: YAP1_p => ; 1;
  // V(760) = K(760,1) * [TSC2_p];
  R760: TSC2_p => ; 1;
  // V(761) = K(761,1) * [RPS6KA3_p];
  R761: RPS6KA3_p => ; 1;
  // V(762) = K(762,1) * [PTEN_p];
  R762: PTEN_p => ; 1;
  // V(763) = K(763,1) * [RAC1_p];
  R763: RAC1_p => ; 1;
  // V(764) = K(764,1) * [SMAD3_p];
  R764: SMAD3_p => ; 1;
  // V(765) = K(765,1) * [MDM2_p];
  R765: MDM2_p => ; 1;
  // V(766) = K(766,1) * [EP300_p];
  R766: EP300_p => ; 1;
  // V(767) = K(767,1) * [MAP4K2_p];
  R767: MAP4K2_p => ; 1;
  // V(768) = K(768,1) * [PRKAA1_p];
  R768: PRKAA1_p => ; 1;
  // V(769) = K(769,1) * [ILK_p];
  R769: ILK_p => ; 1;
  // V(770) = K(770,1) * [SMAD4_p];
  R770: SMAD4_p => ; 1;
  // V(771) = K(771,1) * [BECN1_p];
  R771: BECN1_p => ; 1;
  // V(772) = K(772,1) * [HES1_p];
  R772: HES1_p => ; 1;
  // V(773) = K(773,1) * [IRF3_p];
  R773: IRF3_p => ; 1;
  // V(774) = K(774,1) * [SMAD2_p];
  R774: SMAD2_p => ; 1;
  // V(775) = K(775,1) * [SMAD1_p];
  R775: SMAD1_p => ; 1;
  // V(776) = K(776,1) * [PKN1_p];
  R776: PKN1_p => ; 1;
  // V(777) = K(777,1) * [OCLN_p];
  R777: OCLN_p => ; 1;
  // V(778) = K(778,1) * [MAPK6_p];
  R778: MAPK6_p => ; 1;
  // V(779) = K(779,1) * [HIF1A_p];
  R779: HIF1A_p => ; 1;
  // V(780) = K(780,1) * [AEBP1_p];
  R780: AEBP1_p => ; 1;
  // V(781) = K(781,1) * [MFN1_p];
  R781: MFN1_p => ; 1;
  // V(782) = K(782,1) * [BAD_p];
  R782: BAD_p => ; 1;
  // V(783) = K(783,1) * [AKT1S1_p];
  R783: AKT1S1_p => ; 1;
  // V(784) = K(784,1) * [SIRT1_p];
  R784: SIRT1_p => ; 1;
  // V(785) = K(785,1) * [PARK7_p];
  R785: PARK7_p => ; 1;
  // V(786) = K(786,1) * [SMURF1_p];
  R786: SMURF1_p => ; 1;
  // V(787) = K(787,1) * [ADD3_p];
  R787: ADD3_p => ; 1;
  // V(788) = K(788,1) * [AGO2_p];
  R788: AGO2_p => ; 1;
  // V(789) = K(789,1) * [SIGNOR-C156_p];
  R789: => ; 1;
  // V(790) = K(790,1) * [TLR4_rna];
  R790: TLR4_rna => ; 1;
  // V(791) = K(791,1) * [DNM1L_rna];
  R791: DNM1L_rna => ; 1;
  // V(792) = K(792,1) * [IKBKB_rna];
  R792: IKBKB_rna => ; 1;
  // V(793) = K(793,1) * [SMAD7_rna];
  R793: SMAD7_rna => ; 1;
  // V(794) = K(794,1) * [TLR3_rna];
  R794: TLR3_rna => ; 1;
  // V(795) = K(795,1) * [KDM6A_rna];
  R795: KDM6A_rna => ; 1;
  // V(796) = K(796,1) * [ERN1_rna];
  R796: ERN1_rna => ; 1;
  // V(797) = K(797,1) * [MFN2_rna];
  R797: MFN2_rna => ; 1;
  // V(798) = K(798,1) * [EGFR_rna];
  R798: EGFR_rna => ; 1;
  // V(799) = K(799,1) * [LDLR_rna];
  R799: LDLR_rna => ; 1;
  // V(800) = K(800,1) * [EGF_rna];
  R800: EGF_rna => ; 1;
  // V(801) = K(801,1) * [ANXA1_rna];
  R801: ANXA1_rna => ; 1;
  // V(802) = K(802,1) * [TP53_rna];
  R802: TP53_rna => ; 1;
  // V(803) = K(803,1) * [HSPB1_rna];
  R803: HSPB1_rna => ; 1;
  // V(804) = K(804,1) * [HMGN1_rna];
  R804: HMGN1_rna => ; 1;
  // V(805) = K(805,1) * [FGF1_rna];
  R805: FGF1_rna => ; 1;
  // V(806) = K(806,1) * [INSR_rna];
  R806: INSR_rna => ; 1;
  // V(807) = K(807,1) * [LYN_rna];
  R807: LYN_rna => ; 1;
  // V(808) = K(808,1) * [SP1_rna];
  R808: SP1_rna => ; 1;
  // V(809) = K(809,1) * [IGF1R_rna];
  R809: IGF1R_rna => ; 1;
  // V(810) = K(810,1) * [VIM_rna];
  R810: VIM_rna => ; 1;
  // V(811) = K(811,1) * [FGF2_rna];
  R811: FGF2_rna => ; 1;
  // V(812) = K(812,1) * [UBC_rna];
  R812: UBC_rna => ; 1;
  // V(813) = K(813,1) * [AR_rna];
  R813: AR_rna => ; 1;
  // V(814) = K(814,1) * [IRF1_rna];
  R814: IRF1_rna => ; 1;
  // V(815) = K(815,1) * [PKM_rna];
  R815: PKM_rna => ; 1;
  // V(816) = K(816,1) * [FABP4_rna];
  R816: FABP4_rna => ; 1;
  // V(817) = K(817,1) * [CREB1_rna];
  R817: CREB1_rna => ; 1;
  // V(818) = K(818,1) * [PRKCA_rna];
  R818: PRKCA_rna => ; 1;
  // V(819) = K(819,1) * [PTPN2_rna];
  R819: PTPN2_rna => ; 1;
  // V(820) = K(820,1) * [XBP1_rna];
  R820: XBP1_rna => ; 1;
  // V(821) = K(821,1) * [NR4A1_rna];
  R821: NR4A1_rna => ; 1;
  // V(822) = K(822,1) * [JAK1_rna];
  R822: JAK1_rna => ; 1;
  // V(823) = K(823,1) * [ZFP36_rna];
  R823: ZFP36_rna => ; 1;
  // V(824) = K(824,1) * [PIK3R1_rna];
  R824: PIK3R1_rna => ; 1;
  // V(825) = K(825,1) * [MAPK1_rna];
  R825: MAPK1_rna => ; 1;
  // V(826) = K(826,1) * [DUSP1_rna];
  R826: DUSP1_rna => ; 1;
  // V(827) = K(827,1) * [NOS3_rna];
  R827: NOS3_rna => ; 1;
  // V(828) = K(828,1) * [AQP1_rna];
  R828: AQP1_rna => ; 1;
  // V(829) = K(829,1) * [AKT1_rna];
  R829: AKT1_rna => ; 1;
  // V(830) = K(830,1) * [CTNNB1_rna];
  R830: CTNNB1_rna => ; 1;
  // V(831) = K(831,1) * [DDIT3_rna];
  R831: DDIT3_rna => ; 1;
  // V(832) = K(832,1) * [KDR_rna];
  R832: KDR_rna => ; 1;
  // V(833) = K(833,1) * [TRIM23_rna];
  R833: TRIM23_rna => ; 1;
  // V(834) = K(834,1) * [TGFBR1_rna];
  R834: TGFBR1_rna => ; 1;
  // V(835) = K(835,1) * [STAT1_rna];
  R835: STAT1_rna => ; 1;
  // V(836) = K(836,1) * [STAT6_rna];
  R836: STAT6_rna => ; 1;
  // V(837) = K(837,1) * [PIK3CA_rna];
  R837: PIK3CA_rna => ; 1;
  // V(838) = K(838,1) * [MAPK8_rna];
  R838: MAPK8_rna => ; 1;
  // V(839) = K(839,1) * [YAP1_rna];
  R839: YAP1_rna => ; 1;
  // V(840) = K(840,1) * [NUMB_rna];
  R840: NUMB_rna => ; 1;
  // V(841) = K(841,1) * [TSC2_rna];
  R841: TSC2_rna => ; 1;
  // V(842) = K(842,1) * [MECP2_rna];
  R842: MECP2_rna => ; 1;
  // V(843) = K(843,1) * [RPS6KA3_rna];
  R843: RPS6KA3_rna => ; 1;
  // V(844) = K(844,1) * [PTEN_rna];
  R844: PTEN_rna => ; 1;
  // V(845) = K(845,1) * [TGFB2_rna];
  R845: TGFB2_rna => ; 1;
  // V(846) = K(846,1) * [RAC1_rna];
  R846: RAC1_rna => ; 1;
  // V(847) = K(847,1) * [MDM2_rna];
  R847: MDM2_rna => ; 1;
  // V(848) = K(848,1) * [EP300_rna];
  R848: EP300_rna => ; 1;
  // V(849) = K(849,1) * [MAP4K2_rna];
  R849: MAP4K2_rna => ; 1;
  // V(850) = K(850,1) * [PRKAA1_rna];
  R850: PRKAA1_rna => ; 1;
  // V(851) = K(851,1) * [ILK_rna];
  R851: ILK_rna => ; 1;
  // V(852) = K(852,1) * [ROCK1_rna];
  R852: ROCK1_rna => ; 1;
  // V(853) = K(853,1) * [SMAD4_rna];
  R853: SMAD4_rna => ; 1;
  // V(854) = K(854,1) * [ATR_rna];
  R854: ATR_rna => ; 1;
  // V(855) = K(855,1) * [HDAC1_rna];
  R855: HDAC1_rna => ; 1;
  // V(856) = K(856,1) * [BECN1_rna];
  R856: BECN1_rna => ; 1;
  // V(857) = K(857,1) * [HES1_rna];
  R857: HES1_rna => ; 1;
  // V(858) = K(858,1) * [IRF3_rna];
  R858: IRF3_rna => ; 1;
  // V(859) = K(859,1) * [SMAD2_rna];
  R859: SMAD2_rna => ; 1;
  // V(860) = K(860,1) * [SMAD1_rna];
  R860: SMAD1_rna => ; 1;
  // V(861) = K(861,1) * [PKN1_rna];
  R861: PKN1_rna => ; 1;
  // V(862) = K(862,1) * [OCLN_rna];
  R862: OCLN_rna => ; 1;
  // V(863) = K(863,1) * [MAPK6_rna];
  R863: MAPK6_rna => ; 1;
  // V(864) = K(864,1) * [HIF1A_rna];
  R864: HIF1A_rna => ; 1;
  // V(865) = K(865,1) * [AEBP1_rna];
  R865: AEBP1_rna => ; 1;
  // V(866) = K(866,1) * [MFN1_rna];
  R866: MFN1_rna => ; 1;
  // V(867) = K(867,1) * [MYLIP_rna];
  R867: MYLIP_rna => ; 1;
  // V(868) = K(868,1) * [BAD_rna];
  R868: BAD_rna => ; 1;
  // V(869) = K(869,1) * [AKT1S1_rna];
  R869: AKT1S1_rna => ; 1;
  // V(870) = K(870,1) * [SIRT1_rna];
  R870: SIRT1_rna => ; 1;
  // V(871) = K(871,1) * [NOTCH4_rna];
  R871: NOTCH4_rna => ; 1;
  // V(872) = K(872,1) * [PARK7_rna];
  R872: PARK7_rna => ; 1;
  // V(873) = K(873,1) * [PINK1_rna];
  R873: PINK1_rna => ; 1;
  // V(874) = K(874,1) * [SMURF1_rna];
  R874: SMURF1_rna => ; 1;
  // V(875) = K(875,1) * [PLK2_rna];
  R875: PLK2_rna => ; 1;
  // V(876) = K(876,1) * [ADD3_rna];
  R876: ADD3_rna => ; 1;
  // V(877) = K(877,1) * [AGO2_rna];
  R877: AGO2_rna => ; 1;
end
