// SBML level 3 version 2

model InterCellB()

  // Compartments:
  compartment cell = 1;

  // Species:
  species ABCA1 in cell = 1/cell;
  species ABCA1_g in cell = 1/cell;
  species ABCA1_p in cell = 1/cell;
  species ABCA1_rna in cell = 1/cell;
  species ADD3 in cell = 1/cell;
  species ADD3_g in cell = 1/cell;
  species ADD3_p in cell = 1/cell;
  species ADD3_rna in cell = 1/cell;
  species AKT1 in cell = 1/cell;
  species AKT1S1 in cell = 1/cell;
  species AKT1S1_g in cell = 1/cell;
  species AKT1S1_p in cell = 1/cell;
  species AKT1S1_rna in cell = 1/cell;
  species AKT1_g in cell = 1/cell;
  species AKT1_p in cell = 1/cell;
  species AKT1_rna in cell = 1/cell;
  species ATF3 in cell = 1/cell;
  species ATF3_g in cell = 1/cell;
  species ATF3_rna in cell = 1/cell;
  species BAX in cell = 1/cell;
  species BAX_g in cell = 1/cell;
  species BAX_p in cell = 1/cell;
  species BAX_rna in cell = 1/cell;
  species BCL2 in cell = 1/cell;
  species BCL2_g in cell = 1/cell;
  species BCL2_p in cell = 1/cell;
  species BCL2_rna in cell = 1/cell;
  species BECN1 in cell = 1/cell;
  species BECN1_g in cell = 1/cell;
  species BECN1_p in cell = 1/cell;
  species BECN1_rna in cell = 1/cell;
  species BMP4 in cell = 1/cell;
  species BMP4_g in cell = 1/cell;
  species BMP4_rna in cell = 1/cell;
  species CAT in cell = 1/cell;
  species CAT_g in cell = 1/cell;
  species CAT_rna in cell = 1/cell;
  species CDKN1A in cell = 1/cell;
  species CDKN1A_g in cell = 1/cell;
  species CDKN1A_p in cell = 1/cell;
  species CDKN1A_rna in cell = 1/cell;
  species CDKN1B in cell = 1/cell;
  species CDKN1B_g in cell = 1/cell;
  species CDKN1B_p in cell = 1/cell;
  species CDKN1B_rna in cell = 1/cell;
  species CREB1 in cell = 1/cell;
  species CREB1_g in cell = 1/cell;
  species CREB1_p in cell = 1/cell;
  species CREB1_rna in cell = 1/cell;
  species CTNNB1 in cell = 1/cell;
  species CTNNB1_g in cell = 1/cell;
  species CTNNB1_p in cell = 1/cell;
  species CTNNB1_rna in cell = 1/cell;
  species CYBA in cell = 1/cell;
  species CYBA_g in cell = 1/cell;
  species CYBA_p in cell = 1/cell;
  species CYBA_rna in cell = 1/cell;
  species DDIT3 in cell = 1/cell;
  species DDIT3_g in cell = 1/cell;
  species DDIT3_p in cell = 1/cell;
  species DDIT3_rna in cell = 1/cell;
  species DNMT1 in cell = 1/cell;
  species DNMT1_g in cell = 1/cell;
  species DNMT1_p in cell = 1/cell;
  species DNMT1_rna in cell = 1/cell;
  species DUSP1 in cell = 1/cell;
  species DUSP1_g in cell = 1/cell;
  species DUSP1_p in cell = 1/cell;
  species DUSP1_rna in cell = 1/cell;
  species EGFR in cell = 1/cell;
  species EGFR_g in cell = 1/cell;
  species EGFR_p in cell = 1/cell;
  species EGFR_rna in cell = 1/cell;
  species EGR1 in cell = 1/cell;
  species EGR1_g in cell = 1/cell;
  species EGR1_rna in cell = 1/cell;
  species EP300 in cell = 1/cell;
  species EP300_g in cell = 1/cell;
  species EP300_p in cell = 1/cell;
  species EP300_rna in cell = 1/cell;
  species F3 in cell = 1/cell;
  species F3_g in cell = 1/cell;
  species F3_p in cell = 1/cell;
  species F3_rna in cell = 1/cell;
  species FOS in cell = 1/cell;
  species FOS_g in cell = 1/cell;
  species FOS_p in cell = 1/cell;
  species FOS_rna in cell = 1/cell;
  species FOXO1 in cell = 1/cell;
  species FOXO1_g in cell = 1/cell;
  species FOXO1_p in cell = 1/cell;
  species FOXO1_rna in cell = 1/cell;
  species GDF15 in cell = 1/cell;
  species GDF15_g in cell = 1/cell;
  species GDF15_rna in cell = 1/cell;
  species GPX4 in cell = 1/cell;
  species GPX4_g in cell = 1/cell;
  species GPX4_rna in cell = 1/cell;
  species HIF1A in cell = 1/cell;
  species HIF1A_g in cell = 1/cell;
  species HIF1A_p in cell = 1/cell;
  species HIF1A_rna in cell = 1/cell;
  species HIPK2 in cell = 1/cell;
  species HIPK2_g in cell = 1/cell;
  species HIPK2_p in cell = 1/cell;
  species HIPK2_rna in cell = 1/cell;
  species HMGN1 in cell = 1/cell;
  species HMGN1_g in cell = 1/cell;
  species HMGN1_p in cell = 1/cell;
  species HMGN1_rna in cell = 1/cell;
  species HPSE in cell = 1/cell;
  species HPSE_g in cell = 1/cell;
  species HPSE_rna in cell = 1/cell;
  species HSPB1 in cell = 1/cell;
  species HSPB1_g in cell = 1/cell;
  species HSPB1_p in cell = 1/cell;
  species HSPB1_rna in cell = 1/cell;
  species INSR in cell = 1/cell;
  species INSR_g in cell = 1/cell;
  species INSR_p in cell = 1/cell;
  species INSR_rna in cell = 1/cell;
  species IRF3 in cell = 1/cell;
  species IRF3_g in cell = 1/cell;
  species IRF3_p in cell = 1/cell;
  species IRF3_rna in cell = 1/cell;
  species IRS1 in cell = 1/cell;
  species IRS1_g in cell = 1/cell;
  species IRS1_p in cell = 1/cell;
  species IRS1_rna in cell = 1/cell;
  species IRS2 in cell = 1/cell;
  species IRS2_g in cell = 1/cell;
  species IRS2_p in cell = 1/cell;
  species IRS2_rna in cell = 1/cell;
  species JUN in cell = 1/cell;
  species JUNB in cell = 1/cell;
  species JUNB_g in cell = 1/cell;
  species JUNB_p in cell = 1/cell;
  species JUNB_rna in cell = 1/cell;
  species JUN_g in cell = 1/cell;
  species JUN_p in cell = 1/cell;
  species JUN_rna in cell = 1/cell;
  species KDM6B in cell = 1/cell;
  species KDM6B_g in cell = 1/cell;
  species KDM6B_rna in cell = 1/cell;
  species KIT in cell = 1/cell;
  species KIT_g in cell = 1/cell;
  species KIT_p in cell = 1/cell;
  species KIT_rna in cell = 1/cell;
  species MAPK1 in cell = 1/cell;
  species MAPK1_g in cell = 1/cell;
  species MAPK1_p in cell = 1/cell;
  species MAPK1_rna in cell = 1/cell;
  species MAPK8 in cell = 1/cell;
  species MAPK8_g in cell = 1/cell;
  species MAPK8_p in cell = 1/cell;
  species MAPK8_rna in cell = 1/cell;
  species MAPK9 in cell = 1/cell;
  species MAPK9_g in cell = 1/cell;
  species MAPK9_p in cell = 1/cell;
  species MAPK9_rna in cell = 1/cell;
  species MDM2 in cell = 1/cell;
  species MDM2_g in cell = 1/cell;
  species MDM2_p in cell = 1/cell;
  species MDM2_rna in cell = 1/cell;
  species MECP2 in cell = 1/cell;
  species MECP2_g in cell = 1/cell;
  species MECP2_p in cell = 1/cell;
  species MECP2_rna in cell = 1/cell;
  species MFN1 in cell = 1/cell;
  species MFN1_g in cell = 1/cell;
  species MFN1_p in cell = 1/cell;
  species MFN1_rna in cell = 1/cell;
  species NFE2L2 in cell = 1/cell;
  species NFE2L2_g in cell = 1/cell;
  species NFE2L2_p in cell = 1/cell;
  species NFE2L2_rna in cell = 1/cell;
  species NFKB1 in cell = 1/cell;
  species NFKB1_g in cell = 1/cell;
  species NFKB1_rna in cell = 1/cell;
  species NR3C2 in cell = 1/cell;
  species NR3C2_g in cell = 1/cell;
  species NR3C2_p in cell = 1/cell;
  species NR3C2_rna in cell = 1/cell;
  species NR4A1 in cell = 1/cell;
  species NR4A1_g in cell = 1/cell;
  species NR4A1_p in cell = 1/cell;
  species NR4A1_rna in cell = 1/cell;
  species NUMB in cell = 1/cell;
  species NUMB_g in cell = 1/cell;
  species NUMB_rna in cell = 1/cell;
  species OCLN in cell = 1/cell;
  species OCLN_g in cell = 1/cell;
  species OCLN_p in cell = 1/cell;
  species OCLN_rna in cell = 1/cell;
  species PARP1 in cell = 1/cell;
  species PARP1_g in cell = 1/cell;
  species PARP1_p in cell = 1/cell;
  species PARP1_rna in cell = 1/cell;
  species PCK1 in cell = 1/cell;
  species PCK1_g in cell = 1/cell;
  species PCK1_rna in cell = 1/cell;
  species PCNA in cell = 1/cell;
  species PCNA_g in cell = 1/cell;
  species PCNA_p in cell = 1/cell;
  species PCNA_rna in cell = 1/cell;
  species PIK3CA in cell = 1/cell;
  species PIK3CA_g in cell = 1/cell;
  species PIK3CA_p in cell = 1/cell;
  species PIK3CA_rna in cell = 1/cell;
  species PIK3R1 in cell = 1/cell;
  species PIK3R1_g in cell = 1/cell;
  species PIK3R1_p in cell = 1/cell;
  species PIK3R1_rna in cell = 1/cell;
  species PINK1 in cell = 1/cell;
  species PINK1_g in cell = 1/cell;
  species PINK1_rna in cell = 1/cell;
  species PPARG in cell = 1/cell;
  species PPARGC1A in cell = 1/cell;
  species PPARGC1A_g in cell = 1/cell;
  species PPARGC1A_p in cell = 1/cell;
  species PPARGC1A_rna in cell = 1/cell;
  species PPARG_g in cell = 1/cell;
  species PPARG_p in cell = 1/cell;
  species PPARG_rna in cell = 1/cell;
  species PRDX1 in cell = 1/cell;
  species PRDX1_g in cell = 1/cell;
  species PRDX1_p in cell = 1/cell;
  species PRDX1_rna in cell = 1/cell;
  species PRDX6 in cell = 1/cell;
  species PRDX6_g in cell = 1/cell;
  species PRDX6_p in cell = 1/cell;
  species PRDX6_rna in cell = 1/cell;
  species PRKAA1 in cell = 1/cell;
  species PRKAA1_g in cell = 1/cell;
  species PRKAA1_p in cell = 1/cell;
  species PRKAA1_rna in cell = 1/cell;
  species PRKCA in cell = 1/cell;
  species PRKCA_g in cell = 1/cell;
  species PRKCA_p in cell = 1/cell;
  species PRKCA_rna in cell = 1/cell;
  species PTEN in cell = 1/cell;
  species PTEN_g in cell = 1/cell;
  species PTEN_p in cell = 1/cell;
  species PTEN_rna in cell = 1/cell;
  species PTPA in cell = 1/cell;
  species PTPA_g in cell = 1/cell;
  species PTPA_rna in cell = 1/cell;
  species PTPN11 in cell = 1/cell;
  species PTPN11_g in cell = 1/cell;
  species PTPN11_p in cell = 1/cell;
  species PTPN11_rna in cell = 1/cell;
  species PTPN2 in cell = 1/cell;
  species PTPN2_g in cell = 1/cell;
  species PTPN2_rna in cell = 1/cell;
  species PTPRJ in cell = 1/cell;
  species PTPRJ_g in cell = 1/cell;
  species PTPRJ_rna in cell = 1/cell;
  species RCAN1 in cell = 1/cell;
  species RCAN1_g in cell = 1/cell;
  species RCAN1_p in cell = 1/cell;
  species RCAN1_rna in cell = 1/cell;
  species ROCK1 in cell = 1/cell;
  species ROCK1_g in cell = 1/cell;
  species ROCK1_rna in cell = 1/cell;
  species ROCK2 in cell = 1/cell;
  species ROCK2_g in cell = 1/cell;
  species ROCK2_rna in cell = 1/cell;
  species RPS6KA3 in cell = 1/cell;
  species RPS6KA3_g in cell = 1/cell;
  species RPS6KA3_p in cell = 1/cell;
  species RPS6KA3_rna in cell = 1/cell;
  species SGK1 in cell = 1/cell;
  species SGK1_g in cell = 1/cell;
  species SGK1_rna in cell = 1/cell;
  species SIRT1 in cell = 1/cell;
  species SIRT1_g in cell = 1/cell;
  species SIRT1_p in cell = 1/cell;
  species SIRT1_rna in cell = 1/cell;
  species SIRT7 in cell = 1/cell;
  species SIRT7_g in cell = 1/cell;
  species SIRT7_p in cell = 1/cell;
  species SIRT7_rna in cell = 1/cell;
  species SLC2A1 in cell = 1/cell;
  species SLC2A1_g in cell = 1/cell;
  species SLC2A1_rna in cell = 1/cell;
  species SMAD1 in cell = 1/cell;
  species SMAD1_g in cell = 1/cell;
  species SMAD1_p in cell = 1/cell;
  species SMAD1_rna in cell = 1/cell;
  species SMAD2 in cell = 1/cell;
  species SMAD2_g in cell = 1/cell;
  species SMAD2_p in cell = 1/cell;
  species SMAD2_rna in cell = 1/cell;
  species SMAD4 in cell = 1/cell;
  species SMAD4_g in cell = 1/cell;
  species SMAD4_p in cell = 1/cell;
  species SMAD4_rna in cell = 1/cell;
  species SOCS1 in cell = 1/cell;
  species SOCS1_g in cell = 1/cell;
  species SOCS1_rna in cell = 1/cell;
  species SOCS3 in cell = 1/cell;
  species SOCS3_g in cell = 1/cell;
  species SOCS3_rna in cell = 1/cell;
  species SOD1 in cell = 1/cell;
  species SOD1_g in cell = 1/cell;
  species SOD1_rna in cell = 1/cell;
  species SOD2 in cell = 1/cell;
  species SOD2_g in cell = 1/cell;
  species SOD2_rna in cell = 1/cell;
  species SP1 in cell = 1/cell;
  species SP1_g in cell = 1/cell;
  species SP1_p in cell = 1/cell;
  species SP1_rna in cell = 1/cell;
  species STAT1 in cell = 1/cell;
  species STAT1_g in cell = 1/cell;
  species STAT1_p in cell = 1/cell;
  species STAT1_rna in cell = 1/cell;
  species STAT6 in cell = 1/cell;
  species STAT6_g in cell = 1/cell;
  species STAT6_p in cell = 1/cell;
  species STAT6_rna in cell = 1/cell;
  species STK11 in cell = 1/cell;
  species STK11_g in cell = 1/cell;
  species STK11_p in cell = 1/cell;
  species STK11_rna in cell = 1/cell;
  species STK4 in cell = 1/cell;
  species STK4_g in cell = 1/cell;
  species STK4_p in cell = 1/cell;
  species STK4_rna in cell = 1/cell;
  species SYVN1 in cell = 1/cell;
  species SYVN1_g in cell = 1/cell;
  species SYVN1_rna in cell = 1/cell;
  species TGFB1 in cell = 1/cell;
  species TGFB1_g in cell = 1/cell;
  species TGFB1_rna in cell = 1/cell;
  species TP53 in cell = 1/cell;
  species TP53_g in cell = 1/cell;
  species TP53_p in cell = 1/cell;
  species TP53_rna in cell = 1/cell;
  species TRIM23 in cell = 1/cell;
  species TRIM23_g in cell = 1/cell;
  species TRIM23_rna in cell = 1/cell;
  species TSC2 in cell = 1/cell;
  species TSC2_g in cell = 1/cell;
  species TSC2_p in cell = 1/cell;
  species TSC2_rna in cell = 1/cell;
  species TXNIP in cell = 1/cell;
  species TXNIP_g in cell = 1/cell;
  species TXNIP_p in cell = 1/cell;
  species TXNIP_rna in cell = 1/cell;
  species UBC in cell = 1/cell;
  species UBC_g in cell = 1/cell;
  species UBC_p in cell = 1/cell;
  species UBC_rna in cell = 1/cell;
  species VEGFA in cell = 1/cell;
  species VEGFA_g in cell = 1/cell;
  species VEGFA_rna in cell = 1/cell;
  species VIM in cell = 1/cell;
  species VIM_g in cell = 1/cell;
  species VIM_p in cell = 1/cell;
  species VIM_rna in cell = 1/cell;
  species YAP1 in cell = 1/cell;
  species YAP1_g in cell = 1/cell;
  species YAP1_p in cell = 1/cell;
  species YAP1_rna in cell = 1/cell;
  species ZFP36 in cell = 1/cell;
  species ZFP36_g in cell = 1/cell;
  species ZFP36_p in cell = 1/cell;
  species ZFP36_rna in cell = 1/cell;

  // Reactions:
  // V(1) = K(1,1) * [SMAD2_p] * [SMAD4_p] -K(1,2) * [SIGNOR-C8];
  R1: SMAD2_p => SMAD4_p; 1;
  // V(2) = K(2,1) * [SMAD4_p] * [JUN_p] -K(2,2) * [SIGNOR-C10];
  R2: JUN_p => SMAD4_p; 1;
  // V(3) = K(3,1) * [SMAD4_p] * [SMAD1] * [SMAD1] -K(3,2) * [SIGNOR-C85];
  R3: SMAD1 => SMAD4_p; 1;
  // V(4) = K(4,1) * [FOS_p] * [JUN_p] * [JUN_p] * [FOS_p] * [JUN_p] * [FOS_p] * [FOS_p] * [JUN_p] -K(4,2) * [SIGNOR-C154];
  R4: JUN_p => FOS_p; 1;
  // V(5) = K(5,1) * [PIK3R1_p] * [PIK3CA] -K(5,2) * [SIGNOR-C156];
  R5: PIK3CA => PIK3R1_p; 1;
  // V(6) = K(6,1) * [MAPK1_p] * [EP300] -K(6,2) * [MAPK1_p |EP300];
  R6: EP300 => MAPK1_p; 1;
  // V(7) = K(7,1) * [MAPK1_p |EP300];
  R7: EP300 => MAPK1_p; 1;
  // V(8) = K(8,1) * [MAPK1_p] * [HIF1A] -K(8,2) * [MAPK1_p |HIF1A];
  R8: HIF1A => MAPK1_p; 1;
  // V(9) = K(9,1) * [MAPK1_p |HIF1A];
  R9: HIF1A => MAPK1_p; 1;
  // V(10) = K(10,1) * [MAPK1_p] * [RPS6KA3] -K(10,2) * [MAPK1_p |RPS6KA3];
  R10: RPS6KA3 => MAPK1_p; 1;
  // V(11) = K(11,1) * [MAPK1_p |RPS6KA3];
  R11: RPS6KA3 => MAPK1_p; 1;
  // V(12) = K(12,1) * [AKT1_p] * [FOXO1] -K(12,2) * [AKT1_p |FOXO1];
  R12: FOXO1 => AKT1_p; 1;
  // V(13) = K(13,1) * [AKT1_p |FOXO1];
  R13: FOXO1 => AKT1_p; 1;
  // V(14) = K(14,1) * [MAPK1_p] * [PRDX6] -K(14,2) * [MAPK1_p |PRDX6];
  R14: PRDX6 => MAPK1_p; 1;
  // V(15) = K(15,1) * [MAPK1_p |PRDX6];
  R15: PRDX6 => MAPK1_p; 1;
  // V(16) = K(16,1) * [PRKCA_p] * [CTNNB1] -K(16,2) * [PRKCA_p |CTNNB1];
  R16: CTNNB1 => PRKCA_p; 1;
  // V(17) = K(17,1) * [PRKCA_p |CTNNB1];
  R17: CTNNB1 => PRKCA_p; 1;
  // V(18) = K(18,1) * [MAPK1_p] * [SMAD1] -K(18,2) * [MAPK1_p |SMAD1];
  R18: SMAD1 => MAPK1_p; 1;
  // V(19) = K(19,1) * [MAPK1_p |SMAD1];
  R19: SMAD1 => MAPK1_p; 1;
  // V(20) = K(20,1) * [KIT_p] * [PTPN11] -K(20,2) * [KIT_p |PTPN11];
  R20: PTPN11 => KIT_p; 1;
  // V(21) = K(21,1) * [KIT_p |PTPN11];
  R21: PTPN11 => KIT_p; 1;
  // V(22) = K(22,1) * [AKT1_p] * [MDM2] -K(22,2) * [AKT1_p |MDM2];
  R22: AKT1_p => MDM2; 1;
  // V(23) = K(23,1) * [AKT1_p |MDM2];
  R23: AKT1_p => MDM2; 1;
  // V(24) = K(24,1) * [AKT1_p] * [PRKAA1] -K(24,2) * [AKT1_p |PRKAA1];
  R24: PRKAA1 => AKT1_p; 1;
  // V(25) = K(25,1) * [AKT1_p |PRKAA1];
  R25: PRKAA1 => AKT1_p; 1;
  // V(26) = K(26,1) * [EGFR_p] * [EGFR] -K(26,2) * [EGFR_p |EGFR];
  R26: EGFR_p => EGFR; 1;
  // V(27) = K(27,1) * [EGFR_p |EGFR];
  R27: EGFR_p => EGFR; 1;
  // V(28) = K(28,1) * [PRKCA_p] * [VIM] -K(28,2) * [PRKCA_p |VIM];
  R28: PRKCA_p => VIM; 1;
  // V(29) = K(29,1) * [PRKCA_p |VIM];
  R29: PRKCA_p => VIM; 1;
  // V(30) = K(30,1) * [MAPK1_p] * [CDKN1B] -K(30,2) * [MAPK1_p |CDKN1B];
  R30: CDKN1B => MAPK1_p; 1;
  // V(31) = K(31,1) * [MAPK1_p |CDKN1B];
  R31: CDKN1B => MAPK1_p; 1;
  // V(32) = K(32,1) * [MAPK1_p] * [SMAD4] -K(32,2) * [MAPK1_p |SMAD4];
  R32: SMAD4 => MAPK1_p; 1;
  // V(33) = K(33,1) * [MAPK1_p |SMAD4];
  R33: SMAD4 => MAPK1_p; 1;
  // V(34) = K(34,1) * [MAPK1_p] * [STK11] -K(34,2) * [MAPK1_p |STK11];
  R34: STK11 => MAPK1_p; 1;
  // V(35) = K(35,1) * [MAPK1_p |STK11];
  R35: STK11 => MAPK1_p; 1;
  // V(36) = K(36,1) * [MAPK1_p] * [JUN] -K(36,2) * [MAPK1_p |JUN];
  R36: JUN => MAPK1_p; 1;
  // V(37) = K(37,1) * [MAPK1_p |JUN];
  R37: JUN => MAPK1_p; 1;
  // V(38) = K(38,1) * [AKT1_p] * [NR4A1] -K(38,2) * [AKT1_p |NR4A1];
  R38: NR4A1 => AKT1_p; 1;
  // V(39) = K(39,1) * [AKT1_p |NR4A1];
  R39: NR4A1 => AKT1_p; 1;
  // V(40) = K(40,1) * [MAPK8_p] * [IRS1] -K(40,2) * [MAPK8_p |IRS1];
  R40: MAPK8_p => IRS1; 1;
  // V(41) = K(41,1) * [MAPK8_p |IRS1];
  R41: MAPK8_p => IRS1; 1;
  // V(42) = K(42,1) * [MAPK1_p] * [FOS] -K(42,2) * [MAPK1_p |FOS];
  R42: FOS => MAPK1_p; 1;
  // V(43) = K(43,1) * [MAPK1_p |FOS];
  R43: FOS => MAPK1_p; 1;
  // V(44) = K(44,1) * [PRKCA_p] * [EGFR] -K(44,2) * [PRKCA_p |EGFR];
  R44: EGFR => PRKCA_p; 1;
  // V(45) = K(45,1) * [PRKCA_p |EGFR];
  R45: EGFR => PRKCA_p; 1;
  // V(46) = K(46,1) * [STK11_p] * [STK11] -K(46,2) * [STK11_p |STK11];
  R46: STK11_p => STK11; 1;
  // V(47) = K(47,1) * [STK11_p |STK11];
  R47: STK11_p => STK11; 1;
  // V(48) = K(48,1) * [MAPK8_p] * [BCL2] -K(48,2) * [MAPK8_p |BCL2];
  R48: MAPK8_p => BCL2; 1;
  // V(49) = K(49,1) * [MAPK8_p |BCL2];
  R49: MAPK8_p => BCL2; 1;
  // V(50) = K(50,1) * [MAPK9_p] * [TP53] -K(50,2) * [MAPK9_p |TP53];
  R50: TP53 => MAPK9_p; 1;
  // V(51) = K(51,1) * [MAPK9_p |TP53];
  R51: TP53 => MAPK9_p; 1;
  // V(52) = K(52,1) * [MAPK1_p] * [SMAD2] -K(52,2) * [MAPK1_p |SMAD2];
  R52: SMAD2 => MAPK1_p; 1;
  // V(53) = K(53,1) * [MAPK1_p |SMAD2];
  R53: SMAD2 => MAPK1_p; 1;
  // V(54) = K(54,1) * [PRKCA_p] * [F3] -K(54,2) * [PRKCA_p |F3];
  R54: PRKCA_p => F3; 1;
  // V(55) = K(55,1) * [PRKCA_p |F3];
  R55: PRKCA_p => F3; 1;
  // V(56) = K(56,1) * [KIT_p] * [CTNNB1] -K(56,2) * [KIT_p |CTNNB1];
  R56: CTNNB1 => KIT_p; 1;
  // V(57) = K(57,1) * [KIT_p |CTNNB1];
  R57: CTNNB1 => KIT_p; 1;
  // V(58) = K(58,1) * [MAPK9_p] * [JUN] -K(58,2) * [MAPK9_p |JUN];
  R58: JUN => MAPK9_p; 1;
  // V(59) = K(59,1) * [MAPK9_p |JUN];
  R59: JUN => MAPK9_p; 1;
  // V(60) = K(60,1) * [MAPK1_p] * [BCL2] -K(60,2) * [MAPK1_p |BCL2];
  R60: BCL2 => MAPK1_p; 1;
  // V(61) = K(61,1) * [MAPK1_p |BCL2];
  R61: BCL2 => MAPK1_p; 1;
  // V(62) = K(62,1) * [PRKAA1_p] * [PPARGC1A] -K(62,2) * [PRKAA1_p |PPARGC1A];
  R62: PPARGC1A => PRKAA1_p; 1;
  // V(63) = K(63,1) * [PRKAA1_p |PPARGC1A];
  R63: PPARGC1A => PRKAA1_p; 1;
  // V(64) = K(64,1) * [INSR_p] * [INSR] -K(64,2) * [INSR_p |INSR];
  R64: INSR_p => INSR; 1;
  // V(65) = K(65,1) * [INSR_p |INSR];
  R65: INSR_p => INSR; 1;
  // V(66) = K(66,1) * [INSR_p] * [IRS1] -K(66,2) * [INSR_p |IRS1];
  R66: IRS1 => INSR_p; 1;
  // V(67) = K(67,1) * [INSR_p |IRS1];
  R67: IRS1 => INSR_p; 1;
  // V(68) = K(68,1) * [MAPK1_p] * [DUSP1] -K(68,2) * [MAPK1_p |DUSP1];
  R68: DUSP1 => MAPK1_p; 1;
  // V(69) = K(69,1) * [MAPK1_p |DUSP1];
  R69: DUSP1 => MAPK1_p; 1;
  // V(70) = K(70,1) * [AKT1_p] * [HSPB1] -K(70,2) * [AKT1_p |HSPB1];
  R70: HSPB1 => AKT1_p; 1;
  // V(71) = K(71,1) * [AKT1_p |HSPB1];
  R71: HSPB1 => AKT1_p; 1;
  // V(72) = K(72,1) * [MAPK1_p] * [NR3C2] -K(72,2) * [MAPK1_p |NR3C2];
  R72: NR3C2 => MAPK1_p; 1;
  // V(73) = K(73,1) * [MAPK1_p |NR3C2];
  R73: NR3C2 => MAPK1_p; 1;
  // V(74) = K(74,1) * [RPS6KA3_p] * [HMGN1] -K(74,2) * [RPS6KA3_p |HMGN1];
  R74: HMGN1 => RPS6KA3_p; 1;
  // V(75) = K(75,1) * [RPS6KA3_p |HMGN1];
  R75: HMGN1 => RPS6KA3_p; 1;
  // V(76) = K(76,1) * [AKT1_p] * [CDKN1A] -K(76,2) * [AKT1_p |CDKN1A];
  R76: AKT1_p => CDKN1A; 1;
  // V(77) = K(77,1) * [AKT1_p |CDKN1A];
  R77: AKT1_p => CDKN1A; 1;
  // V(78) = K(78,1) * [STK4_p] * [FOXO1] -K(78,2) * [STK4_p |FOXO1];
  R78: STK4_p => FOXO1; 1;
  // V(79) = K(79,1) * [STK4_p |FOXO1];
  R79: STK4_p => FOXO1; 1;
  // V(80) = K(80,1) * [MAPK8_p] * [MAPK9] -K(80,2) * [MAPK8_p |MAPK9];
  R80: MAPK8_p => MAPK9; 1;
  // V(81) = K(81,1) * [MAPK8_p |MAPK9];
  R81: MAPK8_p => MAPK9; 1;
  // V(82) = K(82,1) * [MAPK8_p] * [TP53] -K(82,2) * [MAPK8_p |TP53];
  R82: TP53 => MAPK8_p; 1;
  // V(83) = K(83,1) * [MAPK8_p |TP53];
  R83: TP53 => MAPK8_p; 1;
  // V(84) = K(84,1) * [MAPK1_p] * [TSC2] -K(84,2) * [MAPK1_p |TSC2];
  R84: TSC2 => MAPK1_p; 1;
  // V(85) = K(85,1) * [MAPK1_p |TSC2];
  R85: TSC2 => MAPK1_p; 1;
  // V(86) = K(86,1) * [MAPK9_p] * [IRS1] -K(86,2) * [MAPK9_p |IRS1];
  R86: IRS1 => MAPK9_p; 1;
  // V(87) = K(87,1) * [MAPK9_p |IRS1];
  R87: IRS1 => MAPK9_p; 1;
  // V(88) = K(88,1) * [KIT_p] * [KIT] -K(88,2) * [KIT_p |KIT];
  R88: KIT => KIT_p; 1;
  // V(89) = K(89,1) * [KIT_p |KIT];
  R89: KIT => KIT_p; 1;
  // V(90) = K(90,1) * [INSR_p] * [SIGNOR-C156] -K(90,2) * [INSR_p |SIGNOR-C156];
  R90: INSR_p => ; 1;
  // V(91) = K(91,1) * [INSR_p |SIGNOR-C156];
  R91: INSR_p => ; 1;
  // V(92) = K(92,1) * [AKT1_p] * [PPARGC1A] -K(92,2) * [AKT1_p |PPARGC1A];
  R92: PPARGC1A => AKT1_p; 1;
  // V(93) = K(93,1) * [AKT1_p |PPARGC1A];
  R93: PPARGC1A => AKT1_p; 1;
  // V(94) = K(94,1) * [MAPK1_p] * [FOXO1] -K(94,2) * [MAPK1_p |FOXO1];
  R94: FOXO1 => MAPK1_p; 1;
  // V(95) = K(95,1) * [MAPK1_p |FOXO1];
  R95: FOXO1 => MAPK1_p; 1;
  // V(96) = K(96,1) * [MAPK8_p] * [FOXO1] -K(96,2) * [MAPK8_p |FOXO1];
  R96: MAPK8_p => FOXO1; 1;
  // V(97) = K(97,1) * [MAPK8_p |FOXO1];
  R97: MAPK8_p => FOXO1; 1;
  // V(98) = K(98,1) * [PRKCA_p] * [PRKCA] -K(98,2) * [PRKCA_p |PRKCA];
  R98: PRKCA => PRKCA_p; 1;
  // V(99) = K(99,1) * [PRKCA_p |PRKCA];
  R99: PRKCA => PRKCA_p; 1;
  // V(100) = K(100,1) * [MAPK1_p] * [PPARG] -K(100,2) * [MAPK1_p |PPARG];
  R100: PPARG => MAPK1_p; 1;
  // V(101) = K(101,1) * [MAPK1_p |PPARG];
  R101: PPARG => MAPK1_p; 1;
  // V(102) = K(102,1) * [PRKCA_p] * [HMGN1] -K(102,2) * [PRKCA_p |HMGN1];
  R102: HMGN1 => PRKCA_p; 1;
  // V(103) = K(103,1) * [PRKCA_p |HMGN1];
  R103: HMGN1 => PRKCA_p; 1;
  // V(104) = K(104,1) * [PRKCA_p] * [CDKN1A] -K(104,2) * [PRKCA_p |CDKN1A];
  R104: PRKCA_p => CDKN1A; 1;
  // V(105) = K(105,1) * [PRKCA_p |CDKN1A];
  R105: PRKCA_p => CDKN1A; 1;
  // V(106) = K(106,1) * [PRKCA_p] * [KIT] -K(106,2) * [PRKCA_p |KIT];
  R106: PRKCA_p => KIT; 1;
  // V(107) = K(107,1) * [PRKCA_p |KIT];
  R107: PRKCA_p => KIT; 1;
  // V(108) = K(108,1) * [MAPK8_p] * [AKT1] -K(108,2) * [MAPK8_p |AKT1];
  R108: MAPK8_p => AKT1; 1;
  // V(109) = K(109,1) * [MAPK8_p |AKT1];
  R109: MAPK8_p => AKT1; 1;
  // V(110) = K(110,1) * [AKT1_p] * [CDKN1B] -K(110,2) * [AKT1_p |CDKN1B];
  R110: CDKN1B => AKT1_p; 1;
  // V(111) = K(111,1) * [AKT1_p |CDKN1B];
  R111: CDKN1B => AKT1_p; 1;
  // V(112) = K(112,1) * [MAPK1_p] * [SIGNOR-C154] -K(112,2) * [MAPK1_p |SIGNOR-C154];
  R112: MAPK1_p => ; 1;
  // V(113) = K(113,1) * [MAPK1_p |SIGNOR-C154];
  R113: MAPK1_p => ; 1;
  // V(114) = K(114,1) * [MAPK8_p] * [CTNNB1] -K(114,2) * [MAPK8_p |CTNNB1];
  R114: MAPK8_p => CTNNB1; 1;
  // V(115) = K(115,1) * [MAPK8_p |CTNNB1];
  R115: MAPK8_p => CTNNB1; 1;
  // V(116) = K(116,1) * [PINK1] * [UBC] -K(116,2) * [PINK1 |UBC];
  R116: PINK1 => UBC; 1;
  // V(117) = K(117,1) * [PINK1 |UBC];
  R117: PINK1 => UBC; 1;
  // V(118) = K(118,1) * [STK4_p] * [STK4] -K(118,2) * [STK4_p |STK4];
  R118: STK4_p => STK4; 1;
  // V(119) = K(119,1) * [STK4_p |STK4];
  R119: STK4_p => STK4; 1;
  // V(120) = K(120,1) * [STK11_p] * [PTEN] -K(120,2) * [STK11_p |PTEN];
  R120: PTEN => STK11_p; 1;
  // V(121) = K(121,1) * [STK11_p |PTEN];
  R121: PTEN => STK11_p; 1;
  // V(122) = K(122,1) * [SGK1] * [FOXO1] -K(122,2) * [SGK1 |FOXO1];
  R122: FOXO1 => SGK1; 1;
  // V(123) = K(123,1) * [SGK1 |FOXO1];
  R123: FOXO1 => SGK1; 1;
  // V(124) = K(124,1) * [HIPK2_p] * [HIPK2] -K(124,2) * [HIPK2_p |HIPK2];
  R124: HIPK2_p => HIPK2; 1;
  // V(125) = K(125,1) * [HIPK2_p |HIPK2];
  R125: HIPK2_p => HIPK2; 1;
  // V(126) = K(126,1) * [SGK1] * [CDKN1B] -K(126,2) * [SGK1 |CDKN1B];
  R126: CDKN1B => SGK1; 1;
  // V(127) = K(127,1) * [SGK1 |CDKN1B];
  R127: CDKN1B => SGK1; 1;
  // V(128) = K(128,1) * [RPS6KA3_p] * [CREB1] -K(128,2) * [RPS6KA3_p |CREB1];
  R128: RPS6KA3_p => CREB1; 1;
  // V(129) = K(129,1) * [RPS6KA3_p |CREB1];
  R129: RPS6KA3_p => CREB1; 1;
  // V(130) = K(130,1) * [AKT1_p] * [TSC2] -K(130,2) * [AKT1_p |TSC2];
  R130: TSC2 => AKT1_p; 1;
  // V(131) = K(131,1) * [AKT1_p |TSC2];
  R131: TSC2 => AKT1_p; 1;
  // V(132) = K(132,1) * [PRKCA_p] * [PRKAA1] -K(132,2) * [PRKCA_p |PRKAA1];
  R132: PRKAA1 => PRKCA_p; 1;
  // V(133) = K(133,1) * [PRKCA_p |PRKAA1];
  R133: PRKAA1 => PRKCA_p; 1;
  // V(134) = K(134,1) * [AKT1_p] * [EP300] -K(134,2) * [AKT1_p |EP300];
  R134: EP300 => AKT1_p; 1;
  // V(135) = K(135,1) * [AKT1_p |EP300];
  R135: EP300 => AKT1_p; 1;
  // V(136) = K(136,1) * [MAPK1_p] * [EGFR] -K(136,2) * [MAPK1_p |EGFR];
  R136: EGFR => MAPK1_p; 1;
  // V(137) = K(137,1) * [MAPK1_p |EGFR];
  R137: EGFR => MAPK1_p; 1;
  // V(138) = K(138,1) * [MAPK8_p] * [STAT6] -K(138,2) * [MAPK8_p |STAT6];
  R138: STAT6 => MAPK8_p; 1;
  // V(139) = K(139,1) * [MAPK8_p |STAT6];
  R139: STAT6 => MAPK8_p; 1;
  // V(140) = K(140,1) * [PRKCA_p] * [INSR] -K(140,2) * [PRKCA_p |INSR];
  R140: PRKCA_p => INSR; 1;
  // V(141) = K(141,1) * [PRKCA_p |INSR];
  R141: PRKCA_p => INSR; 1;
  // V(142) = K(142,1) * [AKT1_p] * [VIM] -K(142,2) * [AKT1_p |VIM];
  R142: VIM => AKT1_p; 1;
  // V(143) = K(143,1) * [AKT1_p |VIM];
  R143: VIM => AKT1_p; 1;
  // V(144) = K(144,1) * [PRKAA1_p] * [SIRT7] -K(144,2) * [PRKAA1_p |SIRT7];
  R144: PRKAA1_p => SIRT7; 1;
  // V(145) = K(145,1) * [PRKAA1_p |SIRT7];
  R145: PRKAA1_p => SIRT7; 1;
  // V(146) = K(146,1) * [PRKAA1_p] * [DNMT1] -K(146,2) * [PRKAA1_p |DNMT1];
  R146: DNMT1 => PRKAA1_p; 1;
  // V(147) = K(147,1) * [PRKAA1_p |DNMT1];
  R147: DNMT1 => PRKAA1_p; 1;
  // V(148) = K(148,1) * [MAPK8_p] * [PPARG] -K(148,2) * [MAPK8_p |PPARG];
  R148: PPARG => MAPK8_p; 1;
  // V(149) = K(149,1) * [MAPK8_p |PPARG];
  R149: PPARG => MAPK8_p; 1;
  // V(150) = K(150,1) * [MAPK1_p] * [SP1] -K(150,2) * [MAPK1_p |SP1];
  R150: SP1 => MAPK1_p; 1;
  // V(151) = K(151,1) * [MAPK1_p |SP1];
  R151: SP1 => MAPK1_p; 1;
  // V(152) = K(152,1) * [ROCK1] * [PTEN] -K(152,2) * [ROCK1 |PTEN];
  R152: PTEN => ROCK1; 1;
  // V(153) = K(153,1) * [ROCK1 |PTEN];
  R153: PTEN => ROCK1; 1;
  // V(154) = K(154,1) * [MAPK8_p] * [CDKN1A] -K(154,2) * [MAPK8_p |CDKN1A];
  R154: MAPK8_p => CDKN1A; 1;
  // V(155) = K(155,1) * [MAPK8_p |CDKN1A];
  R155: MAPK8_p => CDKN1A; 1;
  // V(156) = K(156,1) * [MAPK1_p] * [CDKN1A] -K(156,2) * [MAPK1_p |CDKN1A];
  R156: CDKN1A => MAPK1_p; 1;
  // V(157) = K(157,1) * [MAPK1_p |CDKN1A];
  R157: CDKN1A => MAPK1_p; 1;
  // V(158) = K(158,1) * [AKT1_p] * [AKT1S1] -K(158,2) * [AKT1_p |AKT1S1];
  R158: AKT1S1 => AKT1_p; 1;
  // V(159) = K(159,1) * [AKT1_p |AKT1S1];
  R159: AKT1S1 => AKT1_p; 1;
  // V(160) = K(160,1) * [PRKAA1_p] * [FOXO1] -K(160,2) * [PRKAA1_p |FOXO1];
  R160: FOXO1 => PRKAA1_p; 1;
  // V(161) = K(161,1) * [PRKAA1_p |FOXO1];
  R161: FOXO1 => PRKAA1_p; 1;
  // V(162) = K(162,1) * [MAPK8_p] * [JUN] -K(162,2) * [MAPK8_p |JUN];
  R162: MAPK8_p => JUN; 1;
  // V(163) = K(163,1) * [MAPK8_p |JUN];
  R163: MAPK8_p => JUN; 1;
  // V(164) = K(164,1) * [MAPK1_p] * [PARP1] -K(164,2) * [MAPK1_p |PARP1];
  R164: PARP1 => MAPK1_p; 1;
  // V(165) = K(165,1) * [MAPK1_p |PARP1];
  R165: PARP1 => MAPK1_p; 1;
  // V(166) = K(166,1) * [MAPK8_p] * [YAP1] -K(166,2) * [MAPK8_p |YAP1];
  R166: MAPK8_p => YAP1; 1;
  // V(167) = K(167,1) * [MAPK8_p |YAP1];
  R167: MAPK8_p => YAP1; 1;
  // V(168) = K(168,1) * [STK11_p] * [SMAD4] -K(168,2) * [STK11_p |SMAD4];
  R168: SMAD4 => STK11_p; 1;
  // V(169) = K(169,1) * [STK11_p |SMAD4];
  R169: SMAD4 => STK11_p; 1;
  // V(170) = K(170,1) * [MAPK8_p] * [SP1] -K(170,2) * [MAPK8_p |SP1];
  R170: MAPK8_p => SP1; 1;
  // V(171) = K(171,1) * [MAPK8_p |SP1];
  R171: MAPK8_p => SP1; 1;
  // V(172) = K(172,1) * [EGFR_p] * [PPARG] -K(172,2) * [EGFR_p |PPARG];
  R172: EGFR_p => PPARG; 1;
  // V(173) = K(173,1) * [EGFR_p |PPARG];
  R173: EGFR_p => PPARG; 1;
  // V(174) = K(174,1) * [STK4_p] * [PIK3CA] -K(174,2) * [STK4_p |PIK3CA];
  R174: STK4_p => PIK3CA; 1;
  // V(175) = K(175,1) * [STK4_p |PIK3CA];
  R175: STK4_p => PIK3CA; 1;
  // V(176) = K(176,1) * [SGK1] * [TSC2] -K(176,2) * [SGK1 |TSC2];
  R176: TSC2 => SGK1; 1;
  // V(177) = K(177,1) * [SGK1 |TSC2];
  R177: TSC2 => SGK1; 1;
  // V(178) = K(178,1) * [AKT1_p] * [YAP1] -K(178,2) * [AKT1_p |YAP1];
  R178: YAP1 => AKT1_p; 1;
  // V(179) = K(179,1) * [AKT1_p |YAP1];
  R179: YAP1 => AKT1_p; 1;
  // V(180) = K(180,1) * [SIGNOR-C156_p] * [AKT1] -K(180,2) * [SIGNOR-C156_p |AKT1];
  R180: AKT1 => ; 1;
  // V(181) = K(181,1) * [SIGNOR-C156_p |AKT1];
  R181: AKT1 => ; 1;
  // V(182) = K(182,1) * [STK4_p] * [IRF3] -K(182,2) * [STK4_p |IRF3];
  R182: STK4_p => IRF3; 1;
  // V(183) = K(183,1) * [STK4_p |IRF3];
  R183: STK4_p => IRF3; 1;
  // V(184) = K(184,1) * [SMAD1] * [SMAD4] -K(184,2) * [SMAD1 |SMAD4];
  R184: SMAD4 => SMAD1; 1;
  // V(185) = K(185,1) * [SMAD1 |SMAD4];
  R185: SMAD4 => SMAD1; 1;
  // V(186) = K(186,1) * [RPS6KA3_p] * [FOS] -K(186,2) * [RPS6KA3_p |FOS];
  R186: RPS6KA3_p => FOS; 1;
  // V(187) = K(187,1) * [RPS6KA3_p |FOS];
  R187: RPS6KA3_p => FOS; 1;
  // V(188) = K(188,1) * [AKT1_p] * [RPS6KA3] -K(188,2) * [AKT1_p |RPS6KA3];
  R188: RPS6KA3 => AKT1_p; 1;
  // V(189) = K(189,1) * [AKT1_p |RPS6KA3];
  R189: RPS6KA3 => AKT1_p; 1;
  // V(190) = K(190,1) * [KIT_p] * [STAT1] -K(190,2) * [KIT_p |STAT1];
  R190: STAT1 => KIT_p; 1;
  // V(191) = K(191,1) * [KIT_p |STAT1];
  R191: STAT1 => KIT_p; 1;
  // V(192) = K(192,1) * [AKT1_p] * [DNMT1] -K(192,2) * [AKT1_p |DNMT1];
  R192: DNMT1 => AKT1_p; 1;
  // V(193) = K(193,1) * [AKT1_p |DNMT1];
  R193: DNMT1 => AKT1_p; 1;
  // V(194) = K(194,1) * [STK11_p] * [SIRT1] -K(194,2) * [STK11_p |SIRT1];
  R194: STK11_p => SIRT1; 1;
  // V(195) = K(195,1) * [STK11_p |SIRT1];
  R195: STK11_p => SIRT1; 1;
  // V(196) = K(196,1) * [RPS6KA3_p] * [RPS6KA3] -K(196,2) * [RPS6KA3_p |RPS6KA3];
  R196: RPS6KA3_p => RPS6KA3; 1;
  // V(197) = K(197,1) * [RPS6KA3_p |RPS6KA3];
  R197: RPS6KA3_p => RPS6KA3; 1;
  // V(198) = K(198,1) * [PRKAA1_p] * [EP300] -K(198,2) * [PRKAA1_p |EP300];
  R198: PRKAA1_p => EP300; 1;
  // V(199) = K(199,1) * [PRKAA1_p |EP300];
  R199: PRKAA1_p => EP300; 1;
  // V(200) = K(200,1) * [MAPK1_p] * [IRS1] -K(200,2) * [MAPK1_p |IRS1];
  R200: IRS1 => MAPK1_p; 1;
  // V(201) = K(201,1) * [MAPK1_p |IRS1];
  R201: IRS1 => MAPK1_p; 1;
  // V(202) = K(202,1) * [HIPK2_p] * [MECP2] -K(202,2) * [HIPK2_p |MECP2];
  R202: MECP2 => HIPK2_p; 1;
  // V(203) = K(203,1) * [HIPK2_p |MECP2];
  R203: MECP2 => HIPK2_p; 1;
  // V(204) = K(204,1) * [AKT1_p] * [CTNNB1] -K(204,2) * [AKT1_p |CTNNB1];
  R204: CTNNB1 => AKT1_p; 1;
  // V(205) = K(205,1) * [AKT1_p |CTNNB1];
  R205: CTNNB1 => AKT1_p; 1;
  // V(206) = K(206,1) * [PRKCA_p] * [CYBA] -K(206,2) * [PRKCA_p |CYBA];
  R206: PRKCA_p => CYBA; 1;
  // V(207) = K(207,1) * [PRKCA_p |CYBA];
  R207: PRKCA_p => CYBA; 1;
  // V(208) = K(208,1) * [AKT1_p] * [STK4] -K(208,2) * [AKT1_p |STK4];
  R208: STK4 => AKT1_p; 1;
  // V(209) = K(209,1) * [AKT1_p |STK4];
  R209: STK4 => AKT1_p; 1;
  // V(210) = K(210,1) * [MAPK8_p] * [JUNB] -K(210,2) * [MAPK8_p |JUNB];
  R210: MAPK8_p => JUNB; 1;
  // V(211) = K(211,1) * [MAPK8_p |JUNB];
  R211: MAPK8_p => JUNB; 1;
  // V(212) = K(212,1) * [RPS6KA3_p] * [NR4A1] -K(212,2) * [RPS6KA3_p |NR4A1];
  R212: NR4A1 => RPS6KA3_p; 1;
  // V(213) = K(213,1) * [RPS6KA3_p |NR4A1];
  R213: NR4A1 => RPS6KA3_p; 1;
  // V(214) = K(214,1) * [PRKAA1_p] * [SIRT1] -K(214,2) * [PRKAA1_p |SIRT1];
  R214: PRKAA1_p => SIRT1; 1;
  // V(215) = K(215,1) * [PRKAA1_p |SIRT1];
  R215: PRKAA1_p => SIRT1; 1;
  // V(216) = K(216,1) * [ROCK1] * [TP53] -K(216,2) * [ROCK1 |TP53];
  R216: TP53 => ROCK1; 1;
  // V(217) = K(217,1) * [ROCK1 |TP53];
  R217: TP53 => ROCK1; 1;
  // V(218) = K(218,1) * [STK11_p] * [YAP1] -K(218,2) * [STK11_p |YAP1];
  R218: YAP1 => STK11_p; 1;
  // V(219) = K(219,1) * [STK11_p |YAP1];
  R219: YAP1 => STK11_p; 1;
  // V(220) = K(220,1) * [STK4_p] * [PRKCA] -K(220,2) * [STK4_p |PRKCA];
  R220: STK4_p => PRKCA; 1;
  // V(221) = K(221,1) * [STK4_p |PRKCA];
  R221: STK4_p => PRKCA; 1;
  // V(222) = K(222,1) * [MAPK1_p] * [MAPK1] -K(222,2) * [MAPK1_p |MAPK1];
  R222: MAPK1 => MAPK1_p; 1;
  // V(223) = K(223,1) * [MAPK1_p |MAPK1];
  R223: MAPK1 => MAPK1_p; 1;
  // V(224) = K(224,1) * [PRKAA1_p] * [TSC2] -K(224,2) * [PRKAA1_p |TSC2];
  R224: PRKAA1_p => TSC2; 1;
  // V(225) = K(225,1) * [PRKAA1_p |TSC2];
  R225: PRKAA1_p => TSC2; 1;
  // V(226) = K(226,1) * [MAPK1_p] * [ZFP36] -K(226,2) * [MAPK1_p |ZFP36];
  R226: ZFP36 => MAPK1_p; 1;
  // V(227) = K(227,1) * [MAPK1_p |ZFP36];
  R227: ZFP36 => MAPK1_p; 1;
  // V(228) = K(228,1) * [MAPK1_p] * [RCAN1] -K(228,2) * [MAPK1_p |RCAN1];
  R228: RCAN1 => MAPK1_p; 1;
  // V(229) = K(229,1) * [MAPK1_p |RCAN1];
  R229: RCAN1 => MAPK1_p; 1;
  // V(230) = K(230,1) * [MAPK8_p] * [SIRT1] -K(230,2) * [MAPK8_p |SIRT1];
  R230: MAPK8_p => SIRT1; 1;
  // V(231) = K(231,1) * [MAPK8_p |SIRT1];
  R231: MAPK8_p => SIRT1; 1;
  // V(232) = K(232,1) * [MAPK8_p] * [IRF3] -K(232,2) * [MAPK8_p |IRF3];
  R232: MAPK8_p => IRF3; 1;
  // V(233) = K(233,1) * [MAPK8_p |IRF3];
  R233: MAPK8_p => IRF3; 1;
  // V(234) = K(234,1) * [PRKCA_p] * [OCLN] -K(234,2) * [PRKCA_p |OCLN];
  R234: PRKCA_p => OCLN; 1;
  // V(235) = K(235,1) * [PRKCA_p |OCLN];
  R235: PRKCA_p => OCLN; 1;
  // V(236) = K(236,1) * [SGK1] * [SP1] -K(236,2) * [SGK1 |SP1];
  R236: SP1 => SGK1; 1;
  // V(237) = K(237,1) * [SGK1 |SP1];
  R237: SP1 => SGK1; 1;
  // V(238) = K(238,1) * [PRKAA1_p] * [HIPK2] -K(238,2) * [PRKAA1_p |HIPK2];
  R238: PRKAA1_p => HIPK2; 1;
  // V(239) = K(239,1) * [PRKAA1_p |HIPK2];
  R239: PRKAA1_p => HIPK2; 1;
  // V(240) = K(240,1) * [INSR_p] * [IRS2] -K(240,2) * [INSR_p |IRS2];
  R240: INSR_p => IRS2; 1;
  // V(241) = K(241,1) * [INSR_p |IRS2];
  R241: INSR_p => IRS2; 1;
  // V(242) = K(242,1) * [SGK1] * [MAPK1] -K(242,2) * [SGK1 |MAPK1];
  R242: MAPK1 => SGK1; 1;
  // V(243) = K(243,1) * [SGK1 |MAPK1];
  R243: MAPK1 => SGK1; 1;
  // V(244) = K(244,1) * [PRKAA1_p] * [DDIT3] -K(244,2) * [PRKAA1_p |DDIT3];
  R244: DDIT3 => PRKAA1_p; 1;
  // V(245) = K(245,1) * [PRKAA1_p |DDIT3];
  R245: DDIT3 => PRKAA1_p; 1;
  // V(246) = K(246,1) * [RPS6KA3_p] * [TP53] -K(246,2) * [RPS6KA3_p |TP53];
  R246: TP53 => RPS6KA3_p; 1;
  // V(247) = K(247,1) * [RPS6KA3_p |TP53];
  R247: TP53 => RPS6KA3_p; 1;
  // V(248) = K(248,1) * [ROCK1] * [BECN1] -K(248,2) * [ROCK1 |BECN1];
  R248: ROCK1 => BECN1; 1;
  // V(249) = K(249,1) * [ROCK1 |BECN1];
  R249: ROCK1 => BECN1; 1;
  // V(250) = K(250,1) * [MAPK8_p] * [SIGNOR-C154] -K(250,2) * [MAPK8_p |SIGNOR-C154];
  R250: MAPK8_p => ; 1;
  // V(251) = K(251,1) * [MAPK8_p |SIGNOR-C154];
  R251: MAPK8_p => ; 1;
  // V(252) = K(252,1) * [HIPK2_p] * [EP300] -K(252,2) * [HIPK2_p |EP300];
  R252: EP300 => HIPK2_p; 1;
  // V(253) = K(253,1) * [HIPK2_p |EP300];
  R253: EP300 => HIPK2_p; 1;
  // V(254) = K(254,1) * [AKT1_p] * [AKT1] -K(254,2) * [AKT1_p |AKT1];
  R254: AKT1 => AKT1_p; 1;
  // V(255) = K(255,1) * [AKT1_p |AKT1];
  R255: AKT1 => AKT1_p; 1;
  // V(256) = K(256,1) * [PINK1] * [TP53] -K(256,2) * [PINK1 |TP53];
  R256: TP53 => PINK1; 1;
  // V(257) = K(257,1) * [PINK1 |TP53];
  R257: TP53 => PINK1; 1;
  // V(258) = K(258,1) * [EGFR_p] * [STAT1] -K(258,2) * [EGFR_p |STAT1];
  R258: EGFR_p => STAT1; 1;
  // V(259) = K(259,1) * [EGFR_p |STAT1];
  R259: EGFR_p => STAT1; 1;
  // V(260) = K(260,1) * [INSR_p] * [PTEN] -K(260,2) * [INSR_p |PTEN];
  R260: PTEN => INSR_p; 1;
  // V(261) = K(261,1) * [INSR_p |PTEN];
  R261: PTEN => INSR_p; 1;
  // V(262) = K(262,1) * [STK11_p] * [TP53] -K(262,2) * [STK11_p |TP53];
  R262: TP53 => STK11_p; 1;
  // V(263) = K(263,1) * [STK11_p |TP53];
  R263: TP53 => STK11_p; 1;
  // V(264) = K(264,1) * [STK4_p] * [BECN1] -K(264,2) * [STK4_p |BECN1];
  R264: STK4_p => BECN1; 1;
  // V(265) = K(265,1) * [STK4_p |BECN1];
  R265: STK4_p => BECN1; 1;
  // V(266) = K(266,1) * [INSR_p] * [PIK3R1] -K(266,2) * [INSR_p |PIK3R1];
  R266: PIK3R1 => INSR_p; 1;
  // V(267) = K(267,1) * [INSR_p |PIK3R1];
  R267: PIK3R1 => INSR_p; 1;
  // V(268) = K(268,1) * [EGFR_p] * [PCNA] -K(268,2) * [EGFR_p |PCNA];
  R268: EGFR_p => PCNA; 1;
  // V(269) = K(269,1) * [EGFR_p |PCNA];
  R269: EGFR_p => PCNA; 1;
  // V(270) = K(270,1) * [STK4_p] * [PRDX1] -K(270,2) * [STK4_p |PRDX1];
  R270: STK4_p => PRDX1; 1;
  // V(271) = K(271,1) * [STK4_p |PRDX1];
  R271: STK4_p => PRDX1; 1;
  // V(272) = K(272,1) * [PRKCA_p] * [ADD3] -K(272,2) * [PRKCA_p |ADD3];
  R272: ADD3 => PRKCA_p; 1;
  // V(273) = K(273,1) * [PRKCA_p |ADD3];
  R273: ADD3 => PRKCA_p; 1;
  // V(274) = K(274,1) * [PIK3CA] * [AKT1] -K(274,2) * [PIK3CA |AKT1];
  R274: PIK3CA => AKT1; 1;
  // V(275) = K(275,1) * [PIK3CA |AKT1];
  R275: PIK3CA => AKT1; 1;
  // V(276) = K(276,1) * [AKT1_p] * [CREB1] -K(276,2) * [AKT1_p |CREB1];
  R276: CREB1 => AKT1_p; 1;
  // V(277) = K(277,1) * [AKT1_p |CREB1];
  R277: CREB1 => AKT1_p; 1;
  // V(278) = K(278,1) * [MAPK8_p] * [STK4] -K(278,2) * [MAPK8_p |STK4];
  R278: MAPK8_p => STK4; 1;
  // V(279) = K(279,1) * [MAPK8_p |STK4];
  R279: MAPK8_p => STK4; 1;
  // V(280) = K(280,1) * [AKT1_p] * [MAPK1] -K(280,2) * [AKT1_p |MAPK1];
  R280: MAPK1 => AKT1_p; 1;
  // V(281) = K(281,1) * [AKT1_p |MAPK1];
  R281: MAPK1 => AKT1_p; 1;
  // V(282) = K(282,1) * [EGFR_p] * [PARP1] -K(282,2) * [EGFR_p |PARP1];
  R282: EGFR_p => PARP1; 1;
  // V(283) = K(283,1) * [EGFR_p |PARP1];
  R283: EGFR_p => PARP1; 1;
  // V(284) = K(284,1) * [KIT_p] * [SIGNOR-C156] -K(284,2) * [KIT_p |SIGNOR-C156];
  R284: KIT_p => ; 1;
  // V(285) = K(285,1) * [KIT_p |SIGNOR-C156];
  R285: KIT_p => ; 1;
  // V(286) = K(286,1) * [ROCK1] * [VIM] -K(286,2) * [ROCK1 |VIM];
  R286: ROCK1 => VIM; 1;
  // V(287) = K(287,1) * [ROCK1 |VIM];
  R287: ROCK1 => VIM; 1;
  // V(288) = K(288,1) * [PRKCA_p] * [NFE2L2] -K(288,2) * [PRKCA_p |NFE2L2];
  R288: PRKCA_p => NFE2L2; 1;
  // V(289) = K(289,1) * [PRKCA_p |NFE2L2];
  R289: PRKCA_p => NFE2L2; 1;
  // V(290) = K(290,1) * [MAPK8_p] * [STAT1] -K(290,2) * [MAPK8_p |STAT1];
  R290: MAPK8_p => STAT1; 1;
  // V(291) = K(291,1) * [MAPK8_p |STAT1];
  R291: MAPK8_p => STAT1; 1;
  // V(292) = K(292,1) * [STK4_p] * [SIRT1] -K(292,2) * [STK4_p |SIRT1];
  R292: STK4_p => SIRT1; 1;
  // V(293) = K(293,1) * [STK4_p |SIRT1];
  R293: STK4_p => SIRT1; 1;
  // V(294) = K(294,1) * [MAPK8_p] * [NR4A1] -K(294,2) * [MAPK8_p |NR4A1];
  R294: NR4A1 => MAPK8_p; 1;
  // V(295) = K(295,1) * [MAPK8_p |NR4A1];
  R295: NR4A1 => MAPK8_p; 1;
  // V(296) = K(296,1) * [STK11_p] * [PRKAA1] -K(296,2) * [STK11_p |PRKAA1];
  R296: PRKAA1 => STK11_p; 1;
  // V(297) = K(297,1) * [STK11_p |PRKAA1];
  R297: PRKAA1 => STK11_p; 1;
  // V(298) = K(298,1) * [RPS6KA3_p] * [TSC2] -K(298,2) * [RPS6KA3_p |TSC2];
  R298: RPS6KA3_p => TSC2; 1;
  // V(299) = K(299,1) * [RPS6KA3_p |TSC2];
  R299: RPS6KA3_p => TSC2; 1;
  // V(300) = K(300,1) * [MAPK9_p] * [CTNNB1] -K(300,2) * [MAPK9_p |CTNNB1];
  R300: CTNNB1 => MAPK9_p; 1;
  // V(301) = K(301,1) * [MAPK9_p |CTNNB1];
  R301: CTNNB1 => MAPK9_p; 1;
  // V(302) = K(302,1) * [PRKCA_p] * [BCL2] -K(302,2) * [PRKCA_p |BCL2];
  R302: PRKCA_p => BCL2; 1;
  // V(303) = K(303,1) * [PRKCA_p |BCL2];
  R303: PRKCA_p => BCL2; 1;
  // V(304) = K(304,1) * [MAPK1_p] * [MFN1] -K(304,2) * [MAPK1_p |MFN1];
  R304: MFN1 => MAPK1_p; 1;
  // V(305) = K(305,1) * [MAPK1_p |MFN1];
  R305: MFN1 => MAPK1_p; 1;
  // V(306) = K(306,1) * [PRKCA_p] * [PTPN11] -K(306,2) * [PRKCA_p |PTPN11];
  R306: PTPN11 => PRKCA_p; 1;
  // V(307) = K(307,1) * [PRKCA_p |PTPN11];
  R307: PTPN11 => PRKCA_p; 1;
  // V(308) = K(308,1) * [EGFR_p] * [BECN1] -K(308,2) * [EGFR_p |BECN1];
  R308: EGFR_p => BECN1; 1;
  // V(309) = K(309,1) * [EGFR_p |BECN1];
  R309: EGFR_p => BECN1; 1;
  // V(310) = K(310,1) * [MAPK1_p] * [TP53] -K(310,2) * [MAPK1_p |TP53];
  R310: TP53 => MAPK1_p; 1;
  // V(311) = K(311,1) * [MAPK1_p |TP53];
  R311: TP53 => MAPK1_p; 1;
  // V(312) = K(312,1) * [PRKAA1_p] * [NFE2L2] -K(312,2) * [PRKAA1_p |NFE2L2];
  R312: PRKAA1_p => NFE2L2; 1;
  // V(313) = K(313,1) * [PRKAA1_p |NFE2L2];
  R313: PRKAA1_p => NFE2L2; 1;
  // V(314) = K(314,1) * [HIPK2_p] * [CDKN1B] -K(314,2) * [HIPK2_p |CDKN1B];
  R314: CDKN1B => HIPK2_p; 1;
  // V(315) = K(315,1) * [HIPK2_p |CDKN1B];
  R315: CDKN1B => HIPK2_p; 1;
  // V(316) = K(316,1) * [HIPK2_p] * [TP53] -K(316,2) * [HIPK2_p |TP53];
  R316: TP53 => HIPK2_p; 1;
  // V(317) = K(317,1) * [HIPK2_p |TP53];
  R317: TP53 => HIPK2_p; 1;
  // V(318) = K(318,1) * [PRKAA1_p] * [PRKAA1] -K(318,2) * [PRKAA1_p |PRKAA1];
  R318: PRKAA1 => PRKAA1_p; 1;
  // V(319) = K(319,1) * [PRKAA1_p |PRKAA1];
  R319: PRKAA1 => PRKAA1_p; 1;
  // V(320) = K(320,1) * [ROCK1] * [MAPK8] -K(320,2) * [ROCK1 |MAPK8];
  R320: ROCK1 => MAPK8; 1;
  // V(321) = K(321,1) * [ROCK1 |MAPK8];
  R321: ROCK1 => MAPK8; 1;
  // V(322) = K(322,1) * [RPS6KA3_p] * [STK11] -K(322,2) * [RPS6KA3_p |STK11];
  R322: RPS6KA3_p => STK11; 1;
  // V(323) = K(323,1) * [RPS6KA3_p |STK11];
  R323: RPS6KA3_p => STK11; 1;
  // V(324) = K(324,1) * [SGK1] * [STAT1] -K(324,2) * [SGK1 |STAT1];
  R324: STAT1 => SGK1; 1;
  // V(325) = K(325,1) * [SGK1 |STAT1];
  R325: STAT1 => SGK1; 1;
  // V(326) = K(326,1) * [EGFR_p] * [CTNNB1] -K(326,2) * [EGFR_p |CTNNB1];
  R326: EGFR_p => CTNNB1; 1;
  // V(327) = K(327,1) * [EGFR_p |CTNNB1];
  R327: EGFR_p => CTNNB1; 1;
  // V(328) = K(328,1) * [EGFR_p] * [PTPN11] -K(328,2) * [EGFR_p |PTPN11];
  R328: EGFR_p => PTPN11; 1;
  // V(329) = K(329,1) * [EGFR_p |PTPN11];
  R329: EGFR_p => PTPN11; 1;
  // V(330) = K(330,1) * [HIPK2_p] * [MDM2] -K(330,2) * [HIPK2_p |MDM2];
  R330: HIPK2_p => MDM2; 1;
  // V(331) = K(331,1) * [HIPK2_p |MDM2];
  R331: HIPK2_p => MDM2; 1;
  // V(332) = K(332,1) * [ROCK2] * [EP300] -K(332,2) * [ROCK2 |EP300];
  R332: EP300 => ROCK2; 1;
  // V(333) = K(333,1) * [ROCK2 |EP300];
  R333: EP300 => ROCK2; 1;
  // V(334) = K(334,1) * [AKT1_p] * [BECN1] -K(334,2) * [AKT1_p |BECN1];
  R334: BECN1 => AKT1_p; 1;
  // V(335) = K(335,1) * [AKT1_p |BECN1];
  R335: BECN1 => AKT1_p; 1;
  // V(336) = K(336,1) * [MAPK1_p] * [NR4A1] -K(336,2) * [MAPK1_p |NR4A1];
  R336: NR4A1 => MAPK1_p; 1;
  // V(337) = K(337,1) * [MAPK1_p |NR4A1];
  R337: NR4A1 => MAPK1_p; 1;
  // V(338) = K(338,1) * [PINK1] * [PTEN] -K(338,2) * [PINK1 |PTEN];
  R338: PTEN => PINK1; 1;
  // V(339) = K(339,1) * [PINK1 |PTEN];
  R339: PTEN => PINK1; 1;
  // V(340) = K(340,1) * [EGFR_p] * [ABCA1] -K(340,2) * [EGFR_p |ABCA1];
  R340: EGFR_p => ABCA1; 1;
  // V(341) = K(341,1) * [EGFR_p |ABCA1];
  R341: EGFR_p => ABCA1; 1;
  // V(342) = K(342,1) * [MAPK1_p] * [TXNIP] -K(342,2) * [MAPK1_p |TXNIP];
  R342: TXNIP => MAPK1_p; 1;
  // V(343) = K(343,1) * [MAPK1_p |TXNIP];
  R343: TXNIP => MAPK1_p; 1;
  // V(344) = K(344,1) * [STK11_p] * [CDKN1A] -K(344,2) * [STK11_p |CDKN1A];
  R344: STK11_p => CDKN1A; 1;
  // V(345) = K(345,1) * [STK11_p |CDKN1A];
  R345: STK11_p => CDKN1A; 1;
  // V(346) = K(346,1) * [PRKCA_p] * [TP53] -K(346,2) * [PRKCA_p |TP53];
  R346: TP53 => PRKCA_p; 1;
  // V(347) = K(347,1) * [PRKCA_p |TP53];
  R347: TP53 => PRKCA_p; 1;
  // V(348) = K(348,1) * [PIK3CA] * [PIK3R1] -K(348,2) * [PIK3CA |PIK3R1];
  R348: PIK3CA => PIK3R1; 1;
  // V(349) = K(349,1) * [PIK3CA |PIK3R1];
  R349: PIK3CA => PIK3R1; 1;
  // V(350) = K(350,1) * [AKT1_p] * [BAX] -K(350,2) * [AKT1_p |BAX];
  R350: AKT1_p => BAX; 1;
  // V(351) = K(351,1) * [AKT1_p |BAX];
  R351: AKT1_p => BAX; 1;
  // V(352) = K(352,1) * [PRKCA_p] * [IRS1] -K(352,2) * [PRKCA_p |IRS1];
  R352: IRS1 => PRKCA_p; 1;
  // V(353) = K(353,1) * [PRKCA_p |IRS1];
  R353: IRS1 => PRKCA_p; 1;
  // V(354) = K(354,1) * [PRKAA1_p] * [CDKN1B] -K(354,2) * [PRKAA1_p |CDKN1B];
  R354: CDKN1B => PRKAA1_p; 1;
  // V(355) = K(355,1) * [PRKAA1_p |CDKN1B];
  R355: CDKN1B => PRKAA1_p; 1;
  // V(356) = K(356,1) * [HIPK2_p] * [CREB1] -K(356,2) * [HIPK2_p |CREB1];
  R356: CREB1 => HIPK2_p; 1;
  // V(357) = K(357,1) * [HIPK2_p |CREB1];
  R357: CREB1 => HIPK2_p; 1;
  // V(358) = K(358,1) * [PRKAA1_p] * [TP53] -K(358,2) * [PRKAA1_p |TP53];
  R358: TP53 => PRKAA1_p; 1;
  // V(359) = K(359,1) * [PRKAA1_p |TP53];
  R359: TP53 => PRKAA1_p; 1;
  // V(360) = K(360,1) * [RPS6KA3_p] * [IRS1] -K(360,2) * [RPS6KA3_p |IRS1];
  R360: IRS1 => RPS6KA3_p; 1;
  // V(361) = K(361,1) * [RPS6KA3_p |IRS1];
  R361: IRS1 => RPS6KA3_p; 1;
  // V(362) = K(362,1) * [PTPRJ] * [INSR_p] -K(362,2) * [PTPRJ |INSR_p];
  R362: INSR_p => PTPRJ; 1;
  // V(363) = K(363,1) * [PTPRJ |INSR_p];
  R363: INSR_p => PTPRJ; 1;
  // V(364) = K(364,1) * [PTPRJ] * [MAPK1_p] -K(364,2) * [PTPRJ |MAPK1_p];
  R364: PTPRJ => MAPK1_p; 1;
  // V(365) = K(365,1) * [PTPRJ |MAPK1_p];
  R365: PTPRJ => MAPK1_p; 1;
  // V(366) = K(366,1) * [PTPRJ] * [CTNNB1_p] -K(366,2) * [PTPRJ |CTNNB1_p];
  R366: CTNNB1_p => PTPRJ; 1;
  // V(367) = K(367,1) * [PTPRJ |CTNNB1_p];
  R367: CTNNB1_p => PTPRJ; 1;
  // V(368) = K(368,1) * [PTPN2] * [INSR_p] -K(368,2) * [PTPN2 |INSR_p];
  R368: INSR_p => PTPN2; 1;
  // V(369) = K(369,1) * [PTPN2 |INSR_p];
  R369: INSR_p => PTPN2; 1;
  // V(370) = K(370,1) * [PTPN11_p] * [IRS1_p] -K(370,2) * [PTPN11_p |IRS1_p];
  R370: PTPN11_p => IRS1_p; 1;
  // V(371) = K(371,1) * [PTPN11_p |IRS1_p];
  R371: PTPN11_p => IRS1_p; 1;
  // V(372) = K(372,1) * [DUSP1_p] * [MAPK9_p] -K(372,2) * [DUSP1_p |MAPK9_p];
  R372: DUSP1_p => MAPK9_p; 1;
  // V(373) = K(373,1) * [DUSP1_p |MAPK9_p];
  R373: DUSP1_p => MAPK9_p; 1;
  // V(374) = K(374,1) * [PTPN11_p] * [EGFR_p] -K(374,2) * [PTPN11_p |EGFR_p];
  R374: EGFR_p => PTPN11_p; 1;
  // V(375) = K(375,1) * [PTPN11_p |EGFR_p];
  R375: EGFR_p => PTPN11_p; 1;
  // V(376) = K(376,1) * [DUSP1_p] * [MAPK1_p] -K(376,2) * [DUSP1_p |MAPK1_p];
  R376: DUSP1_p => MAPK1_p; 1;
  // V(377) = K(377,1) * [DUSP1_p |MAPK1_p];
  R377: DUSP1_p => MAPK1_p; 1;
  // V(378) = K(378,1) * [PTPN2] * [EGFR_p] -K(378,2) * [PTPN2 |EGFR_p];
  R378: EGFR_p => PTPN2; 1;
  // V(379) = K(379,1) * [PTPN2 |EGFR_p];
  R379: EGFR_p => PTPN2; 1;
  // V(380) = K(380,1) * [PTEN_p] * [SP1_p] -K(380,2) * [PTEN_p |SP1_p];
  R380: PTEN_p => SP1_p; 1;
  // V(381) = K(381,1) * [PTEN_p |SP1_p];
  R381: PTEN_p => SP1_p; 1;
  // V(382) = K(382,1) * [PTPN2] * [STAT6_p] -K(382,2) * [PTPN2 |STAT6_p];
  R382: STAT6_p => PTPN2; 1;
  // V(383) = K(383,1) * [PTPN2 |STAT6_p];
  R383: STAT6_p => PTPN2; 1;
  // V(384) = K(384,1) * [DUSP1_p] * [MAPK8_p] -K(384,2) * [DUSP1_p |MAPK8_p];
  R384: MAPK8_p => DUSP1_p; 1;
  // V(385) = K(385,1) * [DUSP1_p |MAPK8_p];
  R385: MAPK8_p => DUSP1_p; 1;
  // V(386) = K(386,1) * [PTEN_p] * [PTEN_p] -K(386,2) * [PTEN_p |PTEN_p];
  R386: PTEN_p => ; 1;
  // V(387) = K(387,1) * [PTEN_p |PTEN_p];
  R387: PTEN_p => ; 1;
  // V(388) = K(388,1) * [PTPRJ] * [PIK3R1_p] -K(388,2) * [PTPRJ |PIK3R1_p];
  R388: PIK3R1_p => PTPRJ; 1;
  // V(389) = K(389,1) * [PTPRJ |PIK3R1_p];
  R389: PIK3R1_p => PTPRJ; 1;
  // V(390) = K(390,1) * [PTPRJ] * [SIGNOR-C156_p] -K(390,2) * [PTPRJ |SIGNOR-C156_p];
  R390: PTPRJ => ; 1;
  // V(391) = K(391,1) * [PTPRJ |SIGNOR-C156_p];
  R391: PTPRJ => ; 1;
  // V(392) = K(392,1) * [PTPN2] * [STAT1_p] -K(392,2) * [PTPN2 |STAT1_p];
  R392: STAT1_p => PTPN2; 1;
  // V(393) = K(393,1) * [PTPN2 |STAT1_p];
  R393: STAT1_p => PTPN2; 1;
  // V(394) = K(394,1) * [PTPN11_p] * [CDKN1B_p] -K(394,2) * [PTPN11_p |CDKN1B_p];
  R394: PTPN11_p => CDKN1B_p; 1;
  // V(395) = K(395,1) * [PTPN11_p |CDKN1B_p];
  R395: PTPN11_p => CDKN1B_p; 1;
  // V(396) = K(396,1) * [PTPRJ] * [EGFR_p] -K(396,2) * [PTPRJ |EGFR_p];
  R396: EGFR_p => PTPRJ; 1;
  // V(397) = K(397,1) * [PTPRJ |EGFR_p];
  R397: EGFR_p => PTPRJ; 1;
  // V(398) = K(398,1) * [PTEN_p] * [IRF3_p] -K(398,2) * [PTEN_p |IRF3_p];
  R398: PTEN_p => IRF3_p; 1;
  // V(399) = K(399,1) * [PTEN_p |IRF3_p];
  R399: PTEN_p => IRF3_p; 1;
  // V(400) = K(400,1) * [PTPA] * [AKT1_p] -K(400,2) * [PTPA |AKT1_p];
  R400: PTPA => AKT1_p; 1;
  // V(401) = K(401,1) * [PTPA |AKT1_p];
  R401: PTPA => AKT1_p; 1;
  // V(402) = K(402,1) * [PTEN_p] * [IRS1_p] -K(402,2) * [PTEN_p |IRS1_p];
  R402: PTEN_p => IRS1_p; 1;
  // V(403) = K(403,1) * [PTEN_p |IRS1_p];
  R403: PTEN_p => IRS1_p; 1;
  // V(404) = K(404,1) * [PTPN11_p] * [STAT1_p] -K(404,2) * [PTPN11_p |STAT1_p];
  R404: STAT1_p => PTPN11_p; 1;
  // V(405) = K(405,1) * [PTPN11_p |STAT1_p];
  R405: STAT1_p => PTPN11_p; 1;
  // V(406) = K(406,1) * [PTEN_p] * [CREB1_p] -K(406,2) * [PTEN_p |CREB1_p];
  R406: PTEN_p => CREB1_p; 1;
  // V(407) = K(407,1) * [PTEN_p |CREB1_p];
  R407: PTEN_p => CREB1_p; 1;
  // V(408) = K(408,1) * [DUSP1_p] * [JUN_p] -K(408,2) * [DUSP1_p |JUN_p];
  R408: JUN_p => DUSP1_p; 1;
  // V(409) = K(409,1) * [DUSP1_p |JUN_p];
  R409: JUN_p => DUSP1_p; 1;
  // V(410) = K(410,1) * [MDM2_p] * [HIF1A] -K(410,2) * [MDM2_p |HIF1A];
  R410: HIF1A => MDM2_p; 1;
  // V(411) = K(411,1) * [MDM2_p |HIF1A];
  R411: HIF1A => MDM2_p; 1;
  // V(412) = K(412,1) * [MDM2_p] * [NUMB] -K(412,2) * [MDM2_p |NUMB];
  R412: MDM2_p => NUMB; 1;
  // V(413) = K(413,1) * [MDM2_p |NUMB];
  R413: MDM2_p => NUMB; 1;
  // V(414) = K(414,1) * [MDM2_p] * [TP53] -K(414,2) * [MDM2_p |TP53];
  R414: TP53 => MDM2_p; 1;
  // V(415) = K(415,1) * [MDM2_p |TP53];
  R415: TP53 => MDM2_p; 1;
  // V(416) = K(416,1) * [SYVN1] * [NFE2L2] -K(416,2) * [SYVN1 |NFE2L2];
  R416: SYVN1 => NFE2L2; 1;
  // V(417) = K(417,1) * [SYVN1 |NFE2L2];
  R417: SYVN1 => NFE2L2; 1;
  // V(418) = K(418,1) * [MDM2_p] * [PPARG] -K(418,2) * [MDM2_p |PPARG];
  R418: PPARG => MDM2_p; 1;
  // V(419) = K(419,1) * [MDM2_p |PPARG];
  R419: PPARG => MDM2_p; 1;
  // V(420) = K(420,1) * [PINK1] * [MFN1] -K(420,2) * [PINK1 |MFN1];
  R420: PINK1 => MFN1; 1;
  // V(421) = K(421,1) * [PINK1 |MFN1];
  R421: PINK1 => MFN1; 1;
  // V(422) = K(422,1) * [SYVN1] * [CDKN1B] -K(422,2) * [SYVN1 |CDKN1B];
  R422: CDKN1B => SYVN1; 1;
  // V(423) = K(423,1) * [SYVN1 |CDKN1B];
  R423: CDKN1B => SYVN1; 1;
  // V(424) = K(424,1) * [SYVN1] * [PTEN] -K(424,2) * [SYVN1 |PTEN];
  R424: PTEN => SYVN1; 1;
  // V(425) = K(425,1) * [SYVN1 |PTEN];
  R425: PTEN => SYVN1; 1;
  // V(426) = K(426,1) * [TRIM23] * [PPARG] -K(426,2) * [TRIM23 |PPARG];
  R426: PPARG => TRIM23; 1;
  // V(427) = K(427,1) * [TRIM23 |PPARG];
  R427: PPARG => TRIM23; 1;
  // V(428) = K(428,1) * [JUN_p] * [SP1_p] * [TGFB1_g] -K(428,2) * [JUN_p |SP1_p |TGFB1_g];
  R428: SP1_p => TGFB1_g; 1;
  // V(429) = K(429,1) * [JUN_p |SP1_p |TGFB1_g];
  R429: SP1_p => TGFB1_g; 1;
  // V(430) = K(430,1) * [TGFB1_rna];
  R430: TGFB1_rna => ; 1;
  // V(431) = K(431,1) * [TP53_p] * [CDKN1A_g] -K(431,2) * [TP53_p |CDKN1A_g];
  R431: CDKN1A_g => TP53_p; 1;
  // V(432) = K(432,1) * [TP53_p |CDKN1A_g];
  R432: CDKN1A_g => TP53_p; 1;
  // V(433) = K(433,1) * [CDKN1A_rna];
  R433: CDKN1A_rna => ; 1;
  // V(434) = K(434,1) * [NFE2L2_p] * [SOD1_g] -K(434,2) * [NFE2L2_p |SOD1_g];
  R434: SOD1_g => NFE2L2_p; 1;
  // V(435) = K(435,1) * [NFE2L2_p |SOD1_g];
  R435: SOD1_g => NFE2L2_p; 1;
  // V(436) = K(436,1) * [SOD1_rna];
  R436: SOD1_rna => ; 1;
  // V(437) = K(437,1) * [CREB1_p] * [PPARG_p] * [SIRT1_p] * [PPARGC1A_g] -K(437,2) * [CREB1_p |PPARG_p |SIRT1_p |PPARGC1A_g];
  R437: PPARGC1A_g => PPARG_p; 1;
  // V(438) = K(438,1) * [CREB1_p |PPARG_p |SIRT1_p |PPARGC1A_g];
  R438: PPARGC1A_g => PPARG_p; 1;
  // V(439) = K(439,1) * [PPARGC1A_rna];
  R439: PPARGC1A_rna => ; 1;
  // V(440) = K(440,1) * [ATF3] * [GDF15_g] -K(440,2) * [ATF3 |GDF15_g];
  R440: GDF15_g => ATF3; 1;
  // V(441) = K(441,1) * [ATF3 |GDF15_g];
  R441: GDF15_g => ATF3; 1;
  // V(442) = K(442,1) * [GDF15_rna];
  R442: GDF15_rna => ; 1;
  // V(443) = K(443,1) * [TP53_p] * [BAX_g] -K(443,2) * [TP53_p |BAX_g];
  R443: BAX_g => TP53_p; 1;
  // V(444) = K(444,1) * [TP53_p |BAX_g];
  R444: BAX_g => TP53_p; 1;
  // V(445) = K(445,1) * [BAX_rna];
  R445: BAX_rna => ; 1;
  // V(446) = K(446,1) * [STAT1_p] * [SOCS3_g] -K(446,2) * [STAT1_p |SOCS3_g];
  R446: SOCS3_g => STAT1_p; 1;
  // V(447) = K(447,1) * [STAT1_p |SOCS3_g];
  R447: SOCS3_g => STAT1_p; 1;
  // V(448) = K(448,1) * [SOCS3_rna];
  R448: SOCS3_rna => ; 1;
  // V(449) = K(449,1) * [FOXO1_p] * [CDKN1B_g] -K(449,2) * [FOXO1_p |CDKN1B_g];
  R449: FOXO1_p => CDKN1B_g; 1;
  // V(450) = K(450,1) * [FOXO1_p |CDKN1B_g];
  R450: FOXO1_p => CDKN1B_g; 1;
  // V(451) = K(451,1) * [CDKN1B_rna];
  R451: CDKN1B_rna => ; 1;
  // V(452) = K(452,1) * [NFE2L2_p] * [CAT_g] -K(452,2) * [NFE2L2_p |CAT_g];
  R452: CAT_g => NFE2L2_p; 1;
  // V(453) = K(453,1) * [NFE2L2_p |CAT_g];
  R453: CAT_g => NFE2L2_p; 1;
  // V(454) = K(454,1) * [CAT_rna];
  R454: CAT_rna => ; 1;
  // V(455) = K(455,1) * [HIF1A_p] * [VEGFA_g] -K(455,2) * [HIF1A_p |VEGFA_g];
  R455: VEGFA_g => HIF1A_p; 1;
  // V(456) = K(456,1) * [HIF1A_p |VEGFA_g];
  R456: VEGFA_g => HIF1A_p; 1;
  // V(457) = K(457,1) * [VEGFA_rna];
  R457: VEGFA_rna => ; 1;
  // V(458) = K(458,1) * [FOXO1_p] * [PCK1_g] -K(458,2) * [FOXO1_p |PCK1_g];
  R458: FOXO1_p => PCK1_g; 1;
  // V(459) = K(459,1) * [FOXO1_p |PCK1_g];
  R459: FOXO1_p => PCK1_g; 1;
  // V(460) = K(460,1) * [PCK1_rna];
  R460: PCK1_rna => ; 1;
  // V(461) = K(461,1) * [HIF1A_p] * [KDM6B_g] -K(461,2) * [HIF1A_p |KDM6B_g];
  R461: KDM6B_g => HIF1A_p; 1;
  // V(462) = K(462,1) * [HIF1A_p |KDM6B_g];
  R462: KDM6B_g => HIF1A_p; 1;
  // V(463) = K(463,1) * [KDM6B_rna];
  R463: KDM6B_rna => ; 1;
  // V(464) = K(464,1) * [CREB1_p] * [IRS2_g] -K(464,2) * [CREB1_p |IRS2_g];
  R464: CREB1_p => IRS2_g; 1;
  // V(465) = K(465,1) * [CREB1_p |IRS2_g];
  R465: CREB1_p => IRS2_g; 1;
  // V(466) = K(466,1) * [IRS2_rna];
  R466: IRS2_rna => ; 1;
  // V(467) = K(467,1) * [NFE2L2_p] * [GPX4_g] -K(467,2) * [NFE2L2_p |GPX4_g];
  R467: GPX4_g => NFE2L2_p; 1;
  // V(468) = K(468,1) * [NFE2L2_p |GPX4_g];
  R468: GPX4_g => NFE2L2_p; 1;
  // V(469) = K(469,1) * [GPX4_rna];
  R469: GPX4_rna => ; 1;
  // V(470) = K(470,1) * [STAT6_p] * [SOCS1_g] -K(470,2) * [STAT6_p |SOCS1_g];
  R470: STAT6_p => SOCS1_g; 1;
  // V(471) = K(471,1) * [STAT6_p |SOCS1_g];
  R471: STAT6_p => SOCS1_g; 1;
  // V(472) = K(472,1) * [SOCS1_rna];
  R472: SOCS1_rna => ; 1;
  // V(473) = K(473,1) * [EGR1] * [HPSE_g] -K(473,2) * [EGR1 |HPSE_g];
  R473: HPSE_g => EGR1; 1;
  // V(474) = K(474,1) * [EGR1 |HPSE_g];
  R474: HPSE_g => EGR1; 1;
  // V(475) = K(475,1) * [HPSE_rna];
  R475: HPSE_rna => ; 1;
  // V(476) = K(476,1) * [NFE2L2_p] * [SOD2_g] -K(476,2) * [NFE2L2_p |SOD2_g];
  R476: SOD2_g => NFE2L2_p; 1;
  // V(477) = K(477,1) * [NFE2L2_p |SOD2_g];
  R477: SOD2_g => NFE2L2_p; 1;
  // V(478) = K(478,1) * [SOD2_rna];
  R478: SOD2_rna => ; 1;
  // V(479) = K(479,1) * [EGR1] * [SIRT1_p] * [PPARG_g] -K(479,2) * [EGR1 |SIRT1_p |PPARG_g];
  R479: EGR1 => PPARG_g; 1;
  // V(480) = K(480,1) * [PPARG_g];
  R480: PPARG_g => ; 1;
  // V(481) = K(481,1) * [PPARG_rna];
  R481: PPARG_rna => ; 1;
  // V(482) = K(482,1) * [NFKB1] * [BMP4_g] -K(482,2) * [NFKB1 |BMP4_g];
  R482: BMP4_g => NFKB1; 1;
  // V(483) = K(483,1) * [BMP4_g];
  R483: BMP4_g => ; 1;
  // V(484) = K(484,1) * [BMP4_rna];
  R484: BMP4_rna => ; 1;
  // V(485) = K(485,1) * [MECP2_p] * [SGK1_g] -K(485,2) * [MECP2_p |SGK1_g];
  R485: MECP2_p => SGK1_g; 1;
  // V(486) = K(486,1) * [SGK1_g];
  R486: SGK1_g => ; 1;
  // V(487) = K(487,1) * [SGK1_rna];
  R487: SGK1_rna => ; 1;
  // V(488) = K(488,1) * [TP53_p] * [SLC2A1_g] -K(488,2) * [TP53_p |SLC2A1_g];
  R488: SLC2A1_g => TP53_p; 1;
  // V(489) = K(489,1) * [SLC2A1_g];
  R489: SLC2A1_g => ; 1;
  // V(490) = K(490,1) * [SLC2A1_rna];
  R490: SLC2A1_rna => ; 1;
  // V(491) = K(491,1) * [SGK1];
  R491: SGK1 => ; 1;
  // V(492) = K(492,1) * [SOCS3];
  R492: SOCS3 => ; 1;
  // V(493) = K(493,1) * [KDM6B];
  R493: KDM6B => ; 1;
  // V(494) = K(494,1) * [SOCS1];
  R494: SOCS1 => ; 1;
  // V(495) = K(495,1) * [ROCK2];
  R495: ROCK2 => ; 1;
  // V(496) = K(496,1) * [ABCA1];
  R496: ABCA1 => ; 1;
  // V(497) = K(497,1) * [SOD1];
  R497: SOD1 => ; 1;
  // V(498) = K(498,1) * [EGFR];
  R498: EGFR => ; 1;
  // V(499) = K(499,1) * [FOS];
  R499: FOS => ; 1;
  // V(500) = K(500,1) * [TGFB1];
  R500: TGFB1 => ; 1;
  // V(501) = K(501,1) * [CAT];
  R501: CAT => ; 1;
  // V(502) = K(502,1) * [SOD2];
  R502: SOD2 => ; 1;
  // V(503) = K(503,1) * [TP53];
  R503: TP53 => ; 1;
  // V(504) = K(504,1) * [HSPB1];
  R504: HSPB1 => ; 1;
  // V(505) = K(505,1) * [HMGN1];
  R505: HMGN1 => ; 1;
  // V(506) = K(506,1) * [JUN];
  R506: JUN => ; 1;
  // V(507) = K(507,1) * [INSR];
  R507: INSR => ; 1;
  // V(508) = K(508,1) * [SP1];
  R508: SP1 => ; 1;
  // V(509) = K(509,1) * [NR3C2];
  R509: NR3C2 => ; 1;
  // V(510) = K(510,1) * [VIM];
  R510: VIM => ; 1;
  // V(511) = K(511,1) * [PARP1];
  R511: PARP1 => ; 1;
  // V(512) = K(512,1) * [UBC];
  R512: UBC => ; 1;
  // V(513) = K(513,1) * [BCL2];
  R513: BCL2 => ; 1;
  // V(514) = K(514,1) * [KIT];
  R514: KIT => ; 1;
  // V(515) = K(515,1) * [SLC2A1];
  R515: SLC2A1 => ; 1;
  // V(516) = K(516,1) * [PCNA];
  R516: PCNA => ; 1;
  // V(517) = K(517,1) * [BMP4];
  R517: BMP4 => ; 1;
  // V(518) = K(518,1) * [CYBA];
  R518: CYBA => ; 1;
  // V(519) = K(519,1) * [F3];
  R519: F3 => ; 1;
  // V(520) = K(520,1) * [VEGFA];
  R520: VEGFA => ; 1;
  // V(521) = K(521,1) * [CREB1];
  R521: CREB1 => ; 1;
  // V(522) = K(522,1) * [PRKCA];
  R522: PRKCA => ; 1;
  // V(523) = K(523,1) * [JUNB];
  R523: JUNB => ; 1;
  // V(524) = K(524,1) * [PTPN2];
  R524: PTPN2 => ; 1;
  // V(525) = K(525,1) * [EGR1];
  R525: EGR1 => ; 1;
  // V(526) = K(526,1) * [ATF3];
  R526: ATF3 => ; 1;
  // V(527) = K(527,1) * [NFKB1];
  R527: NFKB1 => ; 1;
  // V(528) = K(528,1) * [NR4A1];
  R528: NR4A1 => ; 1;
  // V(529) = K(529,1) * [DNMT1];
  R529: DNMT1 => ; 1;
  // V(530) = K(530,1) * [ZFP36];
  R530: ZFP36 => ; 1;
  // V(531) = K(531,1) * [PIK3R1];
  R531: PIK3R1 => ; 1;
  // V(532) = K(532,1) * [MAPK1];
  R532: MAPK1 => ; 1;
  // V(533) = K(533,1) * [DUSP1];
  R533: DUSP1 => ; 1;
  // V(534) = K(534,1) * [PRDX6];
  R534: PRDX6 => ; 1;
  // V(535) = K(535,1) * [AKT1];
  R535: AKT1 => ; 1;
  // V(536) = K(536,1) * [CTNNB1];
  R536: CTNNB1 => ; 1;
  // V(537) = K(537,1) * [PCK1];
  R537: PCK1 => ; 1;
  // V(538) = K(538,1) * [IRS1];
  R538: IRS1 => ; 1;
  // V(539) = K(539,1) * [DDIT3];
  R539: DDIT3 => ; 1;
  // V(540) = K(540,1) * [TRIM23];
  R540: TRIM23 => ; 1;
  // V(541) = K(541,1) * [GPX4];
  R541: GPX4 => ; 1;
  // V(542) = K(542,1) * [PPARG];
  R542: PPARG => ; 1;
  // V(543) = K(543,1) * [CDKN1A];
  R543: CDKN1A => ; 1;
  // V(544) = K(544,1) * [STAT1];
  R544: STAT1 => ; 1;
  // V(545) = K(545,1) * [STAT6];
  R545: STAT6 => ; 1;
  // V(546) = K(546,1) * [PIK3CA];
  R546: PIK3CA => ; 1;
  // V(547) = K(547,1) * [MAPK8];
  R547: MAPK8 => ; 1;
  // V(548) = K(548,1) * [MAPK9];
  R548: MAPK9 => ; 1;
  // V(549) = K(549,1) * [CDKN1B];
  R549: CDKN1B => ; 1;
  // V(550) = K(550,1) * [YAP1];
  R550: YAP1 => ; 1;
  // V(551) = K(551,1) * [NUMB];
  R551: NUMB => ; 1;
  // V(552) = K(552,1) * [TSC2];
  R552: TSC2 => ; 1;
  // V(553) = K(553,1) * [MECP2];
  R553: MECP2 => ; 1;
  // V(554) = K(554,1) * [RPS6KA3];
  R554: RPS6KA3 => ; 1;
  // V(555) = K(555,1) * [RCAN1];
  R555: RCAN1 => ; 1;
  // V(556) = K(556,1) * [PTEN];
  R556: PTEN => ; 1;
  // V(557) = K(557,1) * [MDM2];
  R557: MDM2 => ; 1;
  // V(558) = K(558,1) * [PTPN11];
  R558: PTPN11 => ; 1;
  // V(559) = K(559,1) * [PRDX1];
  R559: PRDX1 => ; 1;
  // V(560) = K(560,1) * [BAX];
  R560: BAX => ; 1;
  // V(561) = K(561,1) * [EP300];
  R561: EP300 => ; 1;
  // V(562) = K(562,1) * [FOXO1];
  R562: FOXO1 => ; 1;
  // V(563) = K(563,1) * [PTPRJ];
  R563: PTPRJ => ; 1;
  // V(564) = K(564,1) * [STK4];
  R564: STK4 => ; 1;
  // V(565) = K(565,1) * [PRKAA1];
  R565: PRKAA1 => ; 1;
  // V(566) = K(566,1) * [ROCK1];
  R566: ROCK1 => ; 1;
  // V(567) = K(567,1) * [SMAD4];
  R567: SMAD4 => ; 1;
  // V(568) = K(568,1) * [BECN1];
  R568: BECN1 => ; 1;
  // V(569) = K(569,1) * [IRF3];
  R569: IRF3 => ; 1;
  // V(570) = K(570,1) * [PTPA];
  R570: PTPA => ; 1;
  // V(571) = K(571,1) * [SMAD2];
  R571: SMAD2 => ; 1;
  // V(572) = K(572,1) * [SMAD1];
  R572: SMAD1 => ; 1;
  // V(573) = K(573,1) * [STK11];
  R573: STK11 => ; 1;
  // V(574) = K(574,1) * [NFE2L2];
  R574: NFE2L2 => ; 1;
  // V(575) = K(575,1) * [OCLN];
  R575: OCLN => ; 1;
  // V(576) = K(576,1) * [HIF1A];
  R576: HIF1A => ; 1;
  // V(577) = K(577,1) * [SYVN1];
  R577: SYVN1 => ; 1;
  // V(578) = K(578,1) * [MFN1];
  R578: MFN1 => ; 1;
  // V(579) = K(579,1) * [AKT1S1];
  R579: AKT1S1 => ; 1;
  // V(580) = K(580,1) * [SIRT1];
  R580: SIRT1 => ; 1;
  // V(581) = K(581,1) * [GDF15];
  R581: GDF15 => ; 1;
  // V(582) = K(582,1) * [PINK1];
  R582: PINK1 => ; 1;
  // V(583) = K(583,1) * [HIPK2];
  R583: HIPK2 => ; 1;
  // V(584) = K(584,1) * [TXNIP];
  R584: TXNIP => ; 1;
  // V(585) = K(585,1) * [SIRT7];
  R585: SIRT7 => ; 1;
  // V(586) = K(586,1) * [PPARGC1A];
  R586: PPARGC1A => ; 1;
  // V(587) = K(587,1) * [ADD3];
  R587: ADD3 => ; 1;
  // V(588) = K(588,1) * [HPSE];
  R588: HPSE => ; 1;
  // V(589) = K(589,1) * [IRS2];
  R589: IRS2 => ; 1;
  // V(590) = K(590,1) * [SGK1_rna];
  R590: SGK1_rna => ; 1;
  // V(591) = K(591,1) * [SOCS3_rna];
  R591: SOCS3_rna => ; 1;
  // V(592) = K(592,1) * [KDM6B_rna];
  R592: KDM6B_rna => ; 1;
  // V(593) = K(593,1) * [SOCS1_rna];
  R593: SOCS1_rna => ; 1;
  // V(594) = K(594,1) * [SOD1_rna];
  R594: SOD1_rna => ; 1;
  // V(595) = K(595,1) * [TGFB1_rna];
  R595: TGFB1_rna => ; 1;
  // V(596) = K(596,1) * [CAT_rna];
  R596: CAT_rna => ; 1;
  // V(597) = K(597,1) * [SOD2_rna];
  R597: SOD2_rna => ; 1;
  // V(598) = K(598,1) * [SLC2A1_rna];
  R598: SLC2A1_rna => ; 1;
  // V(599) = K(599,1) * [BMP4_rna];
  R599: BMP4_rna => ; 1;
  // V(600) = K(600,1) * [VEGFA_rna];
  R600: VEGFA_rna => ; 1;
  // V(601) = K(601,1) * [PCK1_rna];
  R601: PCK1_rna => ; 1;
  // V(602) = K(602,1) * [GPX4_rna];
  R602: GPX4_rna => ; 1;
  // V(603) = K(603,1) * [PPARG_rna];
  R603: PPARG_rna => ; 1;
  // V(604) = K(604,1) * [CDKN1A_rna];
  R604: CDKN1A_rna => ; 1;
  // V(605) = K(605,1) * [CDKN1B_rna];
  R605: CDKN1B_rna => ; 1;
  // V(606) = K(606,1) * [BAX_rna];
  R606: BAX_rna => ; 1;
  // V(607) = K(607,1) * [GDF15_rna];
  R607: GDF15_rna => ; 1;
  // V(608) = K(608,1) * [PPARGC1A_rna];
  R608: PPARGC1A_rna => ; 1;
  // V(609) = K(609,1) * [HPSE_rna];
  R609: HPSE_rna => ; 1;
  // V(610) = K(610,1) * [IRS2_rna];
  R610: IRS2_rna => ; 1;
  // V(611) = K(611,1) * [ROCK2_g];
  R611: ROCK2_g => ; 1;
  // V(612) = K(612,1) * [ROCK2_rna];
  R612: ROCK2_rna => ; 1;
  // V(613) = K(613,1) * [ABCA1_g];
  R613: ABCA1_g => ; 1;
  // V(614) = K(614,1) * [ABCA1_rna];
  R614: ABCA1_rna => ; 1;
  // V(615) = K(615,1) * [EGFR_g];
  R615: EGFR_g => ; 1;
  // V(616) = K(616,1) * [EGFR_rna];
  R616: EGFR_rna => ; 1;
  // V(617) = K(617,1) * [FOS_g];
  R617: FOS_g => ; 1;
  // V(618) = K(618,1) * [FOS_rna];
  R618: FOS_rna => ; 1;
  // V(619) = K(619,1) * [TP53_g];
  R619: TP53_g => ; 1;
  // V(620) = K(620,1) * [TP53_rna];
  R620: TP53_rna => ; 1;
  // V(621) = K(621,1) * [HSPB1_g];
  R621: HSPB1_g => ; 1;
  // V(622) = K(622,1) * [HSPB1_rna];
  R622: HSPB1_rna => ; 1;
  // V(623) = K(623,1) * [HMGN1_g];
  R623: HMGN1_g => ; 1;
  // V(624) = K(624,1) * [HMGN1_rna];
  R624: HMGN1_rna => ; 1;
  // V(625) = K(625,1) * [JUN_g];
  R625: JUN_g => ; 1;
  // V(626) = K(626,1) * [JUN_rna];
  R626: JUN_rna => ; 1;
  // V(627) = K(627,1) * [INSR_g];
  R627: INSR_g => ; 1;
  // V(628) = K(628,1) * [INSR_rna];
  R628: INSR_rna => ; 1;
  // V(629) = K(629,1) * [SP1_g];
  R629: SP1_g => ; 1;
  // V(630) = K(630,1) * [SP1_rna];
  R630: SP1_rna => ; 1;
  // V(631) = K(631,1) * [NR3C2_g];
  R631: NR3C2_g => ; 1;
  // V(632) = K(632,1) * [NR3C2_rna];
  R632: NR3C2_rna => ; 1;
  // V(633) = K(633,1) * [VIM_g];
  R633: VIM_g => ; 1;
  // V(634) = K(634,1) * [VIM_rna];
  R634: VIM_rna => ; 1;
  // V(635) = K(635,1) * [PARP1_g];
  R635: PARP1_g => ; 1;
  // V(636) = K(636,1) * [PARP1_rna];
  R636: PARP1_rna => ; 1;
  // V(637) = K(637,1) * [UBC_g];
  R637: UBC_g => ; 1;
  // V(638) = K(638,1) * [UBC_rna];
  R638: UBC_rna => ; 1;
  // V(639) = K(639,1) * [BCL2_g];
  R639: BCL2_g => ; 1;
  // V(640) = K(640,1) * [BCL2_rna];
  R640: BCL2_rna => ; 1;
  // V(641) = K(641,1) * [KIT_g];
  R641: KIT_g => ; 1;
  // V(642) = K(642,1) * [KIT_rna];
  R642: KIT_rna => ; 1;
  // V(643) = K(643,1) * [PCNA_g];
  R643: PCNA_g => ; 1;
  // V(644) = K(644,1) * [PCNA_rna];
  R644: PCNA_rna => ; 1;
  // V(645) = K(645,1) * [CYBA_g];
  R645: CYBA_g => ; 1;
  // V(646) = K(646,1) * [CYBA_rna];
  R646: CYBA_rna => ; 1;
  // V(647) = K(647,1) * [F3_g];
  R647: F3_g => ; 1;
  // V(648) = K(648,1) * [F3_rna];
  R648: F3_rna => ; 1;
  // V(649) = K(649,1) * [CREB1_g];
  R649: CREB1_g => ; 1;
  // V(650) = K(650,1) * [CREB1_rna];
  R650: CREB1_rna => ; 1;
  // V(651) = K(651,1) * [PRKCA_g];
  R651: PRKCA_g => ; 1;
  // V(652) = K(652,1) * [PRKCA_rna];
  R652: PRKCA_rna => ; 1;
  // V(653) = K(653,1) * [JUNB_g];
  R653: JUNB_g => ; 1;
  // V(654) = K(654,1) * [JUNB_rna];
  R654: JUNB_rna => ; 1;
  // V(655) = K(655,1) * [PTPN2_g];
  R655: PTPN2_g => ; 1;
  // V(656) = K(656,1) * [PTPN2_rna];
  R656: PTPN2_rna => ; 1;
  // V(657) = K(657,1) * [EGR1_g];
  R657: EGR1_g => ; 1;
  // V(658) = K(658,1) * [EGR1_rna];
  R658: EGR1_rna => ; 1;
  // V(659) = K(659,1) * [ATF3_g];
  R659: ATF3_g => ; 1;
  // V(660) = K(660,1) * [ATF3_rna];
  R660: ATF3_rna => ; 1;
  // V(661) = K(661,1) * [NFKB1_g];
  R661: NFKB1_g => ; 1;
  // V(662) = K(662,1) * [NFKB1_rna];
  R662: NFKB1_rna => ; 1;
  // V(663) = K(663,1) * [NR4A1_g];
  R663: NR4A1_g => ; 1;
  // V(664) = K(664,1) * [NR4A1_rna];
  R664: NR4A1_rna => ; 1;
  // V(665) = K(665,1) * [DNMT1_g];
  R665: DNMT1_g => ; 1;
  // V(666) = K(666,1) * [DNMT1_rna];
  R666: DNMT1_rna => ; 1;
  // V(667) = K(667,1) * [ZFP36_g];
  R667: ZFP36_g => ; 1;
  // V(668) = K(668,1) * [ZFP36_rna];
  R668: ZFP36_rna => ; 1;
  // V(669) = K(669,1) * [PIK3R1_g];
  R669: PIK3R1_g => ; 1;
  // V(670) = K(670,1) * [PIK3R1_rna];
  R670: PIK3R1_rna => ; 1;
  // V(671) = K(671,1) * [MAPK1_g];
  R671: MAPK1_g => ; 1;
  // V(672) = K(672,1) * [MAPK1_rna];
  R672: MAPK1_rna => ; 1;
  // V(673) = K(673,1) * [DUSP1_g];
  R673: DUSP1_g => ; 1;
  // V(674) = K(674,1) * [DUSP1_rna];
  R674: DUSP1_rna => ; 1;
  // V(675) = K(675,1) * [PRDX6_g];
  R675: PRDX6_g => ; 1;
  // V(676) = K(676,1) * [PRDX6_rna];
  R676: PRDX6_rna => ; 1;
  // V(677) = K(677,1) * [AKT1_g];
  R677: AKT1_g => ; 1;
  // V(678) = K(678,1) * [AKT1_rna];
  R678: AKT1_rna => ; 1;
  // V(679) = K(679,1) * [CTNNB1_g];
  R679: CTNNB1_g => ; 1;
  // V(680) = K(680,1) * [CTNNB1_rna];
  R680: CTNNB1_rna => ; 1;
  // V(681) = K(681,1) * [IRS1_g];
  R681: IRS1_g => ; 1;
  // V(682) = K(682,1) * [IRS1_rna];
  R682: IRS1_rna => ; 1;
  // V(683) = K(683,1) * [DDIT3_g];
  R683: DDIT3_g => ; 1;
  // V(684) = K(684,1) * [DDIT3_rna];
  R684: DDIT3_rna => ; 1;
  // V(685) = K(685,1) * [TRIM23_g];
  R685: TRIM23_g => ; 1;
  // V(686) = K(686,1) * [TRIM23_rna];
  R686: TRIM23_rna => ; 1;
  // V(687) = K(687,1) * [STAT1_g];
  R687: STAT1_g => ; 1;
  // V(688) = K(688,1) * [STAT1_rna];
  R688: STAT1_rna => ; 1;
  // V(689) = K(689,1) * [STAT6_g];
  R689: STAT6_g => ; 1;
  // V(690) = K(690,1) * [STAT6_rna];
  R690: STAT6_rna => ; 1;
  // V(691) = K(691,1) * [PIK3CA_g];
  R691: PIK3CA_g => ; 1;
  // V(692) = K(692,1) * [PIK3CA_rna];
  R692: PIK3CA_rna => ; 1;
  // V(693) = K(693,1) * [MAPK8_g];
  R693: MAPK8_g => ; 1;
  // V(694) = K(694,1) * [MAPK8_rna];
  R694: MAPK8_rna => ; 1;
  // V(695) = K(695,1) * [MAPK9_g];
  R695: MAPK9_g => ; 1;
  // V(696) = K(696,1) * [MAPK9_rna];
  R696: MAPK9_rna => ; 1;
  // V(697) = K(697,1) * [YAP1_g];
  R697: YAP1_g => ; 1;
  // V(698) = K(698,1) * [YAP1_rna];
  R698: YAP1_rna => ; 1;
  // V(699) = K(699,1) * [NUMB_g];
  R699: NUMB_g => ; 1;
  // V(700) = K(700,1) * [NUMB_rna];
  R700: NUMB_rna => ; 1;
  // V(701) = K(701,1) * [TSC2_g];
  R701: TSC2_g => ; 1;
  // V(702) = K(702,1) * [TSC2_rna];
  R702: TSC2_rna => ; 1;
  // V(703) = K(703,1) * [MECP2_g];
  R703: MECP2_g => ; 1;
  // V(704) = K(704,1) * [MECP2_rna];
  R704: MECP2_rna => ; 1;
  // V(705) = K(705,1) * [RPS6KA3_g];
  R705: RPS6KA3_g => ; 1;
  // V(706) = K(706,1) * [RPS6KA3_rna];
  R706: RPS6KA3_rna => ; 1;
  // V(707) = K(707,1) * [RCAN1_g];
  R707: RCAN1_g => ; 1;
  // V(708) = K(708,1) * [RCAN1_rna];
  R708: RCAN1_rna => ; 1;
  // V(709) = K(709,1) * [PTEN_g];
  R709: PTEN_g => ; 1;
  // V(710) = K(710,1) * [PTEN_rna];
  R710: PTEN_rna => ; 1;
  // V(711) = K(711,1) * [MDM2_g];
  R711: MDM2_g => ; 1;
  // V(712) = K(712,1) * [MDM2_rna];
  R712: MDM2_rna => ; 1;
  // V(713) = K(713,1) * [PTPN11_g];
  R713: PTPN11_g => ; 1;
  // V(714) = K(714,1) * [PTPN11_rna];
  R714: PTPN11_rna => ; 1;
  // V(715) = K(715,1) * [PRDX1_g];
  R715: PRDX1_g => ; 1;
  // V(716) = K(716,1) * [PRDX1_rna];
  R716: PRDX1_rna => ; 1;
  // V(717) = K(717,1) * [EP300_g];
  R717: EP300_g => ; 1;
  // V(718) = K(718,1) * [EP300_rna];
  R718: EP300_rna => ; 1;
  // V(719) = K(719,1) * [FOXO1_g];
  R719: FOXO1_g => ; 1;
  // V(720) = K(720,1) * [FOXO1_rna];
  R720: FOXO1_rna => ; 1;
  // V(721) = K(721,1) * [PTPRJ_g];
  R721: PTPRJ_g => ; 1;
  // V(722) = K(722,1) * [PTPRJ_rna];
  R722: PTPRJ_rna => ; 1;
  // V(723) = K(723,1) * [STK4_g];
  R723: STK4_g => ; 1;
  // V(724) = K(724,1) * [STK4_rna];
  R724: STK4_rna => ; 1;
  // V(725) = K(725,1) * [PRKAA1_g];
  R725: PRKAA1_g => ; 1;
  // V(726) = K(726,1) * [PRKAA1_rna];
  R726: PRKAA1_rna => ; 1;
  // V(727) = K(727,1) * [ROCK1_g];
  R727: ROCK1_g => ; 1;
  // V(728) = K(728,1) * [ROCK1_rna];
  R728: ROCK1_rna => ; 1;
  // V(729) = K(729,1) * [SMAD4_g];
  R729: SMAD4_g => ; 1;
  // V(730) = K(730,1) * [SMAD4_rna];
  R730: SMAD4_rna => ; 1;
  // V(731) = K(731,1) * [BECN1_g];
  R731: BECN1_g => ; 1;
  // V(732) = K(732,1) * [BECN1_rna];
  R732: BECN1_rna => ; 1;
  // V(733) = K(733,1) * [IRF3_g];
  R733: IRF3_g => ; 1;
  // V(734) = K(734,1) * [IRF3_rna];
  R734: IRF3_rna => ; 1;
  // V(735) = K(735,1) * [PTPA_g];
  R735: PTPA_g => ; 1;
  // V(736) = K(736,1) * [PTPA_rna];
  R736: PTPA_rna => ; 1;
  // V(737) = K(737,1) * [SMAD2_g];
  R737: SMAD2_g => ; 1;
  // V(738) = K(738,1) * [SMAD2_rna];
  R738: SMAD2_rna => ; 1;
  // V(739) = K(739,1) * [SMAD1_g];
  R739: SMAD1_g => ; 1;
  // V(740) = K(740,1) * [SMAD1_rna];
  R740: SMAD1_rna => ; 1;
  // V(741) = K(741,1) * [STK11_g];
  R741: STK11_g => ; 1;
  // V(742) = K(742,1) * [STK11_rna];
  R742: STK11_rna => ; 1;
  // V(743) = K(743,1) * [NFE2L2_g];
  R743: NFE2L2_g => ; 1;
  // V(744) = K(744,1) * [NFE2L2_rna];
  R744: NFE2L2_rna => ; 1;
  // V(745) = K(745,1) * [OCLN_g];
  R745: OCLN_g => ; 1;
  // V(746) = K(746,1) * [OCLN_rna];
  R746: OCLN_rna => ; 1;
  // V(747) = K(747,1) * [HIF1A_g];
  R747: HIF1A_g => ; 1;
  // V(748) = K(748,1) * [HIF1A_rna];
  R748: HIF1A_rna => ; 1;
  // V(749) = K(749,1) * [SYVN1_g];
  R749: SYVN1_g => ; 1;
  // V(750) = K(750,1) * [SYVN1_rna];
  R750: SYVN1_rna => ; 1;
  // V(751) = K(751,1) * [MFN1_g];
  R751: MFN1_g => ; 1;
  // V(752) = K(752,1) * [MFN1_rna];
  R752: MFN1_rna => ; 1;
  // V(753) = K(753,1) * [AKT1S1_g];
  R753: AKT1S1_g => ; 1;
  // V(754) = K(754,1) * [AKT1S1_rna];
  R754: AKT1S1_rna => ; 1;
  // V(755) = K(755,1) * [SIRT1_g];
  R755: SIRT1_g => ; 1;
  // V(756) = K(756,1) * [SIRT1_rna];
  R756: SIRT1_rna => ; 1;
  // V(757) = K(757,1) * [PINK1_g];
  R757: PINK1_g => ; 1;
  // V(758) = K(758,1) * [PINK1_rna];
  R758: PINK1_rna => ; 1;
  // V(759) = K(759,1) * [HIPK2_g];
  R759: HIPK2_g => ; 1;
  // V(760) = K(760,1) * [HIPK2_rna];
  R760: HIPK2_rna => ; 1;
  // V(761) = K(761,1) * [TXNIP_g];
  R761: TXNIP_g => ; 1;
  // V(762) = K(762,1) * [TXNIP_rna];
  R762: TXNIP_rna => ; 1;
  // V(763) = K(763,1) * [SIRT7_g];
  R763: SIRT7_g => ; 1;
  // V(764) = K(764,1) * [SIRT7_rna];
  R764: SIRT7_rna => ; 1;
  // V(765) = K(765,1) * [ADD3_g];
  R765: ADD3_g => ; 1;
  // V(766) = K(766,1) * [ADD3_rna];
  R766: ADD3_rna => ; 1;
  // V(767) = K(767,1) * [ABCA1_p];
  R767: ABCA1_p => ; 1;
  // V(768) = K(768,1) * [EGFR_p];
  R768: EGFR_p => ; 1;
  // V(769) = K(769,1) * [FOS_p];
  R769: FOS_p => ; 1;
  // V(770) = K(770,1) * [TP53_p];
  R770: TP53_p => ; 1;
  // V(771) = K(771,1) * [HSPB1_p];
  R771: HSPB1_p => ; 1;
  // V(772) = K(772,1) * [HMGN1_p];
  R772: HMGN1_p => ; 1;
  // V(773) = K(773,1) * [JUN_p];
  R773: JUN_p => ; 1;
  // V(774) = K(774,1) * [INSR_p];
  R774: INSR_p => ; 1;
  // V(775) = K(775,1) * [SP1_p];
  R775: SP1_p => ; 1;
  // V(776) = K(776,1) * [NR3C2_p];
  R776: NR3C2_p => ; 1;
  // V(777) = K(777,1) * [VIM_p];
  R777: VIM_p => ; 1;
  // V(778) = K(778,1) * [PARP1_p];
  R778: PARP1_p => ; 1;
  // V(779) = K(779,1) * [UBC_p];
  R779: UBC_p => ; 1;
  // V(780) = K(780,1) * [BCL2_p];
  R780: BCL2_p => ; 1;
  // V(781) = K(781,1) * [KIT_p];
  R781: KIT_p => ; 1;
  // V(782) = K(782,1) * [PCNA_p];
  R782: PCNA_p => ; 1;
  // V(783) = K(783,1) * [CYBA_p];
  R783: CYBA_p => ; 1;
  // V(784) = K(784,1) * [F3_p];
  R784: F3_p => ; 1;
  // V(785) = K(785,1) * [CREB1_p];
  R785: CREB1_p => ; 1;
  // V(786) = K(786,1) * [PRKCA_p];
  R786: PRKCA_p => ; 1;
  // V(787) = K(787,1) * [JUNB_p];
  R787: JUNB_p => ; 1;
  // V(788) = K(788,1) * [NR4A1_p];
  R788: NR4A1_p => ; 1;
  // V(789) = K(789,1) * [DNMT1_p];
  R789: DNMT1_p => ; 1;
  // V(790) = K(790,1) * [ZFP36_p];
  R790: ZFP36_p => ; 1;
  // V(791) = K(791,1) * [PIK3R1_p];
  R791: PIK3R1_p => ; 1;
  // V(792) = K(792,1) * [MAPK1_p];
  R792: MAPK1_p => ; 1;
  // V(793) = K(793,1) * [DUSP1_p];
  R793: DUSP1_p => ; 1;
  // V(794) = K(794,1) * [PRDX6_p];
  R794: PRDX6_p => ; 1;
  // V(795) = K(795,1) * [AKT1_p];
  R795: AKT1_p => ; 1;
  // V(796) = K(796,1) * [CTNNB1_p];
  R796: CTNNB1_p => ; 1;
  // V(797) = K(797,1) * [IRS1_p];
  R797: IRS1_p => ; 1;
  // V(798) = K(798,1) * [DDIT3_p];
  R798: DDIT3_p => ; 1;
  // V(799) = K(799,1) * [PPARG_p];
  R799: PPARG_p => ; 1;
  // V(800) = K(800,1) * [CDKN1A_p];
  R800: CDKN1A_p => ; 1;
  // V(801) = K(801,1) * [STAT1_p];
  R801: STAT1_p => ; 1;
  // V(802) = K(802,1) * [STAT6_p];
  R802: STAT6_p => ; 1;
  // V(803) = K(803,1) * [PIK3CA_p];
  R803: PIK3CA_p => ; 1;
  // V(804) = K(804,1) * [MAPK8_p];
  R804: MAPK8_p => ; 1;
  // V(805) = K(805,1) * [MAPK9_p];
  R805: MAPK9_p => ; 1;
  // V(806) = K(806,1) * [CDKN1B_p];
  R806: CDKN1B_p => ; 1;
  // V(807) = K(807,1) * [YAP1_p];
  R807: YAP1_p => ; 1;
  // V(808) = K(808,1) * [TSC2_p];
  R808: TSC2_p => ; 1;
  // V(809) = K(809,1) * [MECP2_p];
  R809: MECP2_p => ; 1;
  // V(810) = K(810,1) * [RPS6KA3_p];
  R810: RPS6KA3_p => ; 1;
  // V(811) = K(811,1) * [RCAN1_p];
  R811: RCAN1_p => ; 1;
  // V(812) = K(812,1) * [PTEN_p];
  R812: PTEN_p => ; 1;
  // V(813) = K(813,1) * [MDM2_p];
  R813: MDM2_p => ; 1;
  // V(814) = K(814,1) * [PTPN11_p];
  R814: PTPN11_p => ; 1;
  // V(815) = K(815,1) * [PRDX1_p];
  R815: PRDX1_p => ; 1;
  // V(816) = K(816,1) * [BAX_p];
  R816: BAX_p => ; 1;
  // V(817) = K(817,1) * [EP300_p];
  R817: EP300_p => ; 1;
  // V(818) = K(818,1) * [FOXO1_p];
  R818: FOXO1_p => ; 1;
  // V(819) = K(819,1) * [STK4_p];
  R819: STK4_p => ; 1;
  // V(820) = K(820,1) * [PRKAA1_p];
  R820: PRKAA1_p => ; 1;
  // V(821) = K(821,1) * [SMAD4_p];
  R821: SMAD4_p => ; 1;
  // V(822) = K(822,1) * [BECN1_p];
  R822: BECN1_p => ; 1;
  // V(823) = K(823,1) * [IRF3_p];
  R823: IRF3_p => ; 1;
  // V(824) = K(824,1) * [SMAD2_p];
  R824: SMAD2_p => ; 1;
  // V(825) = K(825,1) * [SMAD1_p];
  R825: SMAD1_p => ; 1;
  // V(826) = K(826,1) * [STK11_p];
  R826: STK11_p => ; 1;
  // V(827) = K(827,1) * [NFE2L2_p];
  R827: NFE2L2_p => ; 1;
  // V(828) = K(828,1) * [OCLN_p];
  R828: OCLN_p => ; 1;
  // V(829) = K(829,1) * [HIF1A_p];
  R829: HIF1A_p => ; 1;
  // V(830) = K(830,1) * [MFN1_p];
  R830: MFN1_p => ; 1;
  // V(831) = K(831,1) * [AKT1S1_p];
  R831: AKT1S1_p => ; 1;
  // V(832) = K(832,1) * [SIRT1_p];
  R832: SIRT1_p => ; 1;
  // V(833) = K(833,1) * [HIPK2_p];
  R833: HIPK2_p => ; 1;
  // V(834) = K(834,1) * [TXNIP_p];
  R834: TXNIP_p => ; 1;
  // V(835) = K(835,1) * [SIRT7_p];
  R835: SIRT7_p => ; 1;
  // V(836) = K(836,1) * [PPARGC1A_p];
  R836: PPARGC1A_p => ; 1;
  // V(837) = K(837,1) * [ADD3_p];
  R837: ADD3_p => ; 1;
  // V(838) = K(838,1) * [IRS2_p];
  R838: IRS2_p => ; 1;
  // V(839) = K(839,1) * [SIGNOR-C154_p];
  R839: => ; 1;
  // V(840) = K(840,1) * [SIGNOR-C156_p];
  R840: => ; 1;
  // V(841) = K(841,1) * [ROCK2_rna];
  R841: ROCK2_rna => ; 1;
  // V(842) = K(842,1) * [ABCA1_rna];
  R842: ABCA1_rna => ; 1;
  // V(843) = K(843,1) * [EGFR_rna];
  R843: EGFR_rna => ; 1;
  // V(844) = K(844,1) * [FOS_rna];
  R844: FOS_rna => ; 1;
  // V(845) = K(845,1) * [TP53_rna];
  R845: TP53_rna => ; 1;
  // V(846) = K(846,1) * [HSPB1_rna];
  R846: HSPB1_rna => ; 1;
  // V(847) = K(847,1) * [HMGN1_rna];
  R847: HMGN1_rna => ; 1;
  // V(848) = K(848,1) * [JUN_rna];
  R848: JUN_rna => ; 1;
  // V(849) = K(849,1) * [INSR_rna];
  R849: INSR_rna => ; 1;
  // V(850) = K(850,1) * [SP1_rna];
  R850: SP1_rna => ; 1;
  // V(851) = K(851,1) * [NR3C2_rna];
  R851: NR3C2_rna => ; 1;
  // V(852) = K(852,1) * [VIM_rna];
  R852: VIM_rna => ; 1;
  // V(853) = K(853,1) * [PARP1_rna];
  R853: PARP1_rna => ; 1;
  // V(854) = K(854,1) * [UBC_rna];
  R854: UBC_rna => ; 1;
  // V(855) = K(855,1) * [BCL2_rna];
  R855: BCL2_rna => ; 1;
  // V(856) = K(856,1) * [KIT_rna];
  R856: KIT_rna => ; 1;
  // V(857) = K(857,1) * [PCNA_rna];
  R857: PCNA_rna => ; 1;
  // V(858) = K(858,1) * [CYBA_rna];
  R858: CYBA_rna => ; 1;
  // V(859) = K(859,1) * [F3_rna];
  R859: F3_rna => ; 1;
  // V(860) = K(860,1) * [CREB1_rna];
  R860: CREB1_rna => ; 1;
  // V(861) = K(861,1) * [PRKCA_rna];
  R861: PRKCA_rna => ; 1;
  // V(862) = K(862,1) * [JUNB_rna];
  R862: JUNB_rna => ; 1;
  // V(863) = K(863,1) * [PTPN2_rna];
  R863: PTPN2_rna => ; 1;
  // V(864) = K(864,1) * [EGR1_rna];
  R864: EGR1_rna => ; 1;
  // V(865) = K(865,1) * [ATF3_rna];
  R865: ATF3_rna => ; 1;
  // V(866) = K(866,1) * [NFKB1_rna];
  R866: NFKB1_rna => ; 1;
  // V(867) = K(867,1) * [NR4A1_rna];
  R867: NR4A1_rna => ; 1;
  // V(868) = K(868,1) * [DNMT1_rna];
  R868: DNMT1_rna => ; 1;
  // V(869) = K(869,1) * [ZFP36_rna];
  R869: ZFP36_rna => ; 1;
  // V(870) = K(870,1) * [PIK3R1_rna];
  R870: PIK3R1_rna => ; 1;
  // V(871) = K(871,1) * [MAPK1_rna];
  R871: MAPK1_rna => ; 1;
  // V(872) = K(872,1) * [DUSP1_rna];
  R872: DUSP1_rna => ; 1;
  // V(873) = K(873,1) * [PRDX6_rna];
  R873: PRDX6_rna => ; 1;
  // V(874) = K(874,1) * [AKT1_rna];
  R874: AKT1_rna => ; 1;
  // V(875) = K(875,1) * [CTNNB1_rna];
  R875: CTNNB1_rna => ; 1;
  // V(876) = K(876,1) * [IRS1_rna];
  R876: IRS1_rna => ; 1;
  // V(877) = K(877,1) * [DDIT3_rna];
  R877: DDIT3_rna => ; 1;
  // V(878) = K(878,1) * [TRIM23_rna];
  R878: TRIM23_rna => ; 1;
  // V(879) = K(879,1) * [STAT1_rna];
  R879: STAT1_rna => ; 1;
  // V(880) = K(880,1) * [STAT6_rna];
  R880: STAT6_rna => ; 1;
  // V(881) = K(881,1) * [PIK3CA_rna];
  R881: PIK3CA_rna => ; 1;
  // V(882) = K(882,1) * [MAPK8_rna];
  R882: MAPK8_rna => ; 1;
  // V(883) = K(883,1) * [MAPK9_rna];
  R883: MAPK9_rna => ; 1;
  // V(884) = K(884,1) * [YAP1_rna];
  R884: YAP1_rna => ; 1;
  // V(885) = K(885,1) * [NUMB_rna];
  R885: NUMB_rna => ; 1;
  // V(886) = K(886,1) * [TSC2_rna];
  R886: TSC2_rna => ; 1;
  // V(887) = K(887,1) * [MECP2_rna];
  R887: MECP2_rna => ; 1;
  // V(888) = K(888,1) * [RPS6KA3_rna];
  R888: RPS6KA3_rna => ; 1;
  // V(889) = K(889,1) * [RCAN1_rna];
  R889: RCAN1_rna => ; 1;
  // V(890) = K(890,1) * [PTEN_rna];
  R890: PTEN_rna => ; 1;
  // V(891) = K(891,1) * [MDM2_rna];
  R891: MDM2_rna => ; 1;
  // V(892) = K(892,1) * [PTPN11_rna];
  R892: PTPN11_rna => ; 1;
  // V(893) = K(893,1) * [PRDX1_rna];
  R893: PRDX1_rna => ; 1;
  // V(894) = K(894,1) * [EP300_rna];
  R894: EP300_rna => ; 1;
  // V(895) = K(895,1) * [FOXO1_rna];
  R895: FOXO1_rna => ; 1;
  // V(896) = K(896,1) * [PTPRJ_rna];
  R896: PTPRJ_rna => ; 1;
  // V(897) = K(897,1) * [STK4_rna];
  R897: STK4_rna => ; 1;
  // V(898) = K(898,1) * [PRKAA1_rna];
  R898: PRKAA1_rna => ; 1;
  // V(899) = K(899,1) * [ROCK1_rna];
  R899: ROCK1_rna => ; 1;
  // V(900) = K(900,1) * [SMAD4_rna];
  R900: SMAD4_rna => ; 1;
  // V(901) = K(901,1) * [BECN1_rna];
  R901: BECN1_rna => ; 1;
  // V(902) = K(902,1) * [IRF3_rna];
  R902: IRF3_rna => ; 1;
  // V(903) = K(903,1) * [PTPA_rna];
  R903: PTPA_rna => ; 1;
  // V(904) = K(904,1) * [SMAD2_rna];
  R904: SMAD2_rna => ; 1;
  // V(905) = K(905,1) * [SMAD1_rna];
  R905: SMAD1_rna => ; 1;
  // V(906) = K(906,1) * [STK11_rna];
  R906: STK11_rna => ; 1;
  // V(907) = K(907,1) * [NFE2L2_rna];
  R907: NFE2L2_rna => ; 1;
  // V(908) = K(908,1) * [OCLN_rna];
  R908: OCLN_rna => ; 1;
  // V(909) = K(909,1) * [HIF1A_rna];
  R909: HIF1A_rna => ; 1;
  // V(910) = K(910,1) * [SYVN1_rna];
  R910: SYVN1_rna => ; 1;
  // V(911) = K(911,1) * [MFN1_rna];
  R911: MFN1_rna => ; 1;
  // V(912) = K(912,1) * [AKT1S1_rna];
  R912: AKT1S1_rna => ; 1;
  // V(913) = K(913,1) * [SIRT1_rna];
  R913: SIRT1_rna => ; 1;
  // V(914) = K(914,1) * [PINK1_rna];
  R914: PINK1_rna => ; 1;
  // V(915) = K(915,1) * [HIPK2_rna];
  R915: HIPK2_rna => ; 1;
  // V(916) = K(916,1) * [TXNIP_rna];
  R916: TXNIP_rna => ; 1;
  // V(917) = K(917,1) * [SIRT7_rna];
  R917: SIRT7_rna => ; 1;
  // V(918) = K(918,1) * [ADD3_rna];
  R918: ADD3_rna => ; 1;
end
