// SBML level 3 version 2

model Mesengial()

  // Compartments:
  compartment cell = 1;

  // Species:
  species ABCA1 in cell = 1/cell;
  species ABCA1_g in cell = 1/cell;
  species ABCA1_p in cell = 1/cell;
  species ABCA1_rna in cell = 1/cell;
  species AGO2 in cell = 1/cell;
  species AGO2_g in cell = 1/cell;
  species AGO2_p in cell = 1/cell;
  species AGO2_rna in cell = 1/cell;
  species ANGPT1 in cell = 1/cell;
  species ANGPT1_g in cell = 1/cell;
  species ANGPT1_rna in cell = 1/cell;
  species ANXA1 in cell = 1/cell;
  species ANXA1_g in cell = 1/cell;
  species ANXA1_p in cell = 1/cell;
  species ANXA1_rna in cell = 1/cell;
  species AR in cell = 1/cell;
  species AR_g in cell = 1/cell;
  species AR_p in cell = 1/cell;
  species AR_rna in cell = 1/cell;
  species ATR in cell = 1/cell;
  species ATR_g in cell = 1/cell;
  species ATR_rna in cell = 1/cell;
  species BCL2 in cell = 1/cell;
  species BCL2_g in cell = 1/cell;
  species BCL2_p in cell = 1/cell;
  species BCL2_rna in cell = 1/cell;
  species CASP9 in cell = 1/cell;
  species CASP9_g in cell = 1/cell;
  species CASP9_p in cell = 1/cell;
  species CASP9_rna in cell = 1/cell;
  species CAT in cell = 1/cell;
  species CAT_g in cell = 1/cell;
  species CAT_rna in cell = 1/cell;
  species CCND1 in cell = 1/cell;
  species CCND1_g in cell = 1/cell;
  species CCND1_rna in cell = 1/cell;
  species CDKN1A in cell = 1/cell;
  species CDKN1A_g in cell = 1/cell;
  species CDKN1A_p in cell = 1/cell;
  species CDKN1A_rna in cell = 1/cell;
  species CDKN1B in cell = 1/cell;
  species CDKN1B_g in cell = 1/cell;
  species CDKN1B_p in cell = 1/cell;
  species CDKN1B_rna in cell = 1/cell;
  species CREB1 in cell = 1/cell;
  species CREB1_g in cell = 1/cell;
  species CREB1_p in cell = 1/cell;
  species CREB1_rna in cell = 1/cell;
  species CTNNB1 in cell = 1/cell;
  species CTNNB1_g in cell = 1/cell;
  species CTNNB1_p in cell = 1/cell;
  species CTNNB1_rna in cell = 1/cell;
  species CUL3 in cell = 1/cell;
  species CUL3_g in cell = 1/cell;
  species CUL3_rna in cell = 1/cell;
  species DNMT1 in cell = 1/cell;
  species DNMT1_g in cell = 1/cell;
  species DNMT1_p in cell = 1/cell;
  species DNMT1_rna in cell = 1/cell;
  species DUSP1 in cell = 1/cell;
  species DUSP1_g in cell = 1/cell;
  species DUSP1_p in cell = 1/cell;
  species DUSP1_rna in cell = 1/cell;
  species EGFR in cell = 1/cell;
  species EGFR_g in cell = 1/cell;
  species EGFR_p in cell = 1/cell;
  species EGFR_rna in cell = 1/cell;
  species EGR1 in cell = 1/cell;
  species EGR1_g in cell = 1/cell;
  species EGR1_rna in cell = 1/cell;
  species EP300 in cell = 1/cell;
  species EP300_g in cell = 1/cell;
  species EP300_p in cell = 1/cell;
  species EP300_rna in cell = 1/cell;
  species ERG in cell = 1/cell;
  species ERG_g in cell = 1/cell;
  species ERG_rna in cell = 1/cell;
  species ETS1 in cell = 1/cell;
  species ETS1_g in cell = 1/cell;
  species ETS1_rna in cell = 1/cell;
  species FGF2 in cell = 1/cell;
  species FGF2_g in cell = 1/cell;
  species FGF2_rna in cell = 1/cell;
  species FOS in cell = 1/cell;
  species FOS_g in cell = 1/cell;
  species FOS_p in cell = 1/cell;
  species FOS_rna in cell = 1/cell;
  species GCLC in cell = 1/cell;
  species GCLC_g in cell = 1/cell;
  species GCLC_rna in cell = 1/cell;
  species GCLM in cell = 1/cell;
  species GCLM_g in cell = 1/cell;
  species GCLM_rna in cell = 1/cell;
  species HES1 in cell = 1/cell;
  species HES1_g in cell = 1/cell;
  species HES1_rna in cell = 1/cell;
  species HGF in cell = 1/cell;
  species HGF_g in cell = 1/cell;
  species HGF_rna in cell = 1/cell;
  species HIF1A in cell = 1/cell;
  species HIF1A_g in cell = 1/cell;
  species HIF1A_p in cell = 1/cell;
  species HIF1A_rna in cell = 1/cell;
  species HIPK2 in cell = 1/cell;
  species HIPK2_g in cell = 1/cell;
  species HIPK2_p in cell = 1/cell;
  species HIPK2_rna in cell = 1/cell;
  species IRS2 in cell = 1/cell;
  species IRS2_g in cell = 1/cell;
  species IRS2_rna in cell = 1/cell;
  species JAK1 in cell = 1/cell;
  species JAK1_g in cell = 1/cell;
  species JAK1_p in cell = 1/cell;
  species JAK1_rna in cell = 1/cell;
  species JUN in cell = 1/cell;
  species JUNB in cell = 1/cell;
  species JUNB_g in cell = 1/cell;
  species JUNB_p in cell = 1/cell;
  species JUNB_rna in cell = 1/cell;
  species JUN_g in cell = 1/cell;
  species JUN_p in cell = 1/cell;
  species JUN_rna in cell = 1/cell;
  species KDM6A in cell = 1/cell;
  species KDM6A_g in cell = 1/cell;
  species KDM6A_rna in cell = 1/cell;
  species KDM6B in cell = 1/cell;
  species KDM6B_g in cell = 1/cell;
  species KDM6B_rna in cell = 1/cell;
  species KDR in cell = 1/cell;
  species KDR_g in cell = 1/cell;
  species KDR_p in cell = 1/cell;
  species KDR_rna in cell = 1/cell;
  species KIT in cell = 1/cell;
  species KIT_g in cell = 1/cell;
  species KIT_p in cell = 1/cell;
  species KIT_rna in cell = 1/cell;
  species KLF9 in cell = 1/cell;
  species KLF9_g in cell = 1/cell;
  species KLF9_rna in cell = 1/cell;
  species LEPR in cell = 1/cell;
  species LEPR_g in cell = 1/cell;
  species LEPR_rna in cell = 1/cell;
  species LYN in cell = 1/cell;
  species LYN_g in cell = 1/cell;
  species LYN_p in cell = 1/cell;
  species LYN_rna in cell = 1/cell;
  species MAP4K2 in cell = 1/cell;
  species MAP4K2_g in cell = 1/cell;
  species MAP4K2_p in cell = 1/cell;
  species MAP4K2_rna in cell = 1/cell;
  species MAPK1 in cell = 1/cell;
  species MAPK1_g in cell = 1/cell;
  species MAPK1_p in cell = 1/cell;
  species MAPK1_rna in cell = 1/cell;
  species MAPK6 in cell = 1/cell;
  species MAPK6_g in cell = 1/cell;
  species MAPK6_p in cell = 1/cell;
  species MAPK6_rna in cell = 1/cell;
  species MAPK8 in cell = 1/cell;
  species MAPK8_g in cell = 1/cell;
  species MAPK8_p in cell = 1/cell;
  species MAPK8_rna in cell = 1/cell;
  species MAPK9 in cell = 1/cell;
  species MAPK9_g in cell = 1/cell;
  species MAPK9_p in cell = 1/cell;
  species MAPK9_rna in cell = 1/cell;
  species MDM2 in cell = 1/cell;
  species MDM2_g in cell = 1/cell;
  species MDM2_p in cell = 1/cell;
  species MDM2_rna in cell = 1/cell;
  species MFF in cell = 1/cell;
  species MFF_g in cell = 1/cell;
  species MFF_p in cell = 1/cell;
  species MFF_rna in cell = 1/cell;
  species NFE2L2 in cell = 1/cell;
  species NFE2L2_g in cell = 1/cell;
  species NFE2L2_p in cell = 1/cell;
  species NFE2L2_rna in cell = 1/cell;
  species NFKB1 in cell = 1/cell;
  species NFKB1_g in cell = 1/cell;
  species NFKB1_rna in cell = 1/cell;
  species NOTCH2 in cell = 1/cell;
  species NOTCH2_g in cell = 1/cell;
  species NOTCH2_rna in cell = 1/cell;
  species NOTCH4 in cell = 1/cell;
  species NOTCH4_g in cell = 1/cell;
  species NOTCH4_rna in cell = 1/cell;
  species NR3C1 in cell = 1/cell;
  species NR3C1_g in cell = 1/cell;
  species NR3C1_p in cell = 1/cell;
  species NR3C1_rna in cell = 1/cell;
  species NR3C2 in cell = 1/cell;
  species NR3C2_g in cell = 1/cell;
  species NR3C2_p in cell = 1/cell;
  species NR3C2_rna in cell = 1/cell;
  species NR4A1 in cell = 1/cell;
  species NR4A1_g in cell = 1/cell;
  species NR4A1_p in cell = 1/cell;
  species NR4A1_rna in cell = 1/cell;
  species NUMB in cell = 1/cell;
  species NUMB_g in cell = 1/cell;
  species NUMB_rna in cell = 1/cell;
  species PARP1 in cell = 1/cell;
  species PARP1_g in cell = 1/cell;
  species PARP1_p in cell = 1/cell;
  species PARP1_rna in cell = 1/cell;
  species PIK3CA in cell = 1/cell;
  species PIK3CA_g in cell = 1/cell;
  species PIK3CA_rna in cell = 1/cell;
  species PIK3CA_u in cell = 1/cell;
  species PIK3R1 in cell = 1/cell;
  species PIK3R1_g in cell = 1/cell;
  species PIK3R1_p in cell = 1/cell;
  species PIK3R1_rna in cell = 1/cell;
  species PKM in cell = 1/cell;
  species PKM_g in cell = 1/cell;
  species PKM_p in cell = 1/cell;
  species PKM_rna in cell = 1/cell;
  species PPARG in cell = 1/cell;
  species PPARG_g in cell = 1/cell;
  species PPARG_p in cell = 1/cell;
  species PPARG_rna in cell = 1/cell;
  species PRDX6 in cell = 1/cell;
  species PRDX6_g in cell = 1/cell;
  species PRDX6_p in cell = 1/cell;
  species PRDX6_rna in cell = 1/cell;
  species PRKAA1 in cell = 1/cell;
  species PRKAA1_g in cell = 1/cell;
  species PRKAA1_p in cell = 1/cell;
  species PRKAA1_rna in cell = 1/cell;
  species PTEN in cell = 1/cell;
  species PTEN_g in cell = 1/cell;
  species PTEN_p in cell = 1/cell;
  species PTEN_rna in cell = 1/cell;
  species PTPN11 in cell = 1/cell;
  species PTPN11_g in cell = 1/cell;
  species PTPN11_p in cell = 1/cell;
  species PTPN11_rna in cell = 1/cell;
  species PTPN2 in cell = 1/cell;
  species PTPN2_g in cell = 1/cell;
  species PTPN2_rna in cell = 1/cell;
  species PTPRB in cell = 1/cell;
  species PTPRB_g in cell = 1/cell;
  species PTPRB_rna in cell = 1/cell;
  species RHOA in cell = 1/cell;
  species RHOA_g in cell = 1/cell;
  species RHOA_p in cell = 1/cell;
  species RHOA_rna in cell = 1/cell;
  species ROCK2 in cell = 1/cell;
  species ROCK2_g in cell = 1/cell;
  species ROCK2_rna in cell = 1/cell;
  species RORA in cell = 1/cell;
  species RORA_g in cell = 1/cell;
  species RORA_p in cell = 1/cell;
  species RORA_rna in cell = 1/cell;
  species SMAD2 in cell = 1/cell;
  species SMAD2_g in cell = 1/cell;
  species SMAD2_p in cell = 1/cell;
  species SMAD2_rna in cell = 1/cell;
  species SMAD4 in cell = 1/cell;
  species SMAD4_g in cell = 1/cell;
  species SMAD4_p in cell = 1/cell;
  species SMAD4_rna in cell = 1/cell;
  species SOCS1 in cell = 1/cell;
  species SOCS1_g in cell = 1/cell;
  species SOCS1_p in cell = 1/cell;
  species SOCS1_rna in cell = 1/cell;
  species SOCS3 in cell = 1/cell;
  species SOCS3_g in cell = 1/cell;
  species SOCS3_rna in cell = 1/cell;
  species SOD2 in cell = 1/cell;
  species SOD2_g in cell = 1/cell;
  species SOD2_rna in cell = 1/cell;
  species SP1 in cell = 1/cell;
  species SP1_g in cell = 1/cell;
  species SP1_p in cell = 1/cell;
  species SP1_rna in cell = 1/cell;
  species SREBF1 in cell = 1/cell;
  species SREBF1_g in cell = 1/cell;
  species SREBF1_p in cell = 1/cell;
  species SREBF1_rna in cell = 1/cell;
  species STAT1 in cell = 1/cell;
  species STAT1_g in cell = 1/cell;
  species STAT1_p in cell = 1/cell;
  species STAT1_rna in cell = 1/cell;
  species STAT3 in cell = 1/cell;
  species STAT3_g in cell = 1/cell;
  species STAT3_p in cell = 1/cell;
  species STAT3_rna in cell = 1/cell;
  species STAT6 in cell = 1/cell;
  species STAT6_g in cell = 1/cell;
  species STAT6_p in cell = 1/cell;
  species STAT6_rna in cell = 1/cell;
  species TEK in cell = 1/cell;
  species TEK_g in cell = 1/cell;
  species TEK_p in cell = 1/cell;
  species TEK_rna in cell = 1/cell;
  species TFEB in cell = 1/cell;
  species TFEB_g in cell = 1/cell;
  species TFEB_p in cell = 1/cell;
  species TFEB_rna in cell = 1/cell;
  species TGFB2 in cell = 1/cell;
  species TGFB2_g in cell = 1/cell;
  species TGFB2_rna in cell = 1/cell;
  species TRAF6 in cell = 1/cell;
  species TRAF6_g in cell = 1/cell;
  species TRAF6_rna in cell = 1/cell;
  species TRAF6_u in cell = 1/cell;
  species TSC2 in cell = 1/cell;
  species TSC2_g in cell = 1/cell;
  species TSC2_p in cell = 1/cell;
  species TSC2_rna in cell = 1/cell;
  species VEGFA in cell = 1/cell;
  species VEGFA_g in cell = 1/cell;
  species VEGFA_rna in cell = 1/cell;
  species ZFP36 in cell = 1/cell;
  species ZFP36_g in cell = 1/cell;
  species ZFP36_p in cell = 1/cell;
  species ZFP36_rna in cell = 1/cell;

  // Reactions:
  // V(1) = K(1,1) * [SMAD2_p] * [SMAD4_p] -K(1,2) * [SIGNOR-C8];
  R1: SMAD2_p => SMAD4_p; 1;
  // V(2) = K(2,1) * [SMAD4_p] * [JUN_p] -K(2,2) * [SIGNOR-C10];
  R2: JUN_p => SMAD4_p; 1;
  // V(3) = K(3,1) * [STAT3_p] * [SP1_p] -K(3,2) * [SIGNOR-C74];
  R3: STAT3_p => SP1_p; 1;
  // V(4) = K(4,1) * [STAT1_p] * [STAT3_p] -K(4,2) * [SIGNOR-C118];
  R4: STAT3_p => STAT1_p; 1;
  // V(5) = K(5,1) * [SIGNOR-C118] * [JAK1_p] -K(5,2) * [SIGNOR-C120];
  R5: JAK1_p => ; 1;
  // V(6) = K(6,1) * [FOS_p] * [JUN_p] * [JUN_p] * [FOS_p] * [JUN_p] * [FOS_p] * [FOS_p] * [JUN_p] -K(6,2) * [SIGNOR-C154];
  R6: JUN_p => FOS_p; 1;
  // V(7) = K(7,1) * [PIK3R1_p] * [PIK3CA_u] -K(7,2) * [SIGNOR-C156];
  R7: PIK3R1_p => PIK3CA_u; 1;
  // V(8) = K(8,1) * [MAPK1_p] * [EP300] -K(8,2) * [MAPK1_p |EP300];
  R8: EP300 => MAPK1_p; 1;
  // V(9) = K(9,1) * [MAPK1_p |EP300];
  R9: EP300 => MAPK1_p; 1;
  // V(10) = K(10,1) * [MAPK1_p] * [HIF1A] -K(10,2) * [MAPK1_p |HIF1A];
  R10: HIF1A => MAPK1_p; 1;
  // V(11) = K(11,1) * [MAPK1_p |HIF1A];
  R11: HIF1A => MAPK1_p; 1;
  // V(12) = K(12,1) * [MAPK1_p] * [NR3C1] -K(12,2) * [MAPK1_p |NR3C1];
  R12: NR3C1 => MAPK1_p; 1;
  // V(13) = K(13,1) * [MAPK1_p |NR3C1];
  R13: NR3C1 => MAPK1_p; 1;
  // V(14) = K(14,1) * [MAPK1_p] * [PRDX6] -K(14,2) * [MAPK1_p |PRDX6];
  R14: PRDX6 => MAPK1_p; 1;
  // V(15) = K(15,1) * [MAPK1_p |PRDX6];
  R15: PRDX6 => MAPK1_p; 1;
  // V(16) = K(16,1) * [KIT_p] * [PTPN11] -K(16,2) * [KIT_p |PTPN11];
  R16: PTPN11 => KIT_p; 1;
  // V(17) = K(17,1) * [KIT_p |PTPN11];
  R17: PTPN11 => KIT_p; 1;
  // V(18) = K(18,1) * [EGFR_p] * [EGFR] -K(18,2) * [EGFR_p |EGFR];
  R18: EGFR_p => EGFR; 1;
  // V(19) = K(19,1) * [EGFR_p |EGFR];
  R19: EGFR_p => EGFR; 1;
  // V(20) = K(20,1) * [MAPK1_p] * [CDKN1B] -K(20,2) * [MAPK1_p |CDKN1B];
  R20: CDKN1B => MAPK1_p; 1;
  // V(21) = K(21,1) * [MAPK1_p |CDKN1B];
  R21: CDKN1B => MAPK1_p; 1;
  // V(22) = K(22,1) * [MAPK1_p] * [SMAD4] -K(22,2) * [MAPK1_p |SMAD4];
  R22: SMAD4 => MAPK1_p; 1;
  // V(23) = K(23,1) * [MAPK1_p |SMAD4];
  R23: SMAD4 => MAPK1_p; 1;
  // V(24) = K(24,1) * [MAPK1_p] * [JUN] -K(24,2) * [MAPK1_p |JUN];
  R24: JUN => MAPK1_p; 1;
  // V(25) = K(25,1) * [MAPK1_p |JUN];
  R25: JUN => MAPK1_p; 1;
  // V(26) = K(26,1) * [MAPK1_p] * [FOS] -K(26,2) * [MAPK1_p |FOS];
  R26: FOS => MAPK1_p; 1;
  // V(27) = K(27,1) * [MAPK1_p |FOS];
  R27: FOS => MAPK1_p; 1;
  // V(28) = K(28,1) * [KDR_p] * [KDR] -K(28,2) * [KDR_p |KDR];
  R28: KDR => KDR_p; 1;
  // V(29) = K(29,1) * [KDR_p |KDR];
  R29: KDR => KDR_p; 1;
  // V(30) = K(30,1) * [MAPK8_p] * [BCL2] -K(30,2) * [MAPK8_p |BCL2];
  R30: MAPK8_p => BCL2; 1;
  // V(31) = K(31,1) * [MAPK8_p |BCL2];
  R31: MAPK8_p => BCL2; 1;
  // V(32) = K(32,1) * [MAPK1_p] * [SMAD2] -K(32,2) * [MAPK1_p |SMAD2];
  R32: SMAD2 => MAPK1_p; 1;
  // V(33) = K(33,1) * [MAPK1_p |SMAD2];
  R33: SMAD2 => MAPK1_p; 1;
  // V(34) = K(34,1) * [KIT_p] * [CTNNB1] -K(34,2) * [KIT_p |CTNNB1];
  R34: CTNNB1 => KIT_p; 1;
  // V(35) = K(35,1) * [KIT_p |CTNNB1];
  R35: CTNNB1 => KIT_p; 1;
  // V(36) = K(36,1) * [MAPK1_p] * [RORA] -K(36,2) * [MAPK1_p |RORA];
  R36: RORA => MAPK1_p; 1;
  // V(37) = K(37,1) * [MAPK1_p |RORA];
  R37: RORA => MAPK1_p; 1;
  // V(38) = K(38,1) * [MAPK9_p] * [JUN] -K(38,2) * [MAPK9_p |JUN];
  R38: JUN => MAPK9_p; 1;
  // V(39) = K(39,1) * [MAPK9_p |JUN];
  R39: JUN => MAPK9_p; 1;
  // V(40) = K(40,1) * [MAPK1_p] * [BCL2] -K(40,2) * [MAPK1_p |BCL2];
  R40: BCL2 => MAPK1_p; 1;
  // V(41) = K(41,1) * [MAPK1_p |BCL2];
  R41: BCL2 => MAPK1_p; 1;
  // V(42) = K(42,1) * [MAPK1_p] * [SREBF1] -K(42,2) * [MAPK1_p |SREBF1];
  R42: SREBF1 => MAPK1_p; 1;
  // V(43) = K(43,1) * [MAPK1_p |SREBF1];
  R43: SREBF1 => MAPK1_p; 1;
  // V(44) = K(44,1) * [JAK1_p] * [STAT1] -K(44,2) * [JAK1_p |STAT1];
  R44: STAT1 => JAK1_p; 1;
  // V(45) = K(45,1) * [JAK1_p |STAT1];
  R45: STAT1 => JAK1_p; 1;
  // V(46) = K(46,1) * [MAPK1_p] * [DUSP1] -K(46,2) * [MAPK1_p |DUSP1];
  R46: DUSP1 => MAPK1_p; 1;
  // V(47) = K(47,1) * [MAPK1_p |DUSP1];
  R47: DUSP1 => MAPK1_p; 1;
  // V(48) = K(48,1) * [MAPK1_p] * [NR3C2] -K(48,2) * [MAPK1_p |NR3C2];
  R48: NR3C2 => MAPK1_p; 1;
  // V(49) = K(49,1) * [MAPK1_p |NR3C2];
  R49: NR3C2 => MAPK1_p; 1;
  // V(50) = K(50,1) * [MAPK8_p] * [MAPK9] -K(50,2) * [MAPK8_p |MAPK9];
  R50: MAPK8_p => MAPK9; 1;
  // V(51) = K(51,1) * [MAPK8_p |MAPK9];
  R51: MAPK8_p => MAPK9; 1;
  // V(52) = K(52,1) * [MAPK1_p] * [TSC2] -K(52,2) * [MAPK1_p |TSC2];
  R52: TSC2 => MAPK1_p; 1;
  // V(53) = K(53,1) * [MAPK1_p |TSC2];
  R53: TSC2 => MAPK1_p; 1;
  // V(54) = K(54,1) * [KIT_p] * [KIT] -K(54,2) * [KIT_p |KIT];
  R54: KIT => KIT_p; 1;
  // V(55) = K(55,1) * [KIT_p |KIT];
  R55: KIT => KIT_p; 1;
  // V(56) = K(56,1) * [MAPK1_p] * [RHOA] -K(56,2) * [MAPK1_p |RHOA];
  R56: RHOA => MAPK1_p; 1;
  // V(57) = K(57,1) * [MAPK1_p |RHOA];
  R57: RHOA => MAPK1_p; 1;
  // V(58) = K(58,1) * [ATR] * [PARP1] -K(58,2) * [ATR |PARP1];
  R58: PARP1 => ATR; 1;
  // V(59) = K(59,1) * [ATR |PARP1];
  R59: PARP1 => ATR; 1;
  // V(60) = K(60,1) * [MAPK8_p] * [NR3C1] -K(60,2) * [MAPK8_p |NR3C1];
  R60: MAPK8_p => NR3C1; 1;
  // V(61) = K(61,1) * [MAPK8_p |NR3C1];
  R61: MAPK8_p => NR3C1; 1;
  // V(62) = K(62,1) * [MAPK1_p] * [PPARG] -K(62,2) * [MAPK1_p |PPARG];
  R62: PPARG => MAPK1_p; 1;
  // V(63) = K(63,1) * [MAPK1_p |PPARG];
  R63: PPARG => MAPK1_p; 1;
  // V(64) = K(64,1) * [MAPK1_p] * [TFEB] -K(64,2) * [MAPK1_p |TFEB];
  R64: TFEB => MAPK1_p; 1;
  // V(65) = K(65,1) * [MAPK1_p |TFEB];
  R65: TFEB => MAPK1_p; 1;
  // V(66) = K(66,1) * [ATR] * [MDM2] -K(66,2) * [ATR |MDM2];
  R66: ATR => MDM2; 1;
  // V(67) = K(67,1) * [ATR |MDM2];
  R67: ATR => MDM2; 1;
  // V(68) = K(68,1) * [MAPK1_p] * [SIGNOR-C154] -K(68,2) * [MAPK1_p |SIGNOR-C154];
  R68: MAPK1_p => ; 1;
  // V(69) = K(69,1) * [MAPK1_p |SIGNOR-C154];
  R69: MAPK1_p => ; 1;
  // V(70) = K(70,1) * [MAPK8_p] * [CTNNB1] -K(70,2) * [MAPK8_p |CTNNB1];
  R70: MAPK8_p => CTNNB1; 1;
  // V(71) = K(71,1) * [MAPK8_p |CTNNB1];
  R71: MAPK8_p => CTNNB1; 1;
  // V(72) = K(72,1) * [HIPK2_p] * [HIPK2] -K(72,2) * [HIPK2_p |HIPK2];
  R72: HIPK2_p => HIPK2; 1;
  // V(73) = K(73,1) * [HIPK2_p |HIPK2];
  R73: HIPK2_p => HIPK2; 1;
  // V(74) = K(74,1) * [MAPK8_p] * [PKM] -K(74,2) * [MAPK8_p |PKM];
  R74: PKM => MAPK8_p; 1;
  // V(75) = K(75,1) * [MAPK8_p |PKM];
  R75: PKM => MAPK8_p; 1;
  // V(76) = K(76,1) * [MAPK1_p] * [EGFR] -K(76,2) * [MAPK1_p |EGFR];
  R76: EGFR => MAPK1_p; 1;
  // V(77) = K(77,1) * [MAPK1_p |EGFR];
  R77: EGFR => MAPK1_p; 1;
  // V(78) = K(78,1) * [MAPK8_p] * [STAT6] -K(78,2) * [MAPK8_p |STAT6];
  R78: STAT6 => MAPK8_p; 1;
  // V(79) = K(79,1) * [MAPK8_p |STAT6];
  R79: STAT6 => MAPK8_p; 1;
  // V(80) = K(80,1) * [PRKAA1] * [DNMT1] -K(80,2) * [PRKAA1 |DNMT1];
  R80: PRKAA1 => DNMT1; 1;
  // V(81) = K(81,1) * [PRKAA1 |DNMT1];
  R81: PRKAA1 => DNMT1; 1;
  // V(82) = K(82,1) * [TEK_p] * [TEK] -K(82,2) * [TEK_p |TEK];
  R82: TEK_p => TEK; 1;
  // V(83) = K(83,1) * [TEK_p |TEK];
  R83: TEK_p => TEK; 1;
  // V(84) = K(84,1) * [MAPK8_p] * [PPARG] -K(84,2) * [MAPK8_p |PPARG];
  R84: PPARG => MAPK8_p; 1;
  // V(85) = K(85,1) * [MAPK8_p |PPARG];
  R85: PPARG => MAPK8_p; 1;
  // V(86) = K(86,1) * [MAPK1_p] * [SP1] -K(86,2) * [MAPK1_p |SP1];
  R86: SP1 => MAPK1_p; 1;
  // V(87) = K(87,1) * [MAPK1_p |SP1];
  R87: SP1 => MAPK1_p; 1;
  // V(88) = K(88,1) * [MAPK8_p] * [CDKN1A] -K(88,2) * [MAPK8_p |CDKN1A];
  R88: MAPK8_p => CDKN1A; 1;
  // V(89) = K(89,1) * [MAPK8_p |CDKN1A];
  R89: MAPK8_p => CDKN1A; 1;
  // V(90) = K(90,1) * [MAPK1_p] * [CDKN1A] -K(90,2) * [MAPK1_p |CDKN1A];
  R90: CDKN1A => MAPK1_p; 1;
  // V(91) = K(91,1) * [MAPK1_p |CDKN1A];
  R91: CDKN1A => MAPK1_p; 1;
  // V(92) = K(92,1) * [MAPK8_p] * [JUN] -K(92,2) * [MAPK8_p |JUN];
  R92: MAPK8_p => JUN; 1;
  // V(93) = K(93,1) * [MAPK8_p |JUN];
  R93: MAPK8_p => JUN; 1;
  // V(94) = K(94,1) * [JAK1_p] * [STAT3] -K(94,2) * [JAK1_p |STAT3];
  R94: STAT3 => JAK1_p; 1;
  // V(95) = K(95,1) * [JAK1_p |STAT3];
  R95: STAT3 => JAK1_p; 1;
  // V(96) = K(96,1) * [MAPK1_p] * [PARP1] -K(96,2) * [MAPK1_p |PARP1];
  R96: PARP1 => MAPK1_p; 1;
  // V(97) = K(97,1) * [MAPK1_p |PARP1];
  R97: PARP1 => MAPK1_p; 1;
  // V(98) = K(98,1) * [EGFR_p] * [SIGNOR-C120] -K(98,2) * [EGFR_p |SIGNOR-C120];
  R98: EGFR_p => ; 1;
  // V(99) = K(99,1) * [EGFR_p |SIGNOR-C120];
  R99: EGFR_p => ; 1;
  // V(100) = K(100,1) * [MAPK8_p] * [SP1] -K(100,2) * [MAPK8_p |SP1];
  R100: MAPK8_p => SP1; 1;
  // V(101) = K(101,1) * [MAPK8_p |SP1];
  R101: MAPK8_p => SP1; 1;
  // V(102) = K(102,1) * [EGFR_p] * [PPARG] -K(102,2) * [EGFR_p |PPARG];
  R102: EGFR_p => PPARG; 1;
  // V(103) = K(103,1) * [EGFR_p |PPARG];
  R103: EGFR_p => PPARG; 1;
  // V(104) = K(104,1) * [MAPK1_p] * [CASP9] -K(104,2) * [MAPK1_p |CASP9];
  R104: CASP9 => MAPK1_p; 1;
  // V(105) = K(105,1) * [MAPK1_p |CASP9];
  R105: CASP9 => MAPK1_p; 1;
  // V(106) = K(106,1) * [JAK1_p] * [STAT6] -K(106,2) * [JAK1_p |STAT6];
  R106: STAT6 => JAK1_p; 1;
  // V(107) = K(107,1) * [JAK1_p |STAT6];
  R107: STAT6 => JAK1_p; 1;
  // V(108) = K(108,1) * [KIT_p] * [STAT1] -K(108,2) * [KIT_p |STAT1];
  R108: STAT1 => KIT_p; 1;
  // V(109) = K(109,1) * [KIT_p |STAT1];
  R109: STAT1 => KIT_p; 1;
  // V(110) = K(110,1) * [PRKAA1] * [EP300] -K(110,2) * [PRKAA1 |EP300];
  R110: PRKAA1 => EP300; 1;
  // V(111) = K(111,1) * [PRKAA1 |EP300];
  R111: PRKAA1 => EP300; 1;
  // V(112) = K(112,1) * [MAP4K2_p] * [MAP4K2] -K(112,2) * [MAP4K2_p |MAP4K2];
  R112: MAP4K2_p => MAP4K2; 1;
  // V(113) = K(113,1) * [MAP4K2_p |MAP4K2];
  R113: MAP4K2_p => MAP4K2; 1;
  // V(114) = K(114,1) * [PRKAA1] * [SREBF1] -K(114,2) * [PRKAA1 |SREBF1];
  R114: PRKAA1 => SREBF1; 1;
  // V(115) = K(115,1) * [PRKAA1 |SREBF1];
  R115: PRKAA1 => SREBF1; 1;
  // V(116) = K(116,1) * [MAPK8_p] * [JUNB] -K(116,2) * [MAPK8_p |JUNB];
  R116: MAPK8_p => JUNB; 1;
  // V(117) = K(117,1) * [MAPK8_p |JUNB];
  R117: MAPK8_p => JUNB; 1;
  // V(118) = K(118,1) * [MAPK1_p] * [MAPK1] -K(118,2) * [MAPK1_p |MAPK1];
  R118: MAPK1 => MAPK1_p; 1;
  // V(119) = K(119,1) * [MAPK1_p |MAPK1];
  R119: MAPK1 => MAPK1_p; 1;
  // V(120) = K(120,1) * [PRKAA1] * [TSC2] -K(120,2) * [PRKAA1 |TSC2];
  R120: PRKAA1 => TSC2; 1;
  // V(121) = K(121,1) * [PRKAA1 |TSC2];
  R121: PRKAA1 => TSC2; 1;
  // V(122) = K(122,1) * [LYN_p] * [LYN] -K(122,2) * [LYN_p |LYN];
  R122: LYN => LYN_p; 1;
  // V(123) = K(123,1) * [LYN_p |LYN];
  R123: LYN => LYN_p; 1;
  // V(124) = K(124,1) * [MAPK1_p] * [ZFP36] -K(124,2) * [MAPK1_p |ZFP36];
  R124: ZFP36 => MAPK1_p; 1;
  // V(125) = K(125,1) * [MAPK1_p |ZFP36];
  R125: ZFP36 => MAPK1_p; 1;
  // V(126) = K(126,1) * [PRKAA1] * [HIPK2] -K(126,2) * [PRKAA1 |HIPK2];
  R126: PRKAA1 => HIPK2; 1;
  // V(127) = K(127,1) * [PRKAA1 |HIPK2];
  R127: PRKAA1 => HIPK2; 1;
  // V(128) = K(128,1) * [MAPK8_p] * [SIGNOR-C154] -K(128,2) * [MAPK8_p |SIGNOR-C154];
  R128: MAPK8_p => ; 1;
  // V(129) = K(129,1) * [MAPK8_p |SIGNOR-C154];
  R129: MAPK8_p => ; 1;
  // V(130) = K(130,1) * [HIPK2_p] * [EP300] -K(130,2) * [HIPK2_p |EP300];
  R130: EP300 => HIPK2_p; 1;
  // V(131) = K(131,1) * [HIPK2_p |EP300];
  R131: EP300 => HIPK2_p; 1;
  // V(132) = K(132,1) * [MAPK1_p] * [AR] -K(132,2) * [MAPK1_p |AR];
  R132: AR => MAPK1_p; 1;
  // V(133) = K(133,1) * [MAPK1_p |AR];
  R133: AR => MAPK1_p; 1;
  // V(134) = K(134,1) * [PKM_p] * [STAT3] -K(134,2) * [PKM_p |STAT3];
  R134: PKM_p => STAT3; 1;
  // V(135) = K(135,1) * [PKM_p |STAT3];
  R135: PKM_p => STAT3; 1;
  // V(136) = K(136,1) * [JAK1_p] * [PTPN11] -K(136,2) * [JAK1_p |PTPN11];
  R136: PTPN11 => JAK1_p; 1;
  // V(137) = K(137,1) * [JAK1_p |PTPN11];
  R137: PTPN11 => JAK1_p; 1;
  // V(138) = K(138,1) * [EGFR_p] * [STAT1] -K(138,2) * [EGFR_p |STAT1];
  R138: EGFR_p => STAT1; 1;
  // V(139) = K(139,1) * [EGFR_p |STAT1];
  R139: EGFR_p => STAT1; 1;
  // V(140) = K(140,1) * [PRKAA1] * [MFF] -K(140,2) * [PRKAA1 |MFF];
  R140: PRKAA1 => MFF; 1;
  // V(141) = K(141,1) * [PRKAA1 |MFF];
  R141: PRKAA1 => MFF; 1;
  // V(142) = K(142,1) * [MAPK8_p] * [STAT3] -K(142,2) * [MAPK8_p |STAT3];
  R142: MAPK8_p => STAT3; 1;
  // V(143) = K(143,1) * [MAPK8_p |STAT3];
  R143: MAPK8_p => STAT3; 1;
  // V(144) = K(144,1) * [EGFR_p] * [PARP1] -K(144,2) * [EGFR_p |PARP1];
  R144: EGFR_p => PARP1; 1;
  // V(145) = K(145,1) * [EGFR_p |PARP1];
  R145: EGFR_p => PARP1; 1;
  // V(146) = K(146,1) * [KIT_p] * [SIGNOR-C156] -K(146,2) * [KIT_p |SIGNOR-C156];
  R146: KIT_p => ; 1;
  // V(147) = K(147,1) * [KIT_p |SIGNOR-C156];
  R147: KIT_p => ; 1;
  // V(148) = K(148,1) * [MAPK8_p] * [STAT1] -K(148,2) * [MAPK8_p |STAT1];
  R148: MAPK8_p => STAT1; 1;
  // V(149) = K(149,1) * [MAPK8_p |STAT1];
  R149: MAPK8_p => STAT1; 1;
  // V(150) = K(150,1) * [LYN_p] * [CDKN1B] -K(150,2) * [LYN_p |CDKN1B];
  R150: CDKN1B => LYN_p; 1;
  // V(151) = K(151,1) * [LYN_p |CDKN1B];
  R151: CDKN1B => LYN_p; 1;
  // V(152) = K(152,1) * [MAPK8_p] * [NR4A1] -K(152,2) * [MAPK8_p |NR4A1];
  R152: NR4A1 => MAPK8_p; 1;
  // V(153) = K(153,1) * [MAPK8_p |NR4A1];
  R153: NR4A1 => MAPK8_p; 1;
  // V(154) = K(154,1) * [ATR] * [CREB1] -K(154,2) * [ATR |CREB1];
  R154: ATR => CREB1; 1;
  // V(155) = K(155,1) * [ATR |CREB1];
  R155: ATR => CREB1; 1;
  // V(156) = K(156,1) * [EGFR_p] * [AGO2] -K(156,2) * [EGFR_p |AGO2];
  R156: EGFR_p => AGO2; 1;
  // V(157) = K(157,1) * [EGFR_p |AGO2];
  R157: EGFR_p => AGO2; 1;
  // V(158) = K(158,1) * [EGFR_p] * [LYN] -K(158,2) * [EGFR_p |LYN];
  R158: EGFR_p => LYN; 1;
  // V(159) = K(159,1) * [EGFR_p |LYN];
  R159: EGFR_p => LYN; 1;
  // V(160) = K(160,1) * [EGFR_p] * [ANXA1] -K(160,2) * [EGFR_p |ANXA1];
  R160: EGFR_p => ANXA1; 1;
  // V(161) = K(161,1) * [EGFR_p |ANXA1];
  R161: EGFR_p => ANXA1; 1;
  // V(162) = K(162,1) * [MAPK9_p] * [CTNNB1] -K(162,2) * [MAPK9_p |CTNNB1];
  R162: CTNNB1 => MAPK9_p; 1;
  // V(163) = K(163,1) * [MAPK9_p |CTNNB1];
  R163: CTNNB1 => MAPK9_p; 1;
  // V(164) = K(164,1) * [EGFR_p] * [STAT3] -K(164,2) * [EGFR_p |STAT3];
  R164: EGFR_p => STAT3; 1;
  // V(165) = K(165,1) * [EGFR_p |STAT3];
  R165: EGFR_p => STAT3; 1;
  // V(166) = K(166,1) * [LYN_p] * [STAT3] -K(166,2) * [LYN_p |STAT3];
  R166: STAT3 => LYN_p; 1;
  // V(167) = K(167,1) * [LYN_p |STAT3];
  R167: STAT3 => LYN_p; 1;
  // V(168) = K(168,1) * [PRKAA1] * [NFE2L2] -K(168,2) * [PRKAA1 |NFE2L2];
  R168: PRKAA1 => NFE2L2; 1;
  // V(169) = K(169,1) * [PRKAA1 |NFE2L2];
  R169: PRKAA1 => NFE2L2; 1;
  // V(170) = K(170,1) * [HIPK2_p] * [CDKN1B] -K(170,2) * [HIPK2_p |CDKN1B];
  R170: CDKN1B => HIPK2_p; 1;
  // V(171) = K(171,1) * [HIPK2_p |CDKN1B];
  R171: CDKN1B => HIPK2_p; 1;
  // V(172) = K(172,1) * [PRKAA1] * [PRKAA1] -K(172,2) * [PRKAA1 |PRKAA1];
  R172: PRKAA1 => ; 1;
  // V(173) = K(173,1) * [PRKAA1 |PRKAA1];
  R173: PRKAA1 => ; 1;
  // V(174) = K(174,1) * [LEPR] * [STAT3] -K(174,2) * [LEPR |STAT3];
  R174: LEPR => STAT3; 1;
  // V(175) = K(175,1) * [LEPR |STAT3];
  R175: LEPR => STAT3; 1;
  // V(176) = K(176,1) * [LYN_p] * [SOCS1] -K(176,2) * [LYN_p |SOCS1];
  R176: SOCS1 => LYN_p; 1;
  // V(177) = K(177,1) * [LYN_p |SOCS1];
  R177: SOCS1 => LYN_p; 1;
  // V(178) = K(178,1) * [TEK_p] * [STAT1] -K(178,2) * [TEK_p |STAT1];
  R178: TEK_p => STAT1; 1;
  // V(179) = K(179,1) * [TEK_p |STAT1];
  R179: TEK_p => STAT1; 1;
  // V(180) = K(180,1) * [LYN_p] * [EGFR] -K(180,2) * [LYN_p |EGFR];
  R180: EGFR => LYN_p; 1;
  // V(181) = K(181,1) * [LYN_p |EGFR];
  R181: EGFR => LYN_p; 1;
  // V(182) = K(182,1) * [EGFR_p] * [CTNNB1] -K(182,2) * [EGFR_p |CTNNB1];
  R182: EGFR_p => CTNNB1; 1;
  // V(183) = K(183,1) * [EGFR_p |CTNNB1];
  R183: EGFR_p => CTNNB1; 1;
  // V(184) = K(184,1) * [EGFR_p] * [PTPN11] -K(184,2) * [EGFR_p |PTPN11];
  R184: EGFR_p => PTPN11; 1;
  // V(185) = K(185,1) * [EGFR_p |PTPN11];
  R185: EGFR_p => PTPN11; 1;
  // V(186) = K(186,1) * [HIPK2_p] * [MDM2] -K(186,2) * [HIPK2_p |MDM2];
  R186: HIPK2_p => MDM2; 1;
  // V(187) = K(187,1) * [HIPK2_p |MDM2];
  R187: HIPK2_p => MDM2; 1;
  // V(188) = K(188,1) * [ROCK2] * [EP300] -K(188,2) * [ROCK2 |EP300];
  R188: EP300 => ROCK2; 1;
  // V(189) = K(189,1) * [ROCK2 |EP300];
  R189: EP300 => ROCK2; 1;
  // V(190) = K(190,1) * [MAPK1_p] * [STAT3] -K(190,2) * [MAPK1_p |STAT3];
  R190: STAT3 => MAPK1_p; 1;
  // V(191) = K(191,1) * [MAPK1_p |STAT3];
  R191: STAT3 => MAPK1_p; 1;
  // V(192) = K(192,1) * [MAPK6_p] * [MAPK6] -K(192,2) * [MAPK6_p |MAPK6];
  R192: MAPK6_p => MAPK6; 1;
  // V(193) = K(193,1) * [MAPK6_p |MAPK6];
  R193: MAPK6_p => MAPK6; 1;
  // V(194) = K(194,1) * [MAPK1_p] * [NR4A1] -K(194,2) * [MAPK1_p |NR4A1];
  R194: NR4A1 => MAPK1_p; 1;
  // V(195) = K(195,1) * [MAPK1_p |NR4A1];
  R195: NR4A1 => MAPK1_p; 1;
  // V(196) = K(196,1) * [EGFR_p] * [ABCA1] -K(196,2) * [EGFR_p |ABCA1];
  R196: EGFR_p => ABCA1; 1;
  // V(197) = K(197,1) * [EGFR_p |ABCA1];
  R197: EGFR_p => ABCA1; 1;
  // V(198) = K(198,1) * [MAPK9_p] * [STAT3] -K(198,2) * [MAPK9_p |STAT3];
  R198: STAT3 => MAPK9_p; 1;
  // V(199) = K(199,1) * [MAPK9_p |STAT3];
  R199: STAT3 => MAPK9_p; 1;
  // V(200) = K(200,1) * [EGFR_p] * [PKM] -K(200,2) * [EGFR_p |PKM];
  R200: EGFR_p => PKM; 1;
  // V(201) = K(201,1) * [EGFR_p |PKM];
  R201: EGFR_p => PKM; 1;
  // V(202) = K(202,1) * [PIK3CA_u] * [PIK3R1] -K(202,2) * [PIK3CA_u |PIK3R1];
  R202: PIK3R1 => PIK3CA_u; 1;
  // V(203) = K(203,1) * [PIK3CA_u |PIK3R1];
  R203: PIK3R1 => PIK3CA_u; 1;
  // V(204) = K(204,1) * [PRKAA1] * [CDKN1B] -K(204,2) * [PRKAA1 |CDKN1B];
  R204: PRKAA1 => CDKN1B; 1;
  // V(205) = K(205,1) * [PRKAA1 |CDKN1B];
  R205: PRKAA1 => CDKN1B; 1;
  // V(206) = K(206,1) * [HIPK2_p] * [CREB1] -K(206,2) * [HIPK2_p |CREB1];
  R206: CREB1 => HIPK2_p; 1;
  // V(207) = K(207,1) * [HIPK2_p |CREB1];
  R207: CREB1 => HIPK2_p; 1;
  // V(208) = K(208,1) * [PTPN2] * [KDR_p] -K(208,2) * [PTPN2 |KDR_p];
  R208: PTPN2 => KDR_p; 1;
  // V(209) = K(209,1) * [PTPN2 |KDR_p];
  R209: PTPN2 => KDR_p; 1;
  // V(210) = K(210,1) * [PTEN] * [AR_p] -K(210,2) * [PTEN |AR_p];
  R210: PTEN => AR_p; 1;
  // V(211) = K(211,1) * [PTEN |AR_p];
  R211: PTEN => AR_p; 1;
  // V(212) = K(212,1) * [DUSP1_p] * [MAPK9_p] -K(212,2) * [DUSP1_p |MAPK9_p];
  R212: DUSP1_p => MAPK9_p; 1;
  // V(213) = K(213,1) * [DUSP1_p |MAPK9_p];
  R213: DUSP1_p => MAPK9_p; 1;
  // V(214) = K(214,1) * [PTPN11_p] * [EGFR_p] -K(214,2) * [PTPN11_p |EGFR_p];
  R214: EGFR_p => PTPN11_p; 1;
  // V(215) = K(215,1) * [PTPN11_p |EGFR_p];
  R215: EGFR_p => PTPN11_p; 1;
  // V(216) = K(216,1) * [DUSP1_p] * [MAPK1_p] -K(216,2) * [DUSP1_p |MAPK1_p];
  R216: DUSP1_p => MAPK1_p; 1;
  // V(217) = K(217,1) * [DUSP1_p |MAPK1_p];
  R217: DUSP1_p => MAPK1_p; 1;
  // V(218) = K(218,1) * [PTPN2] * [JAK1_p] -K(218,2) * [PTPN2 |JAK1_p];
  R218: PTPN2 => JAK1_p; 1;
  // V(219) = K(219,1) * [PTPN2 |JAK1_p];
  R219: PTPN2 => JAK1_p; 1;
  // V(220) = K(220,1) * [PTPN2] * [EGFR_p] -K(220,2) * [PTPN2 |EGFR_p];
  R220: EGFR_p => PTPN2; 1;
  // V(221) = K(221,1) * [PTPN2 |EGFR_p];
  R221: EGFR_p => PTPN2; 1;
  // V(222) = K(222,1) * [PTEN] * [SP1_p] -K(222,2) * [PTEN |SP1_p];
  R222: PTEN => SP1_p; 1;
  // V(223) = K(223,1) * [PTEN |SP1_p];
  R223: PTEN => SP1_p; 1;
  // V(224) = K(224,1) * [PTPN2] * [STAT3_p] -K(224,2) * [PTPN2 |STAT3_p];
  R224: STAT3_p => PTPN2; 1;
  // V(225) = K(225,1) * [PTPN2 |STAT3_p];
  R225: STAT3_p => PTPN2; 1;
  // V(226) = K(226,1) * [PTPN2] * [STAT6_p] -K(226,2) * [PTPN2 |STAT6_p];
  R226: STAT6_p => PTPN2; 1;
  // V(227) = K(227,1) * [PTPN2 |STAT6_p];
  R227: STAT6_p => PTPN2; 1;
  // V(228) = K(228,1) * [PTPRB] * [TEK_p] -K(228,2) * [PTPRB |TEK_p];
  R228: TEK_p => PTPRB; 1;
  // V(229) = K(229,1) * [PTPRB |TEK_p];
  R229: TEK_p => PTPRB; 1;
  // V(230) = K(230,1) * [DUSP1_p] * [MAPK8_p] -K(230,2) * [DUSP1_p |MAPK8_p];
  R230: MAPK8_p => DUSP1_p; 1;
  // V(231) = K(231,1) * [DUSP1_p |MAPK8_p];
  R231: MAPK8_p => DUSP1_p; 1;
  // V(232) = K(232,1) * [PTPRB] * [MAPK1_p] -K(232,2) * [PTPRB |MAPK1_p];
  R232: PTPRB => MAPK1_p; 1;
  // V(233) = K(233,1) * [PTPRB |MAPK1_p];
  R233: PTPRB => MAPK1_p; 1;
  // V(234) = K(234,1) * [PTEN] * [PTEN_p] -K(234,2) * [PTEN |PTEN_p];
  R234: PTEN => PTEN_p; 1;
  // V(235) = K(235,1) * [PTEN |PTEN_p];
  R235: PTEN => PTEN_p; 1;
  // V(236) = K(236,1) * [PTPN2] * [STAT1_p] -K(236,2) * [PTPN2 |STAT1_p];
  R236: STAT1_p => PTPN2; 1;
  // V(237) = K(237,1) * [PTPN2 |STAT1_p];
  R237: STAT1_p => PTPN2; 1;
  // V(238) = K(238,1) * [PTPN11_p] * [CDKN1B_p] -K(238,2) * [PTPN11_p |CDKN1B_p];
  R238: PTPN11_p => CDKN1B_p; 1;
  // V(239) = K(239,1) * [PTPN11_p |CDKN1B_p];
  R239: PTPN11_p => CDKN1B_p; 1;
  // V(240) = K(240,1) * [PTPRB] * [KDR_p] -K(240,2) * [PTPRB |KDR_p];
  R240: PTPRB => KDR_p; 1;
  // V(241) = K(241,1) * [PTPRB |KDR_p];
  R241: PTPRB => KDR_p; 1;
  // V(242) = K(242,1) * [PTPN11_p] * [STAT1_p] -K(242,2) * [PTPN11_p |STAT1_p];
  R242: STAT1_p => PTPN11_p; 1;
  // V(243) = K(243,1) * [PTPN11_p |STAT1_p];
  R243: STAT1_p => PTPN11_p; 1;
  // V(244) = K(244,1) * [PTEN] * [CREB1_p] -K(244,2) * [PTEN |CREB1_p];
  R244: PTEN => CREB1_p; 1;
  // V(245) = K(245,1) * [PTEN |CREB1_p];
  R245: PTEN => CREB1_p; 1;
  // V(246) = K(246,1) * [DUSP1_p] * [JUN_p] -K(246,2) * [DUSP1_p |JUN_p];
  R246: JUN_p => DUSP1_p; 1;
  // V(247) = K(247,1) * [DUSP1_p |JUN_p];
  R247: JUN_p => DUSP1_p; 1;
  // V(248) = K(248,1) * [PTPN11_p] * [STAT3_p] -K(248,2) * [PTPN11_p |STAT3_p];
  R248: STAT3_p => PTPN11_p; 1;
  // V(249) = K(249,1) * [PTPN11_p |STAT3_p];
  R249: STAT3_p => PTPN11_p; 1;
  // V(250) = K(250,1) * [TRAF6_u] * [STAT3] -K(250,2) * [TRAF6_u |STAT3];
  R250: TRAF6_u => STAT3; 1;
  // V(251) = K(251,1) * [TRAF6_u |STAT3];
  R251: TRAF6_u => STAT3; 1;
  // V(252) = K(252,1) * [TRAF6_u] * [TRAF6] -K(252,2) * [TRAF6_u |TRAF6];
  R252: TRAF6_u => TRAF6; 1;
  // V(253) = K(253,1) * [TRAF6_u |TRAF6];
  R253: TRAF6_u => TRAF6; 1;
  // V(254) = K(254,1) * [MDM2] * [HIF1A] -K(254,2) * [MDM2 |HIF1A];
  R254: HIF1A => MDM2; 1;
  // V(255) = K(255,1) * [MDM2 |HIF1A];
  R255: HIF1A => MDM2; 1;
  // V(256) = K(256,1) * [MDM2] * [NUMB] -K(256,2) * [MDM2 |NUMB];
  R256: NUMB => MDM2; 1;
  // V(257) = K(257,1) * [MDM2 |NUMB];
  R257: NUMB => MDM2; 1;
  // V(258) = K(258,1) * [MDM2] * [PPARG] -K(258,2) * [MDM2 |PPARG];
  R258: PPARG => MDM2; 1;
  // V(259) = K(259,1) * [MDM2 |PPARG];
  R259: PPARG => MDM2; 1;
  // V(260) = K(260,1) * [TRAF6_u] * [PIK3CA] -K(260,2) * [TRAF6_u |PIK3CA];
  R260: PIK3CA => TRAF6_u; 1;
  // V(261) = K(261,1) * [TRAF6_u |PIK3CA];
  R261: PIK3CA => TRAF6_u; 1;
  // V(262) = K(262,1) * [MDM2] * [NOTCH4] -K(262,2) * [MDM2 |NOTCH4];
  R262: NOTCH4 => MDM2; 1;
  // V(263) = K(263,1) * [MDM2 |NOTCH4];
  R263: NOTCH4 => MDM2; 1;
  // V(264) = K(264,1) * [CUL3] * [RHOA] -K(264,2) * [CUL3 |RHOA];
  R264: RHOA => CUL3; 1;
  // V(265) = K(265,1) * [CUL3 |RHOA];
  R265: RHOA => CUL3; 1;
  // V(266) = K(266,1) * [STAT3_p] * [STAT1_p] * [SOCS3_g] -K(266,2) * [STAT3_p |STAT1_p |SOCS3_g];
  R266: STAT3_p => STAT1_p; 1;
  // V(267) = K(267,1) * [STAT3_p |STAT1_p |SOCS3_g];
  R267: STAT3_p => STAT1_p; 1;
  // V(268) = K(268,1) * [SOCS3_rna];
  R268: SOCS3_rna => ; 1;
  // V(269) = K(269,1) * [SREBF1_p] * [PKM_g] -K(269,2) * [SREBF1_p |PKM_g];
  R269: PKM_g => SREBF1_p; 1;
  // V(270) = K(270,1) * [SREBF1_p |PKM_g];
  R270: PKM_g => SREBF1_p; 1;
  // V(271) = K(271,1) * [PKM_rna];
  R271: PKM_rna => ; 1;
  // V(272) = K(272,1) * [CTNNB1_p] * [CCND1_g] -K(272,2) * [CTNNB1_p |CCND1_g];
  R272: CTNNB1_p => CCND1_g; 1;
  // V(273) = K(273,1) * [CTNNB1_p |CCND1_g];
  R273: CTNNB1_p => CCND1_g; 1;
  // V(274) = K(274,1) * [CCND1_rna];
  R274: CCND1_rna => ; 1;
  // V(275) = K(275,1) * [NFE2L2_p] * [CAT_g] -K(275,2) * [NFE2L2_p |CAT_g];
  R275: CAT_g => NFE2L2_p; 1;
  // V(276) = K(276,1) * [NFE2L2_p |CAT_g];
  R276: CAT_g => NFE2L2_p; 1;
  // V(277) = K(277,1) * [CAT_rna];
  R277: CAT_rna => ; 1;
  // V(278) = K(278,1) * [HIF1A_p] * [STAT3_p] * [VEGFA_g] -K(278,2) * [HIF1A_p |STAT3_p |VEGFA_g];
  R278: STAT3_p => HIF1A_p; 1;
  // V(279) = K(279,1) * [HIF1A_p |STAT3_p |VEGFA_g];
  R279: STAT3_p => HIF1A_p; 1;
  // V(280) = K(280,1) * [VEGFA_rna];
  R280: VEGFA_rna => ; 1;
  // V(281) = K(281,1) * [NFE2L2_p] * [GCLC_g] -K(281,2) * [NFE2L2_p |GCLC_g];
  R281: GCLC_g => NFE2L2_p; 1;
  // V(282) = K(282,1) * [NFE2L2_p |GCLC_g];
  R282: GCLC_g => NFE2L2_p; 1;
  // V(283) = K(283,1) * [GCLC_rna];
  R283: GCLC_rna => ; 1;
  // V(284) = K(284,1) * [STAT3_p] * [SP1_p] * [HGF_g] -K(284,2) * [STAT3_p |SP1_p |HGF_g];
  R284: STAT3_p => HGF_g; 1;
  // V(285) = K(285,1) * [STAT3_p |SP1_p |HGF_g];
  R285: STAT3_p => HGF_g; 1;
  // V(286) = K(286,1) * [HGF_rna];
  R286: HGF_rna => ; 1;
  // V(287) = K(287,1) * [HIF1A_p] * [KDM6B_g] -K(287,2) * [HIF1A_p |KDM6B_g];
  R287: KDM6B_g => HIF1A_p; 1;
  // V(288) = K(288,1) * [HIF1A_p |KDM6B_g];
  R288: KDM6B_g => HIF1A_p; 1;
  // V(289) = K(289,1) * [KDM6B_rna];
  R289: KDM6B_rna => ; 1;
  // V(290) = K(290,1) * [NR3C1] * [KLF9_g] -K(290,2) * [NR3C1 |KLF9_g];
  R290: KLF9_g => NR3C1; 1;
  // V(291) = K(291,1) * [NR3C1 |KLF9_g];
  R291: KLF9_g => NR3C1; 1;
  // V(292) = K(292,1) * [KLF9_rna];
  R292: KLF9_rna => ; 1;
  // V(293) = K(293,1) * [CREB1_p] * [IRS2_g] -K(293,2) * [CREB1_p |IRS2_g];
  R293: CREB1_p => IRS2_g; 1;
  // V(294) = K(294,1) * [CREB1_p |IRS2_g];
  R294: CREB1_p => IRS2_g; 1;
  // V(295) = K(295,1) * [IRS2_rna];
  R295: IRS2_rna => ; 1;
  // V(296) = K(296,1) * [STAT6_p] * [SOCS1_g] -K(296,2) * [STAT6_p |SOCS1_g];
  R296: STAT6_p => SOCS1_g; 1;
  // V(297) = K(297,1) * [STAT6_p |SOCS1_g];
  R297: STAT6_p => SOCS1_g; 1;
  // V(298) = K(298,1) * [SOCS1_rna];
  R298: SOCS1_rna => ; 1;
  // V(299) = K(299,1) * [NFE2L2_p] * [GCLM_g] -K(299,2) * [NFE2L2_p |GCLM_g];
  R299: GCLM_g => NFE2L2_p; 1;
  // V(300) = K(300,1) * [NFE2L2_p |GCLM_g];
  R300: GCLM_g => NFE2L2_p; 1;
  // V(301) = K(301,1) * [GCLM_rna];
  R301: GCLM_rna => ; 1;
  // V(302) = K(302,1) * [NFE2L2_p] * [SOD2_g] -K(302,2) * [NFE2L2_p |SOD2_g];
  R302: SOD2_g => NFE2L2_p; 1;
  // V(303) = K(303,1) * [NFE2L2_p |SOD2_g];
  R303: SOD2_g => NFE2L2_p; 1;
  // V(304) = K(304,1) * [SOD2_rna];
  R304: SOD2_rna => ; 1;
  // V(305) = K(305,1) * [STAT3_p] * [STAT1_g] -K(305,2) * [STAT3_p |STAT1_g];
  R305: STAT3_p => STAT1_g; 1;
  // V(306) = K(306,1) * [STAT3_p |STAT1_g];
  R306: STAT3_p => STAT1_g; 1;
  // V(307) = K(307,1) * [STAT1_rna];
  R307: STAT1_rna => ; 1;
  // V(308) = K(308,1) * [ETS1] * [FOS_g] -K(308,2) * [ETS1 |FOS_g];
  R308: FOS_g => ETS1; 1;
  // V(309) = K(309,1) * [ETS1 |FOS_g];
  R309: FOS_g => ETS1; 1;
  // V(310) = K(310,1) * [FOS_rna];
  R310: FOS_rna => ; 1;
  // V(311) = K(311,1) * [HES1] * [NR3C1_g] -K(311,2) * [HES1 |NR3C1_g];
  R311: HES1 => NR3C1_g; 1;
  // V(312) = K(312,1) * [NR3C1_g];
  R312: NR3C1_g => ; 1;
  // V(313) = K(313,1) * [NR3C1_rna];
  R313: NR3C1_rna => ; 1;
  // V(314) = K(314,1) * [EGR1] * [HES1] * [PPARG_g] -K(314,2) * [EGR1 |HES1 |PPARG_g];
  R314: EGR1 => PPARG_g; 1;
  // V(315) = K(315,1) * [PPARG_g];
  R315: PPARG_g => ; 1;
  // V(316) = K(316,1) * [PPARG_rna];
  R316: PPARG_rna => ; 1;
  // V(317) = K(317,1) * [NR3C1] * [JUN_g] -K(317,2) * [NR3C1 |JUN_g];
  R317: JUN_g => NR3C1; 1;
  // V(318) = K(318,1) * [JUN_g];
  R318: JUN_g => ; 1;
  // V(319) = K(319,1) * [JUN_rna];
  R319: JUN_rna => ; 1;
  // V(320) = K(320,1) * [NR3C1] * [NFKB1_g] -K(320,2) * [NR3C1 |NFKB1_g];
  R320: NFKB1_g => NR3C1; 1;
  // V(321) = K(321,1) * [NFKB1_g];
  R321: NFKB1_g => ; 1;
  // V(322) = K(322,1) * [NFKB1_rna];
  R322: NFKB1_rna => ; 1;
  // V(323) = K(323,1) * [KDM6A] * [ERG_g] -K(323,2) * [KDM6A |ERG_g];
  R323: ERG_g => KDM6A; 1;
  // V(324) = K(324,1) * [ERG_g];
  R324: ERG_g => ; 1;
  // V(325) = K(325,1) * [ERG_rna];
  R325: ERG_rna => ; 1;
  // V(326) = K(326,1) * [SOCS3];
  R326: SOCS3 => ; 1;
  // V(327) = K(327,1) * [KDM6B];
  R327: KDM6B => ; 1;
  // V(328) = K(328,1) * [SOCS1];
  R328: SOCS1 => ; 1;
  // V(329) = K(329,1) * [KDM6A];
  R329: KDM6A => ; 1;
  // V(330) = K(330,1) * [ROCK2];
  R330: ROCK2 => ; 1;
  // V(331) = K(331,1) * [ABCA1];
  R331: ABCA1 => ; 1;
  // V(332) = K(332,1) * [EGFR];
  R332: EGFR => ; 1;
  // V(333) = K(333,1) * [FOS];
  R333: FOS => ; 1;
  // V(334) = K(334,1) * [CAT];
  R334: CAT => ; 1;
  // V(335) = K(335,1) * [ANXA1];
  R335: ANXA1 => ; 1;
  // V(336) = K(336,1) * [NR3C1];
  R336: NR3C1 => ; 1;
  // V(337) = K(337,1) * [SOD2];
  R337: SOD2 => ; 1;
  // V(338) = K(338,1) * [JUN];
  R338: JUN => ; 1;
  // V(339) = K(339,1) * [LYN];
  R339: LYN => ; 1;
  // V(340) = K(340,1) * [SP1];
  R340: SP1 => ; 1;
  // V(341) = K(341,1) * [NR3C2];
  R341: NR3C2 => ; 1;
  // V(342) = K(342,1) * [FGF2];
  R342: FGF2 => ; 1;
  // V(343) = K(343,1) * [PARP1];
  R343: PARP1 => ; 1;
  // V(344) = K(344,1) * [AR];
  R344: AR => ; 1;
  // V(345) = K(345,1) * [BCL2];
  R345: BCL2 => ; 1;
  // V(346) = K(346,1) * [KIT];
  R346: KIT => ; 1;
  // V(347) = K(347,1) * [ERG];
  R347: ERG => ; 1;
  // V(348) = K(348,1) * [HGF];
  R348: HGF => ; 1;
  // V(349) = K(349,1) * [PKM];
  R349: PKM => ; 1;
  // V(350) = K(350,1) * [ETS1];
  R350: ETS1 => ; 1;
  // V(351) = K(351,1) * [VEGFA];
  R351: VEGFA => ; 1;
  // V(352) = K(352,1) * [CREB1];
  R352: CREB1 => ; 1;
  // V(353) = K(353,1) * [JUNB];
  R353: JUNB => ; 1;
  // V(354) = K(354,1) * [PTPN2];
  R354: PTPN2 => ; 1;
  // V(355) = K(355,1) * [EGR1];
  R355: EGR1 => ; 1;
  // V(356) = K(356,1) * [TFEB];
  R356: TFEB => ; 1;
  // V(357) = K(357,1) * [NFKB1];
  R357: NFKB1 => ; 1;
  // V(358) = K(358,1) * [NR4A1];
  R358: NR4A1 => ; 1;
  // V(359) = K(359,1) * [JAK1];
  R359: JAK1 => ; 1;
  // V(360) = K(360,1) * [PTPRB];
  R360: PTPRB => ; 1;
  // V(361) = K(361,1) * [CCND1];
  R361: CCND1 => ; 1;
  // V(362) = K(362,1) * [DNMT1];
  R362: DNMT1 => ; 1;
  // V(363) = K(363,1) * [ZFP36];
  R363: ZFP36 => ; 1;
  // V(364) = K(364,1) * [PIK3R1];
  R364: PIK3R1 => ; 1;
  // V(365) = K(365,1) * [MAPK1];
  R365: MAPK1 => ; 1;
  // V(366) = K(366,1) * [DUSP1];
  R366: DUSP1 => ; 1;
  // V(367) = K(367,1) * [PRDX6];
  R367: PRDX6 => ; 1;
  // V(368) = K(368,1) * [CTNNB1];
  R368: CTNNB1 => ; 1;
  // V(369) = K(369,1) * [RORA];
  R369: RORA => ; 1;
  // V(370) = K(370,1) * [KDR];
  R370: KDR => ; 1;
  // V(371) = K(371,1) * [SREBF1];
  R371: SREBF1 => ; 1;
  // V(372) = K(372,1) * [PPARG];
  R372: PPARG => ; 1;
  // V(373) = K(373,1) * [CDKN1A];
  R373: CDKN1A => ; 1;
  // V(374) = K(374,1) * [STAT3];
  R374: STAT3 => ; 1;
  // V(375) = K(375,1) * [STAT1];
  R375: STAT1 => ; 1;
  // V(376) = K(376,1) * [STAT6];
  R376: STAT6 => ; 1;
  // V(377) = K(377,1) * [PIK3CA];
  R377: PIK3CA => ; 1;
  // V(378) = K(378,1) * [MAPK8];
  R378: MAPK8 => ; 1;
  // V(379) = K(379,1) * [MAPK9];
  R379: MAPK9 => ; 1;
  // V(380) = K(380,1) * [CDKN1B];
  R380: CDKN1B => ; 1;
  // V(381) = K(381,1) * [LEPR];
  R381: LEPR => ; 1;
  // V(382) = K(382,1) * [GCLC];
  R382: GCLC => ; 1;
  // V(383) = K(383,1) * [GCLM];
  R383: GCLM => ; 1;
  // V(384) = K(384,1) * [NUMB];
  R384: NUMB => ; 1;
  // V(385) = K(385,1) * [TSC2];
  R385: TSC2 => ; 1;
  // V(386) = K(386,1) * [CASP9];
  R386: CASP9 => ; 1;
  // V(387) = K(387,1) * [PTEN];
  R387: PTEN => ; 1;
  // V(388) = K(388,1) * [RHOA];
  R388: RHOA => ; 1;
  // V(389) = K(389,1) * [TGFB2];
  R389: TGFB2 => ; 1;
  // V(390) = K(390,1) * [MDM2];
  R390: MDM2 => ; 1;
  // V(391) = K(391,1) * [TEK];
  R391: TEK => ; 1;
  // V(392) = K(392,1) * [NOTCH2];
  R392: NOTCH2 => ; 1;
  // V(393) = K(393,1) * [PTPN11];
  R393: PTPN11 => ; 1;
  // V(394) = K(394,1) * [EP300];
  R394: EP300 => ; 1;
  // V(395) = K(395,1) * [MAP4K2];
  R395: MAP4K2 => ; 1;
  // V(396) = K(396,1) * [PRKAA1];
  R396: PRKAA1 => ; 1;
  // V(397) = K(397,1) * [SMAD4];
  R397: SMAD4 => ; 1;
  // V(398) = K(398,1) * [ATR];
  R398: ATR => ; 1;
  // V(399) = K(399,1) * [CUL3];
  R399: CUL3 => ; 1;
  // V(400) = K(400,1) * [KLF9];
  R400: KLF9 => ; 1;
  // V(401) = K(401,1) * [HES1];
  R401: HES1 => ; 1;
  // V(402) = K(402,1) * [ANGPT1];
  R402: ANGPT1 => ; 1;
  // V(403) = K(403,1) * [SMAD2];
  R403: SMAD2 => ; 1;
  // V(404) = K(404,1) * [NFE2L2];
  R404: NFE2L2 => ; 1;
  // V(405) = K(405,1) * [MAPK6];
  R405: MAPK6 => ; 1;
  // V(406) = K(406,1) * [HIF1A];
  R406: HIF1A => ; 1;
  // V(407) = K(407,1) * [NOTCH4];
  R407: NOTCH4 => ; 1;
  // V(408) = K(408,1) * [MFF];
  R408: MFF => ; 1;
  // V(409) = K(409,1) * [HIPK2];
  R409: HIPK2 => ; 1;
  // V(410) = K(410,1) * [AGO2];
  R410: AGO2 => ; 1;
  // V(411) = K(411,1) * [IRS2];
  R411: IRS2 => ; 1;
  // V(412) = K(412,1) * [TRAF6];
  R412: TRAF6 => ; 1;
  // V(413) = K(413,1) * [SOCS3_rna];
  R413: SOCS3_rna => ; 1;
  // V(414) = K(414,1) * [KDM6B_rna];
  R414: KDM6B_rna => ; 1;
  // V(415) = K(415,1) * [SOCS1_rna];
  R415: SOCS1_rna => ; 1;
  // V(416) = K(416,1) * [FOS_rna];
  R416: FOS_rna => ; 1;
  // V(417) = K(417,1) * [CAT_rna];
  R417: CAT_rna => ; 1;
  // V(418) = K(418,1) * [NR3C1_rna];
  R418: NR3C1_rna => ; 1;
  // V(419) = K(419,1) * [SOD2_rna];
  R419: SOD2_rna => ; 1;
  // V(420) = K(420,1) * [JUN_rna];
  R420: JUN_rna => ; 1;
  // V(421) = K(421,1) * [ERG_rna];
  R421: ERG_rna => ; 1;
  // V(422) = K(422,1) * [HGF_rna];
  R422: HGF_rna => ; 1;
  // V(423) = K(423,1) * [PKM_rna];
  R423: PKM_rna => ; 1;
  // V(424) = K(424,1) * [VEGFA_rna];
  R424: VEGFA_rna => ; 1;
  // V(425) = K(425,1) * [NFKB1_rna];
  R425: NFKB1_rna => ; 1;
  // V(426) = K(426,1) * [CCND1_rna];
  R426: CCND1_rna => ; 1;
  // V(427) = K(427,1) * [PPARG_rna];
  R427: PPARG_rna => ; 1;
  // V(428) = K(428,1) * [STAT1_rna];
  R428: STAT1_rna => ; 1;
  // V(429) = K(429,1) * [GCLC_rna];
  R429: GCLC_rna => ; 1;
  // V(430) = K(430,1) * [GCLM_rna];
  R430: GCLM_rna => ; 1;
  // V(431) = K(431,1) * [KLF9_rna];
  R431: KLF9_rna => ; 1;
  // V(432) = K(432,1) * [IRS2_rna];
  R432: IRS2_rna => ; 1;
  // V(433) = K(433,1) * [KDM6A_g];
  R433: KDM6A_g => ; 1;
  // V(434) = K(434,1) * [KDM6A_rna];
  R434: KDM6A_rna => ; 1;
  // V(435) = K(435,1) * [ROCK2_g];
  R435: ROCK2_g => ; 1;
  // V(436) = K(436,1) * [ROCK2_rna];
  R436: ROCK2_rna => ; 1;
  // V(437) = K(437,1) * [ABCA1_g];
  R437: ABCA1_g => ; 1;
  // V(438) = K(438,1) * [ABCA1_rna];
  R438: ABCA1_rna => ; 1;
  // V(439) = K(439,1) * [EGFR_g];
  R439: EGFR_g => ; 1;
  // V(440) = K(440,1) * [EGFR_rna];
  R440: EGFR_rna => ; 1;
  // V(441) = K(441,1) * [ANXA1_g];
  R441: ANXA1_g => ; 1;
  // V(442) = K(442,1) * [ANXA1_rna];
  R442: ANXA1_rna => ; 1;
  // V(443) = K(443,1) * [LYN_g];
  R443: LYN_g => ; 1;
  // V(444) = K(444,1) * [LYN_rna];
  R444: LYN_rna => ; 1;
  // V(445) = K(445,1) * [SP1_g];
  R445: SP1_g => ; 1;
  // V(446) = K(446,1) * [SP1_rna];
  R446: SP1_rna => ; 1;
  // V(447) = K(447,1) * [NR3C2_g];
  R447: NR3C2_g => ; 1;
  // V(448) = K(448,1) * [NR3C2_rna];
  R448: NR3C2_rna => ; 1;
  // V(449) = K(449,1) * [FGF2_g];
  R449: FGF2_g => ; 1;
  // V(450) = K(450,1) * [FGF2_rna];
  R450: FGF2_rna => ; 1;
  // V(451) = K(451,1) * [PARP1_g];
  R451: PARP1_g => ; 1;
  // V(452) = K(452,1) * [PARP1_rna];
  R452: PARP1_rna => ; 1;
  // V(453) = K(453,1) * [AR_g];
  R453: AR_g => ; 1;
  // V(454) = K(454,1) * [AR_rna];
  R454: AR_rna => ; 1;
  // V(455) = K(455,1) * [BCL2_g];
  R455: BCL2_g => ; 1;
  // V(456) = K(456,1) * [BCL2_rna];
  R456: BCL2_rna => ; 1;
  // V(457) = K(457,1) * [KIT_g];
  R457: KIT_g => ; 1;
  // V(458) = K(458,1) * [KIT_rna];
  R458: KIT_rna => ; 1;
  // V(459) = K(459,1) * [ETS1_g];
  R459: ETS1_g => ; 1;
  // V(460) = K(460,1) * [ETS1_rna];
  R460: ETS1_rna => ; 1;
  // V(461) = K(461,1) * [CREB1_g];
  R461: CREB1_g => ; 1;
  // V(462) = K(462,1) * [CREB1_rna];
  R462: CREB1_rna => ; 1;
  // V(463) = K(463,1) * [JUNB_g];
  R463: JUNB_g => ; 1;
  // V(464) = K(464,1) * [JUNB_rna];
  R464: JUNB_rna => ; 1;
  // V(465) = K(465,1) * [PTPN2_g];
  R465: PTPN2_g => ; 1;
  // V(466) = K(466,1) * [PTPN2_rna];
  R466: PTPN2_rna => ; 1;
  // V(467) = K(467,1) * [EGR1_g];
  R467: EGR1_g => ; 1;
  // V(468) = K(468,1) * [EGR1_rna];
  R468: EGR1_rna => ; 1;
  // V(469) = K(469,1) * [TFEB_g];
  R469: TFEB_g => ; 1;
  // V(470) = K(470,1) * [TFEB_rna];
  R470: TFEB_rna => ; 1;
  // V(471) = K(471,1) * [NR4A1_g];
  R471: NR4A1_g => ; 1;
  // V(472) = K(472,1) * [NR4A1_rna];
  R472: NR4A1_rna => ; 1;
  // V(473) = K(473,1) * [JAK1_g];
  R473: JAK1_g => ; 1;
  // V(474) = K(474,1) * [JAK1_rna];
  R474: JAK1_rna => ; 1;
  // V(475) = K(475,1) * [PTPRB_g];
  R475: PTPRB_g => ; 1;
  // V(476) = K(476,1) * [PTPRB_rna];
  R476: PTPRB_rna => ; 1;
  // V(477) = K(477,1) * [DNMT1_g];
  R477: DNMT1_g => ; 1;
  // V(478) = K(478,1) * [DNMT1_rna];
  R478: DNMT1_rna => ; 1;
  // V(479) = K(479,1) * [ZFP36_g];
  R479: ZFP36_g => ; 1;
  // V(480) = K(480,1) * [ZFP36_rna];
  R480: ZFP36_rna => ; 1;
  // V(481) = K(481,1) * [PIK3R1_g];
  R481: PIK3R1_g => ; 1;
  // V(482) = K(482,1) * [PIK3R1_rna];
  R482: PIK3R1_rna => ; 1;
  // V(483) = K(483,1) * [MAPK1_g];
  R483: MAPK1_g => ; 1;
  // V(484) = K(484,1) * [MAPK1_rna];
  R484: MAPK1_rna => ; 1;
  // V(485) = K(485,1) * [DUSP1_g];
  R485: DUSP1_g => ; 1;
  // V(486) = K(486,1) * [DUSP1_rna];
  R486: DUSP1_rna => ; 1;
  // V(487) = K(487,1) * [PRDX6_g];
  R487: PRDX6_g => ; 1;
  // V(488) = K(488,1) * [PRDX6_rna];
  R488: PRDX6_rna => ; 1;
  // V(489) = K(489,1) * [CTNNB1_g];
  R489: CTNNB1_g => ; 1;
  // V(490) = K(490,1) * [CTNNB1_rna];
  R490: CTNNB1_rna => ; 1;
  // V(491) = K(491,1) * [RORA_g];
  R491: RORA_g => ; 1;
  // V(492) = K(492,1) * [RORA_rna];
  R492: RORA_rna => ; 1;
  // V(493) = K(493,1) * [KDR_g];
  R493: KDR_g => ; 1;
  // V(494) = K(494,1) * [KDR_rna];
  R494: KDR_rna => ; 1;
  // V(495) = K(495,1) * [SREBF1_g];
  R495: SREBF1_g => ; 1;
  // V(496) = K(496,1) * [SREBF1_rna];
  R496: SREBF1_rna => ; 1;
  // V(497) = K(497,1) * [CDKN1A_g];
  R497: CDKN1A_g => ; 1;
  // V(498) = K(498,1) * [CDKN1A_rna];
  R498: CDKN1A_rna => ; 1;
  // V(499) = K(499,1) * [STAT3_g];
  R499: STAT3_g => ; 1;
  // V(500) = K(500,1) * [STAT3_rna];
  R500: STAT3_rna => ; 1;
  // V(501) = K(501,1) * [STAT6_g];
  R501: STAT6_g => ; 1;
  // V(502) = K(502,1) * [STAT6_rna];
  R502: STAT6_rna => ; 1;
  // V(503) = K(503,1) * [PIK3CA_g];
  R503: PIK3CA_g => ; 1;
  // V(504) = K(504,1) * [PIK3CA_rna];
  R504: PIK3CA_rna => ; 1;
  // V(505) = K(505,1) * [MAPK8_g];
  R505: MAPK8_g => ; 1;
  // V(506) = K(506,1) * [MAPK8_rna];
  R506: MAPK8_rna => ; 1;
  // V(507) = K(507,1) * [MAPK9_g];
  R507: MAPK9_g => ; 1;
  // V(508) = K(508,1) * [MAPK9_rna];
  R508: MAPK9_rna => ; 1;
  // V(509) = K(509,1) * [CDKN1B_g];
  R509: CDKN1B_g => ; 1;
  // V(510) = K(510,1) * [CDKN1B_rna];
  R510: CDKN1B_rna => ; 1;
  // V(511) = K(511,1) * [LEPR_g];
  R511: LEPR_g => ; 1;
  // V(512) = K(512,1) * [LEPR_rna];
  R512: LEPR_rna => ; 1;
  // V(513) = K(513,1) * [NUMB_g];
  R513: NUMB_g => ; 1;
  // V(514) = K(514,1) * [NUMB_rna];
  R514: NUMB_rna => ; 1;
  // V(515) = K(515,1) * [TSC2_g];
  R515: TSC2_g => ; 1;
  // V(516) = K(516,1) * [TSC2_rna];
  R516: TSC2_rna => ; 1;
  // V(517) = K(517,1) * [CASP9_g];
  R517: CASP9_g => ; 1;
  // V(518) = K(518,1) * [CASP9_rna];
  R518: CASP9_rna => ; 1;
  // V(519) = K(519,1) * [PTEN_g];
  R519: PTEN_g => ; 1;
  // V(520) = K(520,1) * [PTEN_rna];
  R520: PTEN_rna => ; 1;
  // V(521) = K(521,1) * [RHOA_g];
  R521: RHOA_g => ; 1;
  // V(522) = K(522,1) * [RHOA_rna];
  R522: RHOA_rna => ; 1;
  // V(523) = K(523,1) * [TGFB2_g];
  R523: TGFB2_g => ; 1;
  // V(524) = K(524,1) * [TGFB2_rna];
  R524: TGFB2_rna => ; 1;
  // V(525) = K(525,1) * [MDM2_g];
  R525: MDM2_g => ; 1;
  // V(526) = K(526,1) * [MDM2_rna];
  R526: MDM2_rna => ; 1;
  // V(527) = K(527,1) * [TEK_g];
  R527: TEK_g => ; 1;
  // V(528) = K(528,1) * [TEK_rna];
  R528: TEK_rna => ; 1;
  // V(529) = K(529,1) * [NOTCH2_g];
  R529: NOTCH2_g => ; 1;
  // V(530) = K(530,1) * [NOTCH2_rna];
  R530: NOTCH2_rna => ; 1;
  // V(531) = K(531,1) * [PTPN11_g];
  R531: PTPN11_g => ; 1;
  // V(532) = K(532,1) * [PTPN11_rna];
  R532: PTPN11_rna => ; 1;
  // V(533) = K(533,1) * [EP300_g];
  R533: EP300_g => ; 1;
  // V(534) = K(534,1) * [EP300_rna];
  R534: EP300_rna => ; 1;
  // V(535) = K(535,1) * [MAP4K2_g];
  R535: MAP4K2_g => ; 1;
  // V(536) = K(536,1) * [MAP4K2_rna];
  R536: MAP4K2_rna => ; 1;
  // V(537) = K(537,1) * [PRKAA1_g];
  R537: PRKAA1_g => ; 1;
  // V(538) = K(538,1) * [PRKAA1_rna];
  R538: PRKAA1_rna => ; 1;
  // V(539) = K(539,1) * [SMAD4_g];
  R539: SMAD4_g => ; 1;
  // V(540) = K(540,1) * [SMAD4_rna];
  R540: SMAD4_rna => ; 1;
  // V(541) = K(541,1) * [ATR_g];
  R541: ATR_g => ; 1;
  // V(542) = K(542,1) * [ATR_rna];
  R542: ATR_rna => ; 1;
  // V(543) = K(543,1) * [CUL3_g];
  R543: CUL3_g => ; 1;
  // V(544) = K(544,1) * [CUL3_rna];
  R544: CUL3_rna => ; 1;
  // V(545) = K(545,1) * [HES1_g];
  R545: HES1_g => ; 1;
  // V(546) = K(546,1) * [HES1_rna];
  R546: HES1_rna => ; 1;
  // V(547) = K(547,1) * [ANGPT1_g];
  R547: ANGPT1_g => ; 1;
  // V(548) = K(548,1) * [ANGPT1_rna];
  R548: ANGPT1_rna => ; 1;
  // V(549) = K(549,1) * [SMAD2_g];
  R549: SMAD2_g => ; 1;
  // V(550) = K(550,1) * [SMAD2_rna];
  R550: SMAD2_rna => ; 1;
  // V(551) = K(551,1) * [NFE2L2_g];
  R551: NFE2L2_g => ; 1;
  // V(552) = K(552,1) * [NFE2L2_rna];
  R552: NFE2L2_rna => ; 1;
  // V(553) = K(553,1) * [MAPK6_g];
  R553: MAPK6_g => ; 1;
  // V(554) = K(554,1) * [MAPK6_rna];
  R554: MAPK6_rna => ; 1;
  // V(555) = K(555,1) * [HIF1A_g];
  R555: HIF1A_g => ; 1;
  // V(556) = K(556,1) * [HIF1A_rna];
  R556: HIF1A_rna => ; 1;
  // V(557) = K(557,1) * [NOTCH4_g];
  R557: NOTCH4_g => ; 1;
  // V(558) = K(558,1) * [NOTCH4_rna];
  R558: NOTCH4_rna => ; 1;
  // V(559) = K(559,1) * [MFF_g];
  R559: MFF_g => ; 1;
  // V(560) = K(560,1) * [MFF_rna];
  R560: MFF_rna => ; 1;
  // V(561) = K(561,1) * [HIPK2_g];
  R561: HIPK2_g => ; 1;
  // V(562) = K(562,1) * [HIPK2_rna];
  R562: HIPK2_rna => ; 1;
  // V(563) = K(563,1) * [AGO2_g];
  R563: AGO2_g => ; 1;
  // V(564) = K(564,1) * [AGO2_rna];
  R564: AGO2_rna => ; 1;
  // V(565) = K(565,1) * [TRAF6_g];
  R565: TRAF6_g => ; 1;
  // V(566) = K(566,1) * [TRAF6_rna];
  R566: TRAF6_rna => ; 1;
  // V(567) = K(567,1) * [SOCS1_p];
  R567: SOCS1_p => ; 1;
  // V(568) = K(568,1) * [ABCA1_p];
  R568: ABCA1_p => ; 1;
  // V(569) = K(569,1) * [EGFR_p];
  R569: EGFR_p => ; 1;
  // V(570) = K(570,1) * [FOS_p];
  R570: FOS_p => ; 1;
  // V(571) = K(571,1) * [ANXA1_p];
  R571: ANXA1_p => ; 1;
  // V(572) = K(572,1) * [NR3C1_p];
  R572: NR3C1_p => ; 1;
  // V(573) = K(573,1) * [JUN_p];
  R573: JUN_p => ; 1;
  // V(574) = K(574,1) * [LYN_p];
  R574: LYN_p => ; 1;
  // V(575) = K(575,1) * [SP1_p];
  R575: SP1_p => ; 1;
  // V(576) = K(576,1) * [NR3C2_p];
  R576: NR3C2_p => ; 1;
  // V(577) = K(577,1) * [PARP1_p];
  R577: PARP1_p => ; 1;
  // V(578) = K(578,1) * [AR_p];
  R578: AR_p => ; 1;
  // V(579) = K(579,1) * [BCL2_p];
  R579: BCL2_p => ; 1;
  // V(580) = K(580,1) * [KIT_p];
  R580: KIT_p => ; 1;
  // V(581) = K(581,1) * [PKM_p];
  R581: PKM_p => ; 1;
  // V(582) = K(582,1) * [CREB1_p];
  R582: CREB1_p => ; 1;
  // V(583) = K(583,1) * [JUNB_p];
  R583: JUNB_p => ; 1;
  // V(584) = K(584,1) * [TFEB_p];
  R584: TFEB_p => ; 1;
  // V(585) = K(585,1) * [NR4A1_p];
  R585: NR4A1_p => ; 1;
  // V(586) = K(586,1) * [JAK1_p];
  R586: JAK1_p => ; 1;
  // V(587) = K(587,1) * [DNMT1_p];
  R587: DNMT1_p => ; 1;
  // V(588) = K(588,1) * [ZFP36_p];
  R588: ZFP36_p => ; 1;
  // V(589) = K(589,1) * [PIK3R1_p];
  R589: PIK3R1_p => ; 1;
  // V(590) = K(590,1) * [MAPK1_p];
  R590: MAPK1_p => ; 1;
  // V(591) = K(591,1) * [DUSP1_p];
  R591: DUSP1_p => ; 1;
  // V(592) = K(592,1) * [PRDX6_p];
  R592: PRDX6_p => ; 1;
  // V(593) = K(593,1) * [CTNNB1_p];
  R593: CTNNB1_p => ; 1;
  // V(594) = K(594,1) * [RORA_p];
  R594: RORA_p => ; 1;
  // V(595) = K(595,1) * [KDR_p];
  R595: KDR_p => ; 1;
  // V(596) = K(596,1) * [SREBF1_p];
  R596: SREBF1_p => ; 1;
  // V(597) = K(597,1) * [PPARG_p];
  R597: PPARG_p => ; 1;
  // V(598) = K(598,1) * [CDKN1A_p];
  R598: CDKN1A_p => ; 1;
  // V(599) = K(599,1) * [STAT3_p];
  R599: STAT3_p => ; 1;
  // V(600) = K(600,1) * [STAT1_p];
  R600: STAT1_p => ; 1;
  // V(601) = K(601,1) * [STAT6_p];
  R601: STAT6_p => ; 1;
  // V(602) = K(602,1) * [MAPK8_p];
  R602: MAPK8_p => ; 1;
  // V(603) = K(603,1) * [MAPK9_p];
  R603: MAPK9_p => ; 1;
  // V(604) = K(604,1) * [CDKN1B_p];
  R604: CDKN1B_p => ; 1;
  // V(605) = K(605,1) * [TSC2_p];
  R605: TSC2_p => ; 1;
  // V(606) = K(606,1) * [CASP9_p];
  R606: CASP9_p => ; 1;
  // V(607) = K(607,1) * [PTEN_p];
  R607: PTEN_p => ; 1;
  // V(608) = K(608,1) * [RHOA_p];
  R608: RHOA_p => ; 1;
  // V(609) = K(609,1) * [MDM2_p];
  R609: MDM2_p => ; 1;
  // V(610) = K(610,1) * [TEK_p];
  R610: TEK_p => ; 1;
  // V(611) = K(611,1) * [PTPN11_p];
  R611: PTPN11_p => ; 1;
  // V(612) = K(612,1) * [EP300_p];
  R612: EP300_p => ; 1;
  // V(613) = K(613,1) * [MAP4K2_p];
  R613: MAP4K2_p => ; 1;
  // V(614) = K(614,1) * [PRKAA1_p];
  R614: PRKAA1_p => ; 1;
  // V(615) = K(615,1) * [SMAD4_p];
  R615: SMAD4_p => ; 1;
  // V(616) = K(616,1) * [SMAD2_p];
  R616: SMAD2_p => ; 1;
  // V(617) = K(617,1) * [NFE2L2_p];
  R617: NFE2L2_p => ; 1;
  // V(618) = K(618,1) * [MAPK6_p];
  R618: MAPK6_p => ; 1;
  // V(619) = K(619,1) * [HIF1A_p];
  R619: HIF1A_p => ; 1;
  // V(620) = K(620,1) * [MFF_p];
  R620: MFF_p => ; 1;
  // V(621) = K(621,1) * [HIPK2_p];
  R621: HIPK2_p => ; 1;
  // V(622) = K(622,1) * [AGO2_p];
  R622: AGO2_p => ; 1;
  // V(623) = K(623,1) * [SIGNOR-C120_p];
  R623: => ; 1;
  // V(624) = K(624,1) * [SIGNOR-C154_p];
  R624: => ; 1;
  // V(625) = K(625,1) * [SIGNOR-C156_p];
  R625: => ; 1;
  // V(626) = K(626,1) * [KDM6A_rna];
  R626: KDM6A_rna => ; 1;
  // V(627) = K(627,1) * [ROCK2_rna];
  R627: ROCK2_rna => ; 1;
  // V(628) = K(628,1) * [ABCA1_rna];
  R628: ABCA1_rna => ; 1;
  // V(629) = K(629,1) * [EGFR_rna];
  R629: EGFR_rna => ; 1;
  // V(630) = K(630,1) * [ANXA1_rna];
  R630: ANXA1_rna => ; 1;
  // V(631) = K(631,1) * [LYN_rna];
  R631: LYN_rna => ; 1;
  // V(632) = K(632,1) * [SP1_rna];
  R632: SP1_rna => ; 1;
  // V(633) = K(633,1) * [NR3C2_rna];
  R633: NR3C2_rna => ; 1;
  // V(634) = K(634,1) * [FGF2_rna];
  R634: FGF2_rna => ; 1;
  // V(635) = K(635,1) * [PARP1_rna];
  R635: PARP1_rna => ; 1;
  // V(636) = K(636,1) * [AR_rna];
  R636: AR_rna => ; 1;
  // V(637) = K(637,1) * [BCL2_rna];
  R637: BCL2_rna => ; 1;
  // V(638) = K(638,1) * [KIT_rna];
  R638: KIT_rna => ; 1;
  // V(639) = K(639,1) * [ETS1_rna];
  R639: ETS1_rna => ; 1;
  // V(640) = K(640,1) * [CREB1_rna];
  R640: CREB1_rna => ; 1;
  // V(641) = K(641,1) * [JUNB_rna];
  R641: JUNB_rna => ; 1;
  // V(642) = K(642,1) * [PTPN2_rna];
  R642: PTPN2_rna => ; 1;
  // V(643) = K(643,1) * [EGR1_rna];
  R643: EGR1_rna => ; 1;
  // V(644) = K(644,1) * [TFEB_rna];
  R644: TFEB_rna => ; 1;
  // V(645) = K(645,1) * [NR4A1_rna];
  R645: NR4A1_rna => ; 1;
  // V(646) = K(646,1) * [JAK1_rna];
  R646: JAK1_rna => ; 1;
  // V(647) = K(647,1) * [PTPRB_rna];
  R647: PTPRB_rna => ; 1;
  // V(648) = K(648,1) * [DNMT1_rna];
  R648: DNMT1_rna => ; 1;
  // V(649) = K(649,1) * [ZFP36_rna];
  R649: ZFP36_rna => ; 1;
  // V(650) = K(650,1) * [PIK3R1_rna];
  R650: PIK3R1_rna => ; 1;
  // V(651) = K(651,1) * [MAPK1_rna];
  R651: MAPK1_rna => ; 1;
  // V(652) = K(652,1) * [DUSP1_rna];
  R652: DUSP1_rna => ; 1;
  // V(653) = K(653,1) * [PRDX6_rna];
  R653: PRDX6_rna => ; 1;
  // V(654) = K(654,1) * [CTNNB1_rna];
  R654: CTNNB1_rna => ; 1;
  // V(655) = K(655,1) * [RORA_rna];
  R655: RORA_rna => ; 1;
  // V(656) = K(656,1) * [KDR_rna];
  R656: KDR_rna => ; 1;
  // V(657) = K(657,1) * [SREBF1_rna];
  R657: SREBF1_rna => ; 1;
  // V(658) = K(658,1) * [CDKN1A_rna];
  R658: CDKN1A_rna => ; 1;
  // V(659) = K(659,1) * [STAT3_rna];
  R659: STAT3_rna => ; 1;
  // V(660) = K(660,1) * [STAT6_rna];
  R660: STAT6_rna => ; 1;
  // V(661) = K(661,1) * [PIK3CA_rna];
  R661: PIK3CA_rna => ; 1;
  // V(662) = K(662,1) * [MAPK8_rna];
  R662: MAPK8_rna => ; 1;
  // V(663) = K(663,1) * [MAPK9_rna];
  R663: MAPK9_rna => ; 1;
  // V(664) = K(664,1) * [CDKN1B_rna];
  R664: CDKN1B_rna => ; 1;
  // V(665) = K(665,1) * [LEPR_rna];
  R665: LEPR_rna => ; 1;
  // V(666) = K(666,1) * [NUMB_rna];
  R666: NUMB_rna => ; 1;
  // V(667) = K(667,1) * [TSC2_rna];
  R667: TSC2_rna => ; 1;
  // V(668) = K(668,1) * [CASP9_rna];
  R668: CASP9_rna => ; 1;
  // V(669) = K(669,1) * [PTEN_rna];
  R669: PTEN_rna => ; 1;
  // V(670) = K(670,1) * [RHOA_rna];
  R670: RHOA_rna => ; 1;
  // V(671) = K(671,1) * [TGFB2_rna];
  R671: TGFB2_rna => ; 1;
  // V(672) = K(672,1) * [MDM2_rna];
  R672: MDM2_rna => ; 1;
  // V(673) = K(673,1) * [TEK_rna];
  R673: TEK_rna => ; 1;
  // V(674) = K(674,1) * [NOTCH2_rna];
  R674: NOTCH2_rna => ; 1;
  // V(675) = K(675,1) * [PTPN11_rna];
  R675: PTPN11_rna => ; 1;
  // V(676) = K(676,1) * [EP300_rna];
  R676: EP300_rna => ; 1;
  // V(677) = K(677,1) * [MAP4K2_rna];
  R677: MAP4K2_rna => ; 1;
  // V(678) = K(678,1) * [PRKAA1_rna];
  R678: PRKAA1_rna => ; 1;
  // V(679) = K(679,1) * [SMAD4_rna];
  R679: SMAD4_rna => ; 1;
  // V(680) = K(680,1) * [ATR_rna];
  R680: ATR_rna => ; 1;
  // V(681) = K(681,1) * [CUL3_rna];
  R681: CUL3_rna => ; 1;
  // V(682) = K(682,1) * [HES1_rna];
  R682: HES1_rna => ; 1;
  // V(683) = K(683,1) * [ANGPT1_rna];
  R683: ANGPT1_rna => ; 1;
  // V(684) = K(684,1) * [SMAD2_rna];
  R684: SMAD2_rna => ; 1;
  // V(685) = K(685,1) * [NFE2L2_rna];
  R685: NFE2L2_rna => ; 1;
  // V(686) = K(686,1) * [MAPK6_rna];
  R686: MAPK6_rna => ; 1;
  // V(687) = K(687,1) * [HIF1A_rna];
  R687: HIF1A_rna => ; 1;
  // V(688) = K(688,1) * [NOTCH4_rna];
  R688: NOTCH4_rna => ; 1;
  // V(689) = K(689,1) * [MFF_rna];
  R689: MFF_rna => ; 1;
  // V(690) = K(690,1) * [HIPK2_rna];
  R690: HIPK2_rna => ; 1;
  // V(691) = K(691,1) * [AGO2_rna];
  R691: AGO2_rna => ; 1;
  // V(692) = K(692,1) * [TRAF6_rna];
  R692: TRAF6_rna => ; 1;
end
