// SBML level 3 version 2

model MonocyteDerivedCell()

  // Compartments:
  compartment cell = 1;

  // Species:
  species AKT1 in cell = 1/cell;
  species AKT1S1 in cell = 1/cell;
  species AKT1S1_g in cell = 1/cell;
  species AKT1S1_p in cell = 1/cell;
  species AKT1S1_rna in cell = 1/cell;
  species AKT1_g in cell = 1/cell;
  species AKT1_p in cell = 1/cell;
  species AKT1_rna in cell = 1/cell;
  species ATF3 in cell = 1/cell;
  species ATF3_g in cell = 1/cell;
  species ATF3_rna in cell = 1/cell;
  species ATR in cell = 1/cell;
  species ATR_g in cell = 1/cell;
  species ATR_rna in cell = 1/cell;
  species BAD in cell = 1/cell;
  species BAD_g in cell = 1/cell;
  species BAD_p in cell = 1/cell;
  species BAD_rna in cell = 1/cell;
  species BAX in cell = 1/cell;
  species BAX_g in cell = 1/cell;
  species BAX_p in cell = 1/cell;
  species BAX_rna in cell = 1/cell;
  species BCL2 in cell = 1/cell;
  species BCL2_g in cell = 1/cell;
  species BCL2_p in cell = 1/cell;
  species BCL2_rna in cell = 1/cell;
  species BECN1 in cell = 1/cell;
  species BECN1_g in cell = 1/cell;
  species BECN1_p in cell = 1/cell;
  species BECN1_rna in cell = 1/cell;
  species BTK in cell = 1/cell;
  species BTK_g in cell = 1/cell;
  species BTK_p in cell = 1/cell;
  species BTK_rna in cell = 1/cell;
  species CAT in cell = 1/cell;
  species CAT_g in cell = 1/cell;
  species CAT_rna in cell = 1/cell;
  species CCND1 in cell = 1/cell;
  species CCND1_g in cell = 1/cell;
  species CCND1_rna in cell = 1/cell;
  species CCR2 in cell = 1/cell;
  species CCR2_g in cell = 1/cell;
  species CCR2_p in cell = 1/cell;
  species CCR2_rna in cell = 1/cell;
  species CDKN1A in cell = 1/cell;
  species CDKN1A_g in cell = 1/cell;
  species CDKN1A_p in cell = 1/cell;
  species CDKN1A_rna in cell = 1/cell;
  species CTLA4 in cell = 1/cell;
  species CTLA4_g in cell = 1/cell;
  species CTLA4_p in cell = 1/cell;
  species CTLA4_rna in cell = 1/cell;
  species CTNNB1 in cell = 1/cell;
  species CTNNB1_g in cell = 1/cell;
  species CTNNB1_p in cell = 1/cell;
  species CTNNB1_rna in cell = 1/cell;
  species CUL3 in cell = 1/cell;
  species CUL3_g in cell = 1/cell;
  species CUL3_rna in cell = 1/cell;
  species DEPTOR in cell = 1/cell;
  species DEPTOR_g in cell = 1/cell;
  species DEPTOR_p in cell = 1/cell;
  species DEPTOR_rna in cell = 1/cell;
  species DNM1L in cell = 1/cell;
  species DNM1L_g in cell = 1/cell;
  species DNM1L_p in cell = 1/cell;
  species DNM1L_rna in cell = 1/cell;
  species DNMT1 in cell = 1/cell;
  species DNMT1_g in cell = 1/cell;
  species DNMT1_p in cell = 1/cell;
  species DNMT1_rna in cell = 1/cell;
  species DUSP1 in cell = 1/cell;
  species DUSP1_g in cell = 1/cell;
  species DUSP1_p in cell = 1/cell;
  species DUSP1_rna in cell = 1/cell;
  species EP300 in cell = 1/cell;
  species EP300_g in cell = 1/cell;
  species EP300_p in cell = 1/cell;
  species EP300_rna in cell = 1/cell;
  species EPOR in cell = 1/cell;
  species EPOR_g in cell = 1/cell;
  species EPOR_p in cell = 1/cell;
  species EPOR_rna in cell = 1/cell;
  species ERN1 in cell = 1/cell;
  species ERN1_g in cell = 1/cell;
  species ERN1_p in cell = 1/cell;
  species ERN1_rna in cell = 1/cell;
  species FOS in cell = 1/cell;
  species FOS_g in cell = 1/cell;
  species FOS_p in cell = 1/cell;
  species FOS_rna in cell = 1/cell;
  species FYN in cell = 1/cell;
  species FYN_g in cell = 1/cell;
  species FYN_p in cell = 1/cell;
  species FYN_rna in cell = 1/cell;
  species GCLC in cell = 1/cell;
  species GCLC_g in cell = 1/cell;
  species GCLC_rna in cell = 1/cell;
  species GDF15 in cell = 1/cell;
  species GDF15_g in cell = 1/cell;
  species GDF15_rna in cell = 1/cell;
  species GSTA1 in cell = 1/cell;
  species GSTA1_g in cell = 1/cell;
  species GSTA1_rna in cell = 1/cell;
  species HIF1A in cell = 1/cell;
  species HIF1A_g in cell = 1/cell;
  species HIF1A_p in cell = 1/cell;
  species HIF1A_rna in cell = 1/cell;
  species HIPK2 in cell = 1/cell;
  species HIPK2_g in cell = 1/cell;
  species HIPK2_p in cell = 1/cell;
  species HIPK2_rna in cell = 1/cell;
  species HMOX1 in cell = 1/cell;
  species HMOX1_g in cell = 1/cell;
  species HMOX1_p in cell = 1/cell;
  species HMOX1_rna in cell = 1/cell;
  species IKBKB in cell = 1/cell;
  species IKBKB_g in cell = 1/cell;
  species IKBKB_p in cell = 1/cell;
  species IKBKB_rna in cell = 1/cell;
  species IL1B in cell = 1/cell;
  species IL1B_g in cell = 1/cell;
  species IL1B_rna in cell = 1/cell;
  species IL6R in cell = 1/cell;
  species IL6R_g in cell = 1/cell;
  species IL6R_rna in cell = 1/cell;
  species ILK in cell = 1/cell;
  species ILK_g in cell = 1/cell;
  species ILK_p in cell = 1/cell;
  species ILK_rna in cell = 1/cell;
  species INSR in cell = 1/cell;
  species INSR_g in cell = 1/cell;
  species INSR_p in cell = 1/cell;
  species INSR_rna in cell = 1/cell;
  species IRAK1 in cell = 1/cell;
  species IRAK1_g in cell = 1/cell;
  species IRAK1_p in cell = 1/cell;
  species IRAK1_rna in cell = 1/cell;
  species IRF3 in cell = 1/cell;
  species IRF3_g in cell = 1/cell;
  species IRF3_p in cell = 1/cell;
  species IRF3_rna in cell = 1/cell;
  species IRS2 in cell = 1/cell;
  species IRS2_g in cell = 1/cell;
  species IRS2_p in cell = 1/cell;
  species IRS2_rna in cell = 1/cell;
  species JAK1 in cell = 1/cell;
  species JAK1_g in cell = 1/cell;
  species JAK1_p in cell = 1/cell;
  species JAK1_rna in cell = 1/cell;
  species JAK2 in cell = 1/cell;
  species JAK2_g in cell = 1/cell;
  species JAK2_p in cell = 1/cell;
  species JAK2_rna in cell = 1/cell;
  species JAK3 in cell = 1/cell;
  species JAK3_g in cell = 1/cell;
  species JAK3_p in cell = 1/cell;
  species JAK3_rna in cell = 1/cell;
  species JUN in cell = 1/cell;
  species JUN_g in cell = 1/cell;
  species JUN_p in cell = 1/cell;
  species JUN_rna in cell = 1/cell;
  species KDM6B in cell = 1/cell;
  species KDM6B_g in cell = 1/cell;
  species KDM6B_rna in cell = 1/cell;
  species KIT in cell = 1/cell;
  species KIT_g in cell = 1/cell;
  species KIT_p in cell = 1/cell;
  species KIT_rna in cell = 1/cell;
  species MAP3K5 in cell = 1/cell;
  species MAP3K5_g in cell = 1/cell;
  species MAP3K5_p in cell = 1/cell;
  species MAP3K5_rna in cell = 1/cell;
  species MAPK1 in cell = 1/cell;
  species MAPK1_g in cell = 1/cell;
  species MAPK1_p in cell = 1/cell;
  species MAPK1_rna in cell = 1/cell;
  species MAPK6 in cell = 1/cell;
  species MAPK6_g in cell = 1/cell;
  species MAPK6_p in cell = 1/cell;
  species MAPK6_rna in cell = 1/cell;
  species MAPK9 in cell = 1/cell;
  species MAPK9_g in cell = 1/cell;
  species MAPK9_p in cell = 1/cell;
  species MAPK9_rna in cell = 1/cell;
  species MDM2 in cell = 1/cell;
  species MDM2_g in cell = 1/cell;
  species MDM2_p in cell = 1/cell;
  species MDM2_rna in cell = 1/cell;
  species NCF1 in cell = 1/cell;
  species NCF1_g in cell = 1/cell;
  species NCF1_p in cell = 1/cell;
  species NCF1_rna in cell = 1/cell;
  species NFE2L2 in cell = 1/cell;
  species NFE2L2_g in cell = 1/cell;
  species NFE2L2_p in cell = 1/cell;
  species NFE2L2_rna in cell = 1/cell;
  species NFKB1 in cell = 1/cell;
  species NFKB1_g in cell = 1/cell;
  species NFKB1_p in cell = 1/cell;
  species NFKB1_rna in cell = 1/cell;
  species NFKB2 in cell = 1/cell;
  species NFKB2_g in cell = 1/cell;
  species NFKB2_rna in cell = 1/cell;
  species NOTCH2 in cell = 1/cell;
  species NOTCH2_g in cell = 1/cell;
  species NOTCH2_rna in cell = 1/cell;
  species NR4A1 in cell = 1/cell;
  species NR4A1_g in cell = 1/cell;
  species NR4A1_p in cell = 1/cell;
  species NR4A1_rna in cell = 1/cell;
  species NUMB in cell = 1/cell;
  species NUMB_g in cell = 1/cell;
  species NUMB_rna in cell = 1/cell;
  species PARP1 in cell = 1/cell;
  species PARP1_g in cell = 1/cell;
  species PARP1_p in cell = 1/cell;
  species PARP1_rna in cell = 1/cell;
  species PDPK1 in cell = 1/cell;
  species PDPK1_g in cell = 1/cell;
  species PDPK1_p in cell = 1/cell;
  species PDPK1_rna in cell = 1/cell;
  species PIK3CA in cell = 1/cell;
  species PIK3CA_g in cell = 1/cell;
  species PIK3CA_p in cell = 1/cell;
  species PIK3CA_rna in cell = 1/cell;
  species PIK3R1 in cell = 1/cell;
  species PIK3R1_g in cell = 1/cell;
  species PIK3R1_p in cell = 1/cell;
  species PIK3R1_rna in cell = 1/cell;
  species PINK1 in cell = 1/cell;
  species PINK1_g in cell = 1/cell;
  species PINK1_rna in cell = 1/cell;
  species PKN1 in cell = 1/cell;
  species PKN1_g in cell = 1/cell;
  species PKN1_p in cell = 1/cell;
  species PKN1_rna in cell = 1/cell;
  species PPARGC1A in cell = 1/cell;
  species PPARGC1A_g in cell = 1/cell;
  species PPARGC1A_p in cell = 1/cell;
  species PPARGC1A_rna in cell = 1/cell;
  species PRDX1 in cell = 1/cell;
  species PRDX1_g in cell = 1/cell;
  species PRDX1_p in cell = 1/cell;
  species PRDX1_rna in cell = 1/cell;
  species PRDX6 in cell = 1/cell;
  species PRDX6_g in cell = 1/cell;
  species PRDX6_p in cell = 1/cell;
  species PRDX6_rna in cell = 1/cell;
  species PTEN in cell = 1/cell;
  species PTEN_g in cell = 1/cell;
  species PTEN_p in cell = 1/cell;
  species PTEN_rna in cell = 1/cell;
  species PTGS2 in cell = 1/cell;
  species PTGS2_g in cell = 1/cell;
  species PTGS2_p in cell = 1/cell;
  species PTGS2_rna in cell = 1/cell;
  species PTPA in cell = 1/cell;
  species PTPA_g in cell = 1/cell;
  species PTPA_rna in cell = 1/cell;
  species PTPN6 in cell = 1/cell;
  species PTPN6_g in cell = 1/cell;
  species PTPN6_p in cell = 1/cell;
  species PTPN6_rna in cell = 1/cell;
  species PTPRJ in cell = 1/cell;
  species PTPRJ_g in cell = 1/cell;
  species PTPRJ_p in cell = 1/cell;
  species PTPRJ_rna in cell = 1/cell;
  species RAC1 in cell = 1/cell;
  species RAC1_g in cell = 1/cell;
  species RAC1_p in cell = 1/cell;
  species RAC1_rna in cell = 1/cell;
  species RCAN1 in cell = 1/cell;
  species RCAN1_g in cell = 1/cell;
  species RCAN1_p in cell = 1/cell;
  species RCAN1_rna in cell = 1/cell;
  species RHOA in cell = 1/cell;
  species RHOA_g in cell = 1/cell;
  species RHOA_p in cell = 1/cell;
  species RHOA_rna in cell = 1/cell;
  species RNF7 in cell = 1/cell;
  species RNF7_g in cell = 1/cell;
  species RNF7_rna in cell = 1/cell;
  species ROCK1 in cell = 1/cell;
  species ROCK1_g in cell = 1/cell;
  species ROCK1_rna in cell = 1/cell;
  species RPS6KA3 in cell = 1/cell;
  species RPS6KA3_g in cell = 1/cell;
  species RPS6KA3_p in cell = 1/cell;
  species RPS6KA3_rna in cell = 1/cell;
  species SCO2 in cell = 1/cell;
  species SCO2_g in cell = 1/cell;
  species SCO2_rna in cell = 1/cell;
  species SGK1 in cell = 1/cell;
  species SGK1_g in cell = 1/cell;
  species SGK1_p in cell = 1/cell;
  species SGK1_rna in cell = 1/cell;
  species SIRT1 in cell = 1/cell;
  species SIRT1_g in cell = 1/cell;
  species SIRT1_p in cell = 1/cell;
  species SIRT1_rna in cell = 1/cell;
  species SMAD2 in cell = 1/cell;
  species SMAD2_g in cell = 1/cell;
  species SMAD2_p in cell = 1/cell;
  species SMAD2_rna in cell = 1/cell;
  species SOCS1 in cell = 1/cell;
  species SOCS1_g in cell = 1/cell;
  species SOCS1_rna in cell = 1/cell;
  species SOCS3 in cell = 1/cell;
  species SOCS3_g in cell = 1/cell;
  species SOCS3_rna in cell = 1/cell;
  species SOD1 in cell = 1/cell;
  species SOD1_g in cell = 1/cell;
  species SOD1_rna in cell = 1/cell;
  species SP1 in cell = 1/cell;
  species SP1_g in cell = 1/cell;
  species SP1_p in cell = 1/cell;
  species SP1_rna in cell = 1/cell;
  species STAT1 in cell = 1/cell;
  species STAT1_g in cell = 1/cell;
  species STAT1_p in cell = 1/cell;
  species STAT1_rna in cell = 1/cell;
  species STAT3 in cell = 1/cell;
  species STAT3_g in cell = 1/cell;
  species STAT3_p in cell = 1/cell;
  species STAT3_rna in cell = 1/cell;
  species STAT5A in cell = 1/cell;
  species STAT5A_g in cell = 1/cell;
  species STAT5A_p in cell = 1/cell;
  species STAT5A_rna in cell = 1/cell;
  species STK11 in cell = 1/cell;
  species STK11_g in cell = 1/cell;
  species STK11_p in cell = 1/cell;
  species STK11_rna in cell = 1/cell;
  species STK4 in cell = 1/cell;
  species STK4_g in cell = 1/cell;
  species STK4_p in cell = 1/cell;
  species STK4_rna in cell = 1/cell;
  species TFEB in cell = 1/cell;
  species TFEB_g in cell = 1/cell;
  species TFEB_p in cell = 1/cell;
  species TFEB_rna in cell = 1/cell;
  species TGFB1 in cell = 1/cell;
  species TGFB1_g in cell = 1/cell;
  species TGFB1_rna in cell = 1/cell;
  species TGFBR1 in cell = 1/cell;
  species TGFBR1_g in cell = 1/cell;
  species TGFBR1_rna in cell = 1/cell;
  species TLR4 in cell = 1/cell;
  species TLR4_g in cell = 1/cell;
  species TLR4_rna in cell = 1/cell;
  species TP53 in cell = 1/cell;
  species TP53_g in cell = 1/cell;
  species TP53_p in cell = 1/cell;
  species TP53_rna in cell = 1/cell;
  species TXNIP in cell = 1/cell;
  species TXNIP_g in cell = 1/cell;
  species TXNIP_p in cell = 1/cell;
  species TXNIP_rna in cell = 1/cell;
  species UBC in cell = 1/cell;
  species UBC_g in cell = 1/cell;
  species UBC_p in cell = 1/cell;
  species UBC_rna in cell = 1/cell;
  species VCAN in cell = 1/cell;
  species VCAN_g in cell = 1/cell;
  species VCAN_rna in cell = 1/cell;
  species VEGFA in cell = 1/cell;
  species VEGFA_g in cell = 1/cell;
  species VEGFA_rna in cell = 1/cell;
  species XBP1 in cell = 1/cell;
  species XBP1_g in cell = 1/cell;
  species XBP1_p in cell = 1/cell;
  species XBP1_rna in cell = 1/cell;

  // Reactions:
  // V(1) = K(1,1) * [STAT3_p] * [SP1_p] -K(1,2) * [SIGNOR-C74];
  R1: STAT3_p => SP1_p; 1;
  // V(2) = K(2,1) * [STAT1_p] * [STAT3_p] -K(2,2) * [SIGNOR-C118];
  R2: STAT3_p => STAT1_p; 1;
  // V(3) = K(3,1) * [SIGNOR-C118_p] * [JAK1_p] -K(3,2) * [SIGNOR-C120];
  R3: JAK1_p => ; 1;
  // V(4) = K(4,1) * [FOS_p] * [JUN_p] * [JUN_p] * [FOS_p] * [JUN_p] * [FOS_p] * [FOS_p] * [JUN_p] -K(4,2) * [SIGNOR-C154];
  R4: JUN_p => FOS_p; 1;
  // V(5) = K(5,1) * [PIK3R1_p] * [PIK3CA] -K(5,2) * [SIGNOR-C156];
  R5: PIK3CA => PIK3R1_p; 1;
  // V(6) = K(6,1) * [TGFBR1] * [SMAD2] -K(6,2) * [TGFBR1 |SMAD2];
  R6: TGFBR1 => SMAD2; 1;
  // V(7) = K(7,1) * [TGFBR1 |SMAD2];
  R7: TGFBR1 => SMAD2; 1;
  // V(8) = K(8,1) * [MAPK1_p] * [EP300] -K(8,2) * [MAPK1_p |EP300];
  R8: EP300 => MAPK1_p; 1;
  // V(9) = K(9,1) * [MAPK1_p |EP300];
  R9: EP300 => MAPK1_p; 1;
  // V(10) = K(10,1) * [MAPK1_p] * [HIF1A] -K(10,2) * [MAPK1_p |HIF1A];
  R10: HIF1A => MAPK1_p; 1;
  // V(11) = K(11,1) * [MAPK1_p |HIF1A];
  R11: HIF1A => MAPK1_p; 1;
  // V(12) = K(12,1) * [MAPK1_p] * [RPS6KA3] -K(12,2) * [MAPK1_p |RPS6KA3];
  R12: RPS6KA3 => MAPK1_p; 1;
  // V(13) = K(13,1) * [MAPK1_p |RPS6KA3];
  R13: RPS6KA3 => MAPK1_p; 1;
  // V(14) = K(14,1) * [MAPK1_p] * [PRDX6] -K(14,2) * [MAPK1_p |PRDX6];
  R14: PRDX6 => MAPK1_p; 1;
  // V(15) = K(15,1) * [MAPK1_p |PRDX6];
  R15: PRDX6 => MAPK1_p; 1;
  // V(16) = K(16,1) * [FYN_p] * [STK11] -K(16,2) * [FYN_p |STK11];
  R16: FYN_p => STK11; 1;
  // V(17) = K(17,1) * [FYN_p |STK11];
  R17: FYN_p => STK11; 1;
  // V(18) = K(18,1) * [JAK2_p] * [STAT5A] -K(18,2) * [JAK2_p |STAT5A];
  R18: JAK2_p => STAT5A; 1;
  // V(19) = K(19,1) * [JAK2_p |STAT5A];
  R19: JAK2_p => STAT5A; 1;
  // V(20) = K(20,1) * [AKT1_p] * [MDM2] -K(20,2) * [AKT1_p |MDM2];
  R20: AKT1_p => MDM2; 1;
  // V(21) = K(21,1) * [AKT1_p |MDM2];
  R21: AKT1_p => MDM2; 1;
  // V(22) = K(22,1) * [JAK2_p] * [CTLA4] -K(22,2) * [JAK2_p |CTLA4];
  R22: JAK2_p => CTLA4; 1;
  // V(23) = K(23,1) * [JAK2_p |CTLA4];
  R23: JAK2_p => CTLA4; 1;
  // V(24) = K(24,1) * [IKBKB_p] * [IKBKB] -K(24,2) * [IKBKB_p |IKBKB];
  R24: IKBKB => IKBKB_p; 1;
  // V(25) = K(25,1) * [IKBKB_p |IKBKB];
  R25: IKBKB => IKBKB_p; 1;
  // V(26) = K(26,1) * [JAK2_p] * [JAK2] -K(26,2) * [JAK2_p |JAK2];
  R26: JAK2_p => JAK2; 1;
  // V(27) = K(27,1) * [JAK2_p |JAK2];
  R27: JAK2_p => JAK2; 1;
  // V(28) = K(28,1) * [ROCK1] * [DNM1L] -K(28,2) * [ROCK1 |DNM1L];
  R28: ROCK1 => DNM1L; 1;
  // V(29) = K(29,1) * [ROCK1 |DNM1L];
  R29: ROCK1 => DNM1L; 1;
  // V(30) = K(30,1) * [MAPK1_p] * [STK11] -K(30,2) * [MAPK1_p |STK11];
  R30: STK11 => MAPK1_p; 1;
  // V(31) = K(31,1) * [MAPK1_p |STK11];
  R31: STK11 => MAPK1_p; 1;
  // V(32) = K(32,1) * [MAPK1_p] * [JUN] -K(32,2) * [MAPK1_p |JUN];
  R32: JUN => MAPK1_p; 1;
  // V(33) = K(33,1) * [MAPK1_p |JUN];
  R33: JUN => MAPK1_p; 1;
  // V(34) = K(34,1) * [SIGNOR-C156_p] * [BTK] -K(34,2) * [SIGNOR-C156_p |BTK];
  R34: BTK => ; 1;
  // V(35) = K(35,1) * [SIGNOR-C156_p |BTK];
  R35: BTK => ; 1;
  // V(36) = K(36,1) * [PDPK1_p] * [IKBKB] -K(36,2) * [PDPK1_p |IKBKB];
  R36: PDPK1_p => IKBKB; 1;
  // V(37) = K(37,1) * [PDPK1_p |IKBKB];
  R37: PDPK1_p => IKBKB; 1;
  // V(38) = K(38,1) * [FYN_p] * [CTLA4] -K(38,2) * [FYN_p |CTLA4];
  R38: FYN_p => CTLA4; 1;
  // V(39) = K(39,1) * [FYN_p |CTLA4];
  R39: FYN_p => CTLA4; 1;
  // V(40) = K(40,1) * [AKT1_p] * [NR4A1] -K(40,2) * [AKT1_p |NR4A1];
  R40: NR4A1 => AKT1_p; 1;
  // V(41) = K(41,1) * [AKT1_p |NR4A1];
  R41: NR4A1 => AKT1_p; 1;
  // V(42) = K(42,1) * [JAK2_p] * [MAP3K5] -K(42,2) * [JAK2_p |MAP3K5];
  R42: JAK2_p => MAP3K5; 1;
  // V(43) = K(43,1) * [JAK2_p |MAP3K5];
  R43: JAK2_p => MAP3K5; 1;
  // V(44) = K(44,1) * [MAPK1_p] * [FOS] -K(44,2) * [MAPK1_p |FOS];
  R44: FOS => MAPK1_p; 1;
  // V(45) = K(45,1) * [MAPK1_p |FOS];
  R45: FOS => MAPK1_p; 1;
  // V(46) = K(46,1) * [STK11_p] * [STK11] -K(46,2) * [STK11_p |STK11];
  R46: STK11_p => STK11; 1;
  // V(47) = K(47,1) * [STK11_p |STK11];
  R47: STK11_p => STK11; 1;
  // V(48) = K(48,1) * [JAK3_p] * [CTNNB1] -K(48,2) * [JAK3_p |CTNNB1];
  R48: CTNNB1 => JAK3_p; 1;
  // V(49) = K(49,1) * [JAK3_p |CTNNB1];
  R49: CTNNB1 => JAK3_p; 1;
  // V(50) = K(50,1) * [FYN_p] * [PTPN6] -K(50,2) * [FYN_p |PTPN6];
  R50: FYN_p => PTPN6; 1;
  // V(51) = K(51,1) * [FYN_p |PTPN6];
  R51: FYN_p => PTPN6; 1;
  // V(52) = K(52,1) * [MAPK9_p] * [TP53] -K(52,2) * [MAPK9_p |TP53];
  R52: TP53 => MAPK9_p; 1;
  // V(53) = K(53,1) * [MAPK9_p |TP53];
  R53: TP53 => MAPK9_p; 1;
  // V(54) = K(54,1) * [MAPK1_p] * [SMAD2] -K(54,2) * [MAPK1_p |SMAD2];
  R54: SMAD2 => MAPK1_p; 1;
  // V(55) = K(55,1) * [MAPK1_p |SMAD2];
  R55: SMAD2 => MAPK1_p; 1;
  // V(56) = K(56,1) * [KIT_p] * [CTNNB1] -K(56,2) * [KIT_p |CTNNB1];
  R56: CTNNB1 => KIT_p; 1;
  // V(57) = K(57,1) * [KIT_p |CTNNB1];
  R57: CTNNB1 => KIT_p; 1;
  // V(58) = K(58,1) * [MAPK9_p] * [JUN] -K(58,2) * [MAPK9_p |JUN];
  R58: JUN => MAPK9_p; 1;
  // V(59) = K(59,1) * [MAPK9_p |JUN];
  R59: JUN => MAPK9_p; 1;
  // V(60) = K(60,1) * [MAPK1_p] * [BCL2] -K(60,2) * [MAPK1_p |BCL2];
  R60: BCL2 => MAPK1_p; 1;
  // V(61) = K(61,1) * [MAPK1_p |BCL2];
  R61: BCL2 => MAPK1_p; 1;
  // V(62) = K(62,1) * [INSR_p] * [INSR] -K(62,2) * [INSR_p |INSR];
  R62: INSR_p => INSR; 1;
  // V(63) = K(63,1) * [INSR_p |INSR];
  R63: INSR_p => INSR; 1;
  // V(64) = K(64,1) * [AKT1_p] * [BAD] -K(64,2) * [AKT1_p |BAD];
  R64: BAD => AKT1_p; 1;
  // V(65) = K(65,1) * [AKT1_p |BAD];
  R65: BAD => AKT1_p; 1;
  // V(66) = K(66,1) * [MAPK1_p] * [NCF1] -K(66,2) * [MAPK1_p |NCF1];
  R66: NCF1 => MAPK1_p; 1;
  // V(67) = K(67,1) * [MAPK1_p |NCF1];
  R67: NCF1 => MAPK1_p; 1;
  // V(68) = K(68,1) * [JAK1_p] * [STAT1] -K(68,2) * [JAK1_p |STAT1];
  R68: STAT1 => JAK1_p; 1;
  // V(69) = K(69,1) * [JAK1_p |STAT1];
  R69: STAT1 => JAK1_p; 1;
  // V(70) = K(70,1) * [MAPK1_p] * [DUSP1] -K(70,2) * [MAPK1_p |DUSP1];
  R70: DUSP1 => MAPK1_p; 1;
  // V(71) = K(71,1) * [MAPK1_p |DUSP1];
  R71: DUSP1 => MAPK1_p; 1;
  // V(72) = K(72,1) * [AKT1_p] * [NCF1] -K(72,2) * [AKT1_p |NCF1];
  R72: NCF1 => AKT1_p; 1;
  // V(73) = K(73,1) * [AKT1_p |NCF1];
  R73: NCF1 => AKT1_p; 1;
  // V(74) = K(74,1) * [PKN1_p] * [PKN1] -K(74,2) * [PKN1_p |PKN1];
  R74: PKN1 => PKN1_p; 1;
  // V(75) = K(75,1) * [PKN1_p |PKN1];
  R75: PKN1 => PKN1_p; 1;
  // V(76) = K(76,1) * [AKT1_p] * [CDKN1A] -K(76,2) * [AKT1_p |CDKN1A];
  R76: AKT1_p => CDKN1A; 1;
  // V(77) = K(77,1) * [AKT1_p |CDKN1A];
  R77: AKT1_p => CDKN1A; 1;
  // V(78) = K(78,1) * [JAK3_p] * [STAT5A] -K(78,2) * [JAK3_p |STAT5A];
  R78: JAK3_p => STAT5A; 1;
  // V(79) = K(79,1) * [JAK3_p |STAT5A];
  R79: JAK3_p => STAT5A; 1;
  // V(80) = K(80,1) * [JAK3_p] * [JAK1] -K(80,2) * [JAK3_p |JAK1];
  R80: JAK1 => JAK3_p; 1;
  // V(81) = K(81,1) * [JAK3_p |JAK1];
  R81: JAK1 => JAK3_p; 1;
  // V(82) = K(82,1) * [KIT_p] * [KIT] -K(82,2) * [KIT_p |KIT];
  R82: KIT => KIT_p; 1;
  // V(83) = K(83,1) * [KIT_p |KIT];
  R83: KIT => KIT_p; 1;
  // V(84) = K(84,1) * [INSR_p] * [SIGNOR-C156] -K(84,2) * [INSR_p |SIGNOR-C156];
  R84: INSR_p => ; 1;
  // V(85) = K(85,1) * [INSR_p |SIGNOR-C156];
  R85: INSR_p => ; 1;
  // V(86) = K(86,1) * [MAPK1_p] * [RHOA] -K(86,2) * [MAPK1_p |RHOA];
  R86: RHOA => MAPK1_p; 1;
  // V(87) = K(87,1) * [MAPK1_p |RHOA];
  R87: RHOA => MAPK1_p; 1;
  // V(88) = K(88,1) * [JAK2_p] * [EPOR] -K(88,2) * [JAK2_p |EPOR];
  R88: JAK2_p => EPOR; 1;
  // V(89) = K(89,1) * [JAK2_p |EPOR];
  R89: JAK2_p => EPOR; 1;
  // V(90) = K(90,1) * [AKT1_p] * [PPARGC1A] -K(90,2) * [AKT1_p |PPARGC1A];
  R90: PPARGC1A => AKT1_p; 1;
  // V(91) = K(91,1) * [AKT1_p |PPARGC1A];
  R91: PPARGC1A => AKT1_p; 1;
  // V(92) = K(92,1) * [ATR] * [PARP1] -K(92,2) * [ATR |PARP1];
  R92: PARP1 => ATR; 1;
  // V(93) = K(93,1) * [ATR |PARP1];
  R93: PARP1 => ATR; 1;
  // V(94) = K(94,1) * [JAK2_p] * [STAT1] -K(94,2) * [JAK2_p |STAT1];
  R94: JAK2_p => STAT1; 1;
  // V(95) = K(95,1) * [JAK2_p |STAT1];
  R95: JAK2_p => STAT1; 1;
  // V(96) = K(96,1) * [MAPK1_p] * [TFEB] -K(96,2) * [MAPK1_p |TFEB];
  R96: TFEB => MAPK1_p; 1;
  // V(97) = K(97,1) * [MAPK1_p |TFEB];
  R97: TFEB => MAPK1_p; 1;
  // V(98) = K(98,1) * [PDPK1_p] * [SGK1] -K(98,2) * [PDPK1_p |SGK1];
  R98: PDPK1_p => SGK1; 1;
  // V(99) = K(99,1) * [PDPK1_p |SGK1];
  R99: PDPK1_p => SGK1; 1;
  // V(100) = K(100,1) * [ERN1_p] * [ERN1] -K(100,2) * [ERN1_p |ERN1];
  R100: ERN1_p => ERN1; 1;
  // V(101) = K(101,1) * [ERN1_p |ERN1];
  R101: ERN1_p => ERN1; 1;
  // V(102) = K(102,1) * [RPS6KA3_p] * [DEPTOR] -K(102,2) * [RPS6KA3_p |DEPTOR];
  R102: DEPTOR => RPS6KA3_p; 1;
  // V(103) = K(103,1) * [RPS6KA3_p |DEPTOR];
  R103: DEPTOR => RPS6KA3_p; 1;
  // V(104) = K(104,1) * [RPS6KA3_p] * [MAP3K5] -K(104,2) * [RPS6KA3_p |MAP3K5];
  R104: RPS6KA3_p => MAP3K5; 1;
  // V(105) = K(105,1) * [RPS6KA3_p |MAP3K5];
  R105: RPS6KA3_p => MAP3K5; 1;
  // V(106) = K(106,1) * [ATR] * [MDM2] -K(106,2) * [ATR |MDM2];
  R106: ATR => MDM2; 1;
  // V(107) = K(107,1) * [ATR |MDM2];
  R107: ATR => MDM2; 1;
  // V(108) = K(108,1) * [MAPK1_p] * [SIGNOR-C154] -K(108,2) * [MAPK1_p |SIGNOR-C154];
  R108: MAPK1_p => ; 1;
  // V(109) = K(109,1) * [MAPK1_p |SIGNOR-C154];
  R109: MAPK1_p => ; 1;
  // V(110) = K(110,1) * [RPS6KA3_p] * [BAD] -K(110,2) * [RPS6KA3_p |BAD];
  R110: RPS6KA3_p => BAD; 1;
  // V(111) = K(111,1) * [RPS6KA3_p |BAD];
  R111: RPS6KA3_p => BAD; 1;
  // V(112) = K(112,1) * [MAPK9_p] * [CTNNB1] -K(112,2) * [MAPK9_p |CTNNB1];
  R112: CTNNB1 => MAPK9_p; 1;
  // V(113) = K(113,1) * [MAPK9_p |CTNNB1];
  R113: CTNNB1 => MAPK9_p; 1;
  // V(114) = K(114,1) * [PINK1] * [UBC] -K(114,2) * [PINK1 |UBC];
  R114: PINK1 => UBC; 1;
  // V(115) = K(115,1) * [PINK1 |UBC];
  R115: PINK1 => UBC; 1;
  // V(116) = K(116,1) * [AKT1_p] * [RAC1] -K(116,2) * [AKT1_p |RAC1];
  R116: RAC1 => AKT1_p; 1;
  // V(117) = K(117,1) * [AKT1_p |RAC1];
  R117: RAC1 => AKT1_p; 1;
  // V(118) = K(118,1) * [PDPK1_p] * [AKT1] -K(118,2) * [PDPK1_p |AKT1];
  R118: PDPK1_p => AKT1; 1;
  // V(119) = K(119,1) * [PDPK1_p |AKT1];
  R119: PDPK1_p => AKT1; 1;
  // V(120) = K(120,1) * [STK4_p] * [STK4] -K(120,2) * [STK4_p |STK4];
  R120: STK4_p => STK4; 1;
  // V(121) = K(121,1) * [STK4_p |STK4];
  R121: STK4_p => STK4; 1;
  // V(122) = K(122,1) * [STK11_p] * [PTEN] -K(122,2) * [STK11_p |PTEN];
  R122: PTEN => STK11_p; 1;
  // V(123) = K(123,1) * [STK11_p |PTEN];
  R123: PTEN => STK11_p; 1;
  // V(124) = K(124,1) * [HIPK2_p] * [HIPK2] -K(124,2) * [HIPK2_p |HIPK2];
  R124: HIPK2_p => HIPK2; 1;
  // V(125) = K(125,1) * [HIPK2_p |HIPK2];
  R125: HIPK2_p => HIPK2; 1;
  // V(126) = K(126,1) * [JAK2_p] * [BECN1] -K(126,2) * [JAK2_p |BECN1];
  R126: JAK2_p => BECN1; 1;
  // V(127) = K(127,1) * [JAK2_p |BECN1];
  R127: JAK2_p => BECN1; 1;
  // V(128) = K(128,1) * [PDPK1_p] * [PDPK1] -K(128,2) * [PDPK1_p |PDPK1];
  R128: PDPK1_p => PDPK1; 1;
  // V(129) = K(129,1) * [PDPK1_p |PDPK1];
  R129: PDPK1_p => PDPK1; 1;
  // V(130) = K(130,1) * [AKT1_p] * [EP300] -K(130,2) * [AKT1_p |EP300];
  R130: EP300 => AKT1_p; 1;
  // V(131) = K(131,1) * [AKT1_p |EP300];
  R131: EP300 => AKT1_p; 1;
  // V(132) = K(132,1) * [FYN_p] * [FYN] -K(132,2) * [FYN_p |FYN];
  R132: FYN_p => FYN; 1;
  // V(133) = K(133,1) * [FYN_p |FYN];
  R133: FYN_p => FYN; 1;
  // V(134) = K(134,1) * [IRAK1_p] * [IRAK1] -K(134,2) * [IRAK1_p |IRAK1];
  R134: IRAK1_p => IRAK1; 1;
  // V(135) = K(135,1) * [IRAK1_p |IRAK1];
  R135: IRAK1_p => IRAK1; 1;
  // V(136) = K(136,1) * [SIGNOR-C156_p] * [BAD] -K(136,2) * [SIGNOR-C156_p |BAD];
  R136: BAD => ; 1;
  // V(137) = K(137,1) * [SIGNOR-C156_p |BAD];
  R137: BAD => ; 1;
  // V(138) = K(138,1) * [MAP3K5_p] * [MAP3K5] -K(138,2) * [MAP3K5_p |MAP3K5];
  R138: MAP3K5 => MAP3K5_p; 1;
  // V(139) = K(139,1) * [MAP3K5_p |MAP3K5];
  R139: MAP3K5 => MAP3K5_p; 1;
  // V(140) = K(140,1) * [IKBKB_p] * [NFKB1] -K(140,2) * [IKBKB_p |NFKB1];
  R140: NFKB1 => IKBKB_p; 1;
  // V(141) = K(141,1) * [IKBKB_p |NFKB1];
  R141: NFKB1 => IKBKB_p; 1;
  // V(142) = K(142,1) * [ILK_p] * [AKT1] -K(142,2) * [ILK_p |AKT1];
  R142: ILK_p => AKT1; 1;
  // V(143) = K(143,1) * [ILK_p |AKT1];
  R143: ILK_p => AKT1; 1;
  // V(144) = K(144,1) * [AKT1_p] * [BTK] -K(144,2) * [AKT1_p |BTK];
  R144: BTK => AKT1_p; 1;
  // V(145) = K(145,1) * [AKT1_p |BTK];
  R145: BTK => AKT1_p; 1;
  // V(146) = K(146,1) * [MAPK1_p] * [SP1] -K(146,2) * [MAPK1_p |SP1];
  R146: SP1 => MAPK1_p; 1;
  // V(147) = K(147,1) * [MAPK1_p |SP1];
  R147: SP1 => MAPK1_p; 1;
  // V(148) = K(148,1) * [ROCK1] * [PTEN] -K(148,2) * [ROCK1 |PTEN];
  R148: PTEN => ROCK1; 1;
  // V(149) = K(149,1) * [ROCK1 |PTEN];
  R149: PTEN => ROCK1; 1;
  // V(150) = K(150,1) * [MAPK1_p] * [STAT5A] -K(150,2) * [MAPK1_p |STAT5A];
  R150: STAT5A => MAPK1_p; 1;
  // V(151) = K(151,1) * [MAPK1_p |STAT5A];
  R151: STAT5A => MAPK1_p; 1;
  // V(152) = K(152,1) * [MAPK1_p] * [BAD] -K(152,2) * [MAPK1_p |BAD];
  R152: BAD => MAPK1_p; 1;
  // V(153) = K(153,1) * [MAPK1_p |BAD];
  R153: BAD => MAPK1_p; 1;
  // V(154) = K(154,1) * [PDPK1_p] * [RPS6KA3] -K(154,2) * [PDPK1_p |RPS6KA3];
  R154: PDPK1_p => RPS6KA3; 1;
  // V(155) = K(155,1) * [PDPK1_p |RPS6KA3];
  R155: PDPK1_p => RPS6KA3; 1;
  // V(156) = K(156,1) * [MAPK1_p] * [CDKN1A] -K(156,2) * [MAPK1_p |CDKN1A];
  R156: CDKN1A => MAPK1_p; 1;
  // V(157) = K(157,1) * [MAPK1_p |CDKN1A];
  R157: CDKN1A => MAPK1_p; 1;
  // V(158) = K(158,1) * [AKT1_p] * [AKT1S1] -K(158,2) * [AKT1_p |AKT1S1];
  R158: AKT1S1 => AKT1_p; 1;
  // V(159) = K(159,1) * [AKT1_p |AKT1S1];
  R159: AKT1S1 => AKT1_p; 1;
  // V(160) = K(160,1) * [JAK3_p] * [JAK3] -K(160,2) * [JAK3_p |JAK3];
  R160: JAK3_p => JAK3; 1;
  // V(161) = K(161,1) * [JAK3_p |JAK3];
  R161: JAK3_p => JAK3; 1;
  // V(162) = K(162,1) * [IL6R] * [JAK2] -K(162,2) * [IL6R |JAK2];
  R162: IL6R => JAK2; 1;
  // V(163) = K(163,1) * [IL6R |JAK2];
  R163: IL6R => JAK2; 1;
  // V(164) = K(164,1) * [MAPK1_p] * [JAK2] -K(164,2) * [MAPK1_p |JAK2];
  R164: JAK2 => MAPK1_p; 1;
  // V(165) = K(165,1) * [MAPK1_p |JAK2];
  R165: JAK2 => MAPK1_p; 1;
  // V(166) = K(166,1) * [JAK1_p] * [STAT3] -K(166,2) * [JAK1_p |STAT3];
  R166: STAT3 => JAK1_p; 1;
  // V(167) = K(167,1) * [JAK1_p |STAT3];
  R167: STAT3 => JAK1_p; 1;
  // V(168) = K(168,1) * [MAPK1_p] * [PARP1] -K(168,2) * [MAPK1_p |PARP1];
  R168: PARP1 => MAPK1_p; 1;
  // V(169) = K(169,1) * [MAPK1_p |PARP1];
  R169: PARP1 => MAPK1_p; 1;
  // V(170) = K(170,1) * [FYN_p] * [PTGS2] -K(170,2) * [FYN_p |PTGS2];
  R170: FYN_p => PTGS2; 1;
  // V(171) = K(171,1) * [FYN_p |PTGS2];
  R171: FYN_p => PTGS2; 1;
  // V(172) = K(172,1) * [STK4_p] * [PIK3CA] -K(172,2) * [STK4_p |PIK3CA];
  R172: STK4_p => PIK3CA; 1;
  // V(173) = K(173,1) * [STK4_p |PIK3CA];
  R173: STK4_p => PIK3CA; 1;
  // V(174) = K(174,1) * [SIGNOR-C156_p] * [AKT1] -K(174,2) * [SIGNOR-C156_p |AKT1];
  R174: AKT1 => ; 1;
  // V(175) = K(175,1) * [SIGNOR-C156_p |AKT1];
  R175: AKT1 => ; 1;
  // V(176) = K(176,1) * [BTK_p] * [STAT3] -K(176,2) * [BTK_p |STAT3];
  R176: BTK_p => STAT3; 1;
  // V(177) = K(177,1) * [BTK_p |STAT3];
  R177: BTK_p => STAT3; 1;
  // V(178) = K(178,1) * [STK4_p] * [IRF3] -K(178,2) * [STK4_p |IRF3];
  R178: STK4_p => IRF3; 1;
  // V(179) = K(179,1) * [STK4_p |IRF3];
  R179: STK4_p => IRF3; 1;
  // V(180) = K(180,1) * [RPS6KA3_p] * [FOS] -K(180,2) * [RPS6KA3_p |FOS];
  R180: RPS6KA3_p => FOS; 1;
  // V(181) = K(181,1) * [RPS6KA3_p |FOS];
  R181: RPS6KA3_p => FOS; 1;
  // V(182) = K(182,1) * [AKT1_p] * [RPS6KA3] -K(182,2) * [AKT1_p |RPS6KA3];
  R182: RPS6KA3 => AKT1_p; 1;
  // V(183) = K(183,1) * [AKT1_p |RPS6KA3];
  R183: RPS6KA3 => AKT1_p; 1;
  // V(184) = K(184,1) * [KIT_p] * [STAT1] -K(184,2) * [KIT_p |STAT1];
  R184: STAT1 => KIT_p; 1;
  // V(185) = K(185,1) * [KIT_p |STAT1];
  R185: STAT1 => KIT_p; 1;
  // V(186) = K(186,1) * [AKT1_p] * [DNMT1] -K(186,2) * [AKT1_p |DNMT1];
  R186: DNMT1 => AKT1_p; 1;
  // V(187) = K(187,1) * [AKT1_p |DNMT1];
  R187: DNMT1 => AKT1_p; 1;
  // V(188) = K(188,1) * [STK11_p] * [SIRT1] -K(188,2) * [STK11_p |SIRT1];
  R188: STK11_p => SIRT1; 1;
  // V(189) = K(189,1) * [STK11_p |SIRT1];
  R189: STK11_p => SIRT1; 1;
  // V(190) = K(190,1) * [RPS6KA3_p] * [RPS6KA3] -K(190,2) * [RPS6KA3_p |RPS6KA3];
  R190: RPS6KA3_p => RPS6KA3; 1;
  // V(191) = K(191,1) * [RPS6KA3_p |RPS6KA3];
  R191: RPS6KA3_p => RPS6KA3; 1;
  // V(192) = K(192,1) * [AKT1_p] * [CTNNB1] -K(192,2) * [AKT1_p |CTNNB1];
  R192: CTNNB1 => AKT1_p; 1;
  // V(193) = K(193,1) * [AKT1_p |CTNNB1];
  R193: CTNNB1 => AKT1_p; 1;
  // V(194) = K(194,1) * [AKT1_p] * [STK4] -K(194,2) * [AKT1_p |STK4];
  R194: STK4 => AKT1_p; 1;
  // V(195) = K(195,1) * [AKT1_p |STK4];
  R195: STK4 => AKT1_p; 1;
  // V(196) = K(196,1) * [RPS6KA3_p] * [NR4A1] -K(196,2) * [RPS6KA3_p |NR4A1];
  R196: NR4A1 => RPS6KA3_p; 1;
  // V(197) = K(197,1) * [RPS6KA3_p |NR4A1];
  R197: NR4A1 => RPS6KA3_p; 1;
  // V(198) = K(198,1) * [AKT1_p] * [IRAK1] -K(198,2) * [AKT1_p |IRAK1];
  R198: IRAK1 => AKT1_p; 1;
  // V(199) = K(199,1) * [AKT1_p |IRAK1];
  R199: IRAK1 => AKT1_p; 1;
  // V(200) = K(200,1) * [ROCK1] * [TP53] -K(200,2) * [ROCK1 |TP53];
  R200: TP53 => ROCK1; 1;
  // V(201) = K(201,1) * [ROCK1 |TP53];
  R201: TP53 => ROCK1; 1;
  // V(202) = K(202,1) * [MAPK1_p] * [MAPK1] -K(202,2) * [MAPK1_p |MAPK1];
  R202: MAPK1 => MAPK1_p; 1;
  // V(203) = K(203,1) * [MAPK1_p |MAPK1];
  R203: MAPK1 => MAPK1_p; 1;
  // V(204) = K(204,1) * [BTK_p] * [BTK] -K(204,2) * [BTK_p |BTK];
  R204: BTK_p => BTK; 1;
  // V(205) = K(205,1) * [BTK_p |BTK];
  R205: BTK_p => BTK; 1;
  // V(206) = K(206,1) * [MAPK1_p] * [RCAN1] -K(206,2) * [MAPK1_p |RCAN1];
  R206: RCAN1 => MAPK1_p; 1;
  // V(207) = K(207,1) * [MAPK1_p |RCAN1];
  R207: RCAN1 => MAPK1_p; 1;
  // V(208) = K(208,1) * [AKT1_p] * [MAP3K5] -K(208,2) * [AKT1_p |MAP3K5];
  R208: MAP3K5 => AKT1_p; 1;
  // V(209) = K(209,1) * [AKT1_p |MAP3K5];
  R209: MAP3K5 => AKT1_p; 1;
  // V(210) = K(210,1) * [FYN_p] * [PTPRJ] -K(210,2) * [FYN_p |PTPRJ];
  R210: FYN_p => PTPRJ; 1;
  // V(211) = K(211,1) * [FYN_p |PTPRJ];
  R211: FYN_p => PTPRJ; 1;
  // V(212) = K(212,1) * [SGK1_p] * [SP1] -K(212,2) * [SGK1_p |SP1];
  R212: SP1 => SGK1_p; 1;
  // V(213) = K(213,1) * [SGK1_p |SP1];
  R213: SP1 => SGK1_p; 1;
  // V(214) = K(214,1) * [PDPK1_p] * [PKN1] -K(214,2) * [PDPK1_p |PKN1];
  R214: PDPK1_p => PKN1; 1;
  // V(215) = K(215,1) * [PDPK1_p |PKN1];
  R215: PDPK1_p => PKN1; 1;
  // V(216) = K(216,1) * [AKT1_p] * [HMOX1] -K(216,2) * [AKT1_p |HMOX1];
  R216: HMOX1 => AKT1_p; 1;
  // V(217) = K(217,1) * [AKT1_p |HMOX1];
  R217: HMOX1 => AKT1_p; 1;
  // V(218) = K(218,1) * [MAPK1_p] * [DNM1L] -K(218,2) * [MAPK1_p |DNM1L];
  R218: DNM1L => MAPK1_p; 1;
  // V(219) = K(219,1) * [MAPK1_p |DNM1L];
  R219: DNM1L => MAPK1_p; 1;
  // V(220) = K(220,1) * [INSR_p] * [IRS2] -K(220,2) * [INSR_p |IRS2];
  R220: INSR_p => IRS2; 1;
  // V(221) = K(221,1) * [INSR_p |IRS2];
  R221: INSR_p => IRS2; 1;
  // V(222) = K(222,1) * [SGK1_p] * [MAPK1] -K(222,2) * [SGK1_p |MAPK1];
  R222: SGK1_p => MAPK1; 1;
  // V(223) = K(223,1) * [SGK1_p |MAPK1];
  R223: SGK1_p => MAPK1; 1;
  // V(224) = K(224,1) * [RPS6KA3_p] * [TP53] -K(224,2) * [RPS6KA3_p |TP53];
  R224: TP53 => RPS6KA3_p; 1;
  // V(225) = K(225,1) * [RPS6KA3_p |TP53];
  R225: TP53 => RPS6KA3_p; 1;
  // V(226) = K(226,1) * [ROCK1] * [BECN1] -K(226,2) * [ROCK1 |BECN1];
  R226: ROCK1 => BECN1; 1;
  // V(227) = K(227,1) * [ROCK1 |BECN1];
  R227: ROCK1 => BECN1; 1;
  // V(228) = K(228,1) * [MAPK1_p] * [XBP1] -K(228,2) * [MAPK1_p |XBP1];
  R228: XBP1 => MAPK1_p; 1;
  // V(229) = K(229,1) * [MAPK1_p |XBP1];
  R229: XBP1 => MAPK1_p; 1;
  // V(230) = K(230,1) * [PIK3CA] * [BTK] -K(230,2) * [PIK3CA |BTK];
  R230: PIK3CA => BTK; 1;
  // V(231) = K(231,1) * [PIK3CA |BTK];
  R231: PIK3CA => BTK; 1;
  // V(232) = K(232,1) * [HIPK2_p] * [EP300] -K(232,2) * [HIPK2_p |EP300];
  R232: EP300 => HIPK2_p; 1;
  // V(233) = K(233,1) * [HIPK2_p |EP300];
  R233: EP300 => HIPK2_p; 1;
  // V(234) = K(234,1) * [AKT1_p] * [AKT1] -K(234,2) * [AKT1_p |AKT1];
  R234: AKT1 => AKT1_p; 1;
  // V(235) = K(235,1) * [AKT1_p |AKT1];
  R235: AKT1 => AKT1_p; 1;
  // V(236) = K(236,1) * [INSR_p] * [PTPN6] -K(236,2) * [INSR_p |PTPN6];
  R236: PTPN6 => INSR_p; 1;
  // V(237) = K(237,1) * [INSR_p |PTPN6];
  R237: PTPN6 => INSR_p; 1;
  // V(238) = K(238,1) * [PINK1] * [TP53] -K(238,2) * [PINK1 |TP53];
  R238: TP53 => PINK1; 1;
  // V(239) = K(239,1) * [PINK1 |TP53];
  R239: TP53 => PINK1; 1;
  // V(240) = K(240,1) * [JAK2_p] * [STAT3] -K(240,2) * [JAK2_p |STAT3];
  R240: JAK2_p => STAT3; 1;
  // V(241) = K(241,1) * [JAK2_p |STAT3];
  R241: JAK2_p => STAT3; 1;
  // V(242) = K(242,1) * [INSR_p] * [PTEN] -K(242,2) * [INSR_p |PTEN];
  R242: PTEN => INSR_p; 1;
  // V(243) = K(243,1) * [INSR_p |PTEN];
  R243: PTEN => INSR_p; 1;
  // V(244) = K(244,1) * [STK11_p] * [TP53] -K(244,2) * [STK11_p |TP53];
  R244: TP53 => STK11_p; 1;
  // V(245) = K(245,1) * [STK11_p |TP53];
  R245: TP53 => STK11_p; 1;
  // V(246) = K(246,1) * [STK4_p] * [BECN1] -K(246,2) * [STK4_p |BECN1];
  R246: STK4_p => BECN1; 1;
  // V(247) = K(247,1) * [STK4_p |BECN1];
  R247: STK4_p => BECN1; 1;
  // V(248) = K(248,1) * [INSR_p] * [PIK3R1] -K(248,2) * [INSR_p |PIK3R1];
  R248: PIK3R1 => INSR_p; 1;
  // V(249) = K(249,1) * [INSR_p |PIK3R1];
  R249: PIK3R1 => INSR_p; 1;
  // V(250) = K(250,1) * [STK4_p] * [PRDX1] -K(250,2) * [STK4_p |PRDX1];
  R250: STK4_p => PRDX1; 1;
  // V(251) = K(251,1) * [STK4_p |PRDX1];
  R251: STK4_p => PRDX1; 1;
  // V(252) = K(252,1) * [PIK3CA] * [AKT1] -K(252,2) * [PIK3CA |AKT1];
  R252: PIK3CA => AKT1; 1;
  // V(253) = K(253,1) * [PIK3CA |AKT1];
  R253: PIK3CA => AKT1; 1;
  // V(254) = K(254,1) * [CCR2_p] * [MAPK1] -K(254,2) * [CCR2_p |MAPK1];
  R254: CCR2_p => MAPK1; 1;
  // V(255) = K(255,1) * [CCR2_p |MAPK1];
  R255: CCR2_p => MAPK1; 1;
  // V(256) = K(256,1) * [AKT1_p] * [MAPK1] -K(256,2) * [AKT1_p |MAPK1];
  R256: MAPK1 => AKT1_p; 1;
  // V(257) = K(257,1) * [AKT1_p |MAPK1];
  R257: MAPK1 => AKT1_p; 1;
  // V(258) = K(258,1) * [KIT_p] * [SIGNOR-C156] -K(258,2) * [KIT_p |SIGNOR-C156];
  R258: KIT_p => ; 1;
  // V(259) = K(259,1) * [KIT_p |SIGNOR-C156];
  R259: KIT_p => ; 1;
  // V(260) = K(260,1) * [STK4_p] * [SIRT1] -K(260,2) * [STK4_p |SIRT1];
  R260: STK4_p => SIRT1; 1;
  // V(261) = K(261,1) * [STK4_p |SIRT1];
  R261: STK4_p => SIRT1; 1;
  // V(262) = K(262,1) * [IKBKB_p] * [TP53] -K(262,2) * [IKBKB_p |TP53];
  R262: TP53 => IKBKB_p; 1;
  // V(263) = K(263,1) * [IKBKB_p |TP53];
  R263: TP53 => IKBKB_p; 1;
  // V(264) = K(264,1) * [MAPK9_p] * [BCL2] -K(264,2) * [MAPK9_p |BCL2];
  R264: BCL2 => MAPK9_p; 1;
  // V(265) = K(265,1) * [MAPK9_p |BCL2];
  R265: BCL2 => MAPK9_p; 1;
  // V(266) = K(266,1) * [ATR] * [TP53] -K(266,2) * [ATR |TP53];
  R266: TP53 => ATR; 1;
  // V(267) = K(267,1) * [ATR |TP53];
  R267: TP53 => ATR; 1;
  // V(268) = K(268,1) * [FYN_p] * [CTNNB1] -K(268,2) * [FYN_p |CTNNB1];
  R268: FYN_p => CTNNB1; 1;
  // V(269) = K(269,1) * [FYN_p |CTNNB1];
  R269: FYN_p => CTNNB1; 1;
  // V(270) = K(270,1) * [MAP3K5_p] * [ERN1] -K(270,2) * [MAP3K5_p |ERN1];
  R270: ERN1 => MAP3K5_p; 1;
  // V(271) = K(271,1) * [MAP3K5_p |ERN1];
  R271: ERN1 => MAP3K5_p; 1;
  // V(272) = K(272,1) * [MAPK1_p] * [TP53] -K(272,2) * [MAPK1_p |TP53];
  R272: TP53 => MAPK1_p; 1;
  // V(273) = K(273,1) * [MAPK1_p |TP53];
  R273: TP53 => MAPK1_p; 1;
  // V(274) = K(274,1) * [HIPK2_p] * [TP53] -K(274,2) * [HIPK2_p |TP53];
  R274: TP53 => HIPK2_p; 1;
  // V(275) = K(275,1) * [HIPK2_p |TP53];
  R275: TP53 => HIPK2_p; 1;
  // V(276) = K(276,1) * [RPS6KA3_p] * [STK11] -K(276,2) * [RPS6KA3_p |STK11];
  R276: RPS6KA3_p => STK11; 1;
  // V(277) = K(277,1) * [RPS6KA3_p |STK11];
  R277: RPS6KA3_p => STK11; 1;
  // V(278) = K(278,1) * [SGK1_p] * [STAT1] -K(278,2) * [SGK1_p |STAT1];
  R278: SGK1_p => STAT1; 1;
  // V(279) = K(279,1) * [SGK1_p |STAT1];
  R279: SGK1_p => STAT1; 1;
  // V(280) = K(280,1) * [PINK1] * [DNM1L] -K(280,2) * [PINK1 |DNM1L];
  R280: DNM1L => PINK1; 1;
  // V(281) = K(281,1) * [PINK1 |DNM1L];
  R281: DNM1L => PINK1; 1;
  // V(282) = K(282,1) * [ERN1_p] * [XBP1] -K(282,2) * [ERN1_p |XBP1];
  R282: ERN1_p => XBP1; 1;
  // V(283) = K(283,1) * [ERN1_p |XBP1];
  R283: ERN1_p => XBP1; 1;
  // V(284) = K(284,1) * [TLR4] * [MAPK1] -K(284,2) * [TLR4 |MAPK1];
  R284: MAPK1 => TLR4; 1;
  // V(285) = K(285,1) * [TLR4 |MAPK1];
  R285: MAPK1 => TLR4; 1;
  // V(286) = K(286,1) * [FYN_p] * [RPS6KA3] -K(286,2) * [FYN_p |RPS6KA3];
  R286: FYN_p => RPS6KA3; 1;
  // V(287) = K(287,1) * [FYN_p |RPS6KA3];
  R287: FYN_p => RPS6KA3; 1;
  // V(288) = K(288,1) * [ILK_p] * [ILK] -K(288,2) * [ILK_p |ILK];
  R288: ILK_p => ILK; 1;
  // V(289) = K(289,1) * [ILK_p |ILK];
  R289: ILK_p => ILK; 1;
  // V(290) = K(290,1) * [FYN_p] * [NFE2L2] -K(290,2) * [FYN_p |NFE2L2];
  R290: FYN_p => NFE2L2; 1;
  // V(291) = K(291,1) * [FYN_p |NFE2L2];
  R291: FYN_p => NFE2L2; 1;
  // V(292) = K(292,1) * [JAK2_p] * [BTK] -K(292,2) * [JAK2_p |BTK];
  R292: JAK2_p => BTK; 1;
  // V(293) = K(293,1) * [JAK2_p |BTK];
  R293: JAK2_p => BTK; 1;
  // V(294) = K(294,1) * [MAP3K5_p] * [CDKN1A] -K(294,2) * [MAP3K5_p |CDKN1A];
  R294: MAP3K5_p => CDKN1A; 1;
  // V(295) = K(295,1) * [MAP3K5_p |CDKN1A];
  R295: MAP3K5_p => CDKN1A; 1;
  // V(296) = K(296,1) * [HIPK2_p] * [MDM2] -K(296,2) * [HIPK2_p |MDM2];
  R296: HIPK2_p => MDM2; 1;
  // V(297) = K(297,1) * [HIPK2_p |MDM2];
  R297: HIPK2_p => MDM2; 1;
  // V(298) = K(298,1) * [MAPK1_p] * [STAT3] -K(298,2) * [MAPK1_p |STAT3];
  R298: STAT3 => MAPK1_p; 1;
  // V(299) = K(299,1) * [MAPK1_p |STAT3];
  R299: STAT3 => MAPK1_p; 1;
  // V(300) = K(300,1) * [BTK_p] * [STAT5A] -K(300,2) * [BTK_p |STAT5A];
  R300: BTK_p => STAT5A; 1;
  // V(301) = K(301,1) * [BTK_p |STAT5A];
  R301: BTK_p => STAT5A; 1;
  // V(302) = K(302,1) * [AKT1_p] * [BECN1] -K(302,2) * [AKT1_p |BECN1];
  R302: BECN1 => AKT1_p; 1;
  // V(303) = K(303,1) * [AKT1_p |BECN1];
  R303: BECN1 => AKT1_p; 1;
  // V(304) = K(304,1) * [ROCK1] * [PDPK1] -K(304,2) * [ROCK1 |PDPK1];
  R304: ROCK1 => PDPK1; 1;
  // V(305) = K(305,1) * [ROCK1 |PDPK1];
  R305: ROCK1 => PDPK1; 1;
  // V(306) = K(306,1) * [IRAK1_p] * [STAT3] -K(306,2) * [IRAK1_p |STAT3];
  R306: IRAK1_p => STAT3; 1;
  // V(307) = K(307,1) * [IRAK1_p |STAT3];
  R307: IRAK1_p => STAT3; 1;
  // V(308) = K(308,1) * [MAPK6_p] * [MAPK6] -K(308,2) * [MAPK6_p |MAPK6];
  R308: MAPK6_p => MAPK6; 1;
  // V(309) = K(309,1) * [MAPK6_p |MAPK6];
  R309: MAPK6_p => MAPK6; 1;
  // V(310) = K(310,1) * [MAPK1_p] * [NR4A1] -K(310,2) * [MAPK1_p |NR4A1];
  R310: NR4A1 => MAPK1_p; 1;
  // V(311) = K(311,1) * [MAPK1_p |NR4A1];
  R311: NR4A1 => MAPK1_p; 1;
  // V(312) = K(312,1) * [IKBKB_p] * [BAD] -K(312,2) * [IKBKB_p |BAD];
  R312: BAD => IKBKB_p; 1;
  // V(313) = K(313,1) * [IKBKB_p |BAD];
  R313: BAD => IKBKB_p; 1;
  // V(314) = K(314,1) * [JAK1_p] * [JAK3] -K(314,2) * [JAK1_p |JAK3];
  R314: JAK1_p => JAK3; 1;
  // V(315) = K(315,1) * [JAK1_p |JAK3];
  R315: JAK1_p => JAK3; 1;
  // V(316) = K(316,1) * [PINK1] * [PTEN] -K(316,2) * [PINK1 |PTEN];
  R316: PTEN => PINK1; 1;
  // V(317) = K(317,1) * [PINK1 |PTEN];
  R317: PTEN => PINK1; 1;
  // V(318) = K(318,1) * [BTK_p] * [MDM2] -K(318,2) * [BTK_p |MDM2];
  R318: BTK_p => MDM2; 1;
  // V(319) = K(319,1) * [BTK_p |MDM2];
  R319: BTK_p => MDM2; 1;
  // V(320) = K(320,1) * [MAPK1_p] * [TXNIP] -K(320,2) * [MAPK1_p |TXNIP];
  R320: TXNIP => MAPK1_p; 1;
  // V(321) = K(321,1) * [MAPK1_p |TXNIP];
  R321: TXNIP => MAPK1_p; 1;
  // V(322) = K(322,1) * [STK11_p] * [CDKN1A] -K(322,2) * [STK11_p |CDKN1A];
  R322: STK11_p => CDKN1A; 1;
  // V(323) = K(323,1) * [STK11_p |CDKN1A];
  R323: STK11_p => CDKN1A; 1;
  // V(324) = K(324,1) * [MAPK9_p] * [STAT3] -K(324,2) * [MAPK9_p |STAT3];
  R324: STAT3 => MAPK9_p; 1;
  // V(325) = K(325,1) * [MAPK9_p |STAT3];
  R325: STAT3 => MAPK9_p; 1;
  // V(326) = K(326,1) * [JAK3_p] * [STAT3] -K(326,2) * [JAK3_p |STAT3];
  R326: STAT3 => JAK3_p; 1;
  // V(327) = K(327,1) * [JAK3_p |STAT3];
  R327: STAT3 => JAK3_p; 1;
  // V(328) = K(328,1) * [TLR4] * [MAPK9] -K(328,2) * [TLR4 |MAPK9];
  R328: MAPK9 => TLR4; 1;
  // V(329) = K(329,1) * [TLR4 |MAPK9];
  R329: MAPK9 => TLR4; 1;
  // V(330) = K(330,1) * [PIK3CA] * [PIK3R1] -K(330,2) * [PIK3CA |PIK3R1];
  R330: PIK3CA => PIK3R1; 1;
  // V(331) = K(331,1) * [PIK3CA |PIK3R1];
  R331: PIK3CA => PIK3R1; 1;
  // V(332) = K(332,1) * [AKT1_p] * [BAX] -K(332,2) * [AKT1_p |BAX];
  R332: AKT1_p => BAX; 1;
  // V(333) = K(333,1) * [AKT1_p |BAX];
  R333: AKT1_p => BAX; 1;
  // V(334) = K(334,1) * [JAK2_p] * [SIGNOR-C118] -K(334,2) * [JAK2_p |SIGNOR-C118];
  R334: JAK2_p => ; 1;
  // V(335) = K(335,1) * [JAK2_p |SIGNOR-C118];
  R335: JAK2_p => ; 1;
  // V(336) = K(336,1) * [JAK2_p] * [CCR2] -K(336,2) * [JAK2_p |CCR2];
  R336: CCR2 => JAK2_p; 1;
  // V(337) = K(337,1) * [JAK2_p |CCR2];
  R337: CCR2 => JAK2_p; 1;
  // V(338) = K(338,1) * [PTPRJ_p] * [INSR_p] -K(338,2) * [PTPRJ_p |INSR_p];
  R338: PTPRJ_p => INSR_p; 1;
  // V(339) = K(339,1) * [PTPRJ_p |INSR_p];
  R339: PTPRJ_p => INSR_p; 1;
  // V(340) = K(340,1) * [PTPRJ_p] * [MAPK1_p] -K(340,2) * [PTPRJ_p |MAPK1_p];
  R340: PTPRJ_p => MAPK1_p; 1;
  // V(341) = K(341,1) * [PTPRJ_p |MAPK1_p];
  R341: PTPRJ_p => MAPK1_p; 1;
  // V(342) = K(342,1) * [PTPN6_p] * [JAK2_p] -K(342,2) * [PTPN6_p |JAK2_p];
  R342: PTPN6_p => JAK2_p; 1;
  // V(343) = K(343,1) * [PTPN6_p |JAK2_p];
  R343: PTPN6_p => JAK2_p; 1;
  // V(344) = K(344,1) * [PTPRJ_p] * [CTNNB1_p] -K(344,2) * [PTPRJ_p |CTNNB1_p];
  R344: PTPRJ_p => CTNNB1_p; 1;
  // V(345) = K(345,1) * [PTPRJ_p |CTNNB1_p];
  R345: PTPRJ_p => CTNNB1_p; 1;
  // V(346) = K(346,1) * [DUSP1_p] * [MAPK9_p] -K(346,2) * [DUSP1_p |MAPK9_p];
  R346: DUSP1_p => MAPK9_p; 1;
  // V(347) = K(347,1) * [DUSP1_p |MAPK9_p];
  R347: DUSP1_p => MAPK9_p; 1;
  // V(348) = K(348,1) * [PTPN6_p] * [INSR_p] -K(348,2) * [PTPN6_p |INSR_p];
  R348: PTPN6_p => INSR_p; 1;
  // V(349) = K(349,1) * [PTPN6_p |INSR_p];
  R349: PTPN6_p => INSR_p; 1;
  // V(350) = K(350,1) * [DUSP1_p] * [MAPK1_p] -K(350,2) * [DUSP1_p |MAPK1_p];
  R350: DUSP1_p => MAPK1_p; 1;
  // V(351) = K(351,1) * [DUSP1_p |MAPK1_p];
  R351: DUSP1_p => MAPK1_p; 1;
  // V(352) = K(352,1) * [PTPN6_p] * [JAK1_p] -K(352,2) * [PTPN6_p |JAK1_p];
  R352: PTPN6_p => JAK1_p; 1;
  // V(353) = K(353,1) * [PTPN6_p |JAK1_p];
  R353: PTPN6_p => JAK1_p; 1;
  // V(354) = K(354,1) * [PTEN_p] * [SP1_p] -K(354,2) * [PTEN_p |SP1_p];
  R354: PTEN_p => SP1_p; 1;
  // V(355) = K(355,1) * [PTEN_p |SP1_p];
  R355: PTEN_p => SP1_p; 1;
  // V(356) = K(356,1) * [PTEN_p] * [PTEN_p] -K(356,2) * [PTEN_p |PTEN_p];
  R356: PTEN_p => ; 1;
  // V(357) = K(357,1) * [PTEN_p |PTEN_p];
  R357: PTEN_p => ; 1;
  // V(358) = K(358,1) * [PTPRJ_p] * [PIK3R1_p] -K(358,2) * [PTPRJ_p |PIK3R1_p];
  R358: PTPRJ_p => PIK3R1_p; 1;
  // V(359) = K(359,1) * [PTPRJ_p |PIK3R1_p];
  R359: PTPRJ_p => PIK3R1_p; 1;
  // V(360) = K(360,1) * [PTPRJ_p] * [SIGNOR-C156_p] -K(360,2) * [PTPRJ_p |SIGNOR-C156_p];
  R360: PTPRJ_p => ; 1;
  // V(361) = K(361,1) * [PTPRJ_p |SIGNOR-C156_p];
  R361: PTPRJ_p => ; 1;
  // V(362) = K(362,1) * [PTPRJ_p] * [JAK2_p] -K(362,2) * [PTPRJ_p |JAK2_p];
  R362: PTPRJ_p => JAK2_p; 1;
  // V(363) = K(363,1) * [PTPRJ_p |JAK2_p];
  R363: PTPRJ_p => JAK2_p; 1;
  // V(364) = K(364,1) * [PTPN6_p] * [STAT3_p] -K(364,2) * [PTPN6_p |STAT3_p];
  R364: PTPN6_p => STAT3_p; 1;
  // V(365) = K(365,1) * [PTPN6_p |STAT3_p];
  R365: PTPN6_p => STAT3_p; 1;
  // V(366) = K(366,1) * [PTEN_p] * [IRF3_p] -K(366,2) * [PTEN_p |IRF3_p];
  R366: PTEN_p => IRF3_p; 1;
  // V(367) = K(367,1) * [PTEN_p |IRF3_p];
  R367: PTEN_p => IRF3_p; 1;
  // V(368) = K(368,1) * [PTPA] * [AKT1_p] -K(368,2) * [PTPA |AKT1_p];
  R368: PTPA => AKT1_p; 1;
  // V(369) = K(369,1) * [PTPA |AKT1_p];
  R369: PTPA => AKT1_p; 1;
  // V(370) = K(370,1) * [PTEN_p] * [STAT5A_p] -K(370,2) * [PTEN_p |STAT5A_p];
  R370: PTEN_p => STAT5A_p; 1;
  // V(371) = K(371,1) * [PTEN_p |STAT5A_p];
  R371: PTEN_p => STAT5A_p; 1;
  // V(372) = K(372,1) * [DUSP1_p] * [JUN_p] -K(372,2) * [DUSP1_p |JUN_p];
  R372: JUN_p => DUSP1_p; 1;
  // V(373) = K(373,1) * [DUSP1_p |JUN_p];
  R373: JUN_p => DUSP1_p; 1;
  // V(374) = K(374,1) * [PTPN6_p] * [CTNNB1_p] -K(374,2) * [PTPN6_p |CTNNB1_p];
  R374: PTPN6_p => CTNNB1_p; 1;
  // V(375) = K(375,1) * [PTPN6_p |CTNNB1_p];
  R375: PTPN6_p => CTNNB1_p; 1;
  // V(376) = K(376,1) * [PTPN6_p] * [JAK3_p] -K(376,2) * [PTPN6_p |JAK3_p];
  R376: PTPN6_p => JAK3_p; 1;
  // V(377) = K(377,1) * [PTPN6_p |JAK3_p];
  R377: PTPN6_p => JAK3_p; 1;
  // V(378) = K(378,1) * [MDM2_p] * [HIF1A] -K(378,2) * [MDM2_p |HIF1A];
  R378: HIF1A => MDM2_p; 1;
  // V(379) = K(379,1) * [MDM2_p |HIF1A];
  R379: HIF1A => MDM2_p; 1;
  // V(380) = K(380,1) * [RNF7] * [HIF1A] -K(380,2) * [RNF7 |HIF1A];
  R380: HIF1A => RNF7; 1;
  // V(381) = K(381,1) * [RNF7 |HIF1A];
  R381: HIF1A => RNF7; 1;
  // V(382) = K(382,1) * [MDM2_p] * [NUMB] -K(382,2) * [MDM2_p |NUMB];
  R382: MDM2_p => NUMB; 1;
  // V(383) = K(383,1) * [MDM2_p |NUMB];
  R383: MDM2_p => NUMB; 1;
  // V(384) = K(384,1) * [RNF7] * [DEPTOR] -K(384,2) * [RNF7 |DEPTOR];
  R384: DEPTOR => RNF7; 1;
  // V(385) = K(385,1) * [RNF7 |DEPTOR];
  R385: DEPTOR => RNF7; 1;
  // V(386) = K(386,1) * [SOCS1] * [JAK2] -K(386,2) * [SOCS1 |JAK2];
  R386: JAK2 => SOCS1; 1;
  // V(387) = K(387,1) * [SOCS1 |JAK2];
  R387: JAK2 => SOCS1; 1;
  // V(388) = K(388,1) * [MDM2_p] * [TP53] -K(388,2) * [MDM2_p |TP53];
  R388: TP53 => MDM2_p; 1;
  // V(389) = K(389,1) * [MDM2_p |TP53];
  R389: TP53 => MDM2_p; 1;
  // V(390) = K(390,1) * [CUL3] * [RHOA] -K(390,2) * [CUL3 |RHOA];
  R390: RHOA => CUL3; 1;
  // V(391) = K(391,1) * [CUL3 |RHOA];
  R391: RHOA => CUL3; 1;
  // V(392) = K(392,1) * [RNF7] * [JUN] -K(392,2) * [RNF7 |JUN];
  R392: JUN => RNF7; 1;
  // V(393) = K(393,1) * [RNF7 |JUN];
  R393: JUN => RNF7; 1;
  // V(394) = K(394,1) * [JUN_p] * [SP1_p] * [TGFB1_g] -K(394,2) * [JUN_p |SP1_p |TGFB1_g];
  R394: SP1_p => TGFB1_g; 1;
  // V(395) = K(395,1) * [JUN_p |SP1_p |TGFB1_g];
  R395: SP1_p => TGFB1_g; 1;
  // V(396) = K(396,1) * [TGFB1_rna];
  R396: TGFB1_rna => ; 1;
  // V(397) = K(397,1) * [TP53_p] * [VCAN_g] -K(397,2) * [TP53_p |VCAN_g];
  R397: VCAN_g => TP53_p; 1;
  // V(398) = K(398,1) * [TP53_p |VCAN_g];
  R398: VCAN_g => TP53_p; 1;
  // V(399) = K(399,1) * [VCAN_rna];
  R399: VCAN_rna => ; 1;
  // V(400) = K(400,1) * [TP53_p] * [CDKN1A_g] -K(400,2) * [TP53_p |CDKN1A_g];
  R400: CDKN1A_g => TP53_p; 1;
  // V(401) = K(401,1) * [TP53_p |CDKN1A_g];
  R401: CDKN1A_g => TP53_p; 1;
  // V(402) = K(402,1) * [CDKN1A_rna];
  R402: CDKN1A_rna => ; 1;
  // V(403) = K(403,1) * [NFE2L2] * [SOD1_g] -K(403,2) * [NFE2L2 |SOD1_g];
  R403: SOD1_g => NFE2L2; 1;
  // V(404) = K(404,1) * [NFE2L2 |SOD1_g];
  R404: SOD1_g => NFE2L2; 1;
  // V(405) = K(405,1) * [SOD1_rna];
  R405: SOD1_rna => ; 1;
  // V(406) = K(406,1) * [STAT3_p] * [STAT1_p] * [STAT5A_p] * [SOCS3_g] -K(406,2) * [STAT3_p |STAT1_p |STAT5A_p |SOCS3_g];
  R406: STAT3_p => STAT5A_p; 1;
  // V(407) = K(407,1) * [STAT3_p |STAT1_p |STAT5A_p |SOCS3_g];
  R407: STAT3_p => STAT5A_p; 1;
  // V(408) = K(408,1) * [SOCS3_rna];
  R408: SOCS3_rna => ; 1;
  // V(409) = K(409,1) * [CTNNB1_p] * [CCND1_g] -K(409,2) * [CTNNB1_p |CCND1_g];
  R409: CTNNB1_p => CCND1_g; 1;
  // V(410) = K(410,1) * [CTNNB1_p |CCND1_g];
  R410: CTNNB1_p => CCND1_g; 1;
  // V(411) = K(411,1) * [CCND1_rna];
  R411: CCND1_rna => ; 1;
  // V(412) = K(412,1) * [ATF3] * [GDF15_g] -K(412,2) * [ATF3 |GDF15_g];
  R412: GDF15_g => ATF3; 1;
  // V(413) = K(413,1) * [ATF3 |GDF15_g];
  R413: GDF15_g => ATF3; 1;
  // V(414) = K(414,1) * [GDF15_rna];
  R414: GDF15_rna => ; 1;
  // V(415) = K(415,1) * [HIF1A_p] * [IL1B_g] -K(415,2) * [HIF1A_p |IL1B_g];
  R415: IL1B_g => HIF1A_p; 1;
  // V(416) = K(416,1) * [HIF1A_p |IL1B_g];
  R416: IL1B_g => HIF1A_p; 1;
  // V(417) = K(417,1) * [IL1B_rna];
  R417: IL1B_rna => ; 1;
  // V(418) = K(418,1) * [TP53_p] * [BAX_g] -K(418,2) * [TP53_p |BAX_g];
  R418: BAX_g => TP53_p; 1;
  // V(419) = K(419,1) * [TP53_p |BAX_g];
  R419: BAX_g => TP53_p; 1;
  // V(420) = K(420,1) * [BAX_rna];
  R420: BAX_rna => ; 1;
  // V(421) = K(421,1) * [NFE2L2] * [CAT_g] -K(421,2) * [NFE2L2 |CAT_g];
  R421: CAT_g => NFE2L2; 1;
  // V(422) = K(422,1) * [NFE2L2 |CAT_g];
  R422: CAT_g => NFE2L2; 1;
  // V(423) = K(423,1) * [CAT_rna];
  R423: CAT_rna => ; 1;
  // V(424) = K(424,1) * [HIF1A_p] * [STAT3_p] * [VEGFA_g] -K(424,2) * [HIF1A_p |STAT3_p |VEGFA_g];
  R424: STAT3_p => HIF1A_p; 1;
  // V(425) = K(425,1) * [HIF1A_p |STAT3_p |VEGFA_g];
  R425: STAT3_p => HIF1A_p; 1;
  // V(426) = K(426,1) * [VEGFA_rna];
  R426: VEGFA_rna => ; 1;
  // V(427) = K(427,1) * [NFE2L2] * [GCLC_g] -K(427,2) * [NFE2L2 |GCLC_g];
  R427: GCLC_g => NFE2L2; 1;
  // V(428) = K(428,1) * [NFE2L2 |GCLC_g];
  R428: GCLC_g => NFE2L2; 1;
  // V(429) = K(429,1) * [GCLC_rna];
  R429: GCLC_rna => ; 1;
  // V(430) = K(430,1) * [SIRT1_p] * [PPARGC1A_g] -K(430,2) * [SIRT1_p |PPARGC1A_g];
  R430: PPARGC1A_g => SIRT1_p; 1;
  // V(431) = K(431,1) * [SIRT1_p |PPARGC1A_g];
  R431: PPARGC1A_g => SIRT1_p; 1;
  // V(432) = K(432,1) * [PPARGC1A_rna];
  R432: PPARGC1A_rna => ; 1;
  // V(433) = K(433,1) * [HIF1A_p] * [KDM6B_g] -K(433,2) * [HIF1A_p |KDM6B_g];
  R433: KDM6B_g => HIF1A_p; 1;
  // V(434) = K(434,1) * [HIF1A_p |KDM6B_g];
  R434: KDM6B_g => HIF1A_p; 1;
  // V(435) = K(435,1) * [KDM6B_rna];
  R435: KDM6B_rna => ; 1;
  // V(436) = K(436,1) * [NFE2L2] * [HMOX1_g] -K(436,2) * [NFE2L2 |HMOX1_g];
  R436: HMOX1_g => NFE2L2; 1;
  // V(437) = K(437,1) * [NFE2L2 |HMOX1_g];
  R437: HMOX1_g => NFE2L2; 1;
  // V(438) = K(438,1) * [HMOX1_rna];
  R438: HMOX1_rna => ; 1;
  // V(439) = K(439,1) * [NFE2L2] * [GSTA1_g] -K(439,2) * [NFE2L2 |GSTA1_g];
  R439: GSTA1_g => NFE2L2; 1;
  // V(440) = K(440,1) * [NFE2L2 |GSTA1_g];
  R440: GSTA1_g => NFE2L2; 1;
  // V(441) = K(441,1) * [GSTA1_rna];
  R441: GSTA1_rna => ; 1;
  // V(442) = K(442,1) * [TP53_p] * [SCO2_g] -K(442,2) * [TP53_p |SCO2_g];
  R442: SCO2_g => TP53_p; 1;
  // V(443) = K(443,1) * [TP53_p |SCO2_g];
  R443: SCO2_g => TP53_p; 1;
  // V(444) = K(444,1) * [SCO2_rna];
  R444: SCO2_rna => ; 1;
  // V(445) = K(445,1) * [TFEB] * [BECN1_g] -K(445,2) * [TFEB |BECN1_g];
  R445: TFEB => BECN1_g; 1;
  // V(446) = K(446,1) * [TFEB |BECN1_g];
  R446: TFEB => BECN1_g; 1;
  // V(447) = K(447,1) * [BECN1_rna];
  R447: BECN1_rna => ; 1;
  // V(448) = K(448,1) * [STAT3_p] * [STAT1_g] -K(448,2) * [STAT3_p |STAT1_g];
  R448: STAT3_p => STAT1_g; 1;
  // V(449) = K(449,1) * [STAT3_p |STAT1_g];
  R449: STAT3_p => STAT1_g; 1;
  // V(450) = K(450,1) * [STAT1_rna];
  R450: STAT1_rna => ; 1;
  // V(451) = K(451,1) * [SGK1];
  R451: SGK1 => ; 1;
  // V(452) = K(452,1) * [TLR4];
  R452: TLR4 => ; 1;
  // V(453) = K(453,1) * [DNM1L];
  R453: DNM1L => ; 1;
  // V(454) = K(454,1) * [SOCS3];
  R454: SOCS3 => ; 1;
  // V(455) = K(455,1) * [IKBKB];
  R455: IKBKB => ; 1;
  // V(456) = K(456,1) * [KDM6B];
  R456: KDM6B => ; 1;
  // V(457) = K(457,1) * [SOCS1];
  R457: SOCS1 => ; 1;
  // V(458) = K(458,1) * [PDPK1];
  R458: PDPK1 => ; 1;
  // V(459) = K(459,1) * [SCO2];
  R459: SCO2 => ; 1;
  // V(460) = K(460,1) * [JAK2];
  R460: JAK2 => ; 1;
  // V(461) = K(461,1) * [ERN1];
  R461: ERN1 => ; 1;
  // V(462) = K(462,1) * [SOD1];
  R462: SOD1 => ; 1;
  // V(463) = K(463,1) * [FOS];
  R463: FOS => ; 1;
  // V(464) = K(464,1) * [TGFB1];
  R464: TGFB1 => ; 1;
  // V(465) = K(465,1) * [IL1B];
  R465: IL1B => ; 1;
  // V(466) = K(466,1) * [CAT];
  R466: CAT => ; 1;
  // V(467) = K(467,1) * [TP53];
  R467: TP53 => ; 1;
  // V(468) = K(468,1) * [JUN];
  R468: JUN => ; 1;
  // V(469) = K(469,1) * [INSR];
  R469: INSR => ; 1;
  // V(470) = K(470,1) * [FYN];
  R470: FYN => ; 1;
  // V(471) = K(471,1) * [SP1];
  R471: SP1 => ; 1;
  // V(472) = K(472,1) * [GSTA1];
  R472: GSTA1 => ; 1;
  // V(473) = K(473,1) * [IL6R];
  R473: IL6R => ; 1;
  // V(474) = K(474,1) * [HMOX1];
  R474: HMOX1 => ; 1;
  // V(475) = K(475,1) * [PARP1];
  R475: PARP1 => ; 1;
  // V(476) = K(476,1) * [UBC];
  R476: UBC => ; 1;
  // V(477) = K(477,1) * [BCL2];
  R477: BCL2 => ; 1;
  // V(478) = K(478,1) * [KIT];
  R478: KIT => ; 1;
  // V(479) = K(479,1) * [VCAN];
  R479: VCAN => ; 1;
  // V(480) = K(480,1) * [NCF1];
  R480: NCF1 => ; 1;
  // V(481) = K(481,1) * [VEGFA];
  R481: VEGFA => ; 1;
  // V(482) = K(482,1) * [CTLA4];
  R482: CTLA4 => ; 1;
  // V(483) = K(483,1) * [XBP1];
  R483: XBP1 => ; 1;
  // V(484) = K(484,1) * [ATF3];
  R484: ATF3 => ; 1;
  // V(485) = K(485,1) * [EPOR];
  R485: EPOR => ; 1;
  // V(486) = K(486,1) * [TFEB];
  R486: TFEB => ; 1;
  // V(487) = K(487,1) * [NFKB1];
  R487: NFKB1 => ; 1;
  // V(488) = K(488,1) * [NR4A1];
  R488: NR4A1 => ; 1;
  // V(489) = K(489,1) * [JAK1];
  R489: JAK1 => ; 1;
  // V(490) = K(490,1) * [CCND1];
  R490: CCND1 => ; 1;
  // V(491) = K(491,1) * [DNMT1];
  R491: DNMT1 => ; 1;
  // V(492) = K(492,1) * [PIK3R1];
  R492: PIK3R1 => ; 1;
  // V(493) = K(493,1) * [MAPK1];
  R493: MAPK1 => ; 1;
  // V(494) = K(494,1) * [DUSP1];
  R494: DUSP1 => ; 1;
  // V(495) = K(495,1) * [PTPN6];
  R495: PTPN6 => ; 1;
  // V(496) = K(496,1) * [PRDX6];
  R496: PRDX6 => ; 1;
  // V(497) = K(497,1) * [AKT1];
  R497: AKT1 => ; 1;
  // V(498) = K(498,1) * [CTNNB1];
  R498: CTNNB1 => ; 1;
  // V(499) = K(499,1) * [PTGS2];
  R499: PTGS2 => ; 1;
  // V(500) = K(500,1) * [TGFBR1];
  R500: TGFBR1 => ; 1;
  // V(501) = K(501,1) * [CDKN1A];
  R501: CDKN1A => ; 1;
  // V(502) = K(502,1) * [STAT3];
  R502: STAT3 => ; 1;
  // V(503) = K(503,1) * [CCR2];
  R503: CCR2 => ; 1;
  // V(504) = K(504,1) * [STAT1];
  R504: STAT1 => ; 1;
  // V(505) = K(505,1) * [STAT5A];
  R505: STAT5A => ; 1;
  // V(506) = K(506,1) * [PIK3CA];
  R506: PIK3CA => ; 1;
  // V(507) = K(507,1) * [MAPK9];
  R507: MAPK9 => ; 1;
  // V(508) = K(508,1) * [GCLC];
  R508: GCLC => ; 1;
  // V(509) = K(509,1) * [NUMB];
  R509: NUMB => ; 1;
  // V(510) = K(510,1) * [IRAK1];
  R510: IRAK1 => ; 1;
  // V(511) = K(511,1) * [RPS6KA3];
  R511: RPS6KA3 => ; 1;
  // V(512) = K(512,1) * [JAK3];
  R512: JAK3 => ; 1;
  // V(513) = K(513,1) * [RCAN1];
  R513: RCAN1 => ; 1;
  // V(514) = K(514,1) * [PTEN];
  R514: PTEN => ; 1;
  // V(515) = K(515,1) * [RHOA];
  R515: RHOA => ; 1;
  // V(516) = K(516,1) * [RAC1];
  R516: RAC1 => ; 1;
  // V(517) = K(517,1) * [NFKB2];
  R517: NFKB2 => ; 1;
  // V(518) = K(518,1) * [MDM2];
  R518: MDM2 => ; 1;
  // V(519) = K(519,1) * [NOTCH2];
  R519: NOTCH2 => ; 1;
  // V(520) = K(520,1) * [BTK];
  R520: BTK => ; 1;
  // V(521) = K(521,1) * [PRDX1];
  R521: PRDX1 => ; 1;
  // V(522) = K(522,1) * [BAX];
  R522: BAX => ; 1;
  // V(523) = K(523,1) * [EP300];
  R523: EP300 => ; 1;
  // V(524) = K(524,1) * [PTPRJ];
  R524: PTPRJ => ; 1;
  // V(525) = K(525,1) * [STK4];
  R525: STK4 => ; 1;
  // V(526) = K(526,1) * [ILK];
  R526: ILK => ; 1;
  // V(527) = K(527,1) * [ROCK1];
  R527: ROCK1 => ; 1;
  // V(528) = K(528,1) * [ATR];
  R528: ATR => ; 1;
  // V(529) = K(529,1) * [CUL3];
  R529: CUL3 => ; 1;
  // V(530) = K(530,1) * [BECN1];
  R530: BECN1 => ; 1;
  // V(531) = K(531,1) * [IRF3];
  R531: IRF3 => ; 1;
  // V(532) = K(532,1) * [PTPA];
  R532: PTPA => ; 1;
  // V(533) = K(533,1) * [SMAD2];
  R533: SMAD2 => ; 1;
  // V(534) = K(534,1) * [STK11];
  R534: STK11 => ; 1;
  // V(535) = K(535,1) * [NFE2L2];
  R535: NFE2L2 => ; 1;
  // V(536) = K(536,1) * [PKN1];
  R536: PKN1 => ; 1;
  // V(537) = K(537,1) * [MAPK6];
  R537: MAPK6 => ; 1;
  // V(538) = K(538,1) * [HIF1A];
  R538: HIF1A => ; 1;
  // V(539) = K(539,1) * [DEPTOR];
  R539: DEPTOR => ; 1;
  // V(540) = K(540,1) * [BAD];
  R540: BAD => ; 1;
  // V(541) = K(541,1) * [AKT1S1];
  R541: AKT1S1 => ; 1;
  // V(542) = K(542,1) * [SIRT1];
  R542: SIRT1 => ; 1;
  // V(543) = K(543,1) * [MAP3K5];
  R543: MAP3K5 => ; 1;
  // V(544) = K(544,1) * [GDF15];
  R544: GDF15 => ; 1;
  // V(545) = K(545,1) * [PINK1];
  R545: PINK1 => ; 1;
  // V(546) = K(546,1) * [HIPK2];
  R546: HIPK2 => ; 1;
  // V(547) = K(547,1) * [TXNIP];
  R547: TXNIP => ; 1;
  // V(548) = K(548,1) * [RNF7];
  R548: RNF7 => ; 1;
  // V(549) = K(549,1) * [PPARGC1A];
  R549: PPARGC1A => ; 1;
  // V(550) = K(550,1) * [IRS2];
  R550: IRS2 => ; 1;
  // V(551) = K(551,1) * [SOCS3_rna];
  R551: SOCS3_rna => ; 1;
  // V(552) = K(552,1) * [KDM6B_rna];
  R552: KDM6B_rna => ; 1;
  // V(553) = K(553,1) * [SCO2_rna];
  R553: SCO2_rna => ; 1;
  // V(554) = K(554,1) * [SOD1_rna];
  R554: SOD1_rna => ; 1;
  // V(555) = K(555,1) * [TGFB1_rna];
  R555: TGFB1_rna => ; 1;
  // V(556) = K(556,1) * [IL1B_rna];
  R556: IL1B_rna => ; 1;
  // V(557) = K(557,1) * [CAT_rna];
  R557: CAT_rna => ; 1;
  // V(558) = K(558,1) * [GSTA1_rna];
  R558: GSTA1_rna => ; 1;
  // V(559) = K(559,1) * [HMOX1_rna];
  R559: HMOX1_rna => ; 1;
  // V(560) = K(560,1) * [VCAN_rna];
  R560: VCAN_rna => ; 1;
  // V(561) = K(561,1) * [VEGFA_rna];
  R561: VEGFA_rna => ; 1;
  // V(562) = K(562,1) * [CCND1_rna];
  R562: CCND1_rna => ; 1;
  // V(563) = K(563,1) * [CDKN1A_rna];
  R563: CDKN1A_rna => ; 1;
  // V(564) = K(564,1) * [STAT1_rna];
  R564: STAT1_rna => ; 1;
  // V(565) = K(565,1) * [GCLC_rna];
  R565: GCLC_rna => ; 1;
  // V(566) = K(566,1) * [BAX_rna];
  R566: BAX_rna => ; 1;
  // V(567) = K(567,1) * [BECN1_rna];
  R567: BECN1_rna => ; 1;
  // V(568) = K(568,1) * [GDF15_rna];
  R568: GDF15_rna => ; 1;
  // V(569) = K(569,1) * [PPARGC1A_rna];
  R569: PPARGC1A_rna => ; 1;
  // V(570) = K(570,1) * [SGK1_g];
  R570: SGK1_g => ; 1;
  // V(571) = K(571,1) * [SGK1_rna];
  R571: SGK1_rna => ; 1;
  // V(572) = K(572,1) * [TLR4_g];
  R572: TLR4_g => ; 1;
  // V(573) = K(573,1) * [TLR4_rna];
  R573: TLR4_rna => ; 1;
  // V(574) = K(574,1) * [DNM1L_g];
  R574: DNM1L_g => ; 1;
  // V(575) = K(575,1) * [DNM1L_rna];
  R575: DNM1L_rna => ; 1;
  // V(576) = K(576,1) * [IKBKB_g];
  R576: IKBKB_g => ; 1;
  // V(577) = K(577,1) * [IKBKB_rna];
  R577: IKBKB_rna => ; 1;
  // V(578) = K(578,1) * [SOCS1_g];
  R578: SOCS1_g => ; 1;
  // V(579) = K(579,1) * [SOCS1_rna];
  R579: SOCS1_rna => ; 1;
  // V(580) = K(580,1) * [PDPK1_g];
  R580: PDPK1_g => ; 1;
  // V(581) = K(581,1) * [PDPK1_rna];
  R581: PDPK1_rna => ; 1;
  // V(582) = K(582,1) * [JAK2_g];
  R582: JAK2_g => ; 1;
  // V(583) = K(583,1) * [JAK2_rna];
  R583: JAK2_rna => ; 1;
  // V(584) = K(584,1) * [ERN1_g];
  R584: ERN1_g => ; 1;
  // V(585) = K(585,1) * [ERN1_rna];
  R585: ERN1_rna => ; 1;
  // V(586) = K(586,1) * [FOS_g];
  R586: FOS_g => ; 1;
  // V(587) = K(587,1) * [FOS_rna];
  R587: FOS_rna => ; 1;
  // V(588) = K(588,1) * [TP53_g];
  R588: TP53_g => ; 1;
  // V(589) = K(589,1) * [TP53_rna];
  R589: TP53_rna => ; 1;
  // V(590) = K(590,1) * [JUN_g];
  R590: JUN_g => ; 1;
  // V(591) = K(591,1) * [JUN_rna];
  R591: JUN_rna => ; 1;
  // V(592) = K(592,1) * [INSR_g];
  R592: INSR_g => ; 1;
  // V(593) = K(593,1) * [INSR_rna];
  R593: INSR_rna => ; 1;
  // V(594) = K(594,1) * [FYN_g];
  R594: FYN_g => ; 1;
  // V(595) = K(595,1) * [FYN_rna];
  R595: FYN_rna => ; 1;
  // V(596) = K(596,1) * [SP1_g];
  R596: SP1_g => ; 1;
  // V(597) = K(597,1) * [SP1_rna];
  R597: SP1_rna => ; 1;
  // V(598) = K(598,1) * [IL6R_g];
  R598: IL6R_g => ; 1;
  // V(599) = K(599,1) * [IL6R_rna];
  R599: IL6R_rna => ; 1;
  // V(600) = K(600,1) * [PARP1_g];
  R600: PARP1_g => ; 1;
  // V(601) = K(601,1) * [PARP1_rna];
  R601: PARP1_rna => ; 1;
  // V(602) = K(602,1) * [UBC_g];
  R602: UBC_g => ; 1;
  // V(603) = K(603,1) * [UBC_rna];
  R603: UBC_rna => ; 1;
  // V(604) = K(604,1) * [BCL2_g];
  R604: BCL2_g => ; 1;
  // V(605) = K(605,1) * [BCL2_rna];
  R605: BCL2_rna => ; 1;
  // V(606) = K(606,1) * [KIT_g];
  R606: KIT_g => ; 1;
  // V(607) = K(607,1) * [KIT_rna];
  R607: KIT_rna => ; 1;
  // V(608) = K(608,1) * [NCF1_g];
  R608: NCF1_g => ; 1;
  // V(609) = K(609,1) * [NCF1_rna];
  R609: NCF1_rna => ; 1;
  // V(610) = K(610,1) * [CTLA4_g];
  R610: CTLA4_g => ; 1;
  // V(611) = K(611,1) * [CTLA4_rna];
  R611: CTLA4_rna => ; 1;
  // V(612) = K(612,1) * [XBP1_g];
  R612: XBP1_g => ; 1;
  // V(613) = K(613,1) * [XBP1_rna];
  R613: XBP1_rna => ; 1;
  // V(614) = K(614,1) * [ATF3_g];
  R614: ATF3_g => ; 1;
  // V(615) = K(615,1) * [ATF3_rna];
  R615: ATF3_rna => ; 1;
  // V(616) = K(616,1) * [EPOR_g];
  R616: EPOR_g => ; 1;
  // V(617) = K(617,1) * [EPOR_rna];
  R617: EPOR_rna => ; 1;
  // V(618) = K(618,1) * [TFEB_g];
  R618: TFEB_g => ; 1;
  // V(619) = K(619,1) * [TFEB_rna];
  R619: TFEB_rna => ; 1;
  // V(620) = K(620,1) * [NFKB1_g];
  R620: NFKB1_g => ; 1;
  // V(621) = K(621,1) * [NFKB1_rna];
  R621: NFKB1_rna => ; 1;
  // V(622) = K(622,1) * [NR4A1_g];
  R622: NR4A1_g => ; 1;
  // V(623) = K(623,1) * [NR4A1_rna];
  R623: NR4A1_rna => ; 1;
  // V(624) = K(624,1) * [JAK1_g];
  R624: JAK1_g => ; 1;
  // V(625) = K(625,1) * [JAK1_rna];
  R625: JAK1_rna => ; 1;
  // V(626) = K(626,1) * [DNMT1_g];
  R626: DNMT1_g => ; 1;
  // V(627) = K(627,1) * [DNMT1_rna];
  R627: DNMT1_rna => ; 1;
  // V(628) = K(628,1) * [PIK3R1_g];
  R628: PIK3R1_g => ; 1;
  // V(629) = K(629,1) * [PIK3R1_rna];
  R629: PIK3R1_rna => ; 1;
  // V(630) = K(630,1) * [MAPK1_g];
  R630: MAPK1_g => ; 1;
  // V(631) = K(631,1) * [MAPK1_rna];
  R631: MAPK1_rna => ; 1;
  // V(632) = K(632,1) * [DUSP1_g];
  R632: DUSP1_g => ; 1;
  // V(633) = K(633,1) * [DUSP1_rna];
  R633: DUSP1_rna => ; 1;
  // V(634) = K(634,1) * [PTPN6_g];
  R634: PTPN6_g => ; 1;
  // V(635) = K(635,1) * [PTPN6_rna];
  R635: PTPN6_rna => ; 1;
  // V(636) = K(636,1) * [PRDX6_g];
  R636: PRDX6_g => ; 1;
  // V(637) = K(637,1) * [PRDX6_rna];
  R637: PRDX6_rna => ; 1;
  // V(638) = K(638,1) * [AKT1_g];
  R638: AKT1_g => ; 1;
  // V(639) = K(639,1) * [AKT1_rna];
  R639: AKT1_rna => ; 1;
  // V(640) = K(640,1) * [CTNNB1_g];
  R640: CTNNB1_g => ; 1;
  // V(641) = K(641,1) * [CTNNB1_rna];
  R641: CTNNB1_rna => ; 1;
  // V(642) = K(642,1) * [PTGS2_g];
  R642: PTGS2_g => ; 1;
  // V(643) = K(643,1) * [PTGS2_rna];
  R643: PTGS2_rna => ; 1;
  // V(644) = K(644,1) * [TGFBR1_g];
  R644: TGFBR1_g => ; 1;
  // V(645) = K(645,1) * [TGFBR1_rna];
  R645: TGFBR1_rna => ; 1;
  // V(646) = K(646,1) * [STAT3_g];
  R646: STAT3_g => ; 1;
  // V(647) = K(647,1) * [STAT3_rna];
  R647: STAT3_rna => ; 1;
  // V(648) = K(648,1) * [CCR2_g];
  R648: CCR2_g => ; 1;
  // V(649) = K(649,1) * [CCR2_rna];
  R649: CCR2_rna => ; 1;
  // V(650) = K(650,1) * [STAT5A_g];
  R650: STAT5A_g => ; 1;
  // V(651) = K(651,1) * [STAT5A_rna];
  R651: STAT5A_rna => ; 1;
  // V(652) = K(652,1) * [PIK3CA_g];
  R652: PIK3CA_g => ; 1;
  // V(653) = K(653,1) * [PIK3CA_rna];
  R653: PIK3CA_rna => ; 1;
  // V(654) = K(654,1) * [MAPK9_g];
  R654: MAPK9_g => ; 1;
  // V(655) = K(655,1) * [MAPK9_rna];
  R655: MAPK9_rna => ; 1;
  // V(656) = K(656,1) * [NUMB_g];
  R656: NUMB_g => ; 1;
  // V(657) = K(657,1) * [NUMB_rna];
  R657: NUMB_rna => ; 1;
  // V(658) = K(658,1) * [IRAK1_g];
  R658: IRAK1_g => ; 1;
  // V(659) = K(659,1) * [IRAK1_rna];
  R659: IRAK1_rna => ; 1;
  // V(660) = K(660,1) * [RPS6KA3_g];
  R660: RPS6KA3_g => ; 1;
  // V(661) = K(661,1) * [RPS6KA3_rna];
  R661: RPS6KA3_rna => ; 1;
  // V(662) = K(662,1) * [JAK3_g];
  R662: JAK3_g => ; 1;
  // V(663) = K(663,1) * [JAK3_rna];
  R663: JAK3_rna => ; 1;
  // V(664) = K(664,1) * [RCAN1_g];
  R664: RCAN1_g => ; 1;
  // V(665) = K(665,1) * [RCAN1_rna];
  R665: RCAN1_rna => ; 1;
  // V(666) = K(666,1) * [PTEN_g];
  R666: PTEN_g => ; 1;
  // V(667) = K(667,1) * [PTEN_rna];
  R667: PTEN_rna => ; 1;
  // V(668) = K(668,1) * [RHOA_g];
  R668: RHOA_g => ; 1;
  // V(669) = K(669,1) * [RHOA_rna];
  R669: RHOA_rna => ; 1;
  // V(670) = K(670,1) * [RAC1_g];
  R670: RAC1_g => ; 1;
  // V(671) = K(671,1) * [RAC1_rna];
  R671: RAC1_rna => ; 1;
  // V(672) = K(672,1) * [NFKB2_g];
  R672: NFKB2_g => ; 1;
  // V(673) = K(673,1) * [NFKB2_rna];
  R673: NFKB2_rna => ; 1;
  // V(674) = K(674,1) * [MDM2_g];
  R674: MDM2_g => ; 1;
  // V(675) = K(675,1) * [MDM2_rna];
  R675: MDM2_rna => ; 1;
  // V(676) = K(676,1) * [NOTCH2_g];
  R676: NOTCH2_g => ; 1;
  // V(677) = K(677,1) * [NOTCH2_rna];
  R677: NOTCH2_rna => ; 1;
  // V(678) = K(678,1) * [BTK_g];
  R678: BTK_g => ; 1;
  // V(679) = K(679,1) * [BTK_rna];
  R679: BTK_rna => ; 1;
  // V(680) = K(680,1) * [PRDX1_g];
  R680: PRDX1_g => ; 1;
  // V(681) = K(681,1) * [PRDX1_rna];
  R681: PRDX1_rna => ; 1;
  // V(682) = K(682,1) * [EP300_g];
  R682: EP300_g => ; 1;
  // V(683) = K(683,1) * [EP300_rna];
  R683: EP300_rna => ; 1;
  // V(684) = K(684,1) * [PTPRJ_g];
  R684: PTPRJ_g => ; 1;
  // V(685) = K(685,1) * [PTPRJ_rna];
  R685: PTPRJ_rna => ; 1;
  // V(686) = K(686,1) * [STK4_g];
  R686: STK4_g => ; 1;
  // V(687) = K(687,1) * [STK4_rna];
  R687: STK4_rna => ; 1;
  // V(688) = K(688,1) * [ILK_g];
  R688: ILK_g => ; 1;
  // V(689) = K(689,1) * [ILK_rna];
  R689: ILK_rna => ; 1;
  // V(690) = K(690,1) * [ROCK1_g];
  R690: ROCK1_g => ; 1;
  // V(691) = K(691,1) * [ROCK1_rna];
  R691: ROCK1_rna => ; 1;
  // V(692) = K(692,1) * [ATR_g];
  R692: ATR_g => ; 1;
  // V(693) = K(693,1) * [ATR_rna];
  R693: ATR_rna => ; 1;
  // V(694) = K(694,1) * [CUL3_g];
  R694: CUL3_g => ; 1;
  // V(695) = K(695,1) * [CUL3_rna];
  R695: CUL3_rna => ; 1;
  // V(696) = K(696,1) * [IRF3_g];
  R696: IRF3_g => ; 1;
  // V(697) = K(697,1) * [IRF3_rna];
  R697: IRF3_rna => ; 1;
  // V(698) = K(698,1) * [PTPA_g];
  R698: PTPA_g => ; 1;
  // V(699) = K(699,1) * [PTPA_rna];
  R699: PTPA_rna => ; 1;
  // V(700) = K(700,1) * [SMAD2_g];
  R700: SMAD2_g => ; 1;
  // V(701) = K(701,1) * [SMAD2_rna];
  R701: SMAD2_rna => ; 1;
  // V(702) = K(702,1) * [STK11_g];
  R702: STK11_g => ; 1;
  // V(703) = K(703,1) * [STK11_rna];
  R703: STK11_rna => ; 1;
  // V(704) = K(704,1) * [NFE2L2_g];
  R704: NFE2L2_g => ; 1;
  // V(705) = K(705,1) * [NFE2L2_rna];
  R705: NFE2L2_rna => ; 1;
  // V(706) = K(706,1) * [PKN1_g];
  R706: PKN1_g => ; 1;
  // V(707) = K(707,1) * [PKN1_rna];
  R707: PKN1_rna => ; 1;
  // V(708) = K(708,1) * [MAPK6_g];
  R708: MAPK6_g => ; 1;
  // V(709) = K(709,1) * [MAPK6_rna];
  R709: MAPK6_rna => ; 1;
  // V(710) = K(710,1) * [HIF1A_g];
  R710: HIF1A_g => ; 1;
  // V(711) = K(711,1) * [HIF1A_rna];
  R711: HIF1A_rna => ; 1;
  // V(712) = K(712,1) * [DEPTOR_g];
  R712: DEPTOR_g => ; 1;
  // V(713) = K(713,1) * [DEPTOR_rna];
  R713: DEPTOR_rna => ; 1;
  // V(714) = K(714,1) * [BAD_g];
  R714: BAD_g => ; 1;
  // V(715) = K(715,1) * [BAD_rna];
  R715: BAD_rna => ; 1;
  // V(716) = K(716,1) * [AKT1S1_g];
  R716: AKT1S1_g => ; 1;
  // V(717) = K(717,1) * [AKT1S1_rna];
  R717: AKT1S1_rna => ; 1;
  // V(718) = K(718,1) * [SIRT1_g];
  R718: SIRT1_g => ; 1;
  // V(719) = K(719,1) * [SIRT1_rna];
  R719: SIRT1_rna => ; 1;
  // V(720) = K(720,1) * [MAP3K5_g];
  R720: MAP3K5_g => ; 1;
  // V(721) = K(721,1) * [MAP3K5_rna];
  R721: MAP3K5_rna => ; 1;
  // V(722) = K(722,1) * [PINK1_g];
  R722: PINK1_g => ; 1;
  // V(723) = K(723,1) * [PINK1_rna];
  R723: PINK1_rna => ; 1;
  // V(724) = K(724,1) * [HIPK2_g];
  R724: HIPK2_g => ; 1;
  // V(725) = K(725,1) * [HIPK2_rna];
  R725: HIPK2_rna => ; 1;
  // V(726) = K(726,1) * [TXNIP_g];
  R726: TXNIP_g => ; 1;
  // V(727) = K(727,1) * [TXNIP_rna];
  R727: TXNIP_rna => ; 1;
  // V(728) = K(728,1) * [RNF7_g];
  R728: RNF7_g => ; 1;
  // V(729) = K(729,1) * [RNF7_rna];
  R729: RNF7_rna => ; 1;
  // V(730) = K(730,1) * [IRS2_g];
  R730: IRS2_g => ; 1;
  // V(731) = K(731,1) * [IRS2_rna];
  R731: IRS2_rna => ; 1;
  // V(732) = K(732,1) * [SGK1_p];
  R732: SGK1_p => ; 1;
  // V(733) = K(733,1) * [DNM1L_p];
  R733: DNM1L_p => ; 1;
  // V(734) = K(734,1) * [IKBKB_p];
  R734: IKBKB_p => ; 1;
  // V(735) = K(735,1) * [PDPK1_p];
  R735: PDPK1_p => ; 1;
  // V(736) = K(736,1) * [JAK2_p];
  R736: JAK2_p => ; 1;
  // V(737) = K(737,1) * [ERN1_p];
  R737: ERN1_p => ; 1;
  // V(738) = K(738,1) * [FOS_p];
  R738: FOS_p => ; 1;
  // V(739) = K(739,1) * [TP53_p];
  R739: TP53_p => ; 1;
  // V(740) = K(740,1) * [JUN_p];
  R740: JUN_p => ; 1;
  // V(741) = K(741,1) * [INSR_p];
  R741: INSR_p => ; 1;
  // V(742) = K(742,1) * [FYN_p];
  R742: FYN_p => ; 1;
  // V(743) = K(743,1) * [SP1_p];
  R743: SP1_p => ; 1;
  // V(744) = K(744,1) * [HMOX1_p];
  R744: HMOX1_p => ; 1;
  // V(745) = K(745,1) * [PARP1_p];
  R745: PARP1_p => ; 1;
  // V(746) = K(746,1) * [UBC_p];
  R746: UBC_p => ; 1;
  // V(747) = K(747,1) * [BCL2_p];
  R747: BCL2_p => ; 1;
  // V(748) = K(748,1) * [KIT_p];
  R748: KIT_p => ; 1;
  // V(749) = K(749,1) * [NCF1_p];
  R749: NCF1_p => ; 1;
  // V(750) = K(750,1) * [CTLA4_p];
  R750: CTLA4_p => ; 1;
  // V(751) = K(751,1) * [XBP1_p];
  R751: XBP1_p => ; 1;
  // V(752) = K(752,1) * [EPOR_p];
  R752: EPOR_p => ; 1;
  // V(753) = K(753,1) * [TFEB_p];
  R753: TFEB_p => ; 1;
  // V(754) = K(754,1) * [NFKB1_p];
  R754: NFKB1_p => ; 1;
  // V(755) = K(755,1) * [NR4A1_p];
  R755: NR4A1_p => ; 1;
  // V(756) = K(756,1) * [JAK1_p];
  R756: JAK1_p => ; 1;
  // V(757) = K(757,1) * [DNMT1_p];
  R757: DNMT1_p => ; 1;
  // V(758) = K(758,1) * [PIK3R1_p];
  R758: PIK3R1_p => ; 1;
  // V(759) = K(759,1) * [MAPK1_p];
  R759: MAPK1_p => ; 1;
  // V(760) = K(760,1) * [DUSP1_p];
  R760: DUSP1_p => ; 1;
  // V(761) = K(761,1) * [PTPN6_p];
  R761: PTPN6_p => ; 1;
  // V(762) = K(762,1) * [PRDX6_p];
  R762: PRDX6_p => ; 1;
  // V(763) = K(763,1) * [AKT1_p];
  R763: AKT1_p => ; 1;
  // V(764) = K(764,1) * [CTNNB1_p];
  R764: CTNNB1_p => ; 1;
  // V(765) = K(765,1) * [PTGS2_p];
  R765: PTGS2_p => ; 1;
  // V(766) = K(766,1) * [CDKN1A_p];
  R766: CDKN1A_p => ; 1;
  // V(767) = K(767,1) * [STAT3_p];
  R767: STAT3_p => ; 1;
  // V(768) = K(768,1) * [CCR2_p];
  R768: CCR2_p => ; 1;
  // V(769) = K(769,1) * [STAT1_p];
  R769: STAT1_p => ; 1;
  // V(770) = K(770,1) * [STAT5A_p];
  R770: STAT5A_p => ; 1;
  // V(771) = K(771,1) * [PIK3CA_p];
  R771: PIK3CA_p => ; 1;
  // V(772) = K(772,1) * [MAPK9_p];
  R772: MAPK9_p => ; 1;
  // V(773) = K(773,1) * [IRAK1_p];
  R773: IRAK1_p => ; 1;
  // V(774) = K(774,1) * [RPS6KA3_p];
  R774: RPS6KA3_p => ; 1;
  // V(775) = K(775,1) * [JAK3_p];
  R775: JAK3_p => ; 1;
  // V(776) = K(776,1) * [RCAN1_p];
  R776: RCAN1_p => ; 1;
  // V(777) = K(777,1) * [PTEN_p];
  R777: PTEN_p => ; 1;
  // V(778) = K(778,1) * [RHOA_p];
  R778: RHOA_p => ; 1;
  // V(779) = K(779,1) * [RAC1_p];
  R779: RAC1_p => ; 1;
  // V(780) = K(780,1) * [MDM2_p];
  R780: MDM2_p => ; 1;
  // V(781) = K(781,1) * [BTK_p];
  R781: BTK_p => ; 1;
  // V(782) = K(782,1) * [PRDX1_p];
  R782: PRDX1_p => ; 1;
  // V(783) = K(783,1) * [BAX_p];
  R783: BAX_p => ; 1;
  // V(784) = K(784,1) * [EP300_p];
  R784: EP300_p => ; 1;
  // V(785) = K(785,1) * [PTPRJ_p];
  R785: PTPRJ_p => ; 1;
  // V(786) = K(786,1) * [STK4_p];
  R786: STK4_p => ; 1;
  // V(787) = K(787,1) * [ILK_p];
  R787: ILK_p => ; 1;
  // V(788) = K(788,1) * [BECN1_p];
  R788: BECN1_p => ; 1;
  // V(789) = K(789,1) * [IRF3_p];
  R789: IRF3_p => ; 1;
  // V(790) = K(790,1) * [SMAD2_p];
  R790: SMAD2_p => ; 1;
  // V(791) = K(791,1) * [STK11_p];
  R791: STK11_p => ; 1;
  // V(792) = K(792,1) * [NFE2L2_p];
  R792: NFE2L2_p => ; 1;
  // V(793) = K(793,1) * [PKN1_p];
  R793: PKN1_p => ; 1;
  // V(794) = K(794,1) * [MAPK6_p];
  R794: MAPK6_p => ; 1;
  // V(795) = K(795,1) * [HIF1A_p];
  R795: HIF1A_p => ; 1;
  // V(796) = K(796,1) * [DEPTOR_p];
  R796: DEPTOR_p => ; 1;
  // V(797) = K(797,1) * [BAD_p];
  R797: BAD_p => ; 1;
  // V(798) = K(798,1) * [AKT1S1_p];
  R798: AKT1S1_p => ; 1;
  // V(799) = K(799,1) * [SIRT1_p];
  R799: SIRT1_p => ; 1;
  // V(800) = K(800,1) * [MAP3K5_p];
  R800: MAP3K5_p => ; 1;
  // V(801) = K(801,1) * [HIPK2_p];
  R801: HIPK2_p => ; 1;
  // V(802) = K(802,1) * [TXNIP_p];
  R802: TXNIP_p => ; 1;
  // V(803) = K(803,1) * [PPARGC1A_p];
  R803: PPARGC1A_p => ; 1;
  // V(804) = K(804,1) * [IRS2_p];
  R804: IRS2_p => ; 1;
  // V(805) = K(805,1) * [SIGNOR-C118_p];
  R805: => ; 1;
  // V(806) = K(806,1) * [SIGNOR-C154_p];
  R806: => ; 1;
  // V(807) = K(807,1) * [SIGNOR-C156_p];
  R807: => ; 1;
  // V(808) = K(808,1) * [SGK1_rna];
  R808: SGK1_rna => ; 1;
  // V(809) = K(809,1) * [TLR4_rna];
  R809: TLR4_rna => ; 1;
  // V(810) = K(810,1) * [DNM1L_rna];
  R810: DNM1L_rna => ; 1;
  // V(811) = K(811,1) * [IKBKB_rna];
  R811: IKBKB_rna => ; 1;
  // V(812) = K(812,1) * [SOCS1_rna];
  R812: SOCS1_rna => ; 1;
  // V(813) = K(813,1) * [PDPK1_rna];
  R813: PDPK1_rna => ; 1;
  // V(814) = K(814,1) * [JAK2_rna];
  R814: JAK2_rna => ; 1;
  // V(815) = K(815,1) * [ERN1_rna];
  R815: ERN1_rna => ; 1;
  // V(816) = K(816,1) * [FOS_rna];
  R816: FOS_rna => ; 1;
  // V(817) = K(817,1) * [TP53_rna];
  R817: TP53_rna => ; 1;
  // V(818) = K(818,1) * [JUN_rna];
  R818: JUN_rna => ; 1;
  // V(819) = K(819,1) * [INSR_rna];
  R819: INSR_rna => ; 1;
  // V(820) = K(820,1) * [FYN_rna];
  R820: FYN_rna => ; 1;
  // V(821) = K(821,1) * [SP1_rna];
  R821: SP1_rna => ; 1;
  // V(822) = K(822,1) * [IL6R_rna];
  R822: IL6R_rna => ; 1;
  // V(823) = K(823,1) * [PARP1_rna];
  R823: PARP1_rna => ; 1;
  // V(824) = K(824,1) * [UBC_rna];
  R824: UBC_rna => ; 1;
  // V(825) = K(825,1) * [BCL2_rna];
  R825: BCL2_rna => ; 1;
  // V(826) = K(826,1) * [KIT_rna];
  R826: KIT_rna => ; 1;
  // V(827) = K(827,1) * [NCF1_rna];
  R827: NCF1_rna => ; 1;
  // V(828) = K(828,1) * [CTLA4_rna];
  R828: CTLA4_rna => ; 1;
  // V(829) = K(829,1) * [XBP1_rna];
  R829: XBP1_rna => ; 1;
  // V(830) = K(830,1) * [ATF3_rna];
  R830: ATF3_rna => ; 1;
  // V(831) = K(831,1) * [EPOR_rna];
  R831: EPOR_rna => ; 1;
  // V(832) = K(832,1) * [TFEB_rna];
  R832: TFEB_rna => ; 1;
  // V(833) = K(833,1) * [NFKB1_rna];
  R833: NFKB1_rna => ; 1;
  // V(834) = K(834,1) * [NR4A1_rna];
  R834: NR4A1_rna => ; 1;
  // V(835) = K(835,1) * [JAK1_rna];
  R835: JAK1_rna => ; 1;
  // V(836) = K(836,1) * [DNMT1_rna];
  R836: DNMT1_rna => ; 1;
  // V(837) = K(837,1) * [PIK3R1_rna];
  R837: PIK3R1_rna => ; 1;
  // V(838) = K(838,1) * [MAPK1_rna];
  R838: MAPK1_rna => ; 1;
  // V(839) = K(839,1) * [DUSP1_rna];
  R839: DUSP1_rna => ; 1;
  // V(840) = K(840,1) * [PTPN6_rna];
  R840: PTPN6_rna => ; 1;
  // V(841) = K(841,1) * [PRDX6_rna];
  R841: PRDX6_rna => ; 1;
  // V(842) = K(842,1) * [AKT1_rna];
  R842: AKT1_rna => ; 1;
  // V(843) = K(843,1) * [CTNNB1_rna];
  R843: CTNNB1_rna => ; 1;
  // V(844) = K(844,1) * [PTGS2_rna];
  R844: PTGS2_rna => ; 1;
  // V(845) = K(845,1) * [TGFBR1_rna];
  R845: TGFBR1_rna => ; 1;
  // V(846) = K(846,1) * [STAT3_rna];
  R846: STAT3_rna => ; 1;
  // V(847) = K(847,1) * [CCR2_rna];
  R847: CCR2_rna => ; 1;
  // V(848) = K(848,1) * [STAT5A_rna];
  R848: STAT5A_rna => ; 1;
  // V(849) = K(849,1) * [PIK3CA_rna];
  R849: PIK3CA_rna => ; 1;
  // V(850) = K(850,1) * [MAPK9_rna];
  R850: MAPK9_rna => ; 1;
  // V(851) = K(851,1) * [NUMB_rna];
  R851: NUMB_rna => ; 1;
  // V(852) = K(852,1) * [IRAK1_rna];
  R852: IRAK1_rna => ; 1;
  // V(853) = K(853,1) * [RPS6KA3_rna];
  R853: RPS6KA3_rna => ; 1;
  // V(854) = K(854,1) * [JAK3_rna];
  R854: JAK3_rna => ; 1;
  // V(855) = K(855,1) * [RCAN1_rna];
  R855: RCAN1_rna => ; 1;
  // V(856) = K(856,1) * [PTEN_rna];
  R856: PTEN_rna => ; 1;
  // V(857) = K(857,1) * [RHOA_rna];
  R857: RHOA_rna => ; 1;
  // V(858) = K(858,1) * [RAC1_rna];
  R858: RAC1_rna => ; 1;
  // V(859) = K(859,1) * [NFKB2_rna];
  R859: NFKB2_rna => ; 1;
  // V(860) = K(860,1) * [MDM2_rna];
  R860: MDM2_rna => ; 1;
  // V(861) = K(861,1) * [NOTCH2_rna];
  R861: NOTCH2_rna => ; 1;
  // V(862) = K(862,1) * [BTK_rna];
  R862: BTK_rna => ; 1;
  // V(863) = K(863,1) * [PRDX1_rna];
  R863: PRDX1_rna => ; 1;
  // V(864) = K(864,1) * [EP300_rna];
  R864: EP300_rna => ; 1;
  // V(865) = K(865,1) * [PTPRJ_rna];
  R865: PTPRJ_rna => ; 1;
  // V(866) = K(866,1) * [STK4_rna];
  R866: STK4_rna => ; 1;
  // V(867) = K(867,1) * [ILK_rna];
  R867: ILK_rna => ; 1;
  // V(868) = K(868,1) * [ROCK1_rna];
  R868: ROCK1_rna => ; 1;
  // V(869) = K(869,1) * [ATR_rna];
  R869: ATR_rna => ; 1;
  // V(870) = K(870,1) * [CUL3_rna];
  R870: CUL3_rna => ; 1;
  // V(871) = K(871,1) * [IRF3_rna];
  R871: IRF3_rna => ; 1;
  // V(872) = K(872,1) * [PTPA_rna];
  R872: PTPA_rna => ; 1;
  // V(873) = K(873,1) * [SMAD2_rna];
  R873: SMAD2_rna => ; 1;
  // V(874) = K(874,1) * [STK11_rna];
  R874: STK11_rna => ; 1;
  // V(875) = K(875,1) * [NFE2L2_rna];
  R875: NFE2L2_rna => ; 1;
  // V(876) = K(876,1) * [PKN1_rna];
  R876: PKN1_rna => ; 1;
  // V(877) = K(877,1) * [MAPK6_rna];
  R877: MAPK6_rna => ; 1;
  // V(878) = K(878,1) * [HIF1A_rna];
  R878: HIF1A_rna => ; 1;
  // V(879) = K(879,1) * [DEPTOR_rna];
  R879: DEPTOR_rna => ; 1;
  // V(880) = K(880,1) * [BAD_rna];
  R880: BAD_rna => ; 1;
  // V(881) = K(881,1) * [AKT1S1_rna];
  R881: AKT1S1_rna => ; 1;
  // V(882) = K(882,1) * [SIRT1_rna];
  R882: SIRT1_rna => ; 1;
  // V(883) = K(883,1) * [MAP3K5_rna];
  R883: MAP3K5_rna => ; 1;
  // V(884) = K(884,1) * [PINK1_rna];
  R884: PINK1_rna => ; 1;
  // V(885) = K(885,1) * [HIPK2_rna];
  R885: HIPK2_rna => ; 1;
  // V(886) = K(886,1) * [TXNIP_rna];
  R886: TXNIP_rna => ; 1;
  // V(887) = K(887,1) * [RNF7_rna];
  R887: RNF7_rna => ; 1;
  // V(888) = K(888,1) * [IRS2_rna];
  R888: IRS2_rna => ; 1;
end
