// SBML level 3 version 2

model PT()

  // Compartments:
  compartment cell = 1;

  // Species:
  species AIFM1 in cell = 1/cell;
  species AIFM1_g in cell = 1/cell;
  species AIFM1_rna in cell = 1/cell;
  species ANXA1 in cell = 1/cell;
  species ANXA1_g in cell = 1/cell;
  species ANXA1_p in cell = 1/cell;
  species ANXA1_rna in cell = 1/cell;
  species AR in cell = 1/cell;
  species AR_g in cell = 1/cell;
  species AR_p in cell = 1/cell;
  species AR_rna in cell = 1/cell;
  species ATR in cell = 1/cell;
  species ATR_g in cell = 1/cell;
  species ATR_rna in cell = 1/cell;
  species AXL in cell = 1/cell;
  species AXL_g in cell = 1/cell;
  species AXL_p in cell = 1/cell;
  species AXL_rna in cell = 1/cell;
  species BAX in cell = 1/cell;
  species BAX_g in cell = 1/cell;
  species BAX_p in cell = 1/cell;
  species BAX_rna in cell = 1/cell;
  species BCL2 in cell = 1/cell;
  species BCL2_g in cell = 1/cell;
  species BCL2_p in cell = 1/cell;
  species BCL2_rna in cell = 1/cell;
  species BMP4 in cell = 1/cell;
  species BMP4_g in cell = 1/cell;
  species BMP4_rna in cell = 1/cell;
  species CALM1 in cell = 1/cell;
  species CALM1_g in cell = 1/cell;
  species CALM1_p in cell = 1/cell;
  species CALM1_rna in cell = 1/cell;
  species CAT in cell = 1/cell;
  species CAT_g in cell = 1/cell;
  species CAT_rna in cell = 1/cell;
  species CDKN1A in cell = 1/cell;
  species CDKN1A_g in cell = 1/cell;
  species CDKN1A_p in cell = 1/cell;
  species CDKN1A_rna in cell = 1/cell;
  species CDKN1B in cell = 1/cell;
  species CDKN1B_g in cell = 1/cell;
  species CDKN1B_p in cell = 1/cell;
  species CDKN1B_rna in cell = 1/cell;
  species COL1A1 in cell = 1/cell;
  species COL1A1_g in cell = 1/cell;
  species COL1A1_rna in cell = 1/cell;
  species CREB1 in cell = 1/cell;
  species CREB1_g in cell = 1/cell;
  species CREB1_p in cell = 1/cell;
  species CREB1_rna in cell = 1/cell;
  species CTNNB1 in cell = 1/cell;
  species CTNNB1_g in cell = 1/cell;
  species CTNNB1_p in cell = 1/cell;
  species CTNNB1_rna in cell = 1/cell;
  species CYBA in cell = 1/cell;
  species CYBA_g in cell = 1/cell;
  species CYBA_p in cell = 1/cell;
  species CYBA_rna in cell = 1/cell;
  species EPOR in cell = 1/cell;
  species EPOR_g in cell = 1/cell;
  species EPOR_p in cell = 1/cell;
  species EPOR_rna in cell = 1/cell;
  species ERN1 in cell = 1/cell;
  species ERN1_g in cell = 1/cell;
  species ERN1_p in cell = 1/cell;
  species ERN1_rna in cell = 1/cell;
  species ESR1 in cell = 1/cell;
  species ESR1_g in cell = 1/cell;
  species ESR1_p in cell = 1/cell;
  species ESR1_rna in cell = 1/cell;
  species EZH2 in cell = 1/cell;
  species EZH2_g in cell = 1/cell;
  species EZH2_p in cell = 1/cell;
  species EZH2_rna in cell = 1/cell;
  species FAS in cell = 1/cell;
  species FAS_g in cell = 1/cell;
  species FAS_rna in cell = 1/cell;
  species FGF1 in cell = 1/cell;
  species FGF1_g in cell = 1/cell;
  species FGF1_rna in cell = 1/cell;
  species FGF2 in cell = 1/cell;
  species FGF2_g in cell = 1/cell;
  species FGF2_rna in cell = 1/cell;
  species FOXO1 in cell = 1/cell;
  species FOXO1_g in cell = 1/cell;
  species FOXO1_p in cell = 1/cell;
  species FOXO1_rna in cell = 1/cell;
  species GCLC in cell = 1/cell;
  species GCLC_g in cell = 1/cell;
  species GCLC_rna in cell = 1/cell;
  species GCLM in cell = 1/cell;
  species GCLM_g in cell = 1/cell;
  species GCLM_rna in cell = 1/cell;
  species GHR in cell = 1/cell;
  species GHR_g in cell = 1/cell;
  species GHR_p in cell = 1/cell;
  species GHR_rna in cell = 1/cell;
  species GJA1 in cell = 1/cell;
  species GJA1_g in cell = 1/cell;
  species GJA1_p in cell = 1/cell;
  species GJA1_rna in cell = 1/cell;
  species GSTA1 in cell = 1/cell;
  species GSTA1_g in cell = 1/cell;
  species GSTA1_rna in cell = 1/cell;
  species HIF1A in cell = 1/cell;
  species HIF1A_g in cell = 1/cell;
  species HIF1A_rna in cell = 1/cell;
  species HMGN1 in cell = 1/cell;
  species HMGN1_g in cell = 1/cell;
  species HMGN1_p in cell = 1/cell;
  species HMGN1_rna in cell = 1/cell;
  species IKBKB in cell = 1/cell;
  species IKBKB_g in cell = 1/cell;
  species IKBKB_p in cell = 1/cell;
  species IKBKB_rna in cell = 1/cell;
  species IL6R in cell = 1/cell;
  species IL6R_g in cell = 1/cell;
  species IL6R_rna in cell = 1/cell;
  species INSR in cell = 1/cell;
  species INSR_g in cell = 1/cell;
  species INSR_p in cell = 1/cell;
  species INSR_rna in cell = 1/cell;
  species IRAK1 in cell = 1/cell;
  species IRAK1_g in cell = 1/cell;
  species IRAK1_p in cell = 1/cell;
  species IRAK1_rna in cell = 1/cell;
  species IRF3 in cell = 1/cell;
  species IRF3_g in cell = 1/cell;
  species IRF3_p in cell = 1/cell;
  species IRF3_rna in cell = 1/cell;
  species IRF8 in cell = 1/cell;
  species IRF8_g in cell = 1/cell;
  species IRF8_p in cell = 1/cell;
  species IRF8_rna in cell = 1/cell;
  species JAK1 in cell = 1/cell;
  species JAK1_g in cell = 1/cell;
  species JAK1_p in cell = 1/cell;
  species JAK1_rna in cell = 1/cell;
  species JAK2 in cell = 1/cell;
  species JAK2_g in cell = 1/cell;
  species JAK2_p in cell = 1/cell;
  species JAK2_rna in cell = 1/cell;
  species LDLR in cell = 1/cell;
  species LDLR_g in cell = 1/cell;
  species LDLR_rna in cell = 1/cell;
  species LEPR in cell = 1/cell;
  species LEPR_g in cell = 1/cell;
  species LEPR_p in cell = 1/cell;
  species LEPR_rna in cell = 1/cell;
  species LYN in cell = 1/cell;
  species LYN_g in cell = 1/cell;
  species LYN_p in cell = 1/cell;
  species LYN_rna in cell = 1/cell;
  species MFN1 in cell = 1/cell;
  species MFN1_g in cell = 1/cell;
  species MFN1_rna in cell = 1/cell;
  species MYLIP in cell = 1/cell;
  species MYLIP_g in cell = 1/cell;
  species MYLIP_rna in cell = 1/cell;
  species NFE2L2 in cell = 1/cell;
  species NFE2L2_g in cell = 1/cell;
  species NFE2L2_p in cell = 1/cell;
  species NFE2L2_rna in cell = 1/cell;
  species NFKB1 in cell = 1/cell;
  species NFKB1_g in cell = 1/cell;
  species NFKB1_p in cell = 1/cell;
  species NFKB1_rna in cell = 1/cell;
  species NOTCH2 in cell = 1/cell;
  species NOTCH2_g in cell = 1/cell;
  species NOTCH2_rna in cell = 1/cell;
  species NPHS1 in cell = 1/cell;
  species NPHS1_g in cell = 1/cell;
  species NPHS1_p in cell = 1/cell;
  species NPHS1_rna in cell = 1/cell;
  species NR1H4 in cell = 1/cell;
  species NR1H4_g in cell = 1/cell;
  species NR1H4_p in cell = 1/cell;
  species NR1H4_rna in cell = 1/cell;
  species OCLN in cell = 1/cell;
  species OCLN_g in cell = 1/cell;
  species OCLN_p in cell = 1/cell;
  species OCLN_rna in cell = 1/cell;
  species PCK1 in cell = 1/cell;
  species PCK1_g in cell = 1/cell;
  species PCK1_rna in cell = 1/cell;
  species PDPK1 in cell = 1/cell;
  species PDPK1_g in cell = 1/cell;
  species PDPK1_p in cell = 1/cell;
  species PDPK1_rna in cell = 1/cell;
  species PINK1 in cell = 1/cell;
  species PINK1_g in cell = 1/cell;
  species PINK1_rna in cell = 1/cell;
  species PKM in cell = 1/cell;
  species PKM_g in cell = 1/cell;
  species PKM_p in cell = 1/cell;
  species PKM_rna in cell = 1/cell;
  species PLK2 in cell = 1/cell;
  species PLK2_g in cell = 1/cell;
  species PLK2_rna in cell = 1/cell;
  species PPARGC1A in cell = 1/cell;
  species PPARGC1A_g in cell = 1/cell;
  species PPARGC1A_rna in cell = 1/cell;
  species PRKCA in cell = 1/cell;
  species PRKCA_g in cell = 1/cell;
  species PRKCA_p in cell = 1/cell;
  species PRKCA_rna in cell = 1/cell;
  species PRKCZ in cell = 1/cell;
  species PRKCZ_g in cell = 1/cell;
  species PRKCZ_p in cell = 1/cell;
  species PRKCZ_rna in cell = 1/cell;
  species PTEN in cell = 1/cell;
  species PTEN_g in cell = 1/cell;
  species PTEN_p in cell = 1/cell;
  species PTEN_rna in cell = 1/cell;
  species PTPN11 in cell = 1/cell;
  species PTPN11_g in cell = 1/cell;
  species PTPN11_p in cell = 1/cell;
  species PTPN11_rna in cell = 1/cell;
  species PTPN2 in cell = 1/cell;
  species PTPN2_g in cell = 1/cell;
  species PTPN2_rna in cell = 1/cell;
  species PTPN6 in cell = 1/cell;
  species PTPN6_g in cell = 1/cell;
  species PTPN6_p in cell = 1/cell;
  species PTPN6_rna in cell = 1/cell;
  species ROCK1 in cell = 1/cell;
  species ROCK1_g in cell = 1/cell;
  species ROCK1_rna in cell = 1/cell;
  species RORA in cell = 1/cell;
  species RORA_g in cell = 1/cell;
  species RORA_p in cell = 1/cell;
  species RORA_rna in cell = 1/cell;
  species SGK1 in cell = 1/cell;
  species SGK1_g in cell = 1/cell;
  species SGK1_p in cell = 1/cell;
  species SGK1_rna in cell = 1/cell;
  species SP1 in cell = 1/cell;
  species SP1_g in cell = 1/cell;
  species SP1_p in cell = 1/cell;
  species SP1_rna in cell = 1/cell;
  species STAT1 in cell = 1/cell;
  species STAT1_g in cell = 1/cell;
  species STAT1_p in cell = 1/cell;
  species STAT1_rna in cell = 1/cell;
  species STAT6 in cell = 1/cell;
  species STAT6_g in cell = 1/cell;
  species STAT6_p in cell = 1/cell;
  species STAT6_rna in cell = 1/cell;
  species STK4 in cell = 1/cell;
  species STK4_g in cell = 1/cell;
  species STK4_p in cell = 1/cell;
  species STK4_rna in cell = 1/cell;
  species TGFB1 in cell = 1/cell;
  species TGFB1_g in cell = 1/cell;
  species TGFB1_rna in cell = 1/cell;
  species TGFB2 in cell = 1/cell;
  species TGFB2_g in cell = 1/cell;
  species TGFB2_rna in cell = 1/cell;
  species TLR3 in cell = 1/cell;
  species TLR3_g in cell = 1/cell;
  species TLR3_rna in cell = 1/cell;
  species TLR4 in cell = 1/cell;
  species TLR4_g in cell = 1/cell;
  species TLR4_rna in cell = 1/cell;
  species TNC in cell = 1/cell;
  species TNC_g in cell = 1/cell;
  species TNC_rna in cell = 1/cell;
  species TP53 in cell = 1/cell;
  species TP53_g in cell = 1/cell;
  species TP53_p in cell = 1/cell;
  species TP53_rna in cell = 1/cell;
  species UBC in cell = 1/cell;
  species UBC_g in cell = 1/cell;
  species UBC_p in cell = 1/cell;
  species UBC_rna in cell = 1/cell;
  species VCAN in cell = 1/cell;
  species VCAN_g in cell = 1/cell;
  species VCAN_rna in cell = 1/cell;
  species VEGFA in cell = 1/cell;
  species VEGFA_g in cell = 1/cell;
  species VEGFA_rna in cell = 1/cell;
  species VLDLR in cell = 1/cell;
  species VLDLR_g in cell = 1/cell;
  species VLDLR_rna in cell = 1/cell;
  species WNT7A in cell = 1/cell;
  species WNT7A_g in cell = 1/cell;
  species WNT7A_rna in cell = 1/cell;
  species YAP1 in cell = 1/cell;
  species YAP1_g in cell = 1/cell;
  species YAP1_p in cell = 1/cell;
  species YAP1_rna in cell = 1/cell;

  // Reactions:
  // V(1) = K(1,1) * [PRKCA_p] * [CTNNB1] -K(1,2) * [PRKCA_p |CTNNB1];
  R1: CTNNB1 => PRKCA_p; 1;
  // V(2) = K(2,1) * [PRKCA_p |CTNNB1];
  R2: CTNNB1 => PRKCA_p; 1;
  // V(3) = K(3,1) * [PRKCZ_p] * [SP1] -K(3,2) * [PRKCZ_p |SP1];
  R3: SP1 => PRKCZ_p; 1;
  // V(4) = K(4,1) * [PRKCZ_p |SP1];
  R4: SP1 => PRKCZ_p; 1;
  // V(5) = K(5,1) * [IKBKB_p] * [IKBKB] -K(5,2) * [IKBKB_p |IKBKB];
  R5: IKBKB => IKBKB_p; 1;
  // V(6) = K(6,1) * [IKBKB_p |IKBKB];
  R6: IKBKB => IKBKB_p; 1;
  // V(7) = K(7,1) * [JAK2_p] * [JAK2] -K(7,2) * [JAK2_p |JAK2];
  R7: JAK2_p => JAK2; 1;
  // V(8) = K(8,1) * [JAK2_p |JAK2];
  R8: JAK2_p => JAK2; 1;
  // V(9) = K(9,1) * [PRKCA_p] * [PTPN6] -K(9,2) * [PRKCA_p |PTPN6];
  R9: PTPN6 => PRKCA_p; 1;
  // V(10) = K(10,1) * [PRKCA_p |PTPN6];
  R10: PTPN6 => PRKCA_p; 1;
  // V(11) = K(11,1) * [PDPK1_p] * [IKBKB] -K(11,2) * [PDPK1_p |IKBKB];
  R11: PDPK1_p => IKBKB; 1;
  // V(12) = K(12,1) * [PDPK1_p |IKBKB];
  R12: PDPK1_p => IKBKB; 1;
  // V(13) = K(13,1) * [INSR_p] * [INSR] -K(13,2) * [INSR_p |INSR];
  R13: INSR_p => INSR; 1;
  // V(14) = K(14,1) * [INSR_p |INSR];
  R14: INSR_p => INSR; 1;
  // V(15) = K(15,1) * [PRKCZ_p] * [NR1H4] -K(15,2) * [PRKCZ_p |NR1H4];
  R15: PRKCZ_p => NR1H4; 1;
  // V(16) = K(16,1) * [PRKCZ_p |NR1H4];
  R16: PRKCZ_p => NR1H4; 1;
  // V(17) = K(17,1) * [JAK1_p] * [STAT1] -K(17,2) * [JAK1_p |STAT1];
  R17: STAT1 => JAK1_p; 1;
  // V(18) = K(18,1) * [JAK1_p |STAT1];
  R18: STAT1 => JAK1_p; 1;
  // V(19) = K(19,1) * [STK4_p] * [FOXO1] -K(19,2) * [STK4_p |FOXO1];
  R19: STK4_p => FOXO1; 1;
  // V(20) = K(20,1) * [STK4_p |FOXO1];
  R20: STK4_p => FOXO1; 1;
  // V(21) = K(21,1) * [JAK2_p] * [EPOR] -K(21,2) * [JAK2_p |EPOR];
  R21: JAK2_p => EPOR; 1;
  // V(22) = K(22,1) * [JAK2_p |EPOR];
  R22: JAK2_p => EPOR; 1;
  // V(23) = K(23,1) * [JAK2_p] * [STAT1] -K(23,2) * [JAK2_p |STAT1];
  R23: JAK2_p => STAT1; 1;
  // V(24) = K(24,1) * [JAK2_p |STAT1];
  R24: JAK2_p => STAT1; 1;
  // V(25) = K(25,1) * [PRKCA_p] * [PRKCA] -K(25,2) * [PRKCA_p |PRKCA];
  R25: PRKCA => PRKCA_p; 1;
  // V(26) = K(26,1) * [PRKCA_p |PRKCA];
  R26: PRKCA => PRKCA_p; 1;
  // V(27) = K(27,1) * [PRKCA_p] * [HMGN1] -K(27,2) * [PRKCA_p |HMGN1];
  R27: HMGN1 => PRKCA_p; 1;
  // V(28) = K(28,1) * [PRKCA_p |HMGN1];
  R28: HMGN1 => PRKCA_p; 1;
  // V(29) = K(29,1) * [PDPK1_p] * [SGK1] -K(29,2) * [PDPK1_p |SGK1];
  R29: PDPK1_p => SGK1; 1;
  // V(30) = K(30,1) * [PDPK1_p |SGK1];
  R30: PDPK1_p => SGK1; 1;
  // V(31) = K(31,1) * [INSR_p] * [CALM1] -K(31,2) * [INSR_p |CALM1];
  R31: INSR_p => CALM1; 1;
  // V(32) = K(32,1) * [INSR_p |CALM1];
  R32: INSR_p => CALM1; 1;
  // V(33) = K(33,1) * [PRKCA_p] * [CDKN1A] -K(33,2) * [PRKCA_p |CDKN1A];
  R33: PRKCA_p => CDKN1A; 1;
  // V(34) = K(34,1) * [PRKCA_p |CDKN1A];
  R34: PRKCA_p => CDKN1A; 1;
  // V(35) = K(35,1) * [ERN1_p] * [ERN1] -K(35,2) * [ERN1_p |ERN1];
  R35: ERN1_p => ERN1; 1;
  // V(36) = K(36,1) * [ERN1_p |ERN1];
  R36: ERN1_p => ERN1; 1;
  // V(37) = K(37,1) * [PRKCA_p] * [GJA1] -K(37,2) * [PRKCA_p |GJA1];
  R37: GJA1 => PRKCA_p; 1;
  // V(38) = K(38,1) * [PRKCA_p |GJA1];
  R38: GJA1 => PRKCA_p; 1;
  // V(39) = K(39,1) * [PRKCZ_p] * [BAX] -K(39,2) * [PRKCZ_p |BAX];
  R39: PRKCZ_p => BAX; 1;
  // V(40) = K(40,1) * [PRKCZ_p |BAX];
  R40: PRKCZ_p => BAX; 1;
  // V(41) = K(41,1) * [PRKCZ_p] * [YAP1] -K(41,2) * [PRKCZ_p |YAP1];
  R41: YAP1 => PRKCZ_p; 1;
  // V(42) = K(42,1) * [PRKCZ_p |YAP1];
  R42: YAP1 => PRKCZ_p; 1;
  // V(43) = K(43,1) * [PINK1] * [UBC] -K(43,2) * [PINK1 |UBC];
  R43: PINK1 => UBC; 1;
  // V(44) = K(44,1) * [PINK1 |UBC];
  R44: PINK1 => UBC; 1;
  // V(45) = K(45,1) * [STK4_p] * [STK4] -K(45,2) * [STK4_p |STK4];
  R45: STK4_p => STK4; 1;
  // V(46) = K(46,1) * [STK4_p |STK4];
  R46: STK4_p => STK4; 1;
  // V(47) = K(47,1) * [SGK1_p] * [FOXO1] -K(47,2) * [SGK1_p |FOXO1];
  R47: SGK1_p => FOXO1; 1;
  // V(48) = K(48,1) * [SGK1_p |FOXO1];
  R48: SGK1_p => FOXO1; 1;
  // V(49) = K(49,1) * [PRKCA_p] * [JAK2] -K(49,2) * [PRKCA_p |JAK2];
  R49: PRKCA_p => JAK2; 1;
  // V(50) = K(50,1) * [PRKCA_p |JAK2];
  R50: PRKCA_p => JAK2; 1;
  // V(51) = K(51,1) * [PDPK1_p] * [PDPK1] -K(51,2) * [PDPK1_p |PDPK1];
  R51: PDPK1_p => PDPK1; 1;
  // V(52) = K(52,1) * [PDPK1_p |PDPK1];
  R52: PDPK1_p => PDPK1; 1;
  // V(53) = K(53,1) * [SGK1_p] * [CDKN1B] -K(53,2) * [SGK1_p |CDKN1B];
  R53: CDKN1B => SGK1_p; 1;
  // V(54) = K(54,1) * [SGK1_p |CDKN1B];
  R54: CDKN1B => SGK1_p; 1;
  // V(55) = K(55,1) * [IKBKB_p] * [FOXO1] -K(55,2) * [IKBKB_p |FOXO1];
  R55: FOXO1 => IKBKB_p; 1;
  // V(56) = K(56,1) * [IKBKB_p |FOXO1];
  R56: FOXO1 => IKBKB_p; 1;
  // V(57) = K(57,1) * [IRAK1_p] * [IRAK1] -K(57,2) * [IRAK1_p |IRAK1];
  R57: IRAK1_p => IRAK1; 1;
  // V(58) = K(58,1) * [IRAK1_p |IRAK1];
  R58: IRAK1_p => IRAK1; 1;
  // V(59) = K(59,1) * [PRKCA_p] * [INSR] -K(59,2) * [PRKCA_p |INSR];
  R59: PRKCA_p => INSR; 1;
  // V(60) = K(60,1) * [PRKCA_p |INSR];
  R60: PRKCA_p => INSR; 1;
  // V(61) = K(61,1) * [AXL_p] * [AXL] -K(61,2) * [AXL_p |AXL];
  R61: AXL => AXL_p; 1;
  // V(62) = K(62,1) * [AXL_p |AXL];
  R62: AXL => AXL_p; 1;
  // V(63) = K(63,1) * [PRKCZ_p] * [PRKCZ] -K(63,2) * [PRKCZ_p |PRKCZ];
  R63: PRKCZ_p => PRKCZ; 1;
  // V(64) = K(64,1) * [PRKCZ_p |PRKCZ];
  R64: PRKCZ_p => PRKCZ; 1;
  // V(65) = K(65,1) * [IKBKB_p] * [NFKB1] -K(65,2) * [IKBKB_p |NFKB1];
  R65: NFKB1 => IKBKB_p; 1;
  // V(66) = K(66,1) * [IKBKB_p |NFKB1];
  R66: NFKB1 => IKBKB_p; 1;
  // V(67) = K(67,1) * [ROCK1] * [PTEN] -K(67,2) * [ROCK1 |PTEN];
  R67: PTEN => ROCK1; 1;
  // V(68) = K(68,1) * [ROCK1 |PTEN];
  R68: PTEN => ROCK1; 1;
  // V(69) = K(69,1) * [IL6R] * [JAK2] -K(69,2) * [IL6R |JAK2];
  R69: IL6R => JAK2; 1;
  // V(70) = K(70,1) * [IL6R |JAK2];
  R70: IL6R => JAK2; 1;
  // V(71) = K(71,1) * [PRKCA_p] * [NR1H4] -K(71,2) * [PRKCA_p |NR1H4];
  R71: PRKCA_p => NR1H4; 1;
  // V(72) = K(72,1) * [PRKCA_p |NR1H4];
  R72: PRKCA_p => NR1H4; 1;
  // V(73) = K(73,1) * [PRKCA_p] * [ANXA1] -K(73,2) * [PRKCA_p |ANXA1];
  R73: PRKCA_p => ANXA1; 1;
  // V(74) = K(74,1) * [PRKCA_p |ANXA1];
  R74: PRKCA_p => ANXA1; 1;
  // V(75) = K(75,1) * [JAK2_p] * [STAT6] -K(75,2) * [JAK2_p |STAT6];
  R75: STAT6 => JAK2_p; 1;
  // V(76) = K(76,1) * [JAK2_p |STAT6];
  R76: STAT6 => JAK2_p; 1;
  // V(77) = K(77,1) * [PLK2] * [TP53] -K(77,2) * [PLK2 |TP53];
  R77: TP53 => PLK2; 1;
  // V(78) = K(78,1) * [PLK2 |TP53];
  R78: TP53 => PLK2; 1;
  // V(79) = K(79,1) * [JAK1_p] * [STAT6] -K(79,2) * [JAK1_p |STAT6];
  R79: STAT6 => JAK1_p; 1;
  // V(80) = K(80,1) * [JAK1_p |STAT6];
  R80: STAT6 => JAK1_p; 1;
  // V(81) = K(81,1) * [STK4_p] * [IRF3] -K(81,2) * [STK4_p |IRF3];
  R81: STK4_p => IRF3; 1;
  // V(82) = K(82,1) * [STK4_p |IRF3];
  R82: STK4_p => IRF3; 1;
  // V(83) = K(83,1) * [JAK2_p] * [CDKN1B] -K(83,2) * [JAK2_p |CDKN1B];
  R83: JAK2_p => CDKN1B; 1;
  // V(84) = K(84,1) * [JAK2_p |CDKN1B];
  R84: JAK2_p => CDKN1B; 1;
  // V(85) = K(85,1) * [PRKCA_p] * [NPHS1] -K(85,2) * [PRKCA_p |NPHS1];
  R85: NPHS1 => PRKCA_p; 1;
  // V(86) = K(86,1) * [PRKCA_p |NPHS1];
  R86: NPHS1 => PRKCA_p; 1;
  // V(87) = K(87,1) * [PRKCA_p] * [CYBA] -K(87,2) * [PRKCA_p |CYBA];
  R87: PRKCA_p => CYBA; 1;
  // V(88) = K(88,1) * [PRKCA_p |CYBA];
  R88: PRKCA_p => CYBA; 1;
  // V(89) = K(89,1) * [ROCK1] * [TP53] -K(89,2) * [ROCK1 |TP53];
  R89: TP53 => ROCK1; 1;
  // V(90) = K(90,1) * [ROCK1 |TP53];
  R90: TP53 => ROCK1; 1;
  // V(91) = K(91,1) * [STK4_p] * [AR] -K(91,2) * [STK4_p |AR];
  R91: STK4_p => AR; 1;
  // V(92) = K(92,1) * [STK4_p |AR];
  R92: STK4_p => AR; 1;
  // V(93) = K(93,1) * [STK4_p] * [PRKCA] -K(93,2) * [STK4_p |PRKCA];
  R93: STK4_p => PRKCA; 1;
  // V(94) = K(94,1) * [STK4_p |PRKCA];
  R94: STK4_p => PRKCA; 1;
  // V(95) = K(95,1) * [LYN_p] * [LYN] -K(95,2) * [LYN_p |LYN];
  R95: LYN => LYN_p; 1;
  // V(96) = K(96,1) * [LYN_p |LYN];
  R96: LYN => LYN_p; 1;
  // V(97) = K(97,1) * [PRKCZ_p] * [CTNNB1] -K(97,2) * [PRKCZ_p |CTNNB1];
  R97: CTNNB1 => PRKCZ_p; 1;
  // V(98) = K(98,1) * [PRKCZ_p |CTNNB1];
  R98: CTNNB1 => PRKCZ_p; 1;
  // V(99) = K(99,1) * [PRKCA_p] * [OCLN] -K(99,2) * [PRKCA_p |OCLN];
  R99: PRKCA_p => OCLN; 1;
  // V(100) = K(100,1) * [PRKCA_p |OCLN];
  R100: PRKCA_p => OCLN; 1;
  // V(101) = K(101,1) * [SGK1_p] * [SP1] -K(101,2) * [SGK1_p |SP1];
  R101: SP1 => SGK1_p; 1;
  // V(102) = K(102,1) * [SGK1_p |SP1];
  R102: SP1 => SGK1_p; 1;
  // V(103) = K(103,1) * [JAK2_p] * [GHR] -K(103,2) * [JAK2_p |GHR];
  R103: JAK2_p => GHR; 1;
  // V(104) = K(104,1) * [JAK2_p |GHR];
  R104: JAK2_p => GHR; 1;
  // V(105) = K(105,1) * [JAK2_p] * [LEPR] -K(105,2) * [JAK2_p |LEPR];
  R105: JAK2_p => LEPR; 1;
  // V(106) = K(106,1) * [JAK2_p |LEPR];
  R106: JAK2_p => LEPR; 1;
  // V(107) = K(107,1) * [INSR_p] * [PTPN6] -K(107,2) * [INSR_p |PTPN6];
  R107: PTPN6 => INSR_p; 1;
  // V(108) = K(108,1) * [INSR_p |PTPN6];
  R108: PTPN6 => INSR_p; 1;
  // V(109) = K(109,1) * [JAK1_p] * [PTPN11] -K(109,2) * [JAK1_p |PTPN11];
  R109: PTPN11 => JAK1_p; 1;
  // V(110) = K(110,1) * [JAK1_p |PTPN11];
  R110: PTPN11 => JAK1_p; 1;
  // V(111) = K(111,1) * [PINK1] * [TP53] -K(111,2) * [PINK1 |TP53];
  R111: TP53 => PINK1; 1;
  // V(112) = K(112,1) * [PINK1 |TP53];
  R112: TP53 => PINK1; 1;
  // V(113) = K(113,1) * [INSR_p] * [PTEN] -K(113,2) * [INSR_p |PTEN];
  R113: PTEN => INSR_p; 1;
  // V(114) = K(114,1) * [INSR_p |PTEN];
  R114: PTEN => INSR_p; 1;
  // V(115) = K(115,1) * [PRKCA_p] * [NFE2L2] -K(115,2) * [PRKCA_p |NFE2L2];
  R115: PRKCA_p => NFE2L2; 1;
  // V(116) = K(116,1) * [PRKCA_p |NFE2L2];
  R116: PRKCA_p => NFE2L2; 1;
  // V(117) = K(117,1) * [PRKCZ_p] * [IKBKB] -K(117,2) * [PRKCZ_p |IKBKB];
  R117: PRKCZ_p => IKBKB; 1;
  // V(118) = K(118,1) * [PRKCZ_p |IKBKB];
  R118: PRKCZ_p => IKBKB; 1;
  // V(119) = K(119,1) * [JAK2_p] * [ESR1] -K(119,2) * [JAK2_p |ESR1];
  R119: JAK2_p => ESR1; 1;
  // V(120) = K(120,1) * [JAK2_p |ESR1];
  R120: JAK2_p => ESR1; 1;
  // V(121) = K(121,1) * [LYN_p] * [CDKN1B] -K(121,2) * [LYN_p |CDKN1B];
  R121: CDKN1B => LYN_p; 1;
  // V(122) = K(122,1) * [LYN_p |CDKN1B];
  R122: CDKN1B => LYN_p; 1;
  // V(123) = K(123,1) * [IKBKB_p] * [TP53] -K(123,2) * [IKBKB_p |TP53];
  R123: TP53 => IKBKB_p; 1;
  // V(124) = K(124,1) * [IKBKB_p |TP53];
  R124: TP53 => IKBKB_p; 1;
  // V(125) = K(125,1) * [JAK2_p] * [PTPN11] -K(125,2) * [JAK2_p |PTPN11];
  R125: JAK2_p => PTPN11; 1;
  // V(126) = K(126,1) * [JAK2_p |PTPN11];
  R126: JAK2_p => PTPN11; 1;
  // V(127) = K(127,1) * [ATR] * [TP53] -K(127,2) * [ATR |TP53];
  R127: TP53 => ATR; 1;
  // V(128) = K(128,1) * [ATR |TP53];
  R128: TP53 => ATR; 1;
  // V(129) = K(129,1) * [ATR] * [CREB1] -K(129,2) * [ATR |CREB1];
  R129: ATR => CREB1; 1;
  // V(130) = K(130,1) * [ATR |CREB1];
  R130: ATR => CREB1; 1;
  // V(131) = K(131,1) * [PRKCA_p] * [BCL2] -K(131,2) * [PRKCA_p |BCL2];
  R131: PRKCA_p => BCL2; 1;
  // V(132) = K(132,1) * [PRKCA_p |BCL2];
  R132: PRKCA_p => BCL2; 1;
  // V(133) = K(133,1) * [PRKCA_p] * [PTPN11] -K(133,2) * [PRKCA_p |PTPN11];
  R133: PTPN11 => PRKCA_p; 1;
  // V(134) = K(134,1) * [PRKCA_p |PTPN11];
  R134: PTPN11 => PRKCA_p; 1;
  // V(135) = K(135,1) * [SGK1_p] * [STAT1] -K(135,2) * [SGK1_p |STAT1];
  R135: SGK1_p => STAT1; 1;
  // V(136) = K(136,1) * [SGK1_p |STAT1];
  R136: SGK1_p => STAT1; 1;
  // V(137) = K(137,1) * [PDPK1_p] * [PRKCA] -K(137,2) * [PDPK1_p |PRKCA];
  R137: PDPK1_p => PRKCA; 1;
  // V(138) = K(138,1) * [PDPK1_p |PRKCA];
  R138: PDPK1_p => PRKCA; 1;
  // V(139) = K(139,1) * [PRKCA_p] * [RORA] -K(139,2) * [PRKCA_p |RORA];
  R139: PRKCA_p => RORA; 1;
  // V(140) = K(140,1) * [PRKCA_p |RORA];
  R140: PRKCA_p => RORA; 1;
  // V(141) = K(141,1) * [ROCK1] * [PDPK1] -K(141,2) * [ROCK1 |PDPK1];
  R141: ROCK1 => PDPK1; 1;
  // V(142) = K(142,1) * [ROCK1 |PDPK1];
  R142: ROCK1 => PDPK1; 1;
  // V(143) = K(143,1) * [JAK2_p] * [EZH2] -K(143,2) * [JAK2_p |EZH2];
  R143: JAK2_p => EZH2; 1;
  // V(144) = K(144,1) * [JAK2_p |EZH2];
  R144: JAK2_p => EZH2; 1;
  // V(145) = K(145,1) * [PDPK1_p] * [PRKCZ] -K(145,2) * [PDPK1_p |PRKCZ];
  R145: PDPK1_p => PRKCZ; 1;
  // V(146) = K(146,1) * [PDPK1_p |PRKCZ];
  R146: PDPK1_p => PRKCZ; 1;
  // V(147) = K(147,1) * [PINK1] * [PTEN] -K(147,2) * [PINK1 |PTEN];
  R147: PTEN => PINK1; 1;
  // V(148) = K(148,1) * [PINK1 |PTEN];
  R148: PTEN => PINK1; 1;
  // V(149) = K(149,1) * [PRKCA_p] * [TP53] -K(149,2) * [PRKCA_p |TP53];
  R149: TP53 => PRKCA_p; 1;
  // V(150) = K(150,1) * [PRKCA_p |TP53];
  R150: TP53 => PRKCA_p; 1;
  // V(151) = K(151,1) * [LYN_p] * [PTPN6] -K(151,2) * [LYN_p |PTPN6];
  R151: PTPN6 => LYN_p; 1;
  // V(152) = K(152,1) * [LYN_p |PTPN6];
  R152: PTPN6 => LYN_p; 1;
  // V(153) = K(153,1) * [PTPN6_p] * [JAK2_p] -K(153,2) * [PTPN6_p |JAK2_p];
  R153: PTPN6_p => JAK2_p; 1;
  // V(154) = K(154,1) * [PTPN6_p |JAK2_p];
  R154: PTPN6_p => JAK2_p; 1;
  // V(155) = K(155,1) * [PTPN2] * [GHR_p] -K(155,2) * [PTPN2 |GHR_p];
  R155: GHR_p => PTPN2; 1;
  // V(156) = K(156,1) * [PTPN2 |GHR_p];
  R156: GHR_p => PTPN2; 1;
  // V(157) = K(157,1) * [PTPN2] * [INSR_p] -K(157,2) * [PTPN2 |INSR_p];
  R157: INSR_p => PTPN2; 1;
  // V(158) = K(158,1) * [PTPN2 |INSR_p];
  R158: INSR_p => PTPN2; 1;
  // V(159) = K(159,1) * [PTEN_p] * [AR_p] -K(159,2) * [PTEN_p |AR_p];
  R159: PTEN_p => AR_p; 1;
  // V(160) = K(160,1) * [PTEN_p |AR_p];
  R160: PTEN_p => AR_p; 1;
  // V(161) = K(161,1) * [PTPN6_p] * [PKM_p] -K(161,2) * [PTPN6_p |PKM_p];
  R161: PTPN6_p => PKM_p; 1;
  // V(162) = K(162,1) * [PTPN6_p |PKM_p];
  R162: PTPN6_p => PKM_p; 1;
  // V(163) = K(163,1) * [PTPN6_p] * [INSR_p] -K(163,2) * [PTPN6_p |INSR_p];
  R163: PTPN6_p => INSR_p; 1;
  // V(164) = K(164,1) * [PTPN6_p |INSR_p];
  R164: PTPN6_p => INSR_p; 1;
  // V(165) = K(165,1) * [PTPN2] * [JAK1_p] -K(165,2) * [PTPN2 |JAK1_p];
  R165: PTPN2 => JAK1_p; 1;
  // V(166) = K(166,1) * [PTPN2 |JAK1_p];
  R166: PTPN2 => JAK1_p; 1;
  // V(167) = K(167,1) * [PTPN11_p] * [IRF8_p] -K(167,2) * [PTPN11_p |IRF8_p];
  R167: IRF8_p => PTPN11_p; 1;
  // V(168) = K(168,1) * [PTPN11_p |IRF8_p];
  R168: IRF8_p => PTPN11_p; 1;
  // V(169) = K(169,1) * [PTPN6_p] * [JAK1_p] -K(169,2) * [PTPN6_p |JAK1_p];
  R169: PTPN6_p => JAK1_p; 1;
  // V(170) = K(170,1) * [PTPN6_p |JAK1_p];
  R170: PTPN6_p => JAK1_p; 1;
  // V(171) = K(171,1) * [PTEN_p] * [SP1_p] -K(171,2) * [PTEN_p |SP1_p];
  R171: PTEN_p => SP1_p; 1;
  // V(172) = K(172,1) * [PTEN_p |SP1_p];
  R172: PTEN_p => SP1_p; 1;
  // V(173) = K(173,1) * [PTPN2] * [STAT6_p] -K(173,2) * [PTPN2 |STAT6_p];
  R173: STAT6_p => PTPN2; 1;
  // V(174) = K(174,1) * [PTPN2 |STAT6_p];
  R174: STAT6_p => PTPN2; 1;
  // V(175) = K(175,1) * [PTPN11_p] * [JAK2_p] -K(175,2) * [PTPN11_p |JAK2_p];
  R175: JAK2_p => PTPN11_p; 1;
  // V(176) = K(176,1) * [PTPN11_p |JAK2_p];
  R176: JAK2_p => PTPN11_p; 1;
  // V(177) = K(177,1) * [PTEN_p] * [PTEN_p] -K(177,2) * [PTEN_p |PTEN_p];
  R177: PTEN_p => ; 1;
  // V(178) = K(178,1) * [PTEN_p |PTEN_p];
  R178: PTEN_p => ; 1;
  // V(179) = K(179,1) * [PTPN2] * [GJA1_p] -K(179,2) * [PTPN2 |GJA1_p];
  R179: PTPN2 => GJA1_p; 1;
  // V(180) = K(180,1) * [PTPN2 |GJA1_p];
  R180: PTPN2 => GJA1_p; 1;
  // V(181) = K(181,1) * [PTPN2] * [STAT1_p] -K(181,2) * [PTPN2 |STAT1_p];
  R181: STAT1_p => PTPN2; 1;
  // V(182) = K(182,1) * [PTPN2 |STAT1_p];
  R182: STAT1_p => PTPN2; 1;
  // V(183) = K(183,1) * [PTPN11_p] * [CDKN1B_p] -K(183,2) * [PTPN11_p |CDKN1B_p];
  R183: PTPN11_p => CDKN1B_p; 1;
  // V(184) = K(184,1) * [PTPN11_p |CDKN1B_p];
  R184: PTPN11_p => CDKN1B_p; 1;
  // V(185) = K(185,1) * [PTEN_p] * [IRF3_p] -K(185,2) * [PTEN_p |IRF3_p];
  R185: PTEN_p => IRF3_p; 1;
  // V(186) = K(186,1) * [PTEN_p |IRF3_p];
  R186: PTEN_p => IRF3_p; 1;
  // V(187) = K(187,1) * [PTPN11_p] * [STAT1_p] -K(187,2) * [PTPN11_p |STAT1_p];
  R187: STAT1_p => PTPN11_p; 1;
  // V(188) = K(188,1) * [PTPN11_p |STAT1_p];
  R188: STAT1_p => PTPN11_p; 1;
  // V(189) = K(189,1) * [PTEN_p] * [CREB1_p] -K(189,2) * [PTEN_p |CREB1_p];
  R189: PTEN_p => CREB1_p; 1;
  // V(190) = K(190,1) * [PTEN_p |CREB1_p];
  R190: PTEN_p => CREB1_p; 1;
  // V(191) = K(191,1) * [PTPN6_p] * [CTNNB1_p] -K(191,2) * [PTPN6_p |CTNNB1_p];
  R191: PTPN6_p => CTNNB1_p; 1;
  // V(192) = K(192,1) * [PTPN6_p |CTNNB1_p];
  R192: PTPN6_p => CTNNB1_p; 1;
  // V(193) = K(193,1) * [PTPN6_p] * [LYN_p] -K(193,2) * [PTPN6_p |LYN_p];
  R193: PTPN6_p => LYN_p; 1;
  // V(194) = K(194,1) * [PTPN6_p |LYN_p];
  R194: PTPN6_p => LYN_p; 1;
  // V(195) = K(195,1) * [MYLIP] * [LDLR] -K(195,2) * [MYLIP |LDLR];
  R195: MYLIP => LDLR; 1;
  // V(196) = K(196,1) * [MYLIP |LDLR];
  R196: MYLIP => LDLR; 1;
  // V(197) = K(197,1) * [MYLIP] * [VLDLR] -K(197,2) * [MYLIP |VLDLR];
  R197: VLDLR => MYLIP; 1;
  // V(198) = K(198,1) * [MYLIP |VLDLR];
  R198: VLDLR => MYLIP; 1;
  // V(199) = K(199,1) * [MYLIP] * [MYLIP] -K(199,2) * [MYLIP |MYLIP];
  R199: MYLIP => ; 1;
  // V(200) = K(200,1) * [MYLIP |MYLIP];
  R200: MYLIP => ; 1;
  // V(201) = K(201,1) * [PINK1] * [MFN1] -K(201,2) * [PINK1 |MFN1];
  R201: PINK1 => MFN1; 1;
  // V(202) = K(202,1) * [PINK1 |MFN1];
  R202: PINK1 => MFN1; 1;
  // V(203) = K(203,1) * [MYLIP] * [AR] -K(203,2) * [MYLIP |AR];
  R203: MYLIP => AR; 1;
  // V(204) = K(204,1) * [MYLIP |AR];
  R204: MYLIP => AR; 1;
  // V(205) = K(205,1) * [TP53_p] * [VCAN_g] -K(205,2) * [TP53_p |VCAN_g];
  R205: VCAN_g => TP53_p; 1;
  // V(206) = K(206,1) * [TP53_p |VCAN_g];
  R206: VCAN_g => TP53_p; 1;
  // V(207) = K(207,1) * [VCAN_rna];
  R207: VCAN_rna => ; 1;
  // V(208) = K(208,1) * [TP53_p] * [CDKN1A_g] -K(208,2) * [TP53_p |CDKN1A_g];
  R208: CDKN1A_g => TP53_p; 1;
  // V(209) = K(209,1) * [TP53_p |CDKN1A_g];
  R209: CDKN1A_g => TP53_p; 1;
  // V(210) = K(210,1) * [CDKN1A_rna];
  R210: CDKN1A_rna => ; 1;
  // V(211) = K(211,1) * [CREB1_p] * [PPARGC1A_g] -K(211,2) * [CREB1_p |PPARGC1A_g];
  R211: CREB1_p => PPARGC1A_g; 1;
  // V(212) = K(212,1) * [CREB1_p |PPARGC1A_g];
  R212: CREB1_p => PPARGC1A_g; 1;
  // V(213) = K(213,1) * [PPARGC1A_rna];
  R213: PPARGC1A_rna => ; 1;
  // V(214) = K(214,1) * [TP53_p] * [BAX_g] -K(214,2) * [TP53_p |BAX_g];
  R214: BAX_g => TP53_p; 1;
  // V(215) = K(215,1) * [TP53_p |BAX_g];
  R215: BAX_g => TP53_p; 1;
  // V(216) = K(216,1) * [BAX_rna];
  R216: BAX_rna => ; 1;
  // V(217) = K(217,1) * [FOXO1_p] * [CDKN1B_g] -K(217,2) * [FOXO1_p |CDKN1B_g];
  R217: FOXO1_p => CDKN1B_g; 1;
  // V(218) = K(218,1) * [FOXO1_p |CDKN1B_g];
  R218: FOXO1_p => CDKN1B_g; 1;
  // V(219) = K(219,1) * [CDKN1B_rna];
  R219: CDKN1B_rna => ; 1;
  // V(220) = K(220,1) * [NFE2L2_p] * [CAT_g] -K(220,2) * [NFE2L2_p |CAT_g];
  R220: CAT_g => NFE2L2_p; 1;
  // V(221) = K(221,1) * [NFE2L2_p |CAT_g];
  R221: CAT_g => NFE2L2_p; 1;
  // V(222) = K(222,1) * [CAT_rna];
  R222: CAT_rna => ; 1;
  // V(223) = K(223,1) * [HIF1A] * [VEGFA_g] -K(223,2) * [HIF1A |VEGFA_g];
  R223: HIF1A => VEGFA_g; 1;
  // V(224) = K(224,1) * [HIF1A |VEGFA_g];
  R224: HIF1A => VEGFA_g; 1;
  // V(225) = K(225,1) * [VEGFA_rna];
  R225: VEGFA_rna => ; 1;
  // V(226) = K(226,1) * [NFE2L2_p] * [GCLC_g] -K(226,2) * [NFE2L2_p |GCLC_g];
  R226: GCLC_g => NFE2L2_p; 1;
  // V(227) = K(227,1) * [NFE2L2_p |GCLC_g];
  R227: GCLC_g => NFE2L2_p; 1;
  // V(228) = K(228,1) * [GCLC_rna];
  R228: GCLC_rna => ; 1;
  // V(229) = K(229,1) * [TP53_p] * [FAS_g] -K(229,2) * [TP53_p |FAS_g];
  R229: FAS_g => TP53_p; 1;
  // V(230) = K(230,1) * [TP53_p |FAS_g];
  R230: FAS_g => TP53_p; 1;
  // V(231) = K(231,1) * [FAS_rna];
  R231: FAS_rna => ; 1;
  // V(232) = K(232,1) * [FOXO1_p] * [PCK1_g] -K(232,2) * [FOXO1_p |PCK1_g];
  R232: FOXO1_p => PCK1_g; 1;
  // V(233) = K(233,1) * [FOXO1_p |PCK1_g];
  R233: FOXO1_p => PCK1_g; 1;
  // V(234) = K(234,1) * [PCK1_rna];
  R234: PCK1_rna => ; 1;
  // V(235) = K(235,1) * [TGFB1] * [COL1A1_g] -K(235,2) * [TGFB1 |COL1A1_g];
  R235: TGFB1 => COL1A1_g; 1;
  // V(236) = K(236,1) * [TGFB1 |COL1A1_g];
  R236: TGFB1 => COL1A1_g; 1;
  // V(237) = K(237,1) * [COL1A1_rna];
  R237: COL1A1_rna => ; 1;
  // V(238) = K(238,1) * [NFE2L2_p] * [GCLM_g] -K(238,2) * [NFE2L2_p |GCLM_g];
  R238: GCLM_g => NFE2L2_p; 1;
  // V(239) = K(239,1) * [NFE2L2_p |GCLM_g];
  R239: GCLM_g => NFE2L2_p; 1;
  // V(240) = K(240,1) * [GCLM_rna];
  R240: GCLM_rna => ; 1;
  // V(241) = K(241,1) * [TP53_p] * [AIFM1_g] -K(241,2) * [TP53_p |AIFM1_g];
  R241: AIFM1_g => TP53_p; 1;
  // V(242) = K(242,1) * [TP53_p |AIFM1_g];
  R242: AIFM1_g => TP53_p; 1;
  // V(243) = K(243,1) * [AIFM1_rna];
  R243: AIFM1_rna => ; 1;
  // V(244) = K(244,1) * [NFE2L2_p] * [GSTA1_g] -K(244,2) * [NFE2L2_p |GSTA1_g];
  R244: GSTA1_g => NFE2L2_p; 1;
  // V(245) = K(245,1) * [NFE2L2_p |GSTA1_g];
  R245: GSTA1_g => NFE2L2_p; 1;
  // V(246) = K(246,1) * [GSTA1_rna];
  R246: GSTA1_rna => ; 1;
  // V(247) = K(247,1) * [SP1_p] * [TNC_g] -K(247,2) * [SP1_p |TNC_g];
  R247: TNC_g => SP1_p; 1;
  // V(248) = K(248,1) * [SP1_p |TNC_g];
  R248: TNC_g => SP1_p; 1;
  // V(249) = K(249,1) * [TNC_rna];
  R249: TNC_rna => ; 1;
  // V(250) = K(250,1) * [SP1_p] * [TGFB1_g] -K(250,2) * [SP1_p |TGFB1_g];
  R250: SP1_p => TGFB1_g; 1;
  // V(251) = K(251,1) * [SP1_p |TGFB1_g];
  R251: SP1_p => TGFB1_g; 1;
  // V(252) = K(252,1) * [TGFB1_rna];
  R252: TGFB1_rna => ; 1;
  // V(253) = K(253,1) * [NFKB1] * [BMP4_g] -K(253,2) * [NFKB1 |BMP4_g];
  R253: BMP4_g => NFKB1; 1;
  // V(254) = K(254,1) * [BMP4_g];
  R254: BMP4_g => ; 1;
  // V(255) = K(255,1) * [BMP4_rna];
  R255: BMP4_rna => ; 1;
  // V(256) = K(256,1) * [SGK1];
  R256: SGK1 => ; 1;
  // V(257) = K(257,1) * [TLR4];
  R257: TLR4 => ; 1;
  // V(258) = K(258,1) * [WNT7A];
  R258: WNT7A => ; 1;
  // V(259) = K(259,1) * [IKBKB];
  R259: IKBKB => ; 1;
  // V(260) = K(260,1) * [TLR3];
  R260: TLR3 => ; 1;
  // V(261) = K(261,1) * [PDPK1];
  R261: PDPK1 => ; 1;
  // V(262) = K(262,1) * [NPHS1];
  R262: NPHS1 => ; 1;
  // V(263) = K(263,1) * [JAK2];
  R263: JAK2 => ; 1;
  // V(264) = K(264,1) * [ERN1];
  R264: ERN1 => ; 1;
  // V(265) = K(265,1) * [AIFM1];
  R265: AIFM1 => ; 1;
  // V(266) = K(266,1) * [LDLR];
  R266: LDLR => ; 1;
  // V(267) = K(267,1) * [TGFB1];
  R267: TGFB1 => ; 1;
  // V(268) = K(268,1) * [COL1A1];
  R268: COL1A1 => ; 1;
  // V(269) = K(269,1) * [ESR1];
  R269: ESR1 => ; 1;
  // V(270) = K(270,1) * [CAT];
  R270: CAT => ; 1;
  // V(271) = K(271,1) * [ANXA1];
  R271: ANXA1 => ; 1;
  // V(272) = K(272,1) * [TP53];
  R272: TP53 => ; 1;
  // V(273) = K(273,1) * [HMGN1];
  R273: HMGN1 => ; 1;
  // V(274) = K(274,1) * [FGF1];
  R274: FGF1 => ; 1;
  // V(275) = K(275,1) * [INSR];
  R275: INSR => ; 1;
  // V(276) = K(276,1) * [LYN];
  R276: LYN => ; 1;
  // V(277) = K(277,1) * [SP1];
  R277: SP1 => ; 1;
  // V(278) = K(278,1) * [GSTA1];
  R278: GSTA1 => ; 1;
  // V(279) = K(279,1) * [IL6R];
  R279: IL6R => ; 1;
  // V(280) = K(280,1) * [FGF2];
  R280: FGF2 => ; 1;
  // V(281) = K(281,1) * [UBC];
  R281: UBC => ; 1;
  // V(282) = K(282,1) * [CALM1];
  R282: CALM1 => ; 1;
  // V(283) = K(283,1) * [AR];
  R283: AR => ; 1;
  // V(284) = K(284,1) * [BCL2];
  R284: BCL2 => ; 1;
  // V(285) = K(285,1) * [GHR];
  R285: GHR => ; 1;
  // V(286) = K(286,1) * [BMP4];
  R286: BMP4 => ; 1;
  // V(287) = K(287,1) * [CYBA];
  R287: CYBA => ; 1;
  // V(288) = K(288,1) * [VCAN];
  R288: VCAN => ; 1;
  // V(289) = K(289,1) * [PKM];
  R289: PKM => ; 1;
  // V(290) = K(290,1) * [VEGFA];
  R290: VEGFA => ; 1;
  // V(291) = K(291,1) * [CREB1];
  R291: CREB1 => ; 1;
  // V(292) = K(292,1) * [PRKCA];
  R292: PRKCA => ; 1;
  // V(293) = K(293,1) * [GJA1];
  R293: GJA1 => ; 1;
  // V(294) = K(294,1) * [PTPN2];
  R294: PTPN2 => ; 1;
  // V(295) = K(295,1) * [EPOR];
  R295: EPOR => ; 1;
  // V(296) = K(296,1) * [NFKB1];
  R296: NFKB1 => ; 1;
  // V(297) = K(297,1) * [JAK1];
  R297: JAK1 => ; 1;
  // V(298) = K(298,1) * [TNC];
  R298: TNC => ; 1;
  // V(299) = K(299,1) * [FAS];
  R299: FAS => ; 1;
  // V(300) = K(300,1) * [PTPN6];
  R300: PTPN6 => ; 1;
  // V(301) = K(301,1) * [AXL];
  R301: AXL => ; 1;
  // V(302) = K(302,1) * [CTNNB1];
  R302: CTNNB1 => ; 1;
  // V(303) = K(303,1) * [RORA];
  R303: RORA => ; 1;
  // V(304) = K(304,1) * [PCK1];
  R304: PCK1 => ; 1;
  // V(305) = K(305,1) * [CDKN1A];
  R305: CDKN1A => ; 1;
  // V(306) = K(306,1) * [STAT1];
  R306: STAT1 => ; 1;
  // V(307) = K(307,1) * [STAT6];
  R307: STAT6 => ; 1;
  // V(308) = K(308,1) * [CDKN1B];
  R308: CDKN1B => ; 1;
  // V(309) = K(309,1) * [YAP1];
  R309: YAP1 => ; 1;
  // V(310) = K(310,1) * [LEPR];
  R310: LEPR => ; 1;
  // V(311) = K(311,1) * [GCLC];
  R311: GCLC => ; 1;
  // V(312) = K(312,1) * [GCLM];
  R312: GCLM => ; 1;
  // V(313) = K(313,1) * [IRAK1];
  R313: IRAK1 => ; 1;
  // V(314) = K(314,1) * [PTEN];
  R314: PTEN => ; 1;
  // V(315) = K(315,1) * [TGFB2];
  R315: TGFB2 => ; 1;
  // V(316) = K(316,1) * [VLDLR];
  R316: VLDLR => ; 1;
  // V(317) = K(317,1) * [IRF8];
  R317: IRF8 => ; 1;
  // V(318) = K(318,1) * [NOTCH2];
  R318: NOTCH2 => ; 1;
  // V(319) = K(319,1) * [PRKCZ];
  R319: PRKCZ => ; 1;
  // V(320) = K(320,1) * [PTPN11];
  R320: PTPN11 => ; 1;
  // V(321) = K(321,1) * [BAX];
  R321: BAX => ; 1;
  // V(322) = K(322,1) * [FOXO1];
  R322: FOXO1 => ; 1;
  // V(323) = K(323,1) * [STK4];
  R323: STK4 => ; 1;
  // V(324) = K(324,1) * [ROCK1];
  R324: ROCK1 => ; 1;
  // V(325) = K(325,1) * [ATR];
  R325: ATR => ; 1;
  // V(326) = K(326,1) * [IRF3];
  R326: IRF3 => ; 1;
  // V(327) = K(327,1) * [EZH2];
  R327: EZH2 => ; 1;
  // V(328) = K(328,1) * [NFE2L2];
  R328: NFE2L2 => ; 1;
  // V(329) = K(329,1) * [OCLN];
  R329: OCLN => ; 1;
  // V(330) = K(330,1) * [HIF1A];
  R330: HIF1A => ; 1;
  // V(331) = K(331,1) * [MFN1];
  R331: MFN1 => ; 1;
  // V(332) = K(332,1) * [MYLIP];
  R332: MYLIP => ; 1;
  // V(333) = K(333,1) * [NR1H4];
  R333: NR1H4 => ; 1;
  // V(334) = K(334,1) * [PINK1];
  R334: PINK1 => ; 1;
  // V(335) = K(335,1) * [PLK2];
  R335: PLK2 => ; 1;
  // V(336) = K(336,1) * [PPARGC1A];
  R336: PPARGC1A => ; 1;
  // V(337) = K(337,1) * [AIFM1_rna];
  R337: AIFM1_rna => ; 1;
  // V(338) = K(338,1) * [TGFB1_rna];
  R338: TGFB1_rna => ; 1;
  // V(339) = K(339,1) * [COL1A1_rna];
  R339: COL1A1_rna => ; 1;
  // V(340) = K(340,1) * [CAT_rna];
  R340: CAT_rna => ; 1;
  // V(341) = K(341,1) * [GSTA1_rna];
  R341: GSTA1_rna => ; 1;
  // V(342) = K(342,1) * [BMP4_rna];
  R342: BMP4_rna => ; 1;
  // V(343) = K(343,1) * [VCAN_rna];
  R343: VCAN_rna => ; 1;
  // V(344) = K(344,1) * [VEGFA_rna];
  R344: VEGFA_rna => ; 1;
  // V(345) = K(345,1) * [TNC_rna];
  R345: TNC_rna => ; 1;
  // V(346) = K(346,1) * [FAS_rna];
  R346: FAS_rna => ; 1;
  // V(347) = K(347,1) * [PCK1_rna];
  R347: PCK1_rna => ; 1;
  // V(348) = K(348,1) * [CDKN1A_rna];
  R348: CDKN1A_rna => ; 1;
  // V(349) = K(349,1) * [CDKN1B_rna];
  R349: CDKN1B_rna => ; 1;
  // V(350) = K(350,1) * [GCLC_rna];
  R350: GCLC_rna => ; 1;
  // V(351) = K(351,1) * [GCLM_rna];
  R351: GCLM_rna => ; 1;
  // V(352) = K(352,1) * [BAX_rna];
  R352: BAX_rna => ; 1;
  // V(353) = K(353,1) * [PPARGC1A_rna];
  R353: PPARGC1A_rna => ; 1;
  // V(354) = K(354,1) * [SGK1_g];
  R354: SGK1_g => ; 1;
  // V(355) = K(355,1) * [SGK1_rna];
  R355: SGK1_rna => ; 1;
  // V(356) = K(356,1) * [TLR4_g];
  R356: TLR4_g => ; 1;
  // V(357) = K(357,1) * [TLR4_rna];
  R357: TLR4_rna => ; 1;
  // V(358) = K(358,1) * [WNT7A_g];
  R358: WNT7A_g => ; 1;
  // V(359) = K(359,1) * [WNT7A_rna];
  R359: WNT7A_rna => ; 1;
  // V(360) = K(360,1) * [IKBKB_g];
  R360: IKBKB_g => ; 1;
  // V(361) = K(361,1) * [IKBKB_rna];
  R361: IKBKB_rna => ; 1;
  // V(362) = K(362,1) * [TLR3_g];
  R362: TLR3_g => ; 1;
  // V(363) = K(363,1) * [TLR3_rna];
  R363: TLR3_rna => ; 1;
  // V(364) = K(364,1) * [PDPK1_g];
  R364: PDPK1_g => ; 1;
  // V(365) = K(365,1) * [PDPK1_rna];
  R365: PDPK1_rna => ; 1;
  // V(366) = K(366,1) * [NPHS1_g];
  R366: NPHS1_g => ; 1;
  // V(367) = K(367,1) * [NPHS1_rna];
  R367: NPHS1_rna => ; 1;
  // V(368) = K(368,1) * [JAK2_g];
  R368: JAK2_g => ; 1;
  // V(369) = K(369,1) * [JAK2_rna];
  R369: JAK2_rna => ; 1;
  // V(370) = K(370,1) * [ERN1_g];
  R370: ERN1_g => ; 1;
  // V(371) = K(371,1) * [ERN1_rna];
  R371: ERN1_rna => ; 1;
  // V(372) = K(372,1) * [LDLR_g];
  R372: LDLR_g => ; 1;
  // V(373) = K(373,1) * [LDLR_rna];
  R373: LDLR_rna => ; 1;
  // V(374) = K(374,1) * [ESR1_g];
  R374: ESR1_g => ; 1;
  // V(375) = K(375,1) * [ESR1_rna];
  R375: ESR1_rna => ; 1;
  // V(376) = K(376,1) * [ANXA1_g];
  R376: ANXA1_g => ; 1;
  // V(377) = K(377,1) * [ANXA1_rna];
  R377: ANXA1_rna => ; 1;
  // V(378) = K(378,1) * [TP53_g];
  R378: TP53_g => ; 1;
  // V(379) = K(379,1) * [TP53_rna];
  R379: TP53_rna => ; 1;
  // V(380) = K(380,1) * [HMGN1_g];
  R380: HMGN1_g => ; 1;
  // V(381) = K(381,1) * [HMGN1_rna];
  R381: HMGN1_rna => ; 1;
  // V(382) = K(382,1) * [FGF1_g];
  R382: FGF1_g => ; 1;
  // V(383) = K(383,1) * [FGF1_rna];
  R383: FGF1_rna => ; 1;
  // V(384) = K(384,1) * [INSR_g];
  R384: INSR_g => ; 1;
  // V(385) = K(385,1) * [INSR_rna];
  R385: INSR_rna => ; 1;
  // V(386) = K(386,1) * [LYN_g];
  R386: LYN_g => ; 1;
  // V(387) = K(387,1) * [LYN_rna];
  R387: LYN_rna => ; 1;
  // V(388) = K(388,1) * [SP1_g];
  R388: SP1_g => ; 1;
  // V(389) = K(389,1) * [SP1_rna];
  R389: SP1_rna => ; 1;
  // V(390) = K(390,1) * [IL6R_g];
  R390: IL6R_g => ; 1;
  // V(391) = K(391,1) * [IL6R_rna];
  R391: IL6R_rna => ; 1;
  // V(392) = K(392,1) * [FGF2_g];
  R392: FGF2_g => ; 1;
  // V(393) = K(393,1) * [FGF2_rna];
  R393: FGF2_rna => ; 1;
  // V(394) = K(394,1) * [UBC_g];
  R394: UBC_g => ; 1;
  // V(395) = K(395,1) * [UBC_rna];
  R395: UBC_rna => ; 1;
  // V(396) = K(396,1) * [CALM1_g];
  R396: CALM1_g => ; 1;
  // V(397) = K(397,1) * [CALM1_rna];
  R397: CALM1_rna => ; 1;
  // V(398) = K(398,1) * [AR_g];
  R398: AR_g => ; 1;
  // V(399) = K(399,1) * [AR_rna];
  R399: AR_rna => ; 1;
  // V(400) = K(400,1) * [BCL2_g];
  R400: BCL2_g => ; 1;
  // V(401) = K(401,1) * [BCL2_rna];
  R401: BCL2_rna => ; 1;
  // V(402) = K(402,1) * [GHR_g];
  R402: GHR_g => ; 1;
  // V(403) = K(403,1) * [GHR_rna];
  R403: GHR_rna => ; 1;
  // V(404) = K(404,1) * [CYBA_g];
  R404: CYBA_g => ; 1;
  // V(405) = K(405,1) * [CYBA_rna];
  R405: CYBA_rna => ; 1;
  // V(406) = K(406,1) * [PKM_g];
  R406: PKM_g => ; 1;
  // V(407) = K(407,1) * [PKM_rna];
  R407: PKM_rna => ; 1;
  // V(408) = K(408,1) * [CREB1_g];
  R408: CREB1_g => ; 1;
  // V(409) = K(409,1) * [CREB1_rna];
  R409: CREB1_rna => ; 1;
  // V(410) = K(410,1) * [PRKCA_g];
  R410: PRKCA_g => ; 1;
  // V(411) = K(411,1) * [PRKCA_rna];
  R411: PRKCA_rna => ; 1;
  // V(412) = K(412,1) * [GJA1_g];
  R412: GJA1_g => ; 1;
  // V(413) = K(413,1) * [GJA1_rna];
  R413: GJA1_rna => ; 1;
  // V(414) = K(414,1) * [PTPN2_g];
  R414: PTPN2_g => ; 1;
  // V(415) = K(415,1) * [PTPN2_rna];
  R415: PTPN2_rna => ; 1;
  // V(416) = K(416,1) * [EPOR_g];
  R416: EPOR_g => ; 1;
  // V(417) = K(417,1) * [EPOR_rna];
  R417: EPOR_rna => ; 1;
  // V(418) = K(418,1) * [NFKB1_g];
  R418: NFKB1_g => ; 1;
  // V(419) = K(419,1) * [NFKB1_rna];
  R419: NFKB1_rna => ; 1;
  // V(420) = K(420,1) * [JAK1_g];
  R420: JAK1_g => ; 1;
  // V(421) = K(421,1) * [JAK1_rna];
  R421: JAK1_rna => ; 1;
  // V(422) = K(422,1) * [PTPN6_g];
  R422: PTPN6_g => ; 1;
  // V(423) = K(423,1) * [PTPN6_rna];
  R423: PTPN6_rna => ; 1;
  // V(424) = K(424,1) * [AXL_g];
  R424: AXL_g => ; 1;
  // V(425) = K(425,1) * [AXL_rna];
  R425: AXL_rna => ; 1;
  // V(426) = K(426,1) * [CTNNB1_g];
  R426: CTNNB1_g => ; 1;
  // V(427) = K(427,1) * [CTNNB1_rna];
  R427: CTNNB1_rna => ; 1;
  // V(428) = K(428,1) * [RORA_g];
  R428: RORA_g => ; 1;
  // V(429) = K(429,1) * [RORA_rna];
  R429: RORA_rna => ; 1;
  // V(430) = K(430,1) * [STAT1_g];
  R430: STAT1_g => ; 1;
  // V(431) = K(431,1) * [STAT1_rna];
  R431: STAT1_rna => ; 1;
  // V(432) = K(432,1) * [STAT6_g];
  R432: STAT6_g => ; 1;
  // V(433) = K(433,1) * [STAT6_rna];
  R433: STAT6_rna => ; 1;
  // V(434) = K(434,1) * [YAP1_g];
  R434: YAP1_g => ; 1;
  // V(435) = K(435,1) * [YAP1_rna];
  R435: YAP1_rna => ; 1;
  // V(436) = K(436,1) * [LEPR_g];
  R436: LEPR_g => ; 1;
  // V(437) = K(437,1) * [LEPR_rna];
  R437: LEPR_rna => ; 1;
  // V(438) = K(438,1) * [IRAK1_g];
  R438: IRAK1_g => ; 1;
  // V(439) = K(439,1) * [IRAK1_rna];
  R439: IRAK1_rna => ; 1;
  // V(440) = K(440,1) * [PTEN_g];
  R440: PTEN_g => ; 1;
  // V(441) = K(441,1) * [PTEN_rna];
  R441: PTEN_rna => ; 1;
  // V(442) = K(442,1) * [TGFB2_g];
  R442: TGFB2_g => ; 1;
  // V(443) = K(443,1) * [TGFB2_rna];
  R443: TGFB2_rna => ; 1;
  // V(444) = K(444,1) * [VLDLR_g];
  R444: VLDLR_g => ; 1;
  // V(445) = K(445,1) * [VLDLR_rna];
  R445: VLDLR_rna => ; 1;
  // V(446) = K(446,1) * [IRF8_g];
  R446: IRF8_g => ; 1;
  // V(447) = K(447,1) * [IRF8_rna];
  R447: IRF8_rna => ; 1;
  // V(448) = K(448,1) * [NOTCH2_g];
  R448: NOTCH2_g => ; 1;
  // V(449) = K(449,1) * [NOTCH2_rna];
  R449: NOTCH2_rna => ; 1;
  // V(450) = K(450,1) * [PRKCZ_g];
  R450: PRKCZ_g => ; 1;
  // V(451) = K(451,1) * [PRKCZ_rna];
  R451: PRKCZ_rna => ; 1;
  // V(452) = K(452,1) * [PTPN11_g];
  R452: PTPN11_g => ; 1;
  // V(453) = K(453,1) * [PTPN11_rna];
  R453: PTPN11_rna => ; 1;
  // V(454) = K(454,1) * [FOXO1_g];
  R454: FOXO1_g => ; 1;
  // V(455) = K(455,1) * [FOXO1_rna];
  R455: FOXO1_rna => ; 1;
  // V(456) = K(456,1) * [STK4_g];
  R456: STK4_g => ; 1;
  // V(457) = K(457,1) * [STK4_rna];
  R457: STK4_rna => ; 1;
  // V(458) = K(458,1) * [ROCK1_g];
  R458: ROCK1_g => ; 1;
  // V(459) = K(459,1) * [ROCK1_rna];
  R459: ROCK1_rna => ; 1;
  // V(460) = K(460,1) * [ATR_g];
  R460: ATR_g => ; 1;
  // V(461) = K(461,1) * [ATR_rna];
  R461: ATR_rna => ; 1;
  // V(462) = K(462,1) * [IRF3_g];
  R462: IRF3_g => ; 1;
  // V(463) = K(463,1) * [IRF3_rna];
  R463: IRF3_rna => ; 1;
  // V(464) = K(464,1) * [EZH2_g];
  R464: EZH2_g => ; 1;
  // V(465) = K(465,1) * [EZH2_rna];
  R465: EZH2_rna => ; 1;
  // V(466) = K(466,1) * [NFE2L2_g];
  R466: NFE2L2_g => ; 1;
  // V(467) = K(467,1) * [NFE2L2_rna];
  R467: NFE2L2_rna => ; 1;
  // V(468) = K(468,1) * [OCLN_g];
  R468: OCLN_g => ; 1;
  // V(469) = K(469,1) * [OCLN_rna];
  R469: OCLN_rna => ; 1;
  // V(470) = K(470,1) * [HIF1A_g];
  R470: HIF1A_g => ; 1;
  // V(471) = K(471,1) * [HIF1A_rna];
  R471: HIF1A_rna => ; 1;
  // V(472) = K(472,1) * [MFN1_g];
  R472: MFN1_g => ; 1;
  // V(473) = K(473,1) * [MFN1_rna];
  R473: MFN1_rna => ; 1;
  // V(474) = K(474,1) * [MYLIP_g];
  R474: MYLIP_g => ; 1;
  // V(475) = K(475,1) * [MYLIP_rna];
  R475: MYLIP_rna => ; 1;
  // V(476) = K(476,1) * [NR1H4_g];
  R476: NR1H4_g => ; 1;
  // V(477) = K(477,1) * [NR1H4_rna];
  R477: NR1H4_rna => ; 1;
  // V(478) = K(478,1) * [PINK1_g];
  R478: PINK1_g => ; 1;
  // V(479) = K(479,1) * [PINK1_rna];
  R479: PINK1_rna => ; 1;
  // V(480) = K(480,1) * [PLK2_g];
  R480: PLK2_g => ; 1;
  // V(481) = K(481,1) * [PLK2_rna];
  R481: PLK2_rna => ; 1;
  // V(482) = K(482,1) * [SGK1_p];
  R482: SGK1_p => ; 1;
  // V(483) = K(483,1) * [IKBKB_p];
  R483: IKBKB_p => ; 1;
  // V(484) = K(484,1) * [PDPK1_p];
  R484: PDPK1_p => ; 1;
  // V(485) = K(485,1) * [NPHS1_p];
  R485: NPHS1_p => ; 1;
  // V(486) = K(486,1) * [JAK2_p];
  R486: JAK2_p => ; 1;
  // V(487) = K(487,1) * [ERN1_p];
  R487: ERN1_p => ; 1;
  // V(488) = K(488,1) * [ESR1_p];
  R488: ESR1_p => ; 1;
  // V(489) = K(489,1) * [ANXA1_p];
  R489: ANXA1_p => ; 1;
  // V(490) = K(490,1) * [TP53_p];
  R490: TP53_p => ; 1;
  // V(491) = K(491,1) * [HMGN1_p];
  R491: HMGN1_p => ; 1;
  // V(492) = K(492,1) * [INSR_p];
  R492: INSR_p => ; 1;
  // V(493) = K(493,1) * [LYN_p];
  R493: LYN_p => ; 1;
  // V(494) = K(494,1) * [SP1_p];
  R494: SP1_p => ; 1;
  // V(495) = K(495,1) * [UBC_p];
  R495: UBC_p => ; 1;
  // V(496) = K(496,1) * [CALM1_p];
  R496: CALM1_p => ; 1;
  // V(497) = K(497,1) * [AR_p];
  R497: AR_p => ; 1;
  // V(498) = K(498,1) * [BCL2_p];
  R498: BCL2_p => ; 1;
  // V(499) = K(499,1) * [GHR_p];
  R499: GHR_p => ; 1;
  // V(500) = K(500,1) * [CYBA_p];
  R500: CYBA_p => ; 1;
  // V(501) = K(501,1) * [PKM_p];
  R501: PKM_p => ; 1;
  // V(502) = K(502,1) * [CREB1_p];
  R502: CREB1_p => ; 1;
  // V(503) = K(503,1) * [PRKCA_p];
  R503: PRKCA_p => ; 1;
  // V(504) = K(504,1) * [GJA1_p];
  R504: GJA1_p => ; 1;
  // V(505) = K(505,1) * [EPOR_p];
  R505: EPOR_p => ; 1;
  // V(506) = K(506,1) * [NFKB1_p];
  R506: NFKB1_p => ; 1;
  // V(507) = K(507,1) * [JAK1_p];
  R507: JAK1_p => ; 1;
  // V(508) = K(508,1) * [PTPN6_p];
  R508: PTPN6_p => ; 1;
  // V(509) = K(509,1) * [AXL_p];
  R509: AXL_p => ; 1;
  // V(510) = K(510,1) * [CTNNB1_p];
  R510: CTNNB1_p => ; 1;
  // V(511) = K(511,1) * [RORA_p];
  R511: RORA_p => ; 1;
  // V(512) = K(512,1) * [CDKN1A_p];
  R512: CDKN1A_p => ; 1;
  // V(513) = K(513,1) * [STAT1_p];
  R513: STAT1_p => ; 1;
  // V(514) = K(514,1) * [STAT6_p];
  R514: STAT6_p => ; 1;
  // V(515) = K(515,1) * [CDKN1B_p];
  R515: CDKN1B_p => ; 1;
  // V(516) = K(516,1) * [YAP1_p];
  R516: YAP1_p => ; 1;
  // V(517) = K(517,1) * [LEPR_p];
  R517: LEPR_p => ; 1;
  // V(518) = K(518,1) * [IRAK1_p];
  R518: IRAK1_p => ; 1;
  // V(519) = K(519,1) * [PTEN_p];
  R519: PTEN_p => ; 1;
  // V(520) = K(520,1) * [IRF8_p];
  R520: IRF8_p => ; 1;
  // V(521) = K(521,1) * [PRKCZ_p];
  R521: PRKCZ_p => ; 1;
  // V(522) = K(522,1) * [PTPN11_p];
  R522: PTPN11_p => ; 1;
  // V(523) = K(523,1) * [BAX_p];
  R523: BAX_p => ; 1;
  // V(524) = K(524,1) * [FOXO1_p];
  R524: FOXO1_p => ; 1;
  // V(525) = K(525,1) * [STK4_p];
  R525: STK4_p => ; 1;
  // V(526) = K(526,1) * [IRF3_p];
  R526: IRF3_p => ; 1;
  // V(527) = K(527,1) * [EZH2_p];
  R527: EZH2_p => ; 1;
  // V(528) = K(528,1) * [NFE2L2_p];
  R528: NFE2L2_p => ; 1;
  // V(529) = K(529,1) * [OCLN_p];
  R529: OCLN_p => ; 1;
  // V(530) = K(530,1) * [NR1H4_p];
  R530: NR1H4_p => ; 1;
  // V(531) = K(531,1) * [SGK1_rna];
  R531: SGK1_rna => ; 1;
  // V(532) = K(532,1) * [TLR4_rna];
  R532: TLR4_rna => ; 1;
  // V(533) = K(533,1) * [WNT7A_rna];
  R533: WNT7A_rna => ; 1;
  // V(534) = K(534,1) * [IKBKB_rna];
  R534: IKBKB_rna => ; 1;
  // V(535) = K(535,1) * [TLR3_rna];
  R535: TLR3_rna => ; 1;
  // V(536) = K(536,1) * [PDPK1_rna];
  R536: PDPK1_rna => ; 1;
  // V(537) = K(537,1) * [NPHS1_rna];
  R537: NPHS1_rna => ; 1;
  // V(538) = K(538,1) * [JAK2_rna];
  R538: JAK2_rna => ; 1;
  // V(539) = K(539,1) * [ERN1_rna];
  R539: ERN1_rna => ; 1;
  // V(540) = K(540,1) * [LDLR_rna];
  R540: LDLR_rna => ; 1;
  // V(541) = K(541,1) * [ESR1_rna];
  R541: ESR1_rna => ; 1;
  // V(542) = K(542,1) * [ANXA1_rna];
  R542: ANXA1_rna => ; 1;
  // V(543) = K(543,1) * [TP53_rna];
  R543: TP53_rna => ; 1;
  // V(544) = K(544,1) * [HMGN1_rna];
  R544: HMGN1_rna => ; 1;
  // V(545) = K(545,1) * [FGF1_rna];
  R545: FGF1_rna => ; 1;
  // V(546) = K(546,1) * [INSR_rna];
  R546: INSR_rna => ; 1;
  // V(547) = K(547,1) * [LYN_rna];
  R547: LYN_rna => ; 1;
  // V(548) = K(548,1) * [SP1_rna];
  R548: SP1_rna => ; 1;
  // V(549) = K(549,1) * [IL6R_rna];
  R549: IL6R_rna => ; 1;
  // V(550) = K(550,1) * [FGF2_rna];
  R550: FGF2_rna => ; 1;
  // V(551) = K(551,1) * [UBC_rna];
  R551: UBC_rna => ; 1;
  // V(552) = K(552,1) * [CALM1_rna];
  R552: CALM1_rna => ; 1;
  // V(553) = K(553,1) * [AR_rna];
  R553: AR_rna => ; 1;
  // V(554) = K(554,1) * [BCL2_rna];
  R554: BCL2_rna => ; 1;
  // V(555) = K(555,1) * [GHR_rna];
  R555: GHR_rna => ; 1;
  // V(556) = K(556,1) * [CYBA_rna];
  R556: CYBA_rna => ; 1;
  // V(557) = K(557,1) * [PKM_rna];
  R557: PKM_rna => ; 1;
  // V(558) = K(558,1) * [CREB1_rna];
  R558: CREB1_rna => ; 1;
  // V(559) = K(559,1) * [PRKCA_rna];
  R559: PRKCA_rna => ; 1;
  // V(560) = K(560,1) * [GJA1_rna];
  R560: GJA1_rna => ; 1;
  // V(561) = K(561,1) * [PTPN2_rna];
  R561: PTPN2_rna => ; 1;
  // V(562) = K(562,1) * [EPOR_rna];
  R562: EPOR_rna => ; 1;
  // V(563) = K(563,1) * [NFKB1_rna];
  R563: NFKB1_rna => ; 1;
  // V(564) = K(564,1) * [JAK1_rna];
  R564: JAK1_rna => ; 1;
  // V(565) = K(565,1) * [PTPN6_rna];
  R565: PTPN6_rna => ; 1;
  // V(566) = K(566,1) * [AXL_rna];
  R566: AXL_rna => ; 1;
  // V(567) = K(567,1) * [CTNNB1_rna];
  R567: CTNNB1_rna => ; 1;
  // V(568) = K(568,1) * [RORA_rna];
  R568: RORA_rna => ; 1;
  // V(569) = K(569,1) * [STAT1_rna];
  R569: STAT1_rna => ; 1;
  // V(570) = K(570,1) * [STAT6_rna];
  R570: STAT6_rna => ; 1;
  // V(571) = K(571,1) * [YAP1_rna];
  R571: YAP1_rna => ; 1;
  // V(572) = K(572,1) * [LEPR_rna];
  R572: LEPR_rna => ; 1;
  // V(573) = K(573,1) * [IRAK1_rna];
  R573: IRAK1_rna => ; 1;
  // V(574) = K(574,1) * [PTEN_rna];
  R574: PTEN_rna => ; 1;
  // V(575) = K(575,1) * [TGFB2_rna];
  R575: TGFB2_rna => ; 1;
  // V(576) = K(576,1) * [VLDLR_rna];
  R576: VLDLR_rna => ; 1;
  // V(577) = K(577,1) * [IRF8_rna];
  R577: IRF8_rna => ; 1;
  // V(578) = K(578,1) * [NOTCH2_rna];
  R578: NOTCH2_rna => ; 1;
  // V(579) = K(579,1) * [PRKCZ_rna];
  R579: PRKCZ_rna => ; 1;
  // V(580) = K(580,1) * [PTPN11_rna];
  R580: PTPN11_rna => ; 1;
  // V(581) = K(581,1) * [FOXO1_rna];
  R581: FOXO1_rna => ; 1;
  // V(582) = K(582,1) * [STK4_rna];
  R582: STK4_rna => ; 1;
  // V(583) = K(583,1) * [ROCK1_rna];
  R583: ROCK1_rna => ; 1;
  // V(584) = K(584,1) * [ATR_rna];
  R584: ATR_rna => ; 1;
  // V(585) = K(585,1) * [IRF3_rna];
  R585: IRF3_rna => ; 1;
  // V(586) = K(586,1) * [EZH2_rna];
  R586: EZH2_rna => ; 1;
  // V(587) = K(587,1) * [NFE2L2_rna];
  R587: NFE2L2_rna => ; 1;
  // V(588) = K(588,1) * [OCLN_rna];
  R588: OCLN_rna => ; 1;
  // V(589) = K(589,1) * [HIF1A_rna];
  R589: HIF1A_rna => ; 1;
  // V(590) = K(590,1) * [MFN1_rna];
  R590: MFN1_rna => ; 1;
  // V(591) = K(591,1) * [MYLIP_rna];
  R591: MYLIP_rna => ; 1;
  // V(592) = K(592,1) * [NR1H4_rna];
  R592: NR1H4_rna => ; 1;
  // V(593) = K(593,1) * [PINK1_rna];
  R593: PINK1_rna => ; 1;
  // V(594) = K(594,1) * [PLK2_rna];
  R594: PLK2_rna => ; 1;
end
