// SBML level 3 version 2

model ParietalCell()

  // Compartments:
  compartment cell = 1;

  // Species:
  species ABCA1 in cell = 1/cell;
  species ABCA1_g in cell = 1/cell;
  species ABCA1_p in cell = 1/cell;
  species ABCA1_rna in cell = 1/cell;
  species AEBP1 in cell = 1/cell;
  species AEBP1_g in cell = 1/cell;
  species AEBP1_p in cell = 1/cell;
  species AEBP1_rna in cell = 1/cell;
  species AGO2 in cell = 1/cell;
  species AGO2_g in cell = 1/cell;
  species AGO2_p in cell = 1/cell;
  species AGO2_rna in cell = 1/cell;
  species AIFM1 in cell = 1/cell;
  species AIFM1_g in cell = 1/cell;
  species AIFM1_rna in cell = 1/cell;
  species AKT1 in cell = 1/cell;
  species AKT1_g in cell = 1/cell;
  species AKT1_p in cell = 1/cell;
  species AKT1_rna in cell = 1/cell;
  species ANXA1 in cell = 1/cell;
  species ANXA1_g in cell = 1/cell;
  species ANXA1_p in cell = 1/cell;
  species ANXA1_rna in cell = 1/cell;
  species AR in cell = 1/cell;
  species AR_g in cell = 1/cell;
  species AR_p in cell = 1/cell;
  species AR_rna in cell = 1/cell;
  species ATF3 in cell = 1/cell;
  species ATF3_g in cell = 1/cell;
  species ATF3_rna in cell = 1/cell;
  species ATR in cell = 1/cell;
  species ATR_g in cell = 1/cell;
  species ATR_rna in cell = 1/cell;
  species AXL in cell = 1/cell;
  species AXL_g in cell = 1/cell;
  species AXL_p in cell = 1/cell;
  species AXL_rna in cell = 1/cell;
  species BAD in cell = 1/cell;
  species BAD_g in cell = 1/cell;
  species BAD_p in cell = 1/cell;
  species BAD_rna in cell = 1/cell;
  species BAX in cell = 1/cell;
  species BAX_g in cell = 1/cell;
  species BAX_p in cell = 1/cell;
  species BAX_rna in cell = 1/cell;
  species BCL2 in cell = 1/cell;
  species BCL2_g in cell = 1/cell;
  species BCL2_p in cell = 1/cell;
  species BCL2_rna in cell = 1/cell;
  species BECN1 in cell = 1/cell;
  species BECN1_g in cell = 1/cell;
  species BECN1_p in cell = 1/cell;
  species BECN1_rna in cell = 1/cell;
  species BGN in cell = 1/cell;
  species BGN_g in cell = 1/cell;
  species BGN_rna in cell = 1/cell;
  species BMP4 in cell = 1/cell;
  species BMP4_g in cell = 1/cell;
  species BMP4_rna in cell = 1/cell;
  species CALM1 in cell = 1/cell;
  species CALM1_g in cell = 1/cell;
  species CALM1_p in cell = 1/cell;
  species CALM1_rna in cell = 1/cell;
  species CAT in cell = 1/cell;
  species CAT_g in cell = 1/cell;
  species CAT_rna in cell = 1/cell;
  species CCL2 in cell = 1/cell;
  species CCL2_g in cell = 1/cell;
  species CCL2_rna in cell = 1/cell;
  species CCND1 in cell = 1/cell;
  species CCND1_g in cell = 1/cell;
  species CCND1_rna in cell = 1/cell;
  species CREB1 in cell = 1/cell;
  species CREB1_g in cell = 1/cell;
  species CREB1_p in cell = 1/cell;
  species CREB1_rna in cell = 1/cell;
  species CTNNB1 in cell = 1/cell;
  species CTNNB1_g in cell = 1/cell;
  species CTNNB1_p in cell = 1/cell;
  species CTNNB1_rna in cell = 1/cell;
  species CUL3 in cell = 1/cell;
  species CUL3_g in cell = 1/cell;
  species CUL3_rna in cell = 1/cell;
  species DDIT3 in cell = 1/cell;
  species DDIT3_g in cell = 1/cell;
  species DDIT3_p in cell = 1/cell;
  species DDIT3_rna in cell = 1/cell;
  species DNM1L in cell = 1/cell;
  species DNM1L_g in cell = 1/cell;
  species DNM1L_p in cell = 1/cell;
  species DNM1L_rna in cell = 1/cell;
  species DUSP1 in cell = 1/cell;
  species DUSP1_g in cell = 1/cell;
  species DUSP1_p in cell = 1/cell;
  species DUSP1_rna in cell = 1/cell;
  species EGFR in cell = 1/cell;
  species EGFR_g in cell = 1/cell;
  species EGFR_p in cell = 1/cell;
  species EGFR_rna in cell = 1/cell;
  species EP300 in cell = 1/cell;
  species EP300_g in cell = 1/cell;
  species EP300_p in cell = 1/cell;
  species EP300_rna in cell = 1/cell;
  species F2R in cell = 1/cell;
  species F2R_g in cell = 1/cell;
  species F2R_p in cell = 1/cell;
  species F2R_rna in cell = 1/cell;
  species FGF2 in cell = 1/cell;
  species FGF2_g in cell = 1/cell;
  species FGF2_rna in cell = 1/cell;
  species FOS in cell = 1/cell;
  species FOS_g in cell = 1/cell;
  species FOS_p in cell = 1/cell;
  species FOS_rna in cell = 1/cell;
  species GDF15 in cell = 1/cell;
  species GDF15_g in cell = 1/cell;
  species GDF15_rna in cell = 1/cell;
  species GJA1 in cell = 1/cell;
  species GJA1_g in cell = 1/cell;
  species GJA1_p in cell = 1/cell;
  species GJA1_rna in cell = 1/cell;
  species GPX4 in cell = 1/cell;
  species GPX4_g in cell = 1/cell;
  species GPX4_rna in cell = 1/cell;
  species GSTA1 in cell = 1/cell;
  species GSTA1_g in cell = 1/cell;
  species GSTA1_rna in cell = 1/cell;
  species HES1 in cell = 1/cell;
  species HES1_g in cell = 1/cell;
  species HES1_rna in cell = 1/cell;
  species HIF1A in cell = 1/cell;
  species HIF1A_g in cell = 1/cell;
  species HIF1A_p in cell = 1/cell;
  species HIF1A_rna in cell = 1/cell;
  species HIPK2 in cell = 1/cell;
  species HIPK2_g in cell = 1/cell;
  species HIPK2_p in cell = 1/cell;
  species HIPK2_rna in cell = 1/cell;
  species HMGN1 in cell = 1/cell;
  species HMGN1_g in cell = 1/cell;
  species HMGN1_p in cell = 1/cell;
  species HMGN1_rna in cell = 1/cell;
  species HSPB1 in cell = 1/cell;
  species HSPB1_g in cell = 1/cell;
  species HSPB1_p in cell = 1/cell;
  species HSPB1_rna in cell = 1/cell;
  species IGF1 in cell = 1/cell;
  species IGF1R in cell = 1/cell;
  species IGF1R_g in cell = 1/cell;
  species IGF1R_p in cell = 1/cell;
  species IGF1R_rna in cell = 1/cell;
  species IGF1_g in cell = 1/cell;
  species IGF1_rna in cell = 1/cell;
  species ILK in cell = 1/cell;
  species ILK_g in cell = 1/cell;
  species ILK_p in cell = 1/cell;
  species ILK_rna in cell = 1/cell;
  species INSR in cell = 1/cell;
  species INSR_g in cell = 1/cell;
  species INSR_p in cell = 1/cell;
  species INSR_rna in cell = 1/cell;
  species IRF3 in cell = 1/cell;
  species IRF3_g in cell = 1/cell;
  species IRF3_p in cell = 1/cell;
  species IRF3_rna in cell = 1/cell;
  species JAK1 in cell = 1/cell;
  species JAK1_g in cell = 1/cell;
  species JAK1_p in cell = 1/cell;
  species JAK1_rna in cell = 1/cell;
  species JUN in cell = 1/cell;
  species JUN_g in cell = 1/cell;
  species JUN_p in cell = 1/cell;
  species JUN_rna in cell = 1/cell;
  species KLF9 in cell = 1/cell;
  species KLF9_g in cell = 1/cell;
  species KLF9_rna in cell = 1/cell;
  species MAPK1 in cell = 1/cell;
  species MAPK1_g in cell = 1/cell;
  species MAPK1_p in cell = 1/cell;
  species MAPK1_rna in cell = 1/cell;
  species MDM2 in cell = 1/cell;
  species MDM2_g in cell = 1/cell;
  species MDM2_p in cell = 1/cell;
  species MDM2_rna in cell = 1/cell;
  species MECP2 in cell = 1/cell;
  species MECP2_g in cell = 1/cell;
  species MECP2_p in cell = 1/cell;
  species MECP2_rna in cell = 1/cell;
  species MFF in cell = 1/cell;
  species MFF_g in cell = 1/cell;
  species MFF_p in cell = 1/cell;
  species MFF_rna in cell = 1/cell;
  species NFE2L2 in cell = 1/cell;
  species NFE2L2_g in cell = 1/cell;
  species NFE2L2_p in cell = 1/cell;
  species NFE2L2_rna in cell = 1/cell;
  species NFKB1 in cell = 1/cell;
  species NFKB1_g in cell = 1/cell;
  species NFKB1_rna in cell = 1/cell;
  species NOTCH2 in cell = 1/cell;
  species NOTCH2_g in cell = 1/cell;
  species NOTCH2_rna in cell = 1/cell;
  species NPHS1 in cell = 1/cell;
  species NPHS1_g in cell = 1/cell;
  species NPHS1_rna in cell = 1/cell;
  species NR3C1 in cell = 1/cell;
  species NR3C1_g in cell = 1/cell;
  species NR3C1_p in cell = 1/cell;
  species NR3C1_rna in cell = 1/cell;
  species NR4A1 in cell = 1/cell;
  species NR4A1_g in cell = 1/cell;
  species NR4A1_p in cell = 1/cell;
  species NR4A1_rna in cell = 1/cell;
  species NUMB in cell = 1/cell;
  species NUMB_g in cell = 1/cell;
  species NUMB_rna in cell = 1/cell;
  species PARK7 in cell = 1/cell;
  species PARK7_g in cell = 1/cell;
  species PARK7_p in cell = 1/cell;
  species PARK7_rna in cell = 1/cell;
  species PAX2 in cell = 1/cell;
  species PAX2_g in cell = 1/cell;
  species PAX2_rna in cell = 1/cell;
  species PCNA in cell = 1/cell;
  species PCNA_g in cell = 1/cell;
  species PCNA_p in cell = 1/cell;
  species PCNA_rna in cell = 1/cell;
  species PIK3R1 in cell = 1/cell;
  species PIK3R1_g in cell = 1/cell;
  species PIK3R1_p in cell = 1/cell;
  species PIK3R1_rna in cell = 1/cell;
  species PINK1 in cell = 1/cell;
  species PINK1_g in cell = 1/cell;
  species PINK1_rna in cell = 1/cell;
  species PKM in cell = 1/cell;
  species PKM_g in cell = 1/cell;
  species PKM_p in cell = 1/cell;
  species PKM_rna in cell = 1/cell;
  species PKN1 in cell = 1/cell;
  species PKN1_g in cell = 1/cell;
  species PKN1_p in cell = 1/cell;
  species PKN1_rna in cell = 1/cell;
  species PODXL in cell = 1/cell;
  species PODXL_g in cell = 1/cell;
  species PODXL_rna in cell = 1/cell;
  species PRDX1 in cell = 1/cell;
  species PRDX1_g in cell = 1/cell;
  species PRDX1_p in cell = 1/cell;
  species PRDX1_rna in cell = 1/cell;
  species PRDX6 in cell = 1/cell;
  species PRDX6_g in cell = 1/cell;
  species PRDX6_p in cell = 1/cell;
  species PRDX6_rna in cell = 1/cell;
  species PRKAA1 in cell = 1/cell;
  species PRKAA1_g in cell = 1/cell;
  species PRKAA1_p in cell = 1/cell;
  species PRKAA1_rna in cell = 1/cell;
  species PTEN in cell = 1/cell;
  species PTEN_g in cell = 1/cell;
  species PTEN_p in cell = 1/cell;
  species PTEN_rna in cell = 1/cell;
  species PTPA in cell = 1/cell;
  species PTPA_g in cell = 1/cell;
  species PTPA_rna in cell = 1/cell;
  species PTPN11 in cell = 1/cell;
  species PTPN11_g in cell = 1/cell;
  species PTPN11_p in cell = 1/cell;
  species PTPN11_rna in cell = 1/cell;
  species PTPN2 in cell = 1/cell;
  species PTPN2_g in cell = 1/cell;
  species PTPN2_rna in cell = 1/cell;
  species PTPRJ in cell = 1/cell;
  species PTPRJ_g in cell = 1/cell;
  species PTPRJ_rna in cell = 1/cell;
  species RAC1 in cell = 1/cell;
  species RAC1_g in cell = 1/cell;
  species RAC1_p in cell = 1/cell;
  species RAC1_rna in cell = 1/cell;
  species RCAN1 in cell = 1/cell;
  species RCAN1_g in cell = 1/cell;
  species RCAN1_p in cell = 1/cell;
  species RCAN1_rna in cell = 1/cell;
  species RELA in cell = 1/cell;
  species RELA_g in cell = 1/cell;
  species RELA_rna in cell = 1/cell;
  species RHOA in cell = 1/cell;
  species RHOA_g in cell = 1/cell;
  species RHOA_p in cell = 1/cell;
  species RHOA_rna in cell = 1/cell;
  species RNF7 in cell = 1/cell;
  species RNF7_g in cell = 1/cell;
  species RNF7_rna in cell = 1/cell;
  species ROCK1 in cell = 1/cell;
  species ROCK1_g in cell = 1/cell;
  species ROCK1_rna in cell = 1/cell;
  species ROCK2 in cell = 1/cell;
  species ROCK2_g in cell = 1/cell;
  species ROCK2_rna in cell = 1/cell;
  species RORA in cell = 1/cell;
  species RORA_g in cell = 1/cell;
  species RORA_p in cell = 1/cell;
  species RORA_rna in cell = 1/cell;
  species RPS6KA3 in cell = 1/cell;
  species RPS6KA3_g in cell = 1/cell;
  species RPS6KA3_p in cell = 1/cell;
  species RPS6KA3_rna in cell = 1/cell;
  species SGK1 in cell = 1/cell;
  species SGK1_g in cell = 1/cell;
  species SGK1_rna in cell = 1/cell;
  species SMAD2 in cell = 1/cell;
  species SMAD2_g in cell = 1/cell;
  species SMAD2_p in cell = 1/cell;
  species SMAD2_rna in cell = 1/cell;
  species SMAD3 in cell = 1/cell;
  species SMAD3_g in cell = 1/cell;
  species SMAD3_p in cell = 1/cell;
  species SMAD3_rna in cell = 1/cell;
  species SMAD4 in cell = 1/cell;
  species SMAD4_g in cell = 1/cell;
  species SMAD4_p in cell = 1/cell;
  species SMAD4_rna in cell = 1/cell;
  species SOCS3 in cell = 1/cell;
  species SOCS3_g in cell = 1/cell;
  species SOCS3_rna in cell = 1/cell;
  species SOD1 in cell = 1/cell;
  species SOD1_g in cell = 1/cell;
  species SOD1_rna in cell = 1/cell;
  species SOD2 in cell = 1/cell;
  species SOD2_g in cell = 1/cell;
  species SOD2_rna in cell = 1/cell;
  species SP1 in cell = 1/cell;
  species SP1_g in cell = 1/cell;
  species SP1_p in cell = 1/cell;
  species SP1_rna in cell = 1/cell;
  species STAT1 in cell = 1/cell;
  species STAT1_g in cell = 1/cell;
  species STAT1_p in cell = 1/cell;
  species STAT1_rna in cell = 1/cell;
  species STAT3 in cell = 1/cell;
  species STAT3_g in cell = 1/cell;
  species STAT3_p in cell = 1/cell;
  species STAT3_rna in cell = 1/cell;
  species STK11 in cell = 1/cell;
  species STK11_g in cell = 1/cell;
  species STK11_p in cell = 1/cell;
  species STK11_rna in cell = 1/cell;
  species STK4 in cell = 1/cell;
  species STK4_g in cell = 1/cell;
  species STK4_p in cell = 1/cell;
  species STK4_rna in cell = 1/cell;
  species TGFB2 in cell = 1/cell;
  species TGFB2_g in cell = 1/cell;
  species TGFB2_rna in cell = 1/cell;
  species TGFBR1 in cell = 1/cell;
  species TGFBR1_g in cell = 1/cell;
  species TGFBR1_rna in cell = 1/cell;
  species TNC in cell = 1/cell;
  species TNC_g in cell = 1/cell;
  species TNC_rna in cell = 1/cell;
  species TP53 in cell = 1/cell;
  species TP53_g in cell = 1/cell;
  species TP53_p in cell = 1/cell;
  species TP53_rna in cell = 1/cell;
  species TSC2 in cell = 1/cell;
  species TSC2_g in cell = 1/cell;
  species TSC2_p in cell = 1/cell;
  species TSC2_rna in cell = 1/cell;
  species TXNIP in cell = 1/cell;
  species TXNIP_g in cell = 1/cell;
  species TXNIP_p in cell = 1/cell;
  species TXNIP_rna in cell = 1/cell;
  species UBC in cell = 1/cell;
  species UBC_g in cell = 1/cell;
  species UBC_p in cell = 1/cell;
  species UBC_rna in cell = 1/cell;
  species VCAN in cell = 1/cell;
  species VCAN_g in cell = 1/cell;
  species VCAN_rna in cell = 1/cell;
  species VEGFA in cell = 1/cell;
  species VEGFA_g in cell = 1/cell;
  species VEGFA_rna in cell = 1/cell;
  species VIM in cell = 1/cell;
  species VIM_g in cell = 1/cell;
  species VIM_p in cell = 1/cell;
  species VIM_rna in cell = 1/cell;
  species WT1 in cell = 1/cell;
  species WT1_g in cell = 1/cell;
  species WT1_rna in cell = 1/cell;
  species YAP1 in cell = 1/cell;
  species YAP1_g in cell = 1/cell;
  species YAP1_p in cell = 1/cell;
  species YAP1_rna in cell = 1/cell;
  species ZFP36 in cell = 1/cell;
  species ZFP36_g in cell = 1/cell;
  species ZFP36_p in cell = 1/cell;
  species ZFP36_rna in cell = 1/cell;

  // Reactions:
  // V(1) = K(1,1) * [SMAD2_p] * [SMAD4_p] -K(1,2) * [SIGNOR-C8];
  R1: SMAD2_p => SMAD4_p; 1;
  // V(2) = K(2,1) * [SMAD4_p] * [SMAD3_p] -K(2,2) * [SIGNOR-C9];
  R2: SMAD4_p => SMAD3_p; 1;
  // V(3) = K(3,1) * [SMAD4_p] * [JUN_p] -K(3,2) * [SIGNOR-C10];
  R3: JUN_p => SMAD4_p; 1;
  // V(4) = K(4,1) * [NFKB1] * [RELA] -K(4,2) * [SIGNOR-C13];
  R4: NFKB1 => RELA; 1;
  // V(5) = K(5,1) * [STAT3_p] * [SP1_p] -K(5,2) * [SIGNOR-C74];
  R5: STAT3_p => SP1_p; 1;
  // V(6) = K(6,1) * [JUN_p] * [SMAD3_p] -K(6,2) * [SIGNOR-C86];
  R6: JUN_p => SMAD3_p; 1;
  // V(7) = K(7,1) * [STAT1_p] * [STAT3_p] -K(7,2) * [SIGNOR-C118];
  R7: STAT3_p => STAT1_p; 1;
  // V(8) = K(8,1) * [SIGNOR-C118] * [JAK1_p] -K(8,2) * [SIGNOR-C120];
  R8: JAK1_p => ; 1;
  // V(9) = K(9,1) * [FOS_p] * [JUN_p] * [JUN_p] * [FOS_p] * [JUN_p] * [FOS_p] * [FOS_p] * [JUN_p] -K(9,2) * [SIGNOR-C154];
  R9: JUN_p => FOS_p; 1;
  // V(10) = K(10,1) * [TGFBR1] * [SMAD2] -K(10,2) * [TGFBR1 |SMAD2];
  R10: TGFBR1 => SMAD2; 1;
  // V(11) = K(11,1) * [TGFBR1 |SMAD2];
  R11: TGFBR1 => SMAD2; 1;
  // V(12) = K(12,1) * [MAPK1_p] * [EP300] -K(12,2) * [MAPK1_p |EP300];
  R12: EP300 => MAPK1_p; 1;
  // V(13) = K(13,1) * [MAPK1_p |EP300];
  R13: EP300 => MAPK1_p; 1;
  // V(14) = K(14,1) * [MAPK1_p] * [HIF1A] -K(14,2) * [MAPK1_p |HIF1A];
  R14: HIF1A => MAPK1_p; 1;
  // V(15) = K(15,1) * [MAPK1_p |HIF1A];
  R15: HIF1A => MAPK1_p; 1;
  // V(16) = K(16,1) * [MAPK1_p] * [NR3C1] -K(16,2) * [MAPK1_p |NR3C1];
  R16: NR3C1 => MAPK1_p; 1;
  // V(17) = K(17,1) * [MAPK1_p |NR3C1];
  R17: NR3C1 => MAPK1_p; 1;
  // V(18) = K(18,1) * [MAPK1_p] * [RPS6KA3] -K(18,2) * [MAPK1_p |RPS6KA3];
  R18: RPS6KA3 => MAPK1_p; 1;
  // V(19) = K(19,1) * [MAPK1_p |RPS6KA3];
  R19: RPS6KA3 => MAPK1_p; 1;
  // V(20) = K(20,1) * [MAPK1_p] * [PRDX6] -K(20,2) * [MAPK1_p |PRDX6];
  R20: PRDX6 => MAPK1_p; 1;
  // V(21) = K(21,1) * [MAPK1_p |PRDX6];
  R21: PRDX6 => MAPK1_p; 1;
  // V(22) = K(22,1) * [AKT1_p] * [MDM2] -K(22,2) * [AKT1_p |MDM2];
  R22: AKT1_p => MDM2; 1;
  // V(23) = K(23,1) * [AKT1_p |MDM2];
  R23: AKT1_p => MDM2; 1;
  // V(24) = K(24,1) * [AKT1_p] * [PRKAA1] -K(24,2) * [AKT1_p |PRKAA1];
  R24: PRKAA1 => AKT1_p; 1;
  // V(25) = K(25,1) * [AKT1_p |PRKAA1];
  R25: PRKAA1 => AKT1_p; 1;
  // V(26) = K(26,1) * [EGFR_p] * [EGFR] -K(26,2) * [EGFR_p |EGFR];
  R26: EGFR_p => EGFR; 1;
  // V(27) = K(27,1) * [EGFR_p |EGFR];
  R27: EGFR_p => EGFR; 1;
  // V(28) = K(28,1) * [MAPK1_p] * [SMAD4] -K(28,2) * [MAPK1_p |SMAD4];
  R28: SMAD4 => MAPK1_p; 1;
  // V(29) = K(29,1) * [MAPK1_p |SMAD4];
  R29: SMAD4 => MAPK1_p; 1;
  // V(30) = K(30,1) * [ROCK1] * [DNM1L] -K(30,2) * [ROCK1 |DNM1L];
  R30: ROCK1 => DNM1L; 1;
  // V(31) = K(31,1) * [ROCK1 |DNM1L];
  R31: ROCK1 => DNM1L; 1;
  // V(32) = K(32,1) * [MAPK1_p] * [STK11] -K(32,2) * [MAPK1_p |STK11];
  R32: STK11 => MAPK1_p; 1;
  // V(33) = K(33,1) * [MAPK1_p |STK11];
  R33: STK11 => MAPK1_p; 1;
  // V(34) = K(34,1) * [MAPK1_p] * [JUN] -K(34,2) * [MAPK1_p |JUN];
  R34: JUN => MAPK1_p; 1;
  // V(35) = K(35,1) * [MAPK1_p |JUN];
  R35: JUN => MAPK1_p; 1;
  // V(36) = K(36,1) * [AKT1_p] * [NR4A1] -K(36,2) * [AKT1_p |NR4A1];
  R36: NR4A1 => AKT1_p; 1;
  // V(37) = K(37,1) * [AKT1_p |NR4A1];
  R37: NR4A1 => AKT1_p; 1;
  // V(38) = K(38,1) * [MAPK1_p] * [FOS] -K(38,2) * [MAPK1_p |FOS];
  R38: FOS => MAPK1_p; 1;
  // V(39) = K(39,1) * [MAPK1_p |FOS];
  R39: FOS => MAPK1_p; 1;
  // V(40) = K(40,1) * [STK11_p] * [STK11] -K(40,2) * [STK11_p |STK11];
  R40: STK11_p => STK11; 1;
  // V(41) = K(41,1) * [STK11_p |STK11];
  R41: STK11_p => STK11; 1;
  // V(42) = K(42,1) * [AKT1_p] * [AR] -K(42,2) * [AKT1_p |AR];
  R42: AR => AKT1_p; 1;
  // V(43) = K(43,1) * [AKT1_p |AR];
  R43: AR => AKT1_p; 1;
  // V(44) = K(44,1) * [MAPK1_p] * [SMAD2] -K(44,2) * [MAPK1_p |SMAD2];
  R44: SMAD2 => MAPK1_p; 1;
  // V(45) = K(45,1) * [MAPK1_p |SMAD2];
  R45: SMAD2 => MAPK1_p; 1;
  // V(46) = K(46,1) * [MAPK1_p] * [RORA] -K(46,2) * [MAPK1_p |RORA];
  R46: RORA => MAPK1_p; 1;
  // V(47) = K(47,1) * [MAPK1_p |RORA];
  R47: RORA => MAPK1_p; 1;
  // V(48) = K(48,1) * [MAPK1_p] * [BCL2] -K(48,2) * [MAPK1_p |BCL2];
  R48: BCL2 => MAPK1_p; 1;
  // V(49) = K(49,1) * [MAPK1_p |BCL2];
  R49: BCL2 => MAPK1_p; 1;
  // V(50) = K(50,1) * [INSR_p] * [INSR] -K(50,2) * [INSR_p |INSR];
  R50: INSR_p => INSR; 1;
  // V(51) = K(51,1) * [INSR_p |INSR];
  R51: INSR_p => INSR; 1;
  // V(52) = K(52,1) * [AKT1_p] * [BAD] -K(52,2) * [AKT1_p |BAD];
  R52: BAD => AKT1_p; 1;
  // V(53) = K(53,1) * [AKT1_p |BAD];
  R53: BAD => AKT1_p; 1;
  // V(54) = K(54,1) * [MAPK1_p] * [GJA1] -K(54,2) * [MAPK1_p |GJA1];
  R54: GJA1 => MAPK1_p; 1;
  // V(55) = K(55,1) * [MAPK1_p |GJA1];
  R55: GJA1 => MAPK1_p; 1;
  // V(56) = K(56,1) * [JAK1_p] * [STAT1] -K(56,2) * [JAK1_p |STAT1];
  R56: STAT1 => JAK1_p; 1;
  // V(57) = K(57,1) * [JAK1_p |STAT1];
  R57: STAT1 => JAK1_p; 1;
  // V(58) = K(58,1) * [MAPK1_p] * [DUSP1] -K(58,2) * [MAPK1_p |DUSP1];
  R58: DUSP1 => MAPK1_p; 1;
  // V(59) = K(59,1) * [MAPK1_p |DUSP1];
  R59: DUSP1 => MAPK1_p; 1;
  // V(60) = K(60,1) * [AKT1_p] * [HSPB1] -K(60,2) * [AKT1_p |HSPB1];
  R60: HSPB1 => AKT1_p; 1;
  // V(61) = K(61,1) * [AKT1_p |HSPB1];
  R61: HSPB1 => AKT1_p; 1;
  // V(62) = K(62,1) * [RPS6KA3_p] * [HMGN1] -K(62,2) * [RPS6KA3_p |HMGN1];
  R62: HMGN1 => RPS6KA3_p; 1;
  // V(63) = K(63,1) * [RPS6KA3_p |HMGN1];
  R63: HMGN1 => RPS6KA3_p; 1;
  // V(64) = K(64,1) * [PKN1_p] * [PKN1] -K(64,2) * [PKN1_p |PKN1];
  R64: PKN1 => PKN1_p; 1;
  // V(65) = K(65,1) * [PKN1_p |PKN1];
  R65: PKN1 => PKN1_p; 1;
  // V(66) = K(66,1) * [MAPK1_p] * [TSC2] -K(66,2) * [MAPK1_p |TSC2];
  R66: TSC2 => MAPK1_p; 1;
  // V(67) = K(67,1) * [MAPK1_p |TSC2];
  R67: TSC2 => MAPK1_p; 1;
  // V(68) = K(68,1) * [MAPK1_p] * [RHOA] -K(68,2) * [MAPK1_p |RHOA];
  R68: RHOA => MAPK1_p; 1;
  // V(69) = K(69,1) * [MAPK1_p |RHOA];
  R69: RHOA => MAPK1_p; 1;
  // V(70) = K(70,1) * [EGFR_p] * [CALM1] -K(70,2) * [EGFR_p |CALM1];
  R70: EGFR_p => CALM1; 1;
  // V(71) = K(71,1) * [EGFR_p |CALM1];
  R71: EGFR_p => CALM1; 1;
  // V(72) = K(72,1) * [MAPK1_p] * [SMAD3] -K(72,2) * [MAPK1_p |SMAD3];
  R72: SMAD3 => MAPK1_p; 1;
  // V(73) = K(73,1) * [MAPK1_p |SMAD3];
  R73: SMAD3 => MAPK1_p; 1;
  // V(74) = K(74,1) * [INSR_p] * [CALM1] -K(74,2) * [INSR_p |CALM1];
  R74: INSR_p => CALM1; 1;
  // V(75) = K(75,1) * [INSR_p |CALM1];
  R75: INSR_p => CALM1; 1;
  // V(76) = K(76,1) * [ATR] * [MDM2] -K(76,2) * [ATR |MDM2];
  R76: ATR => MDM2; 1;
  // V(77) = K(77,1) * [ATR |MDM2];
  R77: ATR => MDM2; 1;
  // V(78) = K(78,1) * [MAPK1_p] * [SIGNOR-C154] -K(78,2) * [MAPK1_p |SIGNOR-C154];
  R78: MAPK1_p => ; 1;
  // V(79) = K(79,1) * [MAPK1_p |SIGNOR-C154];
  R79: MAPK1_p => ; 1;
  // V(80) = K(80,1) * [RPS6KA3_p] * [BAD] -K(80,2) * [RPS6KA3_p |BAD];
  R80: RPS6KA3_p => BAD; 1;
  // V(81) = K(81,1) * [RPS6KA3_p |BAD];
  R81: RPS6KA3_p => BAD; 1;
  // V(82) = K(82,1) * [PINK1] * [UBC] -K(82,2) * [PINK1 |UBC];
  R82: PINK1 => UBC; 1;
  // V(83) = K(83,1) * [PINK1 |UBC];
  R83: PINK1 => UBC; 1;
  // V(84) = K(84,1) * [AKT1_p] * [RAC1] -K(84,2) * [AKT1_p |RAC1];
  R84: RAC1 => AKT1_p; 1;
  // V(85) = K(85,1) * [AKT1_p |RAC1];
  R85: RAC1 => AKT1_p; 1;
  // V(86) = K(86,1) * [STK4_p] * [STK4] -K(86,2) * [STK4_p |STK4];
  R86: STK4_p => STK4; 1;
  // V(87) = K(87,1) * [STK4_p |STK4];
  R87: STK4_p => STK4; 1;
  // V(88) = K(88,1) * [IGF1R_p] * [IGF1R] -K(88,2) * [IGF1R_p |IGF1R];
  R88: IGF1R_p => IGF1R; 1;
  // V(89) = K(89,1) * [IGF1R_p |IGF1R];
  R89: IGF1R_p => IGF1R; 1;
  // V(90) = K(90,1) * [STK11_p] * [PTEN] -K(90,2) * [STK11_p |PTEN];
  R90: PTEN => STK11_p; 1;
  // V(91) = K(91,1) * [STK11_p |PTEN];
  R91: PTEN => STK11_p; 1;
  // V(92) = K(92,1) * [HIPK2_p] * [HIPK2] -K(92,2) * [HIPK2_p |HIPK2];
  R92: HIPK2_p => HIPK2; 1;
  // V(93) = K(93,1) * [HIPK2_p |HIPK2];
  R93: HIPK2_p => HIPK2; 1;
  // V(94) = K(94,1) * [RPS6KA3_p] * [CREB1] -K(94,2) * [RPS6KA3_p |CREB1];
  R94: RPS6KA3_p => CREB1; 1;
  // V(95) = K(95,1) * [RPS6KA3_p |CREB1];
  R95: RPS6KA3_p => CREB1; 1;
  // V(96) = K(96,1) * [AKT1_p] * [TSC2] -K(96,2) * [AKT1_p |TSC2];
  R96: TSC2 => AKT1_p; 1;
  // V(97) = K(97,1) * [AKT1_p |TSC2];
  R97: TSC2 => AKT1_p; 1;
  // V(98) = K(98,1) * [AKT1_p] * [EP300] -K(98,2) * [AKT1_p |EP300];
  R98: EP300 => AKT1_p; 1;
  // V(99) = K(99,1) * [AKT1_p |EP300];
  R99: EP300 => AKT1_p; 1;
  // V(100) = K(100,1) * [MAPK1_p] * [EGFR] -K(100,2) * [MAPK1_p |EGFR];
  R100: EGFR => MAPK1_p; 1;
  // V(101) = K(101,1) * [MAPK1_p |EGFR];
  R101: EGFR => MAPK1_p; 1;
  // V(102) = K(102,1) * [AKT1_p] * [VIM] -K(102,2) * [AKT1_p |VIM];
  R102: VIM => AKT1_p; 1;
  // V(103) = K(103,1) * [AKT1_p |VIM];
  R103: VIM => AKT1_p; 1;
  // V(104) = K(104,1) * [AXL_p] * [AXL] -K(104,2) * [AXL_p |AXL];
  R104: AXL => AXL_p; 1;
  // V(105) = K(105,1) * [AXL_p |AXL];
  R105: AXL => AXL_p; 1;
  // V(106) = K(106,1) * [ILK_p] * [AKT1] -K(106,2) * [ILK_p |AKT1];
  R106: ILK_p => AKT1; 1;
  // V(107) = K(107,1) * [ILK_p |AKT1];
  R107: ILK_p => AKT1; 1;
  // V(108) = K(108,1) * [MAPK1_p] * [SP1] -K(108,2) * [MAPK1_p |SP1];
  R108: SP1 => MAPK1_p; 1;
  // V(109) = K(109,1) * [MAPK1_p |SP1];
  R109: SP1 => MAPK1_p; 1;
  // V(110) = K(110,1) * [ROCK1] * [PTEN] -K(110,2) * [ROCK1 |PTEN];
  R110: PTEN => ROCK1; 1;
  // V(111) = K(111,1) * [ROCK1 |PTEN];
  R111: PTEN => ROCK1; 1;
  // V(112) = K(112,1) * [MAPK1_p] * [BAD] -K(112,2) * [MAPK1_p |BAD];
  R112: BAD => MAPK1_p; 1;
  // V(113) = K(113,1) * [MAPK1_p |BAD];
  R113: BAD => MAPK1_p; 1;
  // V(114) = K(114,1) * [IGF1R_p] * [PCNA] -K(114,2) * [IGF1R_p |PCNA];
  R114: PCNA => IGF1R_p; 1;
  // V(115) = K(115,1) * [IGF1R_p |PCNA];
  R115: PCNA => IGF1R_p; 1;
  // V(116) = K(116,1) * [JAK1_p] * [STAT3] -K(116,2) * [JAK1_p |STAT3];
  R116: STAT3 => JAK1_p; 1;
  // V(117) = K(117,1) * [JAK1_p |STAT3];
  R117: STAT3 => JAK1_p; 1;
  // V(118) = K(118,1) * [AKT1_p] * [NR3C1] -K(118,2) * [AKT1_p |NR3C1];
  R118: AKT1_p => NR3C1; 1;
  // V(119) = K(119,1) * [AKT1_p |NR3C1];
  R119: AKT1_p => NR3C1; 1;
  // V(120) = K(120,1) * [EGFR_p] * [SIGNOR-C120] -K(120,2) * [EGFR_p |SIGNOR-C120];
  R120: EGFR_p => ; 1;
  // V(121) = K(121,1) * [EGFR_p |SIGNOR-C120];
  R121: EGFR_p => ; 1;
  // V(122) = K(122,1) * [STK11_p] * [SMAD4] -K(122,2) * [STK11_p |SMAD4];
  R122: SMAD4 => STK11_p; 1;
  // V(123) = K(123,1) * [STK11_p |SMAD4];
  R123: SMAD4 => STK11_p; 1;
  // V(124) = K(124,1) * [AXL_p] * [EGFR] -K(124,2) * [AXL_p |EGFR];
  R124: EGFR => AXL_p; 1;
  // V(125) = K(125,1) * [AXL_p |EGFR];
  R125: EGFR => AXL_p; 1;
  // V(126) = K(126,1) * [SGK1] * [TSC2] -K(126,2) * [SGK1 |TSC2];
  R126: TSC2 => SGK1; 1;
  // V(127) = K(127,1) * [SGK1 |TSC2];
  R127: TSC2 => SGK1; 1;
  // V(128) = K(128,1) * [AKT1_p] * [YAP1] -K(128,2) * [AKT1_p |YAP1];
  R128: YAP1 => AKT1_p; 1;
  // V(129) = K(129,1) * [AKT1_p |YAP1];
  R129: YAP1 => AKT1_p; 1;
  // V(130) = K(130,1) * [STK4_p] * [IRF3] -K(130,2) * [STK4_p |IRF3];
  R130: STK4_p => IRF3; 1;
  // V(131) = K(131,1) * [STK4_p |IRF3];
  R131: STK4_p => IRF3; 1;
  // V(132) = K(132,1) * [RPS6KA3_p] * [FOS] -K(132,2) * [RPS6KA3_p |FOS];
  R132: RPS6KA3_p => FOS; 1;
  // V(133) = K(133,1) * [RPS6KA3_p |FOS];
  R133: RPS6KA3_p => FOS; 1;
  // V(134) = K(134,1) * [AKT1_p] * [RPS6KA3] -K(134,2) * [AKT1_p |RPS6KA3];
  R134: RPS6KA3 => AKT1_p; 1;
  // V(135) = K(135,1) * [AKT1_p |RPS6KA3];
  R135: RPS6KA3 => AKT1_p; 1;
  // V(136) = K(136,1) * [RPS6KA3_p] * [RPS6KA3] -K(136,2) * [RPS6KA3_p |RPS6KA3];
  R136: RPS6KA3_p => RPS6KA3; 1;
  // V(137) = K(137,1) * [RPS6KA3_p |RPS6KA3];
  R137: RPS6KA3_p => RPS6KA3; 1;
  // V(138) = K(138,1) * [PRKAA1_p] * [EP300] -K(138,2) * [PRKAA1_p |EP300];
  R138: PRKAA1_p => EP300; 1;
  // V(139) = K(139,1) * [PRKAA1_p |EP300];
  R139: PRKAA1_p => EP300; 1;
  // V(140) = K(140,1) * [HIPK2_p] * [MECP2] -K(140,2) * [HIPK2_p |MECP2];
  R140: MECP2 => HIPK2_p; 1;
  // V(141) = K(141,1) * [HIPK2_p |MECP2];
  R141: MECP2 => HIPK2_p; 1;
  // V(142) = K(142,1) * [AKT1_p] * [CTNNB1] -K(142,2) * [AKT1_p |CTNNB1];
  R142: CTNNB1 => AKT1_p; 1;
  // V(143) = K(143,1) * [AKT1_p |CTNNB1];
  R143: CTNNB1 => AKT1_p; 1;
  // V(144) = K(144,1) * [AKT1_p] * [STK4] -K(144,2) * [AKT1_p |STK4];
  R144: STK4 => AKT1_p; 1;
  // V(145) = K(145,1) * [AKT1_p |STK4];
  R145: STK4 => AKT1_p; 1;
  // V(146) = K(146,1) * [RPS6KA3_p] * [NR4A1] -K(146,2) * [RPS6KA3_p |NR4A1];
  R146: NR4A1 => RPS6KA3_p; 1;
  // V(147) = K(147,1) * [RPS6KA3_p |NR4A1];
  R147: NR4A1 => RPS6KA3_p; 1;
  // V(148) = K(148,1) * [ROCK1] * [TP53] -K(148,2) * [ROCK1 |TP53];
  R148: TP53 => ROCK1; 1;
  // V(149) = K(149,1) * [ROCK1 |TP53];
  R149: TP53 => ROCK1; 1;
  // V(150) = K(150,1) * [STK11_p] * [YAP1] -K(150,2) * [STK11_p |YAP1];
  R150: YAP1 => STK11_p; 1;
  // V(151) = K(151,1) * [STK11_p |YAP1];
  R151: YAP1 => STK11_p; 1;
  // V(152) = K(152,1) * [STK4_p] * [AR] -K(152,2) * [STK4_p |AR];
  R152: STK4_p => AR; 1;
  // V(153) = K(153,1) * [STK4_p |AR];
  R153: STK4_p => AR; 1;
  // V(154) = K(154,1) * [MAPK1_p] * [MAPK1] -K(154,2) * [MAPK1_p |MAPK1];
  R154: MAPK1 => MAPK1_p; 1;
  // V(155) = K(155,1) * [MAPK1_p |MAPK1];
  R155: MAPK1 => MAPK1_p; 1;
  // V(156) = K(156,1) * [PRKAA1_p] * [TSC2] -K(156,2) * [PRKAA1_p |TSC2];
  R156: PRKAA1_p => TSC2; 1;
  // V(157) = K(157,1) * [PRKAA1_p |TSC2];
  R157: PRKAA1_p => TSC2; 1;
  // V(158) = K(158,1) * [MAPK1_p] * [ZFP36] -K(158,2) * [MAPK1_p |ZFP36];
  R158: ZFP36 => MAPK1_p; 1;
  // V(159) = K(159,1) * [MAPK1_p |ZFP36];
  R159: ZFP36 => MAPK1_p; 1;
  // V(160) = K(160,1) * [MAPK1_p] * [RCAN1] -K(160,2) * [MAPK1_p |RCAN1];
  R160: RCAN1 => MAPK1_p; 1;
  // V(161) = K(161,1) * [MAPK1_p |RCAN1];
  R161: RCAN1 => MAPK1_p; 1;
  // V(162) = K(162,1) * [PKN1_p] * [EGFR] -K(162,2) * [PKN1_p |EGFR];
  R162: EGFR => PKN1_p; 1;
  // V(163) = K(163,1) * [PKN1_p |EGFR];
  R163: EGFR => PKN1_p; 1;
  // V(164) = K(164,1) * [MAPK1_p] * [AEBP1] -K(164,2) * [MAPK1_p |AEBP1];
  R164: AEBP1 => MAPK1_p; 1;
  // V(165) = K(165,1) * [MAPK1_p |AEBP1];
  R165: AEBP1 => MAPK1_p; 1;
  // V(166) = K(166,1) * [PKN1_p] * [AR] -K(166,2) * [PKN1_p |AR];
  R166: AR => PKN1_p; 1;
  // V(167) = K(167,1) * [PKN1_p |AR];
  R167: AR => PKN1_p; 1;
  // V(168) = K(168,1) * [AKT1_p] * [PARK7] -K(168,2) * [AKT1_p |PARK7];
  R168: AKT1_p => PARK7; 1;
  // V(169) = K(169,1) * [AKT1_p |PARK7];
  R169: AKT1_p => PARK7; 1;
  // V(170) = K(170,1) * [SGK1] * [SP1] -K(170,2) * [SGK1 |SP1];
  R170: SP1 => SGK1; 1;
  // V(171) = K(171,1) * [SGK1 |SP1];
  R171: SP1 => SGK1; 1;
  // V(172) = K(172,1) * [PRKAA1_p] * [HIPK2] -K(172,2) * [PRKAA1_p |HIPK2];
  R172: PRKAA1_p => HIPK2; 1;
  // V(173) = K(173,1) * [PRKAA1_p |HIPK2];
  R173: PRKAA1_p => HIPK2; 1;
  // V(174) = K(174,1) * [MAPK1_p] * [DNM1L] -K(174,2) * [MAPK1_p |DNM1L];
  R174: DNM1L => MAPK1_p; 1;
  // V(175) = K(175,1) * [MAPK1_p |DNM1L];
  R175: DNM1L => MAPK1_p; 1;
  // V(176) = K(176,1) * [SGK1] * [MAPK1] -K(176,2) * [SGK1 |MAPK1];
  R176: MAPK1 => SGK1; 1;
  // V(177) = K(177,1) * [SGK1 |MAPK1];
  R177: MAPK1 => SGK1; 1;
  // V(178) = K(178,1) * [PRKAA1_p] * [DDIT3] -K(178,2) * [PRKAA1_p |DDIT3];
  R178: DDIT3 => PRKAA1_p; 1;
  // V(179) = K(179,1) * [PRKAA1_p |DDIT3];
  R179: DDIT3 => PRKAA1_p; 1;
  // V(180) = K(180,1) * [RPS6KA3_p] * [TP53] -K(180,2) * [RPS6KA3_p |TP53];
  R180: TP53 => RPS6KA3_p; 1;
  // V(181) = K(181,1) * [RPS6KA3_p |TP53];
  R181: TP53 => RPS6KA3_p; 1;
  // V(182) = K(182,1) * [ROCK1] * [BECN1] -K(182,2) * [ROCK1 |BECN1];
  R182: ROCK1 => BECN1; 1;
  // V(183) = K(183,1) * [ROCK1 |BECN1];
  R183: ROCK1 => BECN1; 1;
  // V(184) = K(184,1) * [HIPK2_p] * [EP300] -K(184,2) * [HIPK2_p |EP300];
  R184: EP300 => HIPK2_p; 1;
  // V(185) = K(185,1) * [HIPK2_p |EP300];
  R185: EP300 => HIPK2_p; 1;
  // V(186) = K(186,1) * [SGK1] * [NR3C1] -K(186,2) * [SGK1 |NR3C1];
  R186: SGK1 => NR3C1; 1;
  // V(187) = K(187,1) * [SGK1 |NR3C1];
  R187: SGK1 => NR3C1; 1;
  // V(188) = K(188,1) * [MAPK1_p] * [AR] -K(188,2) * [MAPK1_p |AR];
  R188: AR => MAPK1_p; 1;
  // V(189) = K(189,1) * [MAPK1_p |AR];
  R189: AR => MAPK1_p; 1;
  // V(190) = K(190,1) * [PKM] * [STAT3] -K(190,2) * [PKM |STAT3];
  R190: PKM => STAT3; 1;
  // V(191) = K(191,1) * [PKM |STAT3];
  R191: PKM => STAT3; 1;
  // V(192) = K(192,1) * [AKT1_p] * [AKT1] -K(192,2) * [AKT1_p |AKT1];
  R192: AKT1 => AKT1_p; 1;
  // V(193) = K(193,1) * [AKT1_p |AKT1];
  R193: AKT1 => AKT1_p; 1;
  // V(194) = K(194,1) * [JAK1_p] * [PTPN11] -K(194,2) * [JAK1_p |PTPN11];
  R194: PTPN11 => JAK1_p; 1;
  // V(195) = K(195,1) * [JAK1_p |PTPN11];
  R195: PTPN11 => JAK1_p; 1;
  // V(196) = K(196,1) * [PINK1] * [TP53] -K(196,2) * [PINK1 |TP53];
  R196: TP53 => PINK1; 1;
  // V(197) = K(197,1) * [PINK1 |TP53];
  R197: TP53 => PINK1; 1;
  // V(198) = K(198,1) * [EGFR_p] * [STAT1] -K(198,2) * [EGFR_p |STAT1];
  R198: EGFR_p => STAT1; 1;
  // V(199) = K(199,1) * [EGFR_p |STAT1];
  R199: EGFR_p => STAT1; 1;
  // V(200) = K(200,1) * [INSR_p] * [PTEN] -K(200,2) * [INSR_p |PTEN];
  R200: PTEN => INSR_p; 1;
  // V(201) = K(201,1) * [INSR_p |PTEN];
  R201: PTEN => INSR_p; 1;
  // V(202) = K(202,1) * [STK11_p] * [TP53] -K(202,2) * [STK11_p |TP53];
  R202: TP53 => STK11_p; 1;
  // V(203) = K(203,1) * [STK11_p |TP53];
  R203: TP53 => STK11_p; 1;
  // V(204) = K(204,1) * [STK4_p] * [BECN1] -K(204,2) * [STK4_p |BECN1];
  R204: STK4_p => BECN1; 1;
  // V(205) = K(205,1) * [STK4_p |BECN1];
  R205: STK4_p => BECN1; 1;
  // V(206) = K(206,1) * [INSR_p] * [PIK3R1] -K(206,2) * [INSR_p |PIK3R1];
  R206: PIK3R1 => INSR_p; 1;
  // V(207) = K(207,1) * [INSR_p |PIK3R1];
  R207: PIK3R1 => INSR_p; 1;
  // V(208) = K(208,1) * [EGFR_p] * [PCNA] -K(208,2) * [EGFR_p |PCNA];
  R208: EGFR_p => PCNA; 1;
  // V(209) = K(209,1) * [EGFR_p |PCNA];
  R209: EGFR_p => PCNA; 1;
  // V(210) = K(210,1) * [STK4_p] * [PRDX1] -K(210,2) * [STK4_p |PRDX1];
  R210: STK4_p => PRDX1; 1;
  // V(211) = K(211,1) * [STK4_p |PRDX1];
  R211: STK4_p => PRDX1; 1;
  // V(212) = K(212,1) * [PRKAA1_p] * [MFF] -K(212,2) * [PRKAA1_p |MFF];
  R212: PRKAA1_p => MFF; 1;
  // V(213) = K(213,1) * [PRKAA1_p |MFF];
  R213: PRKAA1_p => MFF; 1;
  // V(214) = K(214,1) * [AKT1_p] * [CREB1] -K(214,2) * [AKT1_p |CREB1];
  R214: CREB1 => AKT1_p; 1;
  // V(215) = K(215,1) * [AKT1_p |CREB1];
  R215: CREB1 => AKT1_p; 1;
  // V(216) = K(216,1) * [AKT1_p] * [MAPK1] -K(216,2) * [AKT1_p |MAPK1];
  R216: MAPK1 => AKT1_p; 1;
  // V(217) = K(217,1) * [AKT1_p |MAPK1];
  R217: MAPK1 => AKT1_p; 1;
  // V(218) = K(218,1) * [ROCK1] * [VIM] -K(218,2) * [ROCK1 |VIM];
  R218: ROCK1 => VIM; 1;
  // V(219) = K(219,1) * [ROCK1 |VIM];
  R219: ROCK1 => VIM; 1;
  // V(220) = K(220,1) * [STK11_p] * [F2R] -K(220,2) * [STK11_p |F2R];
  R220: F2R => STK11_p; 1;
  // V(221) = K(221,1) * [STK11_p |F2R];
  R221: F2R => STK11_p; 1;
  // V(222) = K(222,1) * [ATR] * [TP53] -K(222,2) * [ATR |TP53];
  R222: TP53 => ATR; 1;
  // V(223) = K(223,1) * [ATR |TP53];
  R223: TP53 => ATR; 1;
  // V(224) = K(224,1) * [ATR] * [CREB1] -K(224,2) * [ATR |CREB1];
  R224: ATR => CREB1; 1;
  // V(225) = K(225,1) * [ATR |CREB1];
  R225: ATR => CREB1; 1;
  // V(226) = K(226,1) * [EGFR_p] * [AGO2] -K(226,2) * [EGFR_p |AGO2];
  R226: EGFR_p => AGO2; 1;
  // V(227) = K(227,1) * [EGFR_p |AGO2];
  R227: EGFR_p => AGO2; 1;
  // V(228) = K(228,1) * [TGFBR1] * [SMAD3] -K(228,2) * [TGFBR1 |SMAD3];
  R228: TGFBR1 => SMAD3; 1;
  // V(229) = K(229,1) * [TGFBR1 |SMAD3];
  R229: TGFBR1 => SMAD3; 1;
  // V(230) = K(230,1) * [STK11_p] * [PRKAA1] -K(230,2) * [STK11_p |PRKAA1];
  R230: PRKAA1 => STK11_p; 1;
  // V(231) = K(231,1) * [STK11_p |PRKAA1];
  R231: PRKAA1 => STK11_p; 1;
  // V(232) = K(232,1) * [RPS6KA3_p] * [TSC2] -K(232,2) * [RPS6KA3_p |TSC2];
  R232: RPS6KA3_p => TSC2; 1;
  // V(233) = K(233,1) * [RPS6KA3_p |TSC2];
  R233: RPS6KA3_p => TSC2; 1;
  // V(234) = K(234,1) * [EGFR_p] * [ANXA1] -K(234,2) * [EGFR_p |ANXA1];
  R234: EGFR_p => ANXA1; 1;
  // V(235) = K(235,1) * [EGFR_p |ANXA1];
  R235: EGFR_p => ANXA1; 1;
  // V(236) = K(236,1) * [EGFR_p] * [STAT3] -K(236,2) * [EGFR_p |STAT3];
  R236: EGFR_p => STAT3; 1;
  // V(237) = K(237,1) * [EGFR_p |STAT3];
  R237: EGFR_p => STAT3; 1;
  // V(238) = K(238,1) * [EGFR_p] * [BECN1] -K(238,2) * [EGFR_p |BECN1];
  R238: EGFR_p => BECN1; 1;
  // V(239) = K(239,1) * [EGFR_p |BECN1];
  R239: EGFR_p => BECN1; 1;
  // V(240) = K(240,1) * [MAPK1_p] * [TP53] -K(240,2) * [MAPK1_p |TP53];
  R240: TP53 => MAPK1_p; 1;
  // V(241) = K(241,1) * [MAPK1_p |TP53];
  R241: TP53 => MAPK1_p; 1;
  // V(242) = K(242,1) * [PRKAA1_p] * [NFE2L2] -K(242,2) * [PRKAA1_p |NFE2L2];
  R242: PRKAA1_p => NFE2L2; 1;
  // V(243) = K(243,1) * [PRKAA1_p |NFE2L2];
  R243: PRKAA1_p => NFE2L2; 1;
  // V(244) = K(244,1) * [HIPK2_p] * [TP53] -K(244,2) * [HIPK2_p |TP53];
  R244: TP53 => HIPK2_p; 1;
  // V(245) = K(245,1) * [HIPK2_p |TP53];
  R245: TP53 => HIPK2_p; 1;
  // V(246) = K(246,1) * [PRKAA1_p] * [PRKAA1] -K(246,2) * [PRKAA1_p |PRKAA1];
  R246: PRKAA1 => PRKAA1_p; 1;
  // V(247) = K(247,1) * [PRKAA1_p |PRKAA1];
  R247: PRKAA1 => PRKAA1_p; 1;
  // V(248) = K(248,1) * [RPS6KA3_p] * [STK11] -K(248,2) * [RPS6KA3_p |STK11];
  R248: RPS6KA3_p => STK11; 1;
  // V(249) = K(249,1) * [RPS6KA3_p |STK11];
  R249: RPS6KA3_p => STK11; 1;
  // V(250) = K(250,1) * [SGK1] * [STAT1] -K(250,2) * [SGK1 |STAT1];
  R250: STAT1 => SGK1; 1;
  // V(251) = K(251,1) * [SGK1 |STAT1];
  R251: STAT1 => SGK1; 1;
  // V(252) = K(252,1) * [PINK1] * [DNM1L] -K(252,2) * [PINK1 |DNM1L];
  R252: DNM1L => PINK1; 1;
  // V(253) = K(253,1) * [PINK1 |DNM1L];
  R253: DNM1L => PINK1; 1;
  // V(254) = K(254,1) * [ILK_p] * [ILK] -K(254,2) * [ILK_p |ILK];
  R254: ILK_p => ILK; 1;
  // V(255) = K(255,1) * [ILK_p |ILK];
  R255: ILK_p => ILK; 1;
  // V(256) = K(256,1) * [EGFR_p] * [CTNNB1] -K(256,2) * [EGFR_p |CTNNB1];
  R256: EGFR_p => CTNNB1; 1;
  // V(257) = K(257,1) * [EGFR_p |CTNNB1];
  R257: EGFR_p => CTNNB1; 1;
  // V(258) = K(258,1) * [EGFR_p] * [PTPN11] -K(258,2) * [EGFR_p |PTPN11];
  R258: EGFR_p => PTPN11; 1;
  // V(259) = K(259,1) * [EGFR_p |PTPN11];
  R259: EGFR_p => PTPN11; 1;
  // V(260) = K(260,1) * [HIPK2_p] * [MDM2] -K(260,2) * [HIPK2_p |MDM2];
  R260: HIPK2_p => MDM2; 1;
  // V(261) = K(261,1) * [HIPK2_p |MDM2];
  R261: HIPK2_p => MDM2; 1;
  // V(262) = K(262,1) * [ROCK2] * [EP300] -K(262,2) * [ROCK2 |EP300];
  R262: EP300 => ROCK2; 1;
  // V(263) = K(263,1) * [ROCK2 |EP300];
  R263: EP300 => ROCK2; 1;
  // V(264) = K(264,1) * [MAPK1_p] * [STAT3] -K(264,2) * [MAPK1_p |STAT3];
  R264: STAT3 => MAPK1_p; 1;
  // V(265) = K(265,1) * [MAPK1_p |STAT3];
  R265: STAT3 => MAPK1_p; 1;
  // V(266) = K(266,1) * [AKT1_p] * [BECN1] -K(266,2) * [AKT1_p |BECN1];
  R266: BECN1 => AKT1_p; 1;
  // V(267) = K(267,1) * [AKT1_p |BECN1];
  R267: BECN1 => AKT1_p; 1;
  // V(268) = K(268,1) * [EGFR_p] * [AXL] -K(268,2) * [EGFR_p |AXL];
  R268: EGFR_p => AXL; 1;
  // V(269) = K(269,1) * [EGFR_p |AXL];
  R269: EGFR_p => AXL; 1;
  // V(270) = K(270,1) * [MAPK1_p] * [NR4A1] -K(270,2) * [MAPK1_p |NR4A1];
  R270: NR4A1 => MAPK1_p; 1;
  // V(271) = K(271,1) * [MAPK1_p |NR4A1];
  R271: NR4A1 => MAPK1_p; 1;
  // V(272) = K(272,1) * [PINK1] * [PTEN] -K(272,2) * [PINK1 |PTEN];
  R272: PTEN => PINK1; 1;
  // V(273) = K(273,1) * [PINK1 |PTEN];
  R273: PTEN => PINK1; 1;
  // V(274) = K(274,1) * [EGFR_p] * [ABCA1] -K(274,2) * [EGFR_p |ABCA1];
  R274: EGFR_p => ABCA1; 1;
  // V(275) = K(275,1) * [EGFR_p |ABCA1];
  R275: EGFR_p => ABCA1; 1;
  // V(276) = K(276,1) * [MAPK1_p] * [TXNIP] -K(276,2) * [MAPK1_p |TXNIP];
  R276: TXNIP => MAPK1_p; 1;
  // V(277) = K(277,1) * [MAPK1_p |TXNIP];
  R277: TXNIP => MAPK1_p; 1;
  // V(278) = K(278,1) * [EGFR_p] * [PKM] -K(278,2) * [EGFR_p |PKM];
  R278: EGFR_p => PKM; 1;
  // V(279) = K(279,1) * [EGFR_p |PKM];
  R279: EGFR_p => PKM; 1;
  // V(280) = K(280,1) * [AKT1_p] * [BAX] -K(280,2) * [AKT1_p |BAX];
  R280: AKT1_p => BAX; 1;
  // V(281) = K(281,1) * [AKT1_p |BAX];
  R281: AKT1_p => BAX; 1;
  // V(282) = K(282,1) * [HIPK2_p] * [CREB1] -K(282,2) * [HIPK2_p |CREB1];
  R282: CREB1 => HIPK2_p; 1;
  // V(283) = K(283,1) * [HIPK2_p |CREB1];
  R283: CREB1 => HIPK2_p; 1;
  // V(284) = K(284,1) * [PRKAA1_p] * [TP53] -K(284,2) * [PRKAA1_p |TP53];
  R284: TP53 => PRKAA1_p; 1;
  // V(285) = K(285,1) * [PRKAA1_p |TP53];
  R285: TP53 => PRKAA1_p; 1;
  // V(286) = K(286,1) * [PTPRJ] * [INSR_p] -K(286,2) * [PTPRJ |INSR_p];
  R286: INSR_p => PTPRJ; 1;
  // V(287) = K(287,1) * [PTPRJ |INSR_p];
  R287: INSR_p => PTPRJ; 1;
  // V(288) = K(288,1) * [PTPRJ] * [MAPK1_p] -K(288,2) * [PTPRJ |MAPK1_p];
  R288: PTPRJ => MAPK1_p; 1;
  // V(289) = K(289,1) * [PTPRJ |MAPK1_p];
  R289: PTPRJ => MAPK1_p; 1;
  // V(290) = K(290,1) * [PTPRJ] * [CTNNB1_p] -K(290,2) * [PTPRJ |CTNNB1_p];
  R290: CTNNB1_p => PTPRJ; 1;
  // V(291) = K(291,1) * [PTPRJ |CTNNB1_p];
  R291: CTNNB1_p => PTPRJ; 1;
  // V(292) = K(292,1) * [PTPN2] * [INSR_p] -K(292,2) * [PTPN2 |INSR_p];
  R292: INSR_p => PTPN2; 1;
  // V(293) = K(293,1) * [PTPN2 |INSR_p];
  R293: INSR_p => PTPN2; 1;
  // V(294) = K(294,1) * [PTEN_p] * [AR_p] -K(294,2) * [PTEN_p |AR_p];
  R294: PTEN_p => AR_p; 1;
  // V(295) = K(295,1) * [PTEN_p |AR_p];
  R295: PTEN_p => AR_p; 1;
  // V(296) = K(296,1) * [PTPN11_p] * [EGFR_p] -K(296,2) * [PTPN11_p |EGFR_p];
  R296: EGFR_p => PTPN11_p; 1;
  // V(297) = K(297,1) * [PTPN11_p |EGFR_p];
  R297: EGFR_p => PTPN11_p; 1;
  // V(298) = K(298,1) * [DUSP1_p] * [MAPK1_p] -K(298,2) * [DUSP1_p |MAPK1_p];
  R298: DUSP1_p => MAPK1_p; 1;
  // V(299) = K(299,1) * [DUSP1_p |MAPK1_p];
  R299: DUSP1_p => MAPK1_p; 1;
  // V(300) = K(300,1) * [PTPN2] * [JAK1_p] -K(300,2) * [PTPN2 |JAK1_p];
  R300: PTPN2 => JAK1_p; 1;
  // V(301) = K(301,1) * [PTPN2 |JAK1_p];
  R301: PTPN2 => JAK1_p; 1;
  // V(302) = K(302,1) * [PTPN2] * [EGFR_p] -K(302,2) * [PTPN2 |EGFR_p];
  R302: EGFR_p => PTPN2; 1;
  // V(303) = K(303,1) * [PTPN2 |EGFR_p];
  R303: EGFR_p => PTPN2; 1;
  // V(304) = K(304,1) * [PTEN_p] * [SP1_p] -K(304,2) * [PTEN_p |SP1_p];
  R304: PTEN_p => SP1_p; 1;
  // V(305) = K(305,1) * [PTEN_p |SP1_p];
  R305: PTEN_p => SP1_p; 1;
  // V(306) = K(306,1) * [PTPN2] * [STAT3_p] -K(306,2) * [PTPN2 |STAT3_p];
  R306: STAT3_p => PTPN2; 1;
  // V(307) = K(307,1) * [PTPN2 |STAT3_p];
  R307: STAT3_p => PTPN2; 1;
  // V(308) = K(308,1) * [PTEN_p] * [PTEN_p] -K(308,2) * [PTEN_p |PTEN_p];
  R308: PTEN_p => ; 1;
  // V(309) = K(309,1) * [PTEN_p |PTEN_p];
  R309: PTEN_p => ; 1;
  // V(310) = K(310,1) * [PTPN2] * [GJA1_p] -K(310,2) * [PTPN2 |GJA1_p];
  R310: PTPN2 => GJA1_p; 1;
  // V(311) = K(311,1) * [PTPN2 |GJA1_p];
  R311: PTPN2 => GJA1_p; 1;
  // V(312) = K(312,1) * [PTPRJ] * [PIK3R1_p] -K(312,2) * [PTPRJ |PIK3R1_p];
  R312: PIK3R1_p => PTPRJ; 1;
  // V(313) = K(313,1) * [PTPRJ |PIK3R1_p];
  R313: PIK3R1_p => PTPRJ; 1;
  // V(314) = K(314,1) * [PTPN2] * [STAT1_p] -K(314,2) * [PTPN2 |STAT1_p];
  R314: STAT1_p => PTPN2; 1;
  // V(315) = K(315,1) * [PTPN2 |STAT1_p];
  R315: STAT1_p => PTPN2; 1;
  // V(316) = K(316,1) * [PTPRJ] * [EGFR_p] -K(316,2) * [PTPRJ |EGFR_p];
  R316: EGFR_p => PTPRJ; 1;
  // V(317) = K(317,1) * [PTPRJ |EGFR_p];
  R317: EGFR_p => PTPRJ; 1;
  // V(318) = K(318,1) * [PTEN_p] * [IRF3_p] -K(318,2) * [PTEN_p |IRF3_p];
  R318: PTEN_p => IRF3_p; 1;
  // V(319) = K(319,1) * [PTEN_p |IRF3_p];
  R319: PTEN_p => IRF3_p; 1;
  // V(320) = K(320,1) * [PTPA] * [AKT1_p] -K(320,2) * [PTPA |AKT1_p];
  R320: PTPA => AKT1_p; 1;
  // V(321) = K(321,1) * [PTPA |AKT1_p];
  R321: PTPA => AKT1_p; 1;
  // V(322) = K(322,1) * [PTPN11_p] * [STAT1_p] -K(322,2) * [PTPN11_p |STAT1_p];
  R322: STAT1_p => PTPN11_p; 1;
  // V(323) = K(323,1) * [PTPN11_p |STAT1_p];
  R323: STAT1_p => PTPN11_p; 1;
  // V(324) = K(324,1) * [PTEN_p] * [CREB1_p] -K(324,2) * [PTEN_p |CREB1_p];
  R324: PTEN_p => CREB1_p; 1;
  // V(325) = K(325,1) * [PTEN_p |CREB1_p];
  R325: PTEN_p => CREB1_p; 1;
  // V(326) = K(326,1) * [DUSP1_p] * [JUN_p] -K(326,2) * [DUSP1_p |JUN_p];
  R326: JUN_p => DUSP1_p; 1;
  // V(327) = K(327,1) * [DUSP1_p |JUN_p];
  R327: JUN_p => DUSP1_p; 1;
  // V(328) = K(328,1) * [PTPN11_p] * [STAT3_p] -K(328,2) * [PTPN11_p |STAT3_p];
  R328: STAT3_p => PTPN11_p; 1;
  // V(329) = K(329,1) * [PTPN11_p |STAT3_p];
  R329: STAT3_p => PTPN11_p; 1;
  // V(330) = K(330,1) * [MDM2_p] * [HIF1A] -K(330,2) * [MDM2_p |HIF1A];
  R330: HIF1A => MDM2_p; 1;
  // V(331) = K(331,1) * [MDM2_p |HIF1A];
  R331: HIF1A => MDM2_p; 1;
  // V(332) = K(332,1) * [RNF7] * [HIF1A] -K(332,2) * [RNF7 |HIF1A];
  R332: HIF1A => RNF7; 1;
  // V(333) = K(333,1) * [RNF7 |HIF1A];
  R333: HIF1A => RNF7; 1;
  // V(334) = K(334,1) * [MDM2_p] * [NUMB] -K(334,2) * [MDM2_p |NUMB];
  R334: MDM2_p => NUMB; 1;
  // V(335) = K(335,1) * [MDM2_p |NUMB];
  R335: MDM2_p => NUMB; 1;
  // V(336) = K(336,1) * [MDM2_p] * [TP53] -K(336,2) * [MDM2_p |TP53];
  R336: TP53 => MDM2_p; 1;
  // V(337) = K(337,1) * [MDM2_p |TP53];
  R337: TP53 => MDM2_p; 1;
  // V(338) = K(338,1) * [MDM2_p] * [IGF1R] -K(338,2) * [MDM2_p |IGF1R];
  R338: MDM2_p => IGF1R; 1;
  // V(339) = K(339,1) * [MDM2_p |IGF1R];
  R339: MDM2_p => IGF1R; 1;
  // V(340) = K(340,1) * [CUL3] * [RHOA] -K(340,2) * [CUL3 |RHOA];
  R340: RHOA => CUL3; 1;
  // V(341) = K(341,1) * [CUL3 |RHOA];
  R341: RHOA => CUL3; 1;
  // V(342) = K(342,1) * [RNF7] * [JUN] -K(342,2) * [RNF7 |JUN];
  R342: JUN => RNF7; 1;
  // V(343) = K(343,1) * [RNF7 |JUN];
  R343: JUN => RNF7; 1;
  // V(344) = K(344,1) * [TP53_p] * [VCAN_g] -K(344,2) * [TP53_p |VCAN_g];
  R344: VCAN_g => TP53_p; 1;
  // V(345) = K(345,1) * [TP53_p |VCAN_g];
  R345: VCAN_g => TP53_p; 1;
  // V(346) = K(346,1) * [VCAN_rna];
  R346: VCAN_rna => ; 1;
  // V(347) = K(347,1) * [NFE2L2_p] * [WT1] * [SOD1_g] -K(347,2) * [NFE2L2_p |WT1 |SOD1_g];
  R347: WT1 => NFE2L2_p; 1;
  // V(348) = K(348,1) * [NFE2L2_p |WT1 |SOD1_g];
  R348: WT1 => NFE2L2_p; 1;
  // V(349) = K(349,1) * [SOD1_rna];
  R349: SOD1_rna => ; 1;
  // V(350) = K(350,1) * [HIF1A_p] * [SIGNOR-C154_p] * [CCL2_g] -K(350,2) * [HIF1A_p |SIGNOR-C154_p |CCL2_g];
  R350: CCL2_g => HIF1A_p; 1;
  // V(351) = K(351,1) * [HIF1A_p |SIGNOR-C154_p |CCL2_g];
  R351: CCL2_g => HIF1A_p; 1;
  // V(352) = K(352,1) * [CCL2_rna];
  R352: CCL2_rna => ; 1;
  // V(353) = K(353,1) * [STAT3_p] * [STAT1_p] * [SIGNOR-C13] * [SOCS3_g] -K(353,2) * [STAT3_p |STAT1_p |SIGNOR-C13 |SOCS3_g];
  R353: STAT3_p => STAT1_p; 1;
  // V(354) = K(354,1) * [STAT3_p |STAT1_p |SIGNOR-C13 |SOCS3_g];
  R354: STAT3_p => STAT1_p; 1;
  // V(355) = K(355,1) * [SOCS3_rna];
  R355: SOCS3_rna => ; 1;
  // V(356) = K(356,1) * [CTNNB1_p] * [CCND1_g] -K(356,2) * [CTNNB1_p |CCND1_g];
  R356: CTNNB1_p => CCND1_g; 1;
  // V(357) = K(357,1) * [CTNNB1_p |CCND1_g];
  R357: CTNNB1_p => CCND1_g; 1;
  // V(358) = K(358,1) * [CCND1_rna];
  R358: CCND1_rna => ; 1;
  // V(359) = K(359,1) * [ATF3] * [GDF15_g] -K(359,2) * [ATF3 |GDF15_g];
  R359: GDF15_g => ATF3; 1;
  // V(360) = K(360,1) * [ATF3 |GDF15_g];
  R360: GDF15_g => ATF3; 1;
  // V(361) = K(361,1) * [GDF15_rna];
  R361: GDF15_rna => ; 1;
  // V(362) = K(362,1) * [PAX2] * [WT1_g] -K(362,2) * [PAX2 |WT1_g];
  R362: PAX2 => WT1_g; 1;
  // V(363) = K(363,1) * [PAX2 |WT1_g];
  R363: PAX2 => WT1_g; 1;
  // V(364) = K(364,1) * [WT1_rna];
  R364: WT1_rna => ; 1;
  // V(365) = K(365,1) * [TP53_p] * [BAX_g] -K(365,2) * [TP53_p |BAX_g];
  R365: BAX_g => TP53_p; 1;
  // V(366) = K(366,1) * [TP53_p |BAX_g];
  R366: BAX_g => TP53_p; 1;
  // V(367) = K(367,1) * [BAX_rna];
  R367: BAX_rna => ; 1;
  // V(368) = K(368,1) * [NFE2L2_p] * [CAT_g] -K(368,2) * [NFE2L2_p |CAT_g];
  R368: CAT_g => NFE2L2_p; 1;
  // V(369) = K(369,1) * [NFE2L2_p |CAT_g];
  R369: CAT_g => NFE2L2_p; 1;
  // V(370) = K(370,1) * [CAT_rna];
  R370: CAT_rna => ; 1;
  // V(371) = K(371,1) * [HIF1A_p] * [STAT3_p] * [VEGFA_g] -K(371,2) * [HIF1A_p |STAT3_p |VEGFA_g];
  R371: STAT3_p => HIF1A_p; 1;
  // V(372) = K(372,1) * [HIF1A_p |STAT3_p |VEGFA_g];
  R372: STAT3_p => HIF1A_p; 1;
  // V(373) = K(373,1) * [VEGFA_rna];
  R373: VEGFA_rna => ; 1;
  // V(374) = K(374,1) * [WT1] * [PODXL_g] -K(374,2) * [WT1 |PODXL_g];
  R374: PODXL_g => WT1; 1;
  // V(375) = K(375,1) * [WT1 |PODXL_g];
  R375: PODXL_g => WT1; 1;
  // V(376) = K(376,1) * [PODXL_rna];
  R376: PODXL_rna => ; 1;
  // V(377) = K(377,1) * [NR3C1_p] * [KLF9_g] -K(377,2) * [NR3C1_p |KLF9_g];
  R377: KLF9_g => NR3C1_p; 1;
  // V(378) = K(378,1) * [NR3C1_p |KLF9_g];
  R378: KLF9_g => NR3C1_p; 1;
  // V(379) = K(379,1) * [KLF9_rna];
  R379: KLF9_rna => ; 1;
  // V(380) = K(380,1) * [NFE2L2_p] * [GPX4_g] -K(380,2) * [NFE2L2_p |GPX4_g];
  R380: GPX4_g => NFE2L2_p; 1;
  // V(381) = K(381,1) * [NFE2L2_p |GPX4_g];
  R381: GPX4_g => NFE2L2_p; 1;
  // V(382) = K(382,1) * [GPX4_rna];
  R382: GPX4_rna => ; 1;
  // V(383) = K(383,1) * [TP53_p] * [AIFM1_g] -K(383,2) * [TP53_p |AIFM1_g];
  R383: AIFM1_g => TP53_p; 1;
  // V(384) = K(384,1) * [TP53_p |AIFM1_g];
  R384: AIFM1_g => TP53_p; 1;
  // V(385) = K(385,1) * [AIFM1_rna];
  R385: AIFM1_rna => ; 1;
  // V(386) = K(386,1) * [NFE2L2_p] * [GSTA1_g] -K(386,2) * [NFE2L2_p |GSTA1_g];
  R386: GSTA1_g => NFE2L2_p; 1;
  // V(387) = K(387,1) * [NFE2L2_p |GSTA1_g];
  R387: GSTA1_g => NFE2L2_p; 1;
  // V(388) = K(388,1) * [GSTA1_rna];
  R388: GSTA1_rna => ; 1;
  // V(389) = K(389,1) * [SP1_p] * [TNC_g] -K(389,2) * [SP1_p |TNC_g];
  R389: TNC_g => SP1_p; 1;
  // V(390) = K(390,1) * [SP1_p |TNC_g];
  R390: TNC_g => SP1_p; 1;
  // V(391) = K(391,1) * [TNC_rna];
  R391: TNC_rna => ; 1;
  // V(392) = K(392,1) * [NFE2L2_p] * [SOD2_g] -K(392,2) * [NFE2L2_p |SOD2_g];
  R392: SOD2_g => NFE2L2_p; 1;
  // V(393) = K(393,1) * [NFE2L2_p |SOD2_g];
  R393: SOD2_g => NFE2L2_p; 1;
  // V(394) = K(394,1) * [SOD2_rna];
  R394: SOD2_rna => ; 1;
  // V(395) = K(395,1) * [STAT3_p] * [STAT1_g] -K(395,2) * [STAT3_p |STAT1_g];
  R395: STAT3_p => STAT1_g; 1;
  // V(396) = K(396,1) * [STAT3_p |STAT1_g];
  R396: STAT3_p => STAT1_g; 1;
  // V(397) = K(397,1) * [STAT1_rna];
  R397: STAT1_rna => ; 1;
  // V(398) = K(398,1) * [WT1] * [NPHS1_g] -K(398,2) * [WT1 |NPHS1_g];
  R398: NPHS1_g => WT1; 1;
  // V(399) = K(399,1) * [WT1 |NPHS1_g];
  R399: NPHS1_g => WT1; 1;
  // V(400) = K(400,1) * [NPHS1_rna];
  R400: NPHS1_rna => ; 1;
  // V(401) = K(401,1) * [WT1] * [PAX2_g] -K(401,2) * [WT1 |PAX2_g];
  R401: PAX2_g => WT1; 1;
  // V(402) = K(402,1) * [PAX2_g];
  R402: PAX2_g => ; 1;
  // V(403) = K(403,1) * [PAX2_rna];
  R403: PAX2_rna => ; 1;
  // V(404) = K(404,1) * [HES1] * [NR3C1_g] -K(404,2) * [HES1 |NR3C1_g];
  R404: HES1 => NR3C1_g; 1;
  // V(405) = K(405,1) * [NR3C1_g];
  R405: NR3C1_g => ; 1;
  // V(406) = K(406,1) * [NR3C1_rna];
  R406: NR3C1_rna => ; 1;
  // V(407) = K(407,1) * [NFKB1] * [RELA] * [BMP4_g] -K(407,2) * [NFKB1 |RELA |BMP4_g];
  R407: BMP4_g => RELA; 1;
  // V(408) = K(408,1) * [BMP4_g];
  R408: BMP4_g => ; 1;
  // V(409) = K(409,1) * [BMP4_rna];
  R409: BMP4_rna => ; 1;
  // V(410) = K(410,1) * [NR3C1_p] * [JUN_g] -K(410,2) * [NR3C1_p |JUN_g];
  R410: JUN_g => NR3C1_p; 1;
  // V(411) = K(411,1) * [JUN_g];
  R411: JUN_g => ; 1;
  // V(412) = K(412,1) * [JUN_rna];
  R412: JUN_rna => ; 1;
  // V(413) = K(413,1) * [MECP2_p] * [SGK1_g] -K(413,2) * [MECP2_p |SGK1_g];
  R413: MECP2_p => SGK1_g; 1;
  // V(414) = K(414,1) * [SGK1_g];
  R414: SGK1_g => ; 1;
  // V(415) = K(415,1) * [SGK1_rna];
  R415: SGK1_rna => ; 1;
  // V(416) = K(416,1) * [HES1] * [RCAN1_g] -K(416,2) * [HES1 |RCAN1_g];
  R416: HES1 => RCAN1_g; 1;
  // V(417) = K(417,1) * [RCAN1_g];
  R417: RCAN1_g => ; 1;
  // V(418) = K(418,1) * [RCAN1_rna];
  R418: RCAN1_rna => ; 1;
  // V(419) = K(419,1) * [NR3C1_p] * [NFKB1_g] -K(419,2) * [NR3C1_p |NFKB1_g];
  R419: NR3C1_p => NFKB1_g; 1;
  // V(420) = K(420,1) * [NFKB1_g];
  R420: NFKB1_g => ; 1;
  // V(421) = K(421,1) * [NFKB1_rna];
  R421: NFKB1_rna => ; 1;
  // V(422) = K(422,1) * [SGK1];
  R422: SGK1 => ; 1;
  // V(423) = K(423,1) * [DNM1L];
  R423: DNM1L => ; 1;
  // V(424) = K(424,1) * [PODXL];
  R424: PODXL => ; 1;
  // V(425) = K(425,1) * [SOCS3];
  R425: SOCS3 => ; 1;
  // V(426) = K(426,1) * [NPHS1];
  R426: NPHS1 => ; 1;
  // V(427) = K(427,1) * [ROCK2];
  R427: ROCK2 => ; 1;
  // V(428) = K(428,1) * [ABCA1];
  R428: ABCA1 => ; 1;
  // V(429) = K(429,1) * [AIFM1];
  R429: AIFM1 => ; 1;
  // V(430) = K(430,1) * [SOD1];
  R430: SOD1 => ; 1;
  // V(431) = K(431,1) * [EGFR];
  R431: EGFR => ; 1;
  // V(432) = K(432,1) * [FOS];
  R432: FOS => ; 1;
  // V(433) = K(433,1) * [CAT];
  R433: CAT => ; 1;
  // V(434) = K(434,1) * [ANXA1];
  R434: ANXA1 => ; 1;
  // V(435) = K(435,1) * [NR3C1];
  R435: NR3C1 => ; 1;
  // V(436) = K(436,1) * [SOD2];
  R436: SOD2 => ; 1;
  // V(437) = K(437,1) * [TP53];
  R437: TP53 => ; 1;
  // V(438) = K(438,1) * [HSPB1];
  R438: HSPB1 => ; 1;
  // V(439) = K(439,1) * [IGF1];
  R439: IGF1 => ; 1;
  // V(440) = K(440,1) * [HMGN1];
  R440: HMGN1 => ; 1;
  // V(441) = K(441,1) * [JUN];
  R441: JUN => ; 1;
  // V(442) = K(442,1) * [INSR];
  R442: INSR => ; 1;
  // V(443) = K(443,1) * [SP1];
  R443: SP1 => ; 1;
  // V(444) = K(444,1) * [IGF1R];
  R444: IGF1R => ; 1;
  // V(445) = K(445,1) * [GSTA1];
  R445: GSTA1 => ; 1;
  // V(446) = K(446,1) * [VIM];
  R446: VIM => ; 1;
  // V(447) = K(447,1) * [FGF2];
  R447: FGF2 => ; 1;
  // V(448) = K(448,1) * [UBC];
  R448: UBC => ; 1;
  // V(449) = K(449,1) * [CALM1];
  R449: CALM1 => ; 1;
  // V(450) = K(450,1) * [AR];
  R450: AR => ; 1;
  // V(451) = K(451,1) * [BCL2];
  R451: BCL2 => ; 1;
  // V(452) = K(452,1) * [PCNA];
  R452: PCNA => ; 1;
  // V(453) = K(453,1) * [BMP4];
  R453: BMP4 => ; 1;
  // V(454) = K(454,1) * [CCL2];
  R454: CCL2 => ; 1;
  // V(455) = K(455,1) * [VCAN];
  R455: VCAN => ; 1;
  // V(456) = K(456,1) * [PKM];
  R456: PKM => ; 1;
  // V(457) = K(457,1) * [VEGFA];
  R457: VEGFA => ; 1;
  // V(458) = K(458,1) * [CREB1];
  R458: CREB1 => ; 1;
  // V(459) = K(459,1) * [GJA1];
  R459: GJA1 => ; 1;
  // V(460) = K(460,1) * [PTPN2];
  R460: PTPN2 => ; 1;
  // V(461) = K(461,1) * [ATF3];
  R461: ATF3 => ; 1;
  // V(462) = K(462,1) * [WT1];
  R462: WT1 => ; 1;
  // V(463) = K(463,1) * [NFKB1];
  R463: NFKB1 => ; 1;
  // V(464) = K(464,1) * [BGN];
  R464: BGN => ; 1;
  // V(465) = K(465,1) * [NR4A1];
  R465: NR4A1 => ; 1;
  // V(466) = K(466,1) * [JAK1];
  R466: JAK1 => ; 1;
  // V(467) = K(467,1) * [CCND1];
  R467: CCND1 => ; 1;
  // V(468) = K(468,1) * [TNC];
  R468: TNC => ; 1;
  // V(469) = K(469,1) * [F2R];
  R469: F2R => ; 1;
  // V(470) = K(470,1) * [ZFP36];
  R470: ZFP36 => ; 1;
  // V(471) = K(471,1) * [PIK3R1];
  R471: PIK3R1 => ; 1;
  // V(472) = K(472,1) * [MAPK1];
  R472: MAPK1 => ; 1;
  // V(473) = K(473,1) * [DUSP1];
  R473: DUSP1 => ; 1;
  // V(474) = K(474,1) * [PRDX6];
  R474: PRDX6 => ; 1;
  // V(475) = K(475,1) * [AXL];
  R475: AXL => ; 1;
  // V(476) = K(476,1) * [AKT1];
  R476: AKT1 => ; 1;
  // V(477) = K(477,1) * [CTNNB1];
  R477: CTNNB1 => ; 1;
  // V(478) = K(478,1) * [RORA];
  R478: RORA => ; 1;
  // V(479) = K(479,1) * [DDIT3];
  R479: DDIT3 => ; 1;
  // V(480) = K(480,1) * [TGFBR1];
  R480: TGFBR1 => ; 1;
  // V(481) = K(481,1) * [GPX4];
  R481: GPX4 => ; 1;
  // V(482) = K(482,1) * [STAT3];
  R482: STAT3 => ; 1;
  // V(483) = K(483,1) * [STAT1];
  R483: STAT1 => ; 1;
  // V(484) = K(484,1) * [YAP1];
  R484: YAP1 => ; 1;
  // V(485) = K(485,1) * [NUMB];
  R485: NUMB => ; 1;
  // V(486) = K(486,1) * [TSC2];
  R486: TSC2 => ; 1;
  // V(487) = K(487,1) * [MECP2];
  R487: MECP2 => ; 1;
  // V(488) = K(488,1) * [RPS6KA3];
  R488: RPS6KA3 => ; 1;
  // V(489) = K(489,1) * [RCAN1];
  R489: RCAN1 => ; 1;
  // V(490) = K(490,1) * [PTEN];
  R490: PTEN => ; 1;
  // V(491) = K(491,1) * [RHOA];
  R491: RHOA => ; 1;
  // V(492) = K(492,1) * [TGFB2];
  R492: TGFB2 => ; 1;
  // V(493) = K(493,1) * [RAC1];
  R493: RAC1 => ; 1;
  // V(494) = K(494,1) * [SMAD3];
  R494: SMAD3 => ; 1;
  // V(495) = K(495,1) * [MDM2];
  R495: MDM2 => ; 1;
  // V(496) = K(496,1) * [PAX2];
  R496: PAX2 => ; 1;
  // V(497) = K(497,1) * [RELA];
  R497: RELA => ; 1;
  // V(498) = K(498,1) * [NOTCH2];
  R498: NOTCH2 => ; 1;
  // V(499) = K(499,1) * [PTPN11];
  R499: PTPN11 => ; 1;
  // V(500) = K(500,1) * [PRDX1];
  R500: PRDX1 => ; 1;
  // V(501) = K(501,1) * [BAX];
  R501: BAX => ; 1;
  // V(502) = K(502,1) * [EP300];
  R502: EP300 => ; 1;
  // V(503) = K(503,1) * [PTPRJ];
  R503: PTPRJ => ; 1;
  // V(504) = K(504,1) * [STK4];
  R504: STK4 => ; 1;
  // V(505) = K(505,1) * [PRKAA1];
  R505: PRKAA1 => ; 1;
  // V(506) = K(506,1) * [ILK];
  R506: ILK => ; 1;
  // V(507) = K(507,1) * [ROCK1];
  R507: ROCK1 => ; 1;
  // V(508) = K(508,1) * [SMAD4];
  R508: SMAD4 => ; 1;
  // V(509) = K(509,1) * [ATR];
  R509: ATR => ; 1;
  // V(510) = K(510,1) * [CUL3];
  R510: CUL3 => ; 1;
  // V(511) = K(511,1) * [KLF9];
  R511: KLF9 => ; 1;
  // V(512) = K(512,1) * [BECN1];
  R512: BECN1 => ; 1;
  // V(513) = K(513,1) * [HES1];
  R513: HES1 => ; 1;
  // V(514) = K(514,1) * [IRF3];
  R514: IRF3 => ; 1;
  // V(515) = K(515,1) * [PTPA];
  R515: PTPA => ; 1;
  // V(516) = K(516,1) * [SMAD2];
  R516: SMAD2 => ; 1;
  // V(517) = K(517,1) * [STK11];
  R517: STK11 => ; 1;
  // V(518) = K(518,1) * [NFE2L2];
  R518: NFE2L2 => ; 1;
  // V(519) = K(519,1) * [PKN1];
  R519: PKN1 => ; 1;
  // V(520) = K(520,1) * [HIF1A];
  R520: HIF1A => ; 1;
  // V(521) = K(521,1) * [AEBP1];
  R521: AEBP1 => ; 1;
  // V(522) = K(522,1) * [BAD];
  R522: BAD => ; 1;
  // V(523) = K(523,1) * [PARK7];
  R523: PARK7 => ; 1;
  // V(524) = K(524,1) * [GDF15];
  R524: GDF15 => ; 1;
  // V(525) = K(525,1) * [PINK1];
  R525: PINK1 => ; 1;
  // V(526) = K(526,1) * [MFF];
  R526: MFF => ; 1;
  // V(527) = K(527,1) * [HIPK2];
  R527: HIPK2 => ; 1;
  // V(528) = K(528,1) * [TXNIP];
  R528: TXNIP => ; 1;
  // V(529) = K(529,1) * [RNF7];
  R529: RNF7 => ; 1;
  // V(530) = K(530,1) * [AGO2];
  R530: AGO2 => ; 1;
  // V(531) = K(531,1) * [SGK1_rna];
  R531: SGK1_rna => ; 1;
  // V(532) = K(532,1) * [PODXL_rna];
  R532: PODXL_rna => ; 1;
  // V(533) = K(533,1) * [SOCS3_rna];
  R533: SOCS3_rna => ; 1;
  // V(534) = K(534,1) * [NPHS1_rna];
  R534: NPHS1_rna => ; 1;
  // V(535) = K(535,1) * [AIFM1_rna];
  R535: AIFM1_rna => ; 1;
  // V(536) = K(536,1) * [SOD1_rna];
  R536: SOD1_rna => ; 1;
  // V(537) = K(537,1) * [CAT_rna];
  R537: CAT_rna => ; 1;
  // V(538) = K(538,1) * [NR3C1_rna];
  R538: NR3C1_rna => ; 1;
  // V(539) = K(539,1) * [SOD2_rna];
  R539: SOD2_rna => ; 1;
  // V(540) = K(540,1) * [JUN_rna];
  R540: JUN_rna => ; 1;
  // V(541) = K(541,1) * [GSTA1_rna];
  R541: GSTA1_rna => ; 1;
  // V(542) = K(542,1) * [BMP4_rna];
  R542: BMP4_rna => ; 1;
  // V(543) = K(543,1) * [CCL2_rna];
  R543: CCL2_rna => ; 1;
  // V(544) = K(544,1) * [VCAN_rna];
  R544: VCAN_rna => ; 1;
  // V(545) = K(545,1) * [VEGFA_rna];
  R545: VEGFA_rna => ; 1;
  // V(546) = K(546,1) * [WT1_rna];
  R546: WT1_rna => ; 1;
  // V(547) = K(547,1) * [NFKB1_rna];
  R547: NFKB1_rna => ; 1;
  // V(548) = K(548,1) * [CCND1_rna];
  R548: CCND1_rna => ; 1;
  // V(549) = K(549,1) * [TNC_rna];
  R549: TNC_rna => ; 1;
  // V(550) = K(550,1) * [GPX4_rna];
  R550: GPX4_rna => ; 1;
  // V(551) = K(551,1) * [STAT1_rna];
  R551: STAT1_rna => ; 1;
  // V(552) = K(552,1) * [RCAN1_rna];
  R552: RCAN1_rna => ; 1;
  // V(553) = K(553,1) * [PAX2_rna];
  R553: PAX2_rna => ; 1;
  // V(554) = K(554,1) * [BAX_rna];
  R554: BAX_rna => ; 1;
  // V(555) = K(555,1) * [KLF9_rna];
  R555: KLF9_rna => ; 1;
  // V(556) = K(556,1) * [GDF15_rna];
  R556: GDF15_rna => ; 1;
  // V(557) = K(557,1) * [DNM1L_g];
  R557: DNM1L_g => ; 1;
  // V(558) = K(558,1) * [DNM1L_rna];
  R558: DNM1L_rna => ; 1;
  // V(559) = K(559,1) * [ROCK2_g];
  R559: ROCK2_g => ; 1;
  // V(560) = K(560,1) * [ROCK2_rna];
  R560: ROCK2_rna => ; 1;
  // V(561) = K(561,1) * [ABCA1_g];
  R561: ABCA1_g => ; 1;
  // V(562) = K(562,1) * [ABCA1_rna];
  R562: ABCA1_rna => ; 1;
  // V(563) = K(563,1) * [EGFR_g];
  R563: EGFR_g => ; 1;
  // V(564) = K(564,1) * [EGFR_rna];
  R564: EGFR_rna => ; 1;
  // V(565) = K(565,1) * [FOS_g];
  R565: FOS_g => ; 1;
  // V(566) = K(566,1) * [FOS_rna];
  R566: FOS_rna => ; 1;
  // V(567) = K(567,1) * [ANXA1_g];
  R567: ANXA1_g => ; 1;
  // V(568) = K(568,1) * [ANXA1_rna];
  R568: ANXA1_rna => ; 1;
  // V(569) = K(569,1) * [TP53_g];
  R569: TP53_g => ; 1;
  // V(570) = K(570,1) * [TP53_rna];
  R570: TP53_rna => ; 1;
  // V(571) = K(571,1) * [HSPB1_g];
  R571: HSPB1_g => ; 1;
  // V(572) = K(572,1) * [HSPB1_rna];
  R572: HSPB1_rna => ; 1;
  // V(573) = K(573,1) * [IGF1_g];
  R573: IGF1_g => ; 1;
  // V(574) = K(574,1) * [IGF1_rna];
  R574: IGF1_rna => ; 1;
  // V(575) = K(575,1) * [HMGN1_g];
  R575: HMGN1_g => ; 1;
  // V(576) = K(576,1) * [HMGN1_rna];
  R576: HMGN1_rna => ; 1;
  // V(577) = K(577,1) * [INSR_g];
  R577: INSR_g => ; 1;
  // V(578) = K(578,1) * [INSR_rna];
  R578: INSR_rna => ; 1;
  // V(579) = K(579,1) * [SP1_g];
  R579: SP1_g => ; 1;
  // V(580) = K(580,1) * [SP1_rna];
  R580: SP1_rna => ; 1;
  // V(581) = K(581,1) * [IGF1R_g];
  R581: IGF1R_g => ; 1;
  // V(582) = K(582,1) * [IGF1R_rna];
  R582: IGF1R_rna => ; 1;
  // V(583) = K(583,1) * [VIM_g];
  R583: VIM_g => ; 1;
  // V(584) = K(584,1) * [VIM_rna];
  R584: VIM_rna => ; 1;
  // V(585) = K(585,1) * [FGF2_g];
  R585: FGF2_g => ; 1;
  // V(586) = K(586,1) * [FGF2_rna];
  R586: FGF2_rna => ; 1;
  // V(587) = K(587,1) * [UBC_g];
  R587: UBC_g => ; 1;
  // V(588) = K(588,1) * [UBC_rna];
  R588: UBC_rna => ; 1;
  // V(589) = K(589,1) * [CALM1_g];
  R589: CALM1_g => ; 1;
  // V(590) = K(590,1) * [CALM1_rna];
  R590: CALM1_rna => ; 1;
  // V(591) = K(591,1) * [AR_g];
  R591: AR_g => ; 1;
  // V(592) = K(592,1) * [AR_rna];
  R592: AR_rna => ; 1;
  // V(593) = K(593,1) * [BCL2_g];
  R593: BCL2_g => ; 1;
  // V(594) = K(594,1) * [BCL2_rna];
  R594: BCL2_rna => ; 1;
  // V(595) = K(595,1) * [PCNA_g];
  R595: PCNA_g => ; 1;
  // V(596) = K(596,1) * [PCNA_rna];
  R596: PCNA_rna => ; 1;
  // V(597) = K(597,1) * [PKM_g];
  R597: PKM_g => ; 1;
  // V(598) = K(598,1) * [PKM_rna];
  R598: PKM_rna => ; 1;
  // V(599) = K(599,1) * [CREB1_g];
  R599: CREB1_g => ; 1;
  // V(600) = K(600,1) * [CREB1_rna];
  R600: CREB1_rna => ; 1;
  // V(601) = K(601,1) * [GJA1_g];
  R601: GJA1_g => ; 1;
  // V(602) = K(602,1) * [GJA1_rna];
  R602: GJA1_rna => ; 1;
  // V(603) = K(603,1) * [PTPN2_g];
  R603: PTPN2_g => ; 1;
  // V(604) = K(604,1) * [PTPN2_rna];
  R604: PTPN2_rna => ; 1;
  // V(605) = K(605,1) * [ATF3_g];
  R605: ATF3_g => ; 1;
  // V(606) = K(606,1) * [ATF3_rna];
  R606: ATF3_rna => ; 1;
  // V(607) = K(607,1) * [BGN_g];
  R607: BGN_g => ; 1;
  // V(608) = K(608,1) * [BGN_rna];
  R608: BGN_rna => ; 1;
  // V(609) = K(609,1) * [NR4A1_g];
  R609: NR4A1_g => ; 1;
  // V(610) = K(610,1) * [NR4A1_rna];
  R610: NR4A1_rna => ; 1;
  // V(611) = K(611,1) * [JAK1_g];
  R611: JAK1_g => ; 1;
  // V(612) = K(612,1) * [JAK1_rna];
  R612: JAK1_rna => ; 1;
  // V(613) = K(613,1) * [F2R_g];
  R613: F2R_g => ; 1;
  // V(614) = K(614,1) * [F2R_rna];
  R614: F2R_rna => ; 1;
  // V(615) = K(615,1) * [ZFP36_g];
  R615: ZFP36_g => ; 1;
  // V(616) = K(616,1) * [ZFP36_rna];
  R616: ZFP36_rna => ; 1;
  // V(617) = K(617,1) * [PIK3R1_g];
  R617: PIK3R1_g => ; 1;
  // V(618) = K(618,1) * [PIK3R1_rna];
  R618: PIK3R1_rna => ; 1;
  // V(619) = K(619,1) * [MAPK1_g];
  R619: MAPK1_g => ; 1;
  // V(620) = K(620,1) * [MAPK1_rna];
  R620: MAPK1_rna => ; 1;
  // V(621) = K(621,1) * [DUSP1_g];
  R621: DUSP1_g => ; 1;
  // V(622) = K(622,1) * [DUSP1_rna];
  R622: DUSP1_rna => ; 1;
  // V(623) = K(623,1) * [PRDX6_g];
  R623: PRDX6_g => ; 1;
  // V(624) = K(624,1) * [PRDX6_rna];
  R624: PRDX6_rna => ; 1;
  // V(625) = K(625,1) * [AXL_g];
  R625: AXL_g => ; 1;
  // V(626) = K(626,1) * [AXL_rna];
  R626: AXL_rna => ; 1;
  // V(627) = K(627,1) * [AKT1_g];
  R627: AKT1_g => ; 1;
  // V(628) = K(628,1) * [AKT1_rna];
  R628: AKT1_rna => ; 1;
  // V(629) = K(629,1) * [CTNNB1_g];
  R629: CTNNB1_g => ; 1;
  // V(630) = K(630,1) * [CTNNB1_rna];
  R630: CTNNB1_rna => ; 1;
  // V(631) = K(631,1) * [RORA_g];
  R631: RORA_g => ; 1;
  // V(632) = K(632,1) * [RORA_rna];
  R632: RORA_rna => ; 1;
  // V(633) = K(633,1) * [DDIT3_g];
  R633: DDIT3_g => ; 1;
  // V(634) = K(634,1) * [DDIT3_rna];
  R634: DDIT3_rna => ; 1;
  // V(635) = K(635,1) * [TGFBR1_g];
  R635: TGFBR1_g => ; 1;
  // V(636) = K(636,1) * [TGFBR1_rna];
  R636: TGFBR1_rna => ; 1;
  // V(637) = K(637,1) * [STAT3_g];
  R637: STAT3_g => ; 1;
  // V(638) = K(638,1) * [STAT3_rna];
  R638: STAT3_rna => ; 1;
  // V(639) = K(639,1) * [YAP1_g];
  R639: YAP1_g => ; 1;
  // V(640) = K(640,1) * [YAP1_rna];
  R640: YAP1_rna => ; 1;
  // V(641) = K(641,1) * [NUMB_g];
  R641: NUMB_g => ; 1;
  // V(642) = K(642,1) * [NUMB_rna];
  R642: NUMB_rna => ; 1;
  // V(643) = K(643,1) * [TSC2_g];
  R643: TSC2_g => ; 1;
  // V(644) = K(644,1) * [TSC2_rna];
  R644: TSC2_rna => ; 1;
  // V(645) = K(645,1) * [MECP2_g];
  R645: MECP2_g => ; 1;
  // V(646) = K(646,1) * [MECP2_rna];
  R646: MECP2_rna => ; 1;
  // V(647) = K(647,1) * [RPS6KA3_g];
  R647: RPS6KA3_g => ; 1;
  // V(648) = K(648,1) * [RPS6KA3_rna];
  R648: RPS6KA3_rna => ; 1;
  // V(649) = K(649,1) * [PTEN_g];
  R649: PTEN_g => ; 1;
  // V(650) = K(650,1) * [PTEN_rna];
  R650: PTEN_rna => ; 1;
  // V(651) = K(651,1) * [RHOA_g];
  R651: RHOA_g => ; 1;
  // V(652) = K(652,1) * [RHOA_rna];
  R652: RHOA_rna => ; 1;
  // V(653) = K(653,1) * [TGFB2_g];
  R653: TGFB2_g => ; 1;
  // V(654) = K(654,1) * [TGFB2_rna];
  R654: TGFB2_rna => ; 1;
  // V(655) = K(655,1) * [RAC1_g];
  R655: RAC1_g => ; 1;
  // V(656) = K(656,1) * [RAC1_rna];
  R656: RAC1_rna => ; 1;
  // V(657) = K(657,1) * [SMAD3_g];
  R657: SMAD3_g => ; 1;
  // V(658) = K(658,1) * [SMAD3_rna];
  R658: SMAD3_rna => ; 1;
  // V(659) = K(659,1) * [MDM2_g];
  R659: MDM2_g => ; 1;
  // V(660) = K(660,1) * [MDM2_rna];
  R660: MDM2_rna => ; 1;
  // V(661) = K(661,1) * [RELA_g];
  R661: RELA_g => ; 1;
  // V(662) = K(662,1) * [RELA_rna];
  R662: RELA_rna => ; 1;
  // V(663) = K(663,1) * [NOTCH2_g];
  R663: NOTCH2_g => ; 1;
  // V(664) = K(664,1) * [NOTCH2_rna];
  R664: NOTCH2_rna => ; 1;
  // V(665) = K(665,1) * [PTPN11_g];
  R665: PTPN11_g => ; 1;
  // V(666) = K(666,1) * [PTPN11_rna];
  R666: PTPN11_rna => ; 1;
  // V(667) = K(667,1) * [PRDX1_g];
  R667: PRDX1_g => ; 1;
  // V(668) = K(668,1) * [PRDX1_rna];
  R668: PRDX1_rna => ; 1;
  // V(669) = K(669,1) * [EP300_g];
  R669: EP300_g => ; 1;
  // V(670) = K(670,1) * [EP300_rna];
  R670: EP300_rna => ; 1;
  // V(671) = K(671,1) * [PTPRJ_g];
  R671: PTPRJ_g => ; 1;
  // V(672) = K(672,1) * [PTPRJ_rna];
  R672: PTPRJ_rna => ; 1;
  // V(673) = K(673,1) * [STK4_g];
  R673: STK4_g => ; 1;
  // V(674) = K(674,1) * [STK4_rna];
  R674: STK4_rna => ; 1;
  // V(675) = K(675,1) * [PRKAA1_g];
  R675: PRKAA1_g => ; 1;
  // V(676) = K(676,1) * [PRKAA1_rna];
  R676: PRKAA1_rna => ; 1;
  // V(677) = K(677,1) * [ILK_g];
  R677: ILK_g => ; 1;
  // V(678) = K(678,1) * [ILK_rna];
  R678: ILK_rna => ; 1;
  // V(679) = K(679,1) * [ROCK1_g];
  R679: ROCK1_g => ; 1;
  // V(680) = K(680,1) * [ROCK1_rna];
  R680: ROCK1_rna => ; 1;
  // V(681) = K(681,1) * [SMAD4_g];
  R681: SMAD4_g => ; 1;
  // V(682) = K(682,1) * [SMAD4_rna];
  R682: SMAD4_rna => ; 1;
  // V(683) = K(683,1) * [ATR_g];
  R683: ATR_g => ; 1;
  // V(684) = K(684,1) * [ATR_rna];
  R684: ATR_rna => ; 1;
  // V(685) = K(685,1) * [CUL3_g];
  R685: CUL3_g => ; 1;
  // V(686) = K(686,1) * [CUL3_rna];
  R686: CUL3_rna => ; 1;
  // V(687) = K(687,1) * [BECN1_g];
  R687: BECN1_g => ; 1;
  // V(688) = K(688,1) * [BECN1_rna];
  R688: BECN1_rna => ; 1;
  // V(689) = K(689,1) * [HES1_g];
  R689: HES1_g => ; 1;
  // V(690) = K(690,1) * [HES1_rna];
  R690: HES1_rna => ; 1;
  // V(691) = K(691,1) * [IRF3_g];
  R691: IRF3_g => ; 1;
  // V(692) = K(692,1) * [IRF3_rna];
  R692: IRF3_rna => ; 1;
  // V(693) = K(693,1) * [PTPA_g];
  R693: PTPA_g => ; 1;
  // V(694) = K(694,1) * [PTPA_rna];
  R694: PTPA_rna => ; 1;
  // V(695) = K(695,1) * [SMAD2_g];
  R695: SMAD2_g => ; 1;
  // V(696) = K(696,1) * [SMAD2_rna];
  R696: SMAD2_rna => ; 1;
  // V(697) = K(697,1) * [STK11_g];
  R697: STK11_g => ; 1;
  // V(698) = K(698,1) * [STK11_rna];
  R698: STK11_rna => ; 1;
  // V(699) = K(699,1) * [NFE2L2_g];
  R699: NFE2L2_g => ; 1;
  // V(700) = K(700,1) * [NFE2L2_rna];
  R700: NFE2L2_rna => ; 1;
  // V(701) = K(701,1) * [PKN1_g];
  R701: PKN1_g => ; 1;
  // V(702) = K(702,1) * [PKN1_rna];
  R702: PKN1_rna => ; 1;
  // V(703) = K(703,1) * [HIF1A_g];
  R703: HIF1A_g => ; 1;
  // V(704) = K(704,1) * [HIF1A_rna];
  R704: HIF1A_rna => ; 1;
  // V(705) = K(705,1) * [AEBP1_g];
  R705: AEBP1_g => ; 1;
  // V(706) = K(706,1) * [AEBP1_rna];
  R706: AEBP1_rna => ; 1;
  // V(707) = K(707,1) * [BAD_g];
  R707: BAD_g => ; 1;
  // V(708) = K(708,1) * [BAD_rna];
  R708: BAD_rna => ; 1;
  // V(709) = K(709,1) * [PARK7_g];
  R709: PARK7_g => ; 1;
  // V(710) = K(710,1) * [PARK7_rna];
  R710: PARK7_rna => ; 1;
  // V(711) = K(711,1) * [PINK1_g];
  R711: PINK1_g => ; 1;
  // V(712) = K(712,1) * [PINK1_rna];
  R712: PINK1_rna => ; 1;
  // V(713) = K(713,1) * [MFF_g];
  R713: MFF_g => ; 1;
  // V(714) = K(714,1) * [MFF_rna];
  R714: MFF_rna => ; 1;
  // V(715) = K(715,1) * [HIPK2_g];
  R715: HIPK2_g => ; 1;
  // V(716) = K(716,1) * [HIPK2_rna];
  R716: HIPK2_rna => ; 1;
  // V(717) = K(717,1) * [TXNIP_g];
  R717: TXNIP_g => ; 1;
  // V(718) = K(718,1) * [TXNIP_rna];
  R718: TXNIP_rna => ; 1;
  // V(719) = K(719,1) * [RNF7_g];
  R719: RNF7_g => ; 1;
  // V(720) = K(720,1) * [RNF7_rna];
  R720: RNF7_rna => ; 1;
  // V(721) = K(721,1) * [AGO2_g];
  R721: AGO2_g => ; 1;
  // V(722) = K(722,1) * [AGO2_rna];
  R722: AGO2_rna => ; 1;
  // V(723) = K(723,1) * [DNM1L_p];
  R723: DNM1L_p => ; 1;
  // V(724) = K(724,1) * [ABCA1_p];
  R724: ABCA1_p => ; 1;
  // V(725) = K(725,1) * [EGFR_p];
  R725: EGFR_p => ; 1;
  // V(726) = K(726,1) * [FOS_p];
  R726: FOS_p => ; 1;
  // V(727) = K(727,1) * [ANXA1_p];
  R727: ANXA1_p => ; 1;
  // V(728) = K(728,1) * [NR3C1_p];
  R728: NR3C1_p => ; 1;
  // V(729) = K(729,1) * [TP53_p];
  R729: TP53_p => ; 1;
  // V(730) = K(730,1) * [HSPB1_p];
  R730: HSPB1_p => ; 1;
  // V(731) = K(731,1) * [HMGN1_p];
  R731: HMGN1_p => ; 1;
  // V(732) = K(732,1) * [JUN_p];
  R732: JUN_p => ; 1;
  // V(733) = K(733,1) * [INSR_p];
  R733: INSR_p => ; 1;
  // V(734) = K(734,1) * [SP1_p];
  R734: SP1_p => ; 1;
  // V(735) = K(735,1) * [IGF1R_p];
  R735: IGF1R_p => ; 1;
  // V(736) = K(736,1) * [VIM_p];
  R736: VIM_p => ; 1;
  // V(737) = K(737,1) * [UBC_p];
  R737: UBC_p => ; 1;
  // V(738) = K(738,1) * [CALM1_p];
  R738: CALM1_p => ; 1;
  // V(739) = K(739,1) * [AR_p];
  R739: AR_p => ; 1;
  // V(740) = K(740,1) * [BCL2_p];
  R740: BCL2_p => ; 1;
  // V(741) = K(741,1) * [PCNA_p];
  R741: PCNA_p => ; 1;
  // V(742) = K(742,1) * [PKM_p];
  R742: PKM_p => ; 1;
  // V(743) = K(743,1) * [CREB1_p];
  R743: CREB1_p => ; 1;
  // V(744) = K(744,1) * [GJA1_p];
  R744: GJA1_p => ; 1;
  // V(745) = K(745,1) * [NR4A1_p];
  R745: NR4A1_p => ; 1;
  // V(746) = K(746,1) * [JAK1_p];
  R746: JAK1_p => ; 1;
  // V(747) = K(747,1) * [F2R_p];
  R747: F2R_p => ; 1;
  // V(748) = K(748,1) * [ZFP36_p];
  R748: ZFP36_p => ; 1;
  // V(749) = K(749,1) * [PIK3R1_p];
  R749: PIK3R1_p => ; 1;
  // V(750) = K(750,1) * [MAPK1_p];
  R750: MAPK1_p => ; 1;
  // V(751) = K(751,1) * [DUSP1_p];
  R751: DUSP1_p => ; 1;
  // V(752) = K(752,1) * [PRDX6_p];
  R752: PRDX6_p => ; 1;
  // V(753) = K(753,1) * [AXL_p];
  R753: AXL_p => ; 1;
  // V(754) = K(754,1) * [AKT1_p];
  R754: AKT1_p => ; 1;
  // V(755) = K(755,1) * [CTNNB1_p];
  R755: CTNNB1_p => ; 1;
  // V(756) = K(756,1) * [RORA_p];
  R756: RORA_p => ; 1;
  // V(757) = K(757,1) * [DDIT3_p];
  R757: DDIT3_p => ; 1;
  // V(758) = K(758,1) * [STAT3_p];
  R758: STAT3_p => ; 1;
  // V(759) = K(759,1) * [STAT1_p];
  R759: STAT1_p => ; 1;
  // V(760) = K(760,1) * [YAP1_p];
  R760: YAP1_p => ; 1;
  // V(761) = K(761,1) * [TSC2_p];
  R761: TSC2_p => ; 1;
  // V(762) = K(762,1) * [MECP2_p];
  R762: MECP2_p => ; 1;
  // V(763) = K(763,1) * [RPS6KA3_p];
  R763: RPS6KA3_p => ; 1;
  // V(764) = K(764,1) * [RCAN1_p];
  R764: RCAN1_p => ; 1;
  // V(765) = K(765,1) * [PTEN_p];
  R765: PTEN_p => ; 1;
  // V(766) = K(766,1) * [RHOA_p];
  R766: RHOA_p => ; 1;
  // V(767) = K(767,1) * [RAC1_p];
  R767: RAC1_p => ; 1;
  // V(768) = K(768,1) * [SMAD3_p];
  R768: SMAD3_p => ; 1;
  // V(769) = K(769,1) * [MDM2_p];
  R769: MDM2_p => ; 1;
  // V(770) = K(770,1) * [PTPN11_p];
  R770: PTPN11_p => ; 1;
  // V(771) = K(771,1) * [PRDX1_p];
  R771: PRDX1_p => ; 1;
  // V(772) = K(772,1) * [BAX_p];
  R772: BAX_p => ; 1;
  // V(773) = K(773,1) * [EP300_p];
  R773: EP300_p => ; 1;
  // V(774) = K(774,1) * [STK4_p];
  R774: STK4_p => ; 1;
  // V(775) = K(775,1) * [PRKAA1_p];
  R775: PRKAA1_p => ; 1;
  // V(776) = K(776,1) * [ILK_p];
  R776: ILK_p => ; 1;
  // V(777) = K(777,1) * [SMAD4_p];
  R777: SMAD4_p => ; 1;
  // V(778) = K(778,1) * [BECN1_p];
  R778: BECN1_p => ; 1;
  // V(779) = K(779,1) * [IRF3_p];
  R779: IRF3_p => ; 1;
  // V(780) = K(780,1) * [SMAD2_p];
  R780: SMAD2_p => ; 1;
  // V(781) = K(781,1) * [STK11_p];
  R781: STK11_p => ; 1;
  // V(782) = K(782,1) * [NFE2L2_p];
  R782: NFE2L2_p => ; 1;
  // V(783) = K(783,1) * [PKN1_p];
  R783: PKN1_p => ; 1;
  // V(784) = K(784,1) * [HIF1A_p];
  R784: HIF1A_p => ; 1;
  // V(785) = K(785,1) * [AEBP1_p];
  R785: AEBP1_p => ; 1;
  // V(786) = K(786,1) * [BAD_p];
  R786: BAD_p => ; 1;
  // V(787) = K(787,1) * [PARK7_p];
  R787: PARK7_p => ; 1;
  // V(788) = K(788,1) * [MFF_p];
  R788: MFF_p => ; 1;
  // V(789) = K(789,1) * [HIPK2_p];
  R789: HIPK2_p => ; 1;
  // V(790) = K(790,1) * [TXNIP_p];
  R790: TXNIP_p => ; 1;
  // V(791) = K(791,1) * [AGO2_p];
  R791: AGO2_p => ; 1;
  // V(792) = K(792,1) * [SIGNOR-C120_p];
  R792: => ; 1;
  // V(793) = K(793,1) * [SIGNOR-C154_p];
  R793: => ; 1;
  // V(794) = K(794,1) * [DNM1L_rna];
  R794: DNM1L_rna => ; 1;
  // V(795) = K(795,1) * [ROCK2_rna];
  R795: ROCK2_rna => ; 1;
  // V(796) = K(796,1) * [ABCA1_rna];
  R796: ABCA1_rna => ; 1;
  // V(797) = K(797,1) * [EGFR_rna];
  R797: EGFR_rna => ; 1;
  // V(798) = K(798,1) * [FOS_rna];
  R798: FOS_rna => ; 1;
  // V(799) = K(799,1) * [ANXA1_rna];
  R799: ANXA1_rna => ; 1;
  // V(800) = K(800,1) * [TP53_rna];
  R800: TP53_rna => ; 1;
  // V(801) = K(801,1) * [HSPB1_rna];
  R801: HSPB1_rna => ; 1;
  // V(802) = K(802,1) * [IGF1_rna];
  R802: IGF1_rna => ; 1;
  // V(803) = K(803,1) * [HMGN1_rna];
  R803: HMGN1_rna => ; 1;
  // V(804) = K(804,1) * [INSR_rna];
  R804: INSR_rna => ; 1;
  // V(805) = K(805,1) * [SP1_rna];
  R805: SP1_rna => ; 1;
  // V(806) = K(806,1) * [IGF1R_rna];
  R806: IGF1R_rna => ; 1;
  // V(807) = K(807,1) * [VIM_rna];
  R807: VIM_rna => ; 1;
  // V(808) = K(808,1) * [FGF2_rna];
  R808: FGF2_rna => ; 1;
  // V(809) = K(809,1) * [UBC_rna];
  R809: UBC_rna => ; 1;
  // V(810) = K(810,1) * [CALM1_rna];
  R810: CALM1_rna => ; 1;
  // V(811) = K(811,1) * [AR_rna];
  R811: AR_rna => ; 1;
  // V(812) = K(812,1) * [BCL2_rna];
  R812: BCL2_rna => ; 1;
  // V(813) = K(813,1) * [PCNA_rna];
  R813: PCNA_rna => ; 1;
  // V(814) = K(814,1) * [PKM_rna];
  R814: PKM_rna => ; 1;
  // V(815) = K(815,1) * [CREB1_rna];
  R815: CREB1_rna => ; 1;
  // V(816) = K(816,1) * [GJA1_rna];
  R816: GJA1_rna => ; 1;
  // V(817) = K(817,1) * [PTPN2_rna];
  R817: PTPN2_rna => ; 1;
  // V(818) = K(818,1) * [ATF3_rna];
  R818: ATF3_rna => ; 1;
  // V(819) = K(819,1) * [BGN_rna];
  R819: BGN_rna => ; 1;
  // V(820) = K(820,1) * [NR4A1_rna];
  R820: NR4A1_rna => ; 1;
  // V(821) = K(821,1) * [JAK1_rna];
  R821: JAK1_rna => ; 1;
  // V(822) = K(822,1) * [F2R_rna];
  R822: F2R_rna => ; 1;
  // V(823) = K(823,1) * [ZFP36_rna];
  R823: ZFP36_rna => ; 1;
  // V(824) = K(824,1) * [PIK3R1_rna];
  R824: PIK3R1_rna => ; 1;
  // V(825) = K(825,1) * [MAPK1_rna];
  R825: MAPK1_rna => ; 1;
  // V(826) = K(826,1) * [DUSP1_rna];
  R826: DUSP1_rna => ; 1;
  // V(827) = K(827,1) * [PRDX6_rna];
  R827: PRDX6_rna => ; 1;
  // V(828) = K(828,1) * [AXL_rna];
  R828: AXL_rna => ; 1;
  // V(829) = K(829,1) * [AKT1_rna];
  R829: AKT1_rna => ; 1;
  // V(830) = K(830,1) * [CTNNB1_rna];
  R830: CTNNB1_rna => ; 1;
  // V(831) = K(831,1) * [RORA_rna];
  R831: RORA_rna => ; 1;
  // V(832) = K(832,1) * [DDIT3_rna];
  R832: DDIT3_rna => ; 1;
  // V(833) = K(833,1) * [TGFBR1_rna];
  R833: TGFBR1_rna => ; 1;
  // V(834) = K(834,1) * [STAT3_rna];
  R834: STAT3_rna => ; 1;
  // V(835) = K(835,1) * [YAP1_rna];
  R835: YAP1_rna => ; 1;
  // V(836) = K(836,1) * [NUMB_rna];
  R836: NUMB_rna => ; 1;
  // V(837) = K(837,1) * [TSC2_rna];
  R837: TSC2_rna => ; 1;
  // V(838) = K(838,1) * [MECP2_rna];
  R838: MECP2_rna => ; 1;
  // V(839) = K(839,1) * [RPS6KA3_rna];
  R839: RPS6KA3_rna => ; 1;
  // V(840) = K(840,1) * [PTEN_rna];
  R840: PTEN_rna => ; 1;
  // V(841) = K(841,1) * [RHOA_rna];
  R841: RHOA_rna => ; 1;
  // V(842) = K(842,1) * [TGFB2_rna];
  R842: TGFB2_rna => ; 1;
  // V(843) = K(843,1) * [RAC1_rna];
  R843: RAC1_rna => ; 1;
  // V(844) = K(844,1) * [SMAD3_rna];
  R844: SMAD3_rna => ; 1;
  // V(845) = K(845,1) * [MDM2_rna];
  R845: MDM2_rna => ; 1;
  // V(846) = K(846,1) * [RELA_rna];
  R846: RELA_rna => ; 1;
  // V(847) = K(847,1) * [NOTCH2_rna];
  R847: NOTCH2_rna => ; 1;
  // V(848) = K(848,1) * [PTPN11_rna];
  R848: PTPN11_rna => ; 1;
  // V(849) = K(849,1) * [PRDX1_rna];
  R849: PRDX1_rna => ; 1;
  // V(850) = K(850,1) * [EP300_rna];
  R850: EP300_rna => ; 1;
  // V(851) = K(851,1) * [PTPRJ_rna];
  R851: PTPRJ_rna => ; 1;
  // V(852) = K(852,1) * [STK4_rna];
  R852: STK4_rna => ; 1;
  // V(853) = K(853,1) * [PRKAA1_rna];
  R853: PRKAA1_rna => ; 1;
  // V(854) = K(854,1) * [ILK_rna];
  R854: ILK_rna => ; 1;
  // V(855) = K(855,1) * [ROCK1_rna];
  R855: ROCK1_rna => ; 1;
  // V(856) = K(856,1) * [SMAD4_rna];
  R856: SMAD4_rna => ; 1;
  // V(857) = K(857,1) * [ATR_rna];
  R857: ATR_rna => ; 1;
  // V(858) = K(858,1) * [CUL3_rna];
  R858: CUL3_rna => ; 1;
  // V(859) = K(859,1) * [BECN1_rna];
  R859: BECN1_rna => ; 1;
  // V(860) = K(860,1) * [HES1_rna];
  R860: HES1_rna => ; 1;
  // V(861) = K(861,1) * [IRF3_rna];
  R861: IRF3_rna => ; 1;
  // V(862) = K(862,1) * [PTPA_rna];
  R862: PTPA_rna => ; 1;
  // V(863) = K(863,1) * [SMAD2_rna];
  R863: SMAD2_rna => ; 1;
  // V(864) = K(864,1) * [STK11_rna];
  R864: STK11_rna => ; 1;
  // V(865) = K(865,1) * [NFE2L2_rna];
  R865: NFE2L2_rna => ; 1;
  // V(866) = K(866,1) * [PKN1_rna];
  R866: PKN1_rna => ; 1;
  // V(867) = K(867,1) * [HIF1A_rna];
  R867: HIF1A_rna => ; 1;
  // V(868) = K(868,1) * [AEBP1_rna];
  R868: AEBP1_rna => ; 1;
  // V(869) = K(869,1) * [BAD_rna];
  R869: BAD_rna => ; 1;
  // V(870) = K(870,1) * [PARK7_rna];
  R870: PARK7_rna => ; 1;
  // V(871) = K(871,1) * [PINK1_rna];
  R871: PINK1_rna => ; 1;
  // V(872) = K(872,1) * [MFF_rna];
  R872: MFF_rna => ; 1;
  // V(873) = K(873,1) * [HIPK2_rna];
  R873: HIPK2_rna => ; 1;
  // V(874) = K(874,1) * [TXNIP_rna];
  R874: TXNIP_rna => ; 1;
  // V(875) = K(875,1) * [RNF7_rna];
  R875: RNF7_rna => ; 1;
  // V(876) = K(876,1) * [AGO2_rna];
  R876: AGO2_rna => ; 1;
end
