// SBML level 3 version 2

model PlasmaCell()

  // Compartments:
  compartment cell = 1;

  // Species:
  species AKT1 in cell = 1/cell;
  species AKT1_g in cell = 1/cell;
  species AKT1_p in cell = 1/cell;
  species AKT1_rna in cell = 1/cell;
  species BAD in cell = 1/cell;
  species BAD_g in cell = 1/cell;
  species BAD_p in cell = 1/cell;
  species BAD_rna in cell = 1/cell;
  species BAX in cell = 1/cell;
  species BAX_g in cell = 1/cell;
  species BAX_p in cell = 1/cell;
  species BAX_rna in cell = 1/cell;
  species BTK in cell = 1/cell;
  species BTK_g in cell = 1/cell;
  species BTK_p in cell = 1/cell;
  species BTK_rna in cell = 1/cell;
  species CALM1 in cell = 1/cell;
  species CALM1_g in cell = 1/cell;
  species CALM1_p in cell = 1/cell;
  species CALM1_rna in cell = 1/cell;
  species CASP3 in cell = 1/cell;
  species CASP3_g in cell = 1/cell;
  species CASP3_rna in cell = 1/cell;
  species CDKN1A in cell = 1/cell;
  species CDKN1A_g in cell = 1/cell;
  species CDKN1A_p in cell = 1/cell;
  species CDKN1A_rna in cell = 1/cell;
  species CDKN1B in cell = 1/cell;
  species CDKN1B_g in cell = 1/cell;
  species CDKN1B_p in cell = 1/cell;
  species CDKN1B_rna in cell = 1/cell;
  species CTNNB1 in cell = 1/cell;
  species CTNNB1_g in cell = 1/cell;
  species CTNNB1_p in cell = 1/cell;
  species CTNNB1_rna in cell = 1/cell;
  species CUL3 in cell = 1/cell;
  species CUL3_g in cell = 1/cell;
  species CUL3_rna in cell = 1/cell;
  species DDIT3 in cell = 1/cell;
  species DDIT3_g in cell = 1/cell;
  species DDIT3_p in cell = 1/cell;
  species DDIT3_rna in cell = 1/cell;
  species DUSP1 in cell = 1/cell;
  species DUSP1_g in cell = 1/cell;
  species DUSP1_rna in cell = 1/cell;
  species EIF2AK3 in cell = 1/cell;
  species EIF2AK3_g in cell = 1/cell;
  species EIF2AK3_p in cell = 1/cell;
  species EIF2AK3_rna in cell = 1/cell;
  species ERN1 in cell = 1/cell;
  species ERN1_g in cell = 1/cell;
  species ERN1_p in cell = 1/cell;
  species ERN1_rna in cell = 1/cell;
  species GPX4 in cell = 1/cell;
  species GPX4_g in cell = 1/cell;
  species GPX4_rna in cell = 1/cell;
  species HIPK2 in cell = 1/cell;
  species HIPK2_g in cell = 1/cell;
  species HIPK2_p in cell = 1/cell;
  species HIPK2_rna in cell = 1/cell;
  species HSPB1 in cell = 1/cell;
  species HSPB1_g in cell = 1/cell;
  species HSPB1_p in cell = 1/cell;
  species HSPB1_rna in cell = 1/cell;
  species IGF1 in cell = 1/cell;
  species IGF1_g in cell = 1/cell;
  species IGF1_rna in cell = 1/cell;
  species INSR in cell = 1/cell;
  species INSR_g in cell = 1/cell;
  species INSR_p in cell = 1/cell;
  species INSR_rna in cell = 1/cell;
  species IRAK1 in cell = 1/cell;
  species IRAK1_g in cell = 1/cell;
  species IRAK1_p in cell = 1/cell;
  species IRAK1_rna in cell = 1/cell;
  species IRF1 in cell = 1/cell;
  species IRF1_g in cell = 1/cell;
  species IRF1_rna in cell = 1/cell;
  species IRF3 in cell = 1/cell;
  species IRF3_g in cell = 1/cell;
  species IRF3_p in cell = 1/cell;
  species IRF3_rna in cell = 1/cell;
  species JAK1 in cell = 1/cell;
  species JAK1_g in cell = 1/cell;
  species JAK1_p in cell = 1/cell;
  species JAK1_rna in cell = 1/cell;
  species JAK3 in cell = 1/cell;
  species JAK3_g in cell = 1/cell;
  species JAK3_p in cell = 1/cell;
  species JAK3_rna in cell = 1/cell;
  species JUN in cell = 1/cell;
  species JUN_g in cell = 1/cell;
  species JUN_p in cell = 1/cell;
  species JUN_rna in cell = 1/cell;
  species MDM2 in cell = 1/cell;
  species MDM2_g in cell = 1/cell;
  species MDM2_p in cell = 1/cell;
  species MDM2_rna in cell = 1/cell;
  species MFF in cell = 1/cell;
  species MFF_g in cell = 1/cell;
  species MFF_p in cell = 1/cell;
  species MFF_rna in cell = 1/cell;
  species MFN1 in cell = 1/cell;
  species MFN1_g in cell = 1/cell;
  species MFN1_rna in cell = 1/cell;
  species NCF1 in cell = 1/cell;
  species NCF1_g in cell = 1/cell;
  species NCF1_p in cell = 1/cell;
  species NCF1_rna in cell = 1/cell;
  species NFE2L2 in cell = 1/cell;
  species NFE2L2_g in cell = 1/cell;
  species NFE2L2_p in cell = 1/cell;
  species NFE2L2_rna in cell = 1/cell;
  species NR3C1 in cell = 1/cell;
  species NR3C1_g in cell = 1/cell;
  species NR3C1_p in cell = 1/cell;
  species NR3C1_rna in cell = 1/cell;
  species NR4A1 in cell = 1/cell;
  species NR4A1_g in cell = 1/cell;
  species NR4A1_p in cell = 1/cell;
  species NR4A1_rna in cell = 1/cell;
  species NUMB in cell = 1/cell;
  species NUMB_g in cell = 1/cell;
  species NUMB_rna in cell = 1/cell;
  species PARK7 in cell = 1/cell;
  species PARK7_g in cell = 1/cell;
  species PARK7_p in cell = 1/cell;
  species PARK7_rna in cell = 1/cell;
  species PIK3CA in cell = 1/cell;
  species PIK3CA_g in cell = 1/cell;
  species PIK3CA_p in cell = 1/cell;
  species PIK3CA_rna in cell = 1/cell;
  species PINK1 in cell = 1/cell;
  species PINK1_g in cell = 1/cell;
  species PINK1_rna in cell = 1/cell;
  species PKM in cell = 1/cell;
  species PKM_g in cell = 1/cell;
  species PKM_p in cell = 1/cell;
  species PKM_rna in cell = 1/cell;
  species PRDX1 in cell = 1/cell;
  species PRDX1_g in cell = 1/cell;
  species PRDX1_p in cell = 1/cell;
  species PRDX1_rna in cell = 1/cell;
  species PRKAA1 in cell = 1/cell;
  species PRKAA1_g in cell = 1/cell;
  species PRKAA1_p in cell = 1/cell;
  species PRKAA1_rna in cell = 1/cell;
  species PTEN in cell = 1/cell;
  species PTEN_g in cell = 1/cell;
  species PTEN_p in cell = 1/cell;
  species PTEN_rna in cell = 1/cell;
  species PTPN2 in cell = 1/cell;
  species PTPN2_g in cell = 1/cell;
  species PTPN2_rna in cell = 1/cell;
  species PTPN6 in cell = 1/cell;
  species PTPN6_g in cell = 1/cell;
  species PTPN6_p in cell = 1/cell;
  species PTPN6_rna in cell = 1/cell;
  species RAC1 in cell = 1/cell;
  species RAC1_g in cell = 1/cell;
  species RAC1_p in cell = 1/cell;
  species RAC1_rna in cell = 1/cell;
  species RELA in cell = 1/cell;
  species RELA_g in cell = 1/cell;
  species RELA_p in cell = 1/cell;
  species RELA_rna in cell = 1/cell;
  species RHOA in cell = 1/cell;
  species RHOA_g in cell = 1/cell;
  species RHOA_rna in cell = 1/cell;
  species RNF7 in cell = 1/cell;
  species RNF7_g in cell = 1/cell;
  species RNF7_rna in cell = 1/cell;
  species SOCS3 in cell = 1/cell;
  species SOCS3_g in cell = 1/cell;
  species SOCS3_rna in cell = 1/cell;
  species SOD1 in cell = 1/cell;
  species SOD1_g in cell = 1/cell;
  species SOD1_rna in cell = 1/cell;
  species SOD2 in cell = 1/cell;
  species SOD2_g in cell = 1/cell;
  species SOD2_rna in cell = 1/cell;
  species STAT1 in cell = 1/cell;
  species STAT1_g in cell = 1/cell;
  species STAT1_p in cell = 1/cell;
  species STAT1_rna in cell = 1/cell;
  species STAT3 in cell = 1/cell;
  species STAT3_g in cell = 1/cell;
  species STAT3_p in cell = 1/cell;
  species STAT3_rna in cell = 1/cell;
  species STK4 in cell = 1/cell;
  species STK4_g in cell = 1/cell;
  species STK4_p in cell = 1/cell;
  species STK4_rna in cell = 1/cell;
  species SYVN1 in cell = 1/cell;
  species SYVN1_g in cell = 1/cell;
  species SYVN1_rna in cell = 1/cell;
  species UBC in cell = 1/cell;
  species UBC_g in cell = 1/cell;
  species UBC_p in cell = 1/cell;
  species UBC_rna in cell = 1/cell;
  species VEGFA in cell = 1/cell;
  species VEGFA_g in cell = 1/cell;
  species VEGFA_rna in cell = 1/cell;
  species VIM in cell = 1/cell;
  species VIM_g in cell = 1/cell;
  species VIM_p in cell = 1/cell;
  species VIM_rna in cell = 1/cell;
  species XBP1 in cell = 1/cell;
  species XBP1_g in cell = 1/cell;
  species XBP1_p in cell = 1/cell;
  species XBP1_rna in cell = 1/cell;

  // Reactions:
  // V(1) = K(1,1) * [STAT1_p] * [STAT3_p] -K(1,2) * [SIGNOR-C118];
  R1: STAT3_p => STAT1_p; 1;
  // V(2) = K(2,1) * [SIGNOR-C118] * [JAK1_p] -K(2,2) * [SIGNOR-C120];
  R2: JAK1_p => ; 1;
  // V(3) = K(3,1) * [AKT1_p] * [MDM2] -K(3,2) * [AKT1_p |MDM2];
  R3: AKT1_p => MDM2; 1;
  // V(4) = K(4,1) * [AKT1_p |MDM2];
  R4: AKT1_p => MDM2; 1;
  // V(5) = K(5,1) * [AKT1_p] * [PRKAA1] -K(5,2) * [AKT1_p |PRKAA1];
  R5: PRKAA1 => AKT1_p; 1;
  // V(6) = K(6,1) * [AKT1_p |PRKAA1];
  R6: PRKAA1 => AKT1_p; 1;
  // V(7) = K(7,1) * [AKT1_p] * [NR4A1] -K(7,2) * [AKT1_p |NR4A1];
  R7: NR4A1 => AKT1_p; 1;
  // V(8) = K(8,1) * [AKT1_p |NR4A1];
  R8: NR4A1 => AKT1_p; 1;
  // V(9) = K(9,1) * [JAK3_p] * [CTNNB1] -K(9,2) * [JAK3_p |CTNNB1];
  R9: CTNNB1 => JAK3_p; 1;
  // V(10) = K(10,1) * [JAK3_p |CTNNB1];
  R10: CTNNB1 => JAK3_p; 1;
  // V(11) = K(11,1) * [INSR_p] * [INSR] -K(11,2) * [INSR_p |INSR];
  R11: INSR_p => INSR; 1;
  // V(12) = K(12,1) * [INSR_p |INSR];
  R12: INSR_p => INSR; 1;
  // V(13) = K(13,1) * [AKT1_p] * [BAD] -K(13,2) * [AKT1_p |BAD];
  R13: BAD => AKT1_p; 1;
  // V(14) = K(14,1) * [AKT1_p |BAD];
  R14: BAD => AKT1_p; 1;
  // V(15) = K(15,1) * [JAK1_p] * [STAT1] -K(15,2) * [JAK1_p |STAT1];
  R15: STAT1 => JAK1_p; 1;
  // V(16) = K(16,1) * [JAK1_p |STAT1];
  R16: STAT1 => JAK1_p; 1;
  // V(17) = K(17,1) * [AKT1_p] * [HSPB1] -K(17,2) * [AKT1_p |HSPB1];
  R17: HSPB1 => AKT1_p; 1;
  // V(18) = K(18,1) * [AKT1_p |HSPB1];
  R18: HSPB1 => AKT1_p; 1;
  // V(19) = K(19,1) * [AKT1_p] * [NCF1] -K(19,2) * [AKT1_p |NCF1];
  R19: NCF1 => AKT1_p; 1;
  // V(20) = K(20,1) * [AKT1_p |NCF1];
  R20: NCF1 => AKT1_p; 1;
  // V(21) = K(21,1) * [AKT1_p] * [CDKN1A] -K(21,2) * [AKT1_p |CDKN1A];
  R21: AKT1_p => CDKN1A; 1;
  // V(22) = K(22,1) * [AKT1_p |CDKN1A];
  R22: AKT1_p => CDKN1A; 1;
  // V(23) = K(23,1) * [JAK1_p] * [EIF2AK3] -K(23,2) * [JAK1_p |EIF2AK3];
  R23: EIF2AK3 => JAK1_p; 1;
  // V(24) = K(24,1) * [JAK1_p |EIF2AK3];
  R24: EIF2AK3 => JAK1_p; 1;
  // V(25) = K(25,1) * [JAK3_p] * [JAK1] -K(25,2) * [JAK3_p |JAK1];
  R25: JAK1 => JAK3_p; 1;
  // V(26) = K(26,1) * [JAK3_p |JAK1];
  R26: JAK1 => JAK3_p; 1;
  // V(27) = K(27,1) * [INSR_p] * [CALM1] -K(27,2) * [INSR_p |CALM1];
  R27: INSR_p => CALM1; 1;
  // V(28) = K(28,1) * [INSR_p |CALM1];
  R28: INSR_p => CALM1; 1;
  // V(29) = K(29,1) * [ERN1_p] * [ERN1] -K(29,2) * [ERN1_p |ERN1];
  R29: ERN1_p => ERN1; 1;
  // V(30) = K(30,1) * [ERN1_p |ERN1];
  R30: ERN1_p => ERN1; 1;
  // V(31) = K(31,1) * [AKT1_p] * [CDKN1B] -K(31,2) * [AKT1_p |CDKN1B];
  R31: CDKN1B => AKT1_p; 1;
  // V(32) = K(32,1) * [AKT1_p |CDKN1B];
  R32: CDKN1B => AKT1_p; 1;
  // V(33) = K(33,1) * [PINK1] * [UBC] -K(33,2) * [PINK1 |UBC];
  R33: PINK1 => UBC; 1;
  // V(34) = K(34,1) * [PINK1 |UBC];
  R34: PINK1 => UBC; 1;
  // V(35) = K(35,1) * [AKT1_p] * [RAC1] -K(35,2) * [AKT1_p |RAC1];
  R35: RAC1 => AKT1_p; 1;
  // V(36) = K(36,1) * [AKT1_p |RAC1];
  R36: RAC1 => AKT1_p; 1;
  // V(37) = K(37,1) * [STK4_p] * [STK4] -K(37,2) * [STK4_p |STK4];
  R37: STK4_p => STK4; 1;
  // V(38) = K(38,1) * [STK4_p |STK4];
  R38: STK4_p => STK4; 1;
  // V(39) = K(39,1) * [HIPK2_p] * [HIPK2] -K(39,2) * [HIPK2_p |HIPK2];
  R39: HIPK2_p => HIPK2; 1;
  // V(40) = K(40,1) * [HIPK2_p |HIPK2];
  R40: HIPK2_p => HIPK2; 1;
  // V(41) = K(41,1) * [IRAK1_p] * [IRAK1] -K(41,2) * [IRAK1_p |IRAK1];
  R41: IRAK1_p => IRAK1; 1;
  // V(42) = K(42,1) * [IRAK1_p |IRAK1];
  R42: IRAK1_p => IRAK1; 1;
  // V(43) = K(43,1) * [EIF2AK3_p] * [EIF2AK3] -K(43,2) * [EIF2AK3_p |EIF2AK3];
  R43: EIF2AK3_p => EIF2AK3; 1;
  // V(44) = K(44,1) * [EIF2AK3_p |EIF2AK3];
  R44: EIF2AK3_p => EIF2AK3; 1;
  // V(45) = K(45,1) * [AKT1_p] * [VIM] -K(45,2) * [AKT1_p |VIM];
  R45: VIM => AKT1_p; 1;
  // V(46) = K(46,1) * [AKT1_p |VIM];
  R46: VIM => AKT1_p; 1;
  // V(47) = K(47,1) * [AKT1_p] * [BTK] -K(47,2) * [AKT1_p |BTK];
  R47: BTK => AKT1_p; 1;
  // V(48) = K(48,1) * [AKT1_p |BTK];
  R48: BTK => AKT1_p; 1;
  // V(49) = K(49,1) * [JAK3_p] * [JAK3] -K(49,2) * [JAK3_p |JAK3];
  R49: JAK3_p => JAK3; 1;
  // V(50) = K(50,1) * [JAK3_p |JAK3];
  R50: JAK3_p => JAK3; 1;
  // V(51) = K(51,1) * [JAK1_p] * [STAT3] -K(51,2) * [JAK1_p |STAT3];
  R51: STAT3 => JAK1_p; 1;
  // V(52) = K(52,1) * [JAK1_p |STAT3];
  R52: STAT3 => JAK1_p; 1;
  // V(53) = K(53,1) * [AKT1_p] * [NR3C1] -K(53,2) * [AKT1_p |NR3C1];
  R53: AKT1_p => NR3C1; 1;
  // V(54) = K(54,1) * [AKT1_p |NR3C1];
  R54: AKT1_p => NR3C1; 1;
  // V(55) = K(55,1) * [STK4_p] * [PIK3CA] -K(55,2) * [STK4_p |PIK3CA];
  R55: STK4_p => PIK3CA; 1;
  // V(56) = K(56,1) * [STK4_p |PIK3CA];
  R56: STK4_p => PIK3CA; 1;
  // V(57) = K(57,1) * [BTK_p] * [STAT3] -K(57,2) * [BTK_p |STAT3];
  R57: BTK_p => STAT3; 1;
  // V(58) = K(58,1) * [BTK_p |STAT3];
  R58: BTK_p => STAT3; 1;
  // V(59) = K(59,1) * [STK4_p] * [IRF3] -K(59,2) * [STK4_p |IRF3];
  R59: STK4_p => IRF3; 1;
  // V(60) = K(60,1) * [STK4_p |IRF3];
  R60: STK4_p => IRF3; 1;
  // V(61) = K(61,1) * [AKT1_p] * [CTNNB1] -K(61,2) * [AKT1_p |CTNNB1];
  R61: CTNNB1 => AKT1_p; 1;
  // V(62) = K(62,1) * [AKT1_p |CTNNB1];
  R62: CTNNB1 => AKT1_p; 1;
  // V(63) = K(63,1) * [AKT1_p] * [STK4] -K(63,2) * [AKT1_p |STK4];
  R63: STK4 => AKT1_p; 1;
  // V(64) = K(64,1) * [AKT1_p |STK4];
  R64: STK4 => AKT1_p; 1;
  // V(65) = K(65,1) * [AKT1_p] * [IRAK1] -K(65,2) * [AKT1_p |IRAK1];
  R65: IRAK1 => AKT1_p; 1;
  // V(66) = K(66,1) * [AKT1_p |IRAK1];
  R66: IRAK1 => AKT1_p; 1;
  // V(67) = K(67,1) * [BTK_p] * [RELA] -K(67,2) * [BTK_p |RELA];
  R67: BTK_p => RELA; 1;
  // V(68) = K(68,1) * [BTK_p |RELA];
  R68: BTK_p => RELA; 1;
  // V(69) = K(69,1) * [BTK_p] * [BTK] -K(69,2) * [BTK_p |BTK];
  R69: BTK_p => BTK; 1;
  // V(70) = K(70,1) * [BTK_p |BTK];
  R70: BTK_p => BTK; 1;
  // V(71) = K(71,1) * [AKT1_p] * [PARK7] -K(71,2) * [AKT1_p |PARK7];
  R71: AKT1_p => PARK7; 1;
  // V(72) = K(72,1) * [AKT1_p |PARK7];
  R72: AKT1_p => PARK7; 1;
  // V(73) = K(73,1) * [PRKAA1] * [HIPK2] -K(73,2) * [PRKAA1 |HIPK2];
  R73: PRKAA1 => HIPK2; 1;
  // V(74) = K(74,1) * [PRKAA1 |HIPK2];
  R74: PRKAA1 => HIPK2; 1;
  // V(75) = K(75,1) * [PRKAA1] * [DDIT3] -K(75,2) * [PRKAA1 |DDIT3];
  R75: PRKAA1 => DDIT3; 1;
  // V(76) = K(76,1) * [PRKAA1 |DDIT3];
  R76: PRKAA1 => DDIT3; 1;
  // V(77) = K(77,1) * [PIK3CA] * [BTK] -K(77,2) * [PIK3CA |BTK];
  R77: PIK3CA => BTK; 1;
  // V(78) = K(78,1) * [PIK3CA |BTK];
  R78: PIK3CA => BTK; 1;
  // V(79) = K(79,1) * [PKM_p] * [STAT3] -K(79,2) * [PKM_p |STAT3];
  R79: PKM_p => STAT3; 1;
  // V(80) = K(80,1) * [PKM_p |STAT3];
  R80: PKM_p => STAT3; 1;
  // V(81) = K(81,1) * [AKT1_p] * [AKT1] -K(81,2) * [AKT1_p |AKT1];
  R81: AKT1 => AKT1_p; 1;
  // V(82) = K(82,1) * [AKT1_p |AKT1];
  R82: AKT1 => AKT1_p; 1;
  // V(83) = K(83,1) * [INSR_p] * [PTPN6] -K(83,2) * [INSR_p |PTPN6];
  R83: PTPN6 => INSR_p; 1;
  // V(84) = K(84,1) * [INSR_p |PTPN6];
  R84: PTPN6 => INSR_p; 1;
  // V(85) = K(85,1) * [INSR_p] * [PTEN] -K(85,2) * [INSR_p |PTEN];
  R85: PTEN => INSR_p; 1;
  // V(86) = K(86,1) * [INSR_p |PTEN];
  R86: PTEN => INSR_p; 1;
  // V(87) = K(87,1) * [STK4_p] * [PRDX1] -K(87,2) * [STK4_p |PRDX1];
  R87: STK4_p => PRDX1; 1;
  // V(88) = K(88,1) * [STK4_p |PRDX1];
  R88: STK4_p => PRDX1; 1;
  // V(89) = K(89,1) * [PRKAA1] * [MFF] -K(89,2) * [PRKAA1 |MFF];
  R89: PRKAA1 => MFF; 1;
  // V(90) = K(90,1) * [PRKAA1 |MFF];
  R90: PRKAA1 => MFF; 1;
  // V(91) = K(91,1) * [PIK3CA] * [AKT1] -K(91,2) * [PIK3CA |AKT1];
  R91: PIK3CA => AKT1; 1;
  // V(92) = K(92,1) * [PIK3CA |AKT1];
  R92: PIK3CA => AKT1; 1;
  // V(93) = K(93,1) * [PRKAA1] * [NFE2L2] -K(93,2) * [PRKAA1 |NFE2L2];
  R93: PRKAA1 => NFE2L2; 1;
  // V(94) = K(94,1) * [PRKAA1 |NFE2L2];
  R94: PRKAA1 => NFE2L2; 1;
  // V(95) = K(95,1) * [HIPK2_p] * [CDKN1B] -K(95,2) * [HIPK2_p |CDKN1B];
  R95: CDKN1B => HIPK2_p; 1;
  // V(96) = K(96,1) * [HIPK2_p |CDKN1B];
  R96: CDKN1B => HIPK2_p; 1;
  // V(97) = K(97,1) * [PRKAA1] * [PRKAA1] -K(97,2) * [PRKAA1 |PRKAA1];
  R97: PRKAA1 => ; 1;
  // V(98) = K(98,1) * [PRKAA1 |PRKAA1];
  R98: PRKAA1 => ; 1;
  // V(99) = K(99,1) * [ERN1_p] * [XBP1] -K(99,2) * [ERN1_p |XBP1];
  R99: ERN1_p => XBP1; 1;
  // V(100) = K(100,1) * [ERN1_p |XBP1];
  R100: ERN1_p => XBP1; 1;
  // V(101) = K(101,1) * [HIPK2_p] * [MDM2] -K(101,2) * [HIPK2_p |MDM2];
  R101: HIPK2_p => MDM2; 1;
  // V(102) = K(102,1) * [HIPK2_p |MDM2];
  R102: HIPK2_p => MDM2; 1;
  // V(103) = K(103,1) * [IRAK1_p] * [STAT3] -K(103,2) * [IRAK1_p |STAT3];
  R103: IRAK1_p => STAT3; 1;
  // V(104) = K(104,1) * [IRAK1_p |STAT3];
  R104: IRAK1_p => STAT3; 1;
  // V(105) = K(105,1) * [JAK1_p] * [JAK3] -K(105,2) * [JAK1_p |JAK3];
  R105: JAK1_p => JAK3; 1;
  // V(106) = K(106,1) * [JAK1_p |JAK3];
  R106: JAK1_p => JAK3; 1;
  // V(107) = K(107,1) * [PINK1] * [PTEN] -K(107,2) * [PINK1 |PTEN];
  R107: PTEN => PINK1; 1;
  // V(108) = K(108,1) * [PINK1 |PTEN];
  R108: PTEN => PINK1; 1;
  // V(109) = K(109,1) * [BTK_p] * [MDM2] -K(109,2) * [BTK_p |MDM2];
  R109: BTK_p => MDM2; 1;
  // V(110) = K(110,1) * [BTK_p |MDM2];
  R110: BTK_p => MDM2; 1;
  // V(111) = K(111,1) * [JAK3_p] * [STAT3] -K(111,2) * [JAK3_p |STAT3];
  R111: STAT3 => JAK3_p; 1;
  // V(112) = K(112,1) * [JAK3_p |STAT3];
  R112: STAT3 => JAK3_p; 1;
  // V(113) = K(113,1) * [AKT1_p] * [BAX] -K(113,2) * [AKT1_p |BAX];
  R113: AKT1_p => BAX; 1;
  // V(114) = K(114,1) * [AKT1_p |BAX];
  R114: AKT1_p => BAX; 1;
  // V(115) = K(115,1) * [PRKAA1] * [CDKN1B] -K(115,2) * [PRKAA1 |CDKN1B];
  R115: PRKAA1 => CDKN1B; 1;
  // V(116) = K(116,1) * [PRKAA1 |CDKN1B];
  R116: PRKAA1 => CDKN1B; 1;
  // V(117) = K(117,1) * [PTPN2] * [INSR_p] -K(117,2) * [PTPN2 |INSR_p];
  R117: INSR_p => PTPN2; 1;
  // V(118) = K(118,1) * [PTPN2 |INSR_p];
  R118: INSR_p => PTPN2; 1;
  // V(119) = K(119,1) * [PTPN6_p] * [PKM_p] -K(119,2) * [PTPN6_p |PKM_p];
  R119: PTPN6_p => PKM_p; 1;
  // V(120) = K(120,1) * [PTPN6_p |PKM_p];
  R120: PTPN6_p => PKM_p; 1;
  // V(121) = K(121,1) * [PTPN6_p] * [INSR_p] -K(121,2) * [PTPN6_p |INSR_p];
  R121: PTPN6_p => INSR_p; 1;
  // V(122) = K(122,1) * [PTPN6_p |INSR_p];
  R122: PTPN6_p => INSR_p; 1;
  // V(123) = K(123,1) * [PTPN2] * [JAK1_p] -K(123,2) * [PTPN2 |JAK1_p];
  R123: PTPN2 => JAK1_p; 1;
  // V(124) = K(124,1) * [PTPN2 |JAK1_p];
  R124: PTPN2 => JAK1_p; 1;
  // V(125) = K(125,1) * [PTPN6_p] * [JAK1_p] -K(125,2) * [PTPN6_p |JAK1_p];
  R125: PTPN6_p => JAK1_p; 1;
  // V(126) = K(126,1) * [PTPN6_p |JAK1_p];
  R126: PTPN6_p => JAK1_p; 1;
  // V(127) = K(127,1) * [PTPN2] * [STAT3_p] -K(127,2) * [PTPN2 |STAT3_p];
  R127: STAT3_p => PTPN2; 1;
  // V(128) = K(128,1) * [PTPN2 |STAT3_p];
  R128: STAT3_p => PTPN2; 1;
  // V(129) = K(129,1) * [PTEN] * [PTEN_p] -K(129,2) * [PTEN |PTEN_p];
  R129: PTEN => PTEN_p; 1;
  // V(130) = K(130,1) * [PTEN |PTEN_p];
  R130: PTEN => PTEN_p; 1;
  // V(131) = K(131,1) * [PTPN2] * [STAT1_p] -K(131,2) * [PTPN2 |STAT1_p];
  R131: STAT1_p => PTPN2; 1;
  // V(132) = K(132,1) * [PTPN2 |STAT1_p];
  R132: STAT1_p => PTPN2; 1;
  // V(133) = K(133,1) * [PTPN6_p] * [STAT3_p] -K(133,2) * [PTPN6_p |STAT3_p];
  R133: PTPN6_p => STAT3_p; 1;
  // V(134) = K(134,1) * [PTPN6_p |STAT3_p];
  R134: PTPN6_p => STAT3_p; 1;
  // V(135) = K(135,1) * [PTEN] * [IRF3_p] -K(135,2) * [PTEN |IRF3_p];
  R135: PTEN => IRF3_p; 1;
  // V(136) = K(136,1) * [PTEN |IRF3_p];
  R136: PTEN => IRF3_p; 1;
  // V(137) = K(137,1) * [DUSP1] * [JUN_p] -K(137,2) * [DUSP1 |JUN_p];
  R137: JUN_p => DUSP1; 1;
  // V(138) = K(138,1) * [DUSP1 |JUN_p];
  R138: JUN_p => DUSP1; 1;
  // V(139) = K(139,1) * [PTPN6_p] * [CTNNB1_p] -K(139,2) * [PTPN6_p |CTNNB1_p];
  R139: PTPN6_p => CTNNB1_p; 1;
  // V(140) = K(140,1) * [PTPN6_p |CTNNB1_p];
  R140: PTPN6_p => CTNNB1_p; 1;
  // V(141) = K(141,1) * [PTPN2] * [JAK3_p] -K(141,2) * [PTPN2 |JAK3_p];
  R141: PTPN2 => JAK3_p; 1;
  // V(142) = K(142,1) * [PTPN2 |JAK3_p];
  R142: PTPN2 => JAK3_p; 1;
  // V(143) = K(143,1) * [PTPN6_p] * [JAK3_p] -K(143,2) * [PTPN6_p |JAK3_p];
  R143: PTPN6_p => JAK3_p; 1;
  // V(144) = K(144,1) * [PTPN6_p |JAK3_p];
  R144: PTPN6_p => JAK3_p; 1;
  // V(145) = K(145,1) * [MDM2_p] * [IRF1] -K(145,2) * [MDM2_p |IRF1];
  R145: IRF1 => MDM2_p; 1;
  // V(146) = K(146,1) * [MDM2_p |IRF1];
  R146: IRF1 => MDM2_p; 1;
  // V(147) = K(147,1) * [MDM2_p] * [NUMB] -K(147,2) * [MDM2_p |NUMB];
  R147: MDM2_p => NUMB; 1;
  // V(148) = K(148,1) * [MDM2_p |NUMB];
  R148: MDM2_p => NUMB; 1;
  // V(149) = K(149,1) * [RNF7] * [CDKN1B] -K(149,2) * [RNF7 |CDKN1B];
  R149: CDKN1B => RNF7; 1;
  // V(150) = K(150,1) * [RNF7 |CDKN1B];
  R150: CDKN1B => RNF7; 1;
  // V(151) = K(151,1) * [SYVN1] * [NFE2L2] -K(151,2) * [SYVN1 |NFE2L2];
  R151: SYVN1 => NFE2L2; 1;
  // V(152) = K(152,1) * [SYVN1 |NFE2L2];
  R152: SYVN1 => NFE2L2; 1;
  // V(153) = K(153,1) * [PINK1] * [MFN1] -K(153,2) * [PINK1 |MFN1];
  R153: PINK1 => MFN1; 1;
  // V(154) = K(154,1) * [PINK1 |MFN1];
  R154: PINK1 => MFN1; 1;
  // V(155) = K(155,1) * [CUL3] * [RHOA] -K(155,2) * [CUL3 |RHOA];
  R155: RHOA => CUL3; 1;
  // V(156) = K(156,1) * [CUL3 |RHOA];
  R156: RHOA => CUL3; 1;
  // V(157) = K(157,1) * [RNF7] * [JUN] -K(157,2) * [RNF7 |JUN];
  R157: JUN => RNF7; 1;
  // V(158) = K(158,1) * [RNF7 |JUN];
  R158: JUN => RNF7; 1;
  // V(159) = K(159,1) * [SYVN1] * [CDKN1B] -K(159,2) * [SYVN1 |CDKN1B];
  R159: CDKN1B => SYVN1; 1;
  // V(160) = K(160,1) * [SYVN1 |CDKN1B];
  R160: CDKN1B => SYVN1; 1;
  // V(161) = K(161,1) * [SYVN1] * [PTEN] -K(161,2) * [SYVN1 |PTEN];
  R161: PTEN => SYVN1; 1;
  // V(162) = K(162,1) * [SYVN1 |PTEN];
  R162: PTEN => SYVN1; 1;
  // V(163) = K(163,1) * [RNF7] * [CASP3] -K(163,2) * [RNF7 |CASP3];
  R163: RNF7 => CASP3; 1;
  // V(164) = K(164,1) * [RNF7 |CASP3];
  R164: RNF7 => CASP3; 1;
  // V(165) = K(165,1) * [NFE2L2_p] * [SOD1_g] -K(165,2) * [NFE2L2_p |SOD1_g];
  R165: SOD1_g => NFE2L2_p; 1;
  // V(166) = K(166,1) * [NFE2L2_p |SOD1_g];
  R166: SOD1_g => NFE2L2_p; 1;
  // V(167) = K(167,1) * [SOD1_rna];
  R167: SOD1_rna => ; 1;
  // V(168) = K(168,1) * [STAT3_p] * [STAT1_p] * [SOCS3_g] -K(168,2) * [STAT3_p |STAT1_p |SOCS3_g];
  R168: STAT3_p => STAT1_p; 1;
  // V(169) = K(169,1) * [STAT3_p |STAT1_p |SOCS3_g];
  R169: STAT3_p => STAT1_p; 1;
  // V(170) = K(170,1) * [SOCS3_rna];
  R170: SOCS3_rna => ; 1;
  // V(171) = K(171,1) * [STAT3_p] * [VEGFA_g] -K(171,2) * [STAT3_p |VEGFA_g];
  R171: STAT3_p => VEGFA_g; 1;
  // V(172) = K(172,1) * [STAT3_p |VEGFA_g];
  R172: STAT3_p => VEGFA_g; 1;
  // V(173) = K(173,1) * [VEGFA_rna];
  R173: VEGFA_rna => ; 1;
  // V(174) = K(174,1) * [NFE2L2_p] * [GPX4_g] -K(174,2) * [NFE2L2_p |GPX4_g];
  R174: GPX4_g => NFE2L2_p; 1;
  // V(175) = K(175,1) * [NFE2L2_p |GPX4_g];
  R175: GPX4_g => NFE2L2_p; 1;
  // V(176) = K(176,1) * [GPX4_rna];
  R176: GPX4_rna => ; 1;
  // V(177) = K(177,1) * [NFE2L2_p] * [SOD2_g] -K(177,2) * [NFE2L2_p |SOD2_g];
  R177: SOD2_g => NFE2L2_p; 1;
  // V(178) = K(178,1) * [NFE2L2_p |SOD2_g];
  R178: SOD2_g => NFE2L2_p; 1;
  // V(179) = K(179,1) * [SOD2_rna];
  R179: SOD2_rna => ; 1;
  // V(180) = K(180,1) * [STAT3_p] * [STAT1_g] -K(180,2) * [STAT3_p |STAT1_g];
  R180: STAT3_p => STAT1_g; 1;
  // V(181) = K(181,1) * [STAT3_p |STAT1_g];
  R181: STAT3_p => STAT1_g; 1;
  // V(182) = K(182,1) * [STAT1_rna];
  R182: STAT1_rna => ; 1;
  // V(183) = K(183,1) * [NR3C1] * [JUN_g] -K(183,2) * [NR3C1 |JUN_g];
  R183: JUN_g => NR3C1; 1;
  // V(184) = K(184,1) * [JUN_g];
  R184: JUN_g => ; 1;
  // V(185) = K(185,1) * [JUN_rna];
  R185: JUN_rna => ; 1;
  // V(186) = K(186,1) * [SOCS3];
  R186: SOCS3 => ; 1;
  // V(187) = K(187,1) * [ERN1];
  R187: ERN1 => ; 1;
  // V(188) = K(188,1) * [SOD1];
  R188: SOD1 => ; 1;
  // V(189) = K(189,1) * [NR3C1];
  R189: NR3C1 => ; 1;
  // V(190) = K(190,1) * [SOD2];
  R190: SOD2 => ; 1;
  // V(191) = K(191,1) * [HSPB1];
  R191: HSPB1 => ; 1;
  // V(192) = K(192,1) * [IGF1];
  R192: IGF1 => ; 1;
  // V(193) = K(193,1) * [JUN];
  R193: JUN => ; 1;
  // V(194) = K(194,1) * [INSR];
  R194: INSR => ; 1;
  // V(195) = K(195,1) * [VIM];
  R195: VIM => ; 1;
  // V(196) = K(196,1) * [UBC];
  R196: UBC => ; 1;
  // V(197) = K(197,1) * [CALM1];
  R197: CALM1 => ; 1;
  // V(198) = K(198,1) * [IRF1];
  R198: IRF1 => ; 1;
  // V(199) = K(199,1) * [NCF1];
  R199: NCF1 => ; 1;
  // V(200) = K(200,1) * [PKM];
  R200: PKM => ; 1;
  // V(201) = K(201,1) * [VEGFA];
  R201: VEGFA => ; 1;
  // V(202) = K(202,1) * [PTPN2];
  R202: PTPN2 => ; 1;
  // V(203) = K(203,1) * [XBP1];
  R203: XBP1 => ; 1;
  // V(204) = K(204,1) * [NR4A1];
  R204: NR4A1 => ; 1;
  // V(205) = K(205,1) * [JAK1];
  R205: JAK1 => ; 1;
  // V(206) = K(206,1) * [DUSP1];
  R206: DUSP1 => ; 1;
  // V(207) = K(207,1) * [PTPN6];
  R207: PTPN6 => ; 1;
  // V(208) = K(208,1) * [AKT1];
  R208: AKT1 => ; 1;
  // V(209) = K(209,1) * [CTNNB1];
  R209: CTNNB1 => ; 1;
  // V(210) = K(210,1) * [DDIT3];
  R210: DDIT3 => ; 1;
  // V(211) = K(211,1) * [GPX4];
  R211: GPX4 => ; 1;
  // V(212) = K(212,1) * [CDKN1A];
  R212: CDKN1A => ; 1;
  // V(213) = K(213,1) * [STAT3];
  R213: STAT3 => ; 1;
  // V(214) = K(214,1) * [STAT1];
  R214: STAT1 => ; 1;
  // V(215) = K(215,1) * [PIK3CA];
  R215: PIK3CA => ; 1;
  // V(216) = K(216,1) * [CASP3];
  R216: CASP3 => ; 1;
  // V(217) = K(217,1) * [CDKN1B];
  R217: CDKN1B => ; 1;
  // V(218) = K(218,1) * [NUMB];
  R218: NUMB => ; 1;
  // V(219) = K(219,1) * [IRAK1];
  R219: IRAK1 => ; 1;
  // V(220) = K(220,1) * [JAK3];
  R220: JAK3 => ; 1;
  // V(221) = K(221,1) * [PTEN];
  R221: PTEN => ; 1;
  // V(222) = K(222,1) * [RHOA];
  R222: RHOA => ; 1;
  // V(223) = K(223,1) * [RAC1];
  R223: RAC1 => ; 1;
  // V(224) = K(224,1) * [MDM2];
  R224: MDM2 => ; 1;
  // V(225) = K(225,1) * [RELA];
  R225: RELA => ; 1;
  // V(226) = K(226,1) * [BTK];
  R226: BTK => ; 1;
  // V(227) = K(227,1) * [PRDX1];
  R227: PRDX1 => ; 1;
  // V(228) = K(228,1) * [BAX];
  R228: BAX => ; 1;
  // V(229) = K(229,1) * [STK4];
  R229: STK4 => ; 1;
  // V(230) = K(230,1) * [PRKAA1];
  R230: PRKAA1 => ; 1;
  // V(231) = K(231,1) * [CUL3];
  R231: CUL3 => ; 1;
  // V(232) = K(232,1) * [IRF3];
  R232: IRF3 => ; 1;
  // V(233) = K(233,1) * [NFE2L2];
  R233: NFE2L2 => ; 1;
  // V(234) = K(234,1) * [SYVN1];
  R234: SYVN1 => ; 1;
  // V(235) = K(235,1) * [MFN1];
  R235: MFN1 => ; 1;
  // V(236) = K(236,1) * [BAD];
  R236: BAD => ; 1;
  // V(237) = K(237,1) * [PARK7];
  R237: PARK7 => ; 1;
  // V(238) = K(238,1) * [PINK1];
  R238: PINK1 => ; 1;
  // V(239) = K(239,1) * [MFF];
  R239: MFF => ; 1;
  // V(240) = K(240,1) * [HIPK2];
  R240: HIPK2 => ; 1;
  // V(241) = K(241,1) * [EIF2AK3];
  R241: EIF2AK3 => ; 1;
  // V(242) = K(242,1) * [RNF7];
  R242: RNF7 => ; 1;
  // V(243) = K(243,1) * [SOCS3_rna];
  R243: SOCS3_rna => ; 1;
  // V(244) = K(244,1) * [SOD1_rna];
  R244: SOD1_rna => ; 1;
  // V(245) = K(245,1) * [SOD2_rna];
  R245: SOD2_rna => ; 1;
  // V(246) = K(246,1) * [JUN_rna];
  R246: JUN_rna => ; 1;
  // V(247) = K(247,1) * [VEGFA_rna];
  R247: VEGFA_rna => ; 1;
  // V(248) = K(248,1) * [GPX4_rna];
  R248: GPX4_rna => ; 1;
  // V(249) = K(249,1) * [STAT1_rna];
  R249: STAT1_rna => ; 1;
  // V(250) = K(250,1) * [ERN1_g];
  R250: ERN1_g => ; 1;
  // V(251) = K(251,1) * [ERN1_rna];
  R251: ERN1_rna => ; 1;
  // V(252) = K(252,1) * [NR3C1_g];
  R252: NR3C1_g => ; 1;
  // V(253) = K(253,1) * [NR3C1_rna];
  R253: NR3C1_rna => ; 1;
  // V(254) = K(254,1) * [HSPB1_g];
  R254: HSPB1_g => ; 1;
  // V(255) = K(255,1) * [HSPB1_rna];
  R255: HSPB1_rna => ; 1;
  // V(256) = K(256,1) * [IGF1_g];
  R256: IGF1_g => ; 1;
  // V(257) = K(257,1) * [IGF1_rna];
  R257: IGF1_rna => ; 1;
  // V(258) = K(258,1) * [INSR_g];
  R258: INSR_g => ; 1;
  // V(259) = K(259,1) * [INSR_rna];
  R259: INSR_rna => ; 1;
  // V(260) = K(260,1) * [VIM_g];
  R260: VIM_g => ; 1;
  // V(261) = K(261,1) * [VIM_rna];
  R261: VIM_rna => ; 1;
  // V(262) = K(262,1) * [UBC_g];
  R262: UBC_g => ; 1;
  // V(263) = K(263,1) * [UBC_rna];
  R263: UBC_rna => ; 1;
  // V(264) = K(264,1) * [CALM1_g];
  R264: CALM1_g => ; 1;
  // V(265) = K(265,1) * [CALM1_rna];
  R265: CALM1_rna => ; 1;
  // V(266) = K(266,1) * [IRF1_g];
  R266: IRF1_g => ; 1;
  // V(267) = K(267,1) * [IRF1_rna];
  R267: IRF1_rna => ; 1;
  // V(268) = K(268,1) * [NCF1_g];
  R268: NCF1_g => ; 1;
  // V(269) = K(269,1) * [NCF1_rna];
  R269: NCF1_rna => ; 1;
  // V(270) = K(270,1) * [PKM_g];
  R270: PKM_g => ; 1;
  // V(271) = K(271,1) * [PKM_rna];
  R271: PKM_rna => ; 1;
  // V(272) = K(272,1) * [PTPN2_g];
  R272: PTPN2_g => ; 1;
  // V(273) = K(273,1) * [PTPN2_rna];
  R273: PTPN2_rna => ; 1;
  // V(274) = K(274,1) * [XBP1_g];
  R274: XBP1_g => ; 1;
  // V(275) = K(275,1) * [XBP1_rna];
  R275: XBP1_rna => ; 1;
  // V(276) = K(276,1) * [NR4A1_g];
  R276: NR4A1_g => ; 1;
  // V(277) = K(277,1) * [NR4A1_rna];
  R277: NR4A1_rna => ; 1;
  // V(278) = K(278,1) * [JAK1_g];
  R278: JAK1_g => ; 1;
  // V(279) = K(279,1) * [JAK1_rna];
  R279: JAK1_rna => ; 1;
  // V(280) = K(280,1) * [DUSP1_g];
  R280: DUSP1_g => ; 1;
  // V(281) = K(281,1) * [DUSP1_rna];
  R281: DUSP1_rna => ; 1;
  // V(282) = K(282,1) * [PTPN6_g];
  R282: PTPN6_g => ; 1;
  // V(283) = K(283,1) * [PTPN6_rna];
  R283: PTPN6_rna => ; 1;
  // V(284) = K(284,1) * [AKT1_g];
  R284: AKT1_g => ; 1;
  // V(285) = K(285,1) * [AKT1_rna];
  R285: AKT1_rna => ; 1;
  // V(286) = K(286,1) * [CTNNB1_g];
  R286: CTNNB1_g => ; 1;
  // V(287) = K(287,1) * [CTNNB1_rna];
  R287: CTNNB1_rna => ; 1;
  // V(288) = K(288,1) * [DDIT3_g];
  R288: DDIT3_g => ; 1;
  // V(289) = K(289,1) * [DDIT3_rna];
  R289: DDIT3_rna => ; 1;
  // V(290) = K(290,1) * [CDKN1A_g];
  R290: CDKN1A_g => ; 1;
  // V(291) = K(291,1) * [CDKN1A_rna];
  R291: CDKN1A_rna => ; 1;
  // V(292) = K(292,1) * [STAT3_g];
  R292: STAT3_g => ; 1;
  // V(293) = K(293,1) * [STAT3_rna];
  R293: STAT3_rna => ; 1;
  // V(294) = K(294,1) * [PIK3CA_g];
  R294: PIK3CA_g => ; 1;
  // V(295) = K(295,1) * [PIK3CA_rna];
  R295: PIK3CA_rna => ; 1;
  // V(296) = K(296,1) * [CASP3_g];
  R296: CASP3_g => ; 1;
  // V(297) = K(297,1) * [CASP3_rna];
  R297: CASP3_rna => ; 1;
  // V(298) = K(298,1) * [CDKN1B_g];
  R298: CDKN1B_g => ; 1;
  // V(299) = K(299,1) * [CDKN1B_rna];
  R299: CDKN1B_rna => ; 1;
  // V(300) = K(300,1) * [NUMB_g];
  R300: NUMB_g => ; 1;
  // V(301) = K(301,1) * [NUMB_rna];
  R301: NUMB_rna => ; 1;
  // V(302) = K(302,1) * [IRAK1_g];
  R302: IRAK1_g => ; 1;
  // V(303) = K(303,1) * [IRAK1_rna];
  R303: IRAK1_rna => ; 1;
  // V(304) = K(304,1) * [JAK3_g];
  R304: JAK3_g => ; 1;
  // V(305) = K(305,1) * [JAK3_rna];
  R305: JAK3_rna => ; 1;
  // V(306) = K(306,1) * [PTEN_g];
  R306: PTEN_g => ; 1;
  // V(307) = K(307,1) * [PTEN_rna];
  R307: PTEN_rna => ; 1;
  // V(308) = K(308,1) * [RHOA_g];
  R308: RHOA_g => ; 1;
  // V(309) = K(309,1) * [RHOA_rna];
  R309: RHOA_rna => ; 1;
  // V(310) = K(310,1) * [RAC1_g];
  R310: RAC1_g => ; 1;
  // V(311) = K(311,1) * [RAC1_rna];
  R311: RAC1_rna => ; 1;
  // V(312) = K(312,1) * [MDM2_g];
  R312: MDM2_g => ; 1;
  // V(313) = K(313,1) * [MDM2_rna];
  R313: MDM2_rna => ; 1;
  // V(314) = K(314,1) * [RELA_g];
  R314: RELA_g => ; 1;
  // V(315) = K(315,1) * [RELA_rna];
  R315: RELA_rna => ; 1;
  // V(316) = K(316,1) * [BTK_g];
  R316: BTK_g => ; 1;
  // V(317) = K(317,1) * [BTK_rna];
  R317: BTK_rna => ; 1;
  // V(318) = K(318,1) * [PRDX1_g];
  R318: PRDX1_g => ; 1;
  // V(319) = K(319,1) * [PRDX1_rna];
  R319: PRDX1_rna => ; 1;
  // V(320) = K(320,1) * [BAX_g];
  R320: BAX_g => ; 1;
  // V(321) = K(321,1) * [BAX_rna];
  R321: BAX_rna => ; 1;
  // V(322) = K(322,1) * [STK4_g];
  R322: STK4_g => ; 1;
  // V(323) = K(323,1) * [STK4_rna];
  R323: STK4_rna => ; 1;
  // V(324) = K(324,1) * [PRKAA1_g];
  R324: PRKAA1_g => ; 1;
  // V(325) = K(325,1) * [PRKAA1_rna];
  R325: PRKAA1_rna => ; 1;
  // V(326) = K(326,1) * [CUL3_g];
  R326: CUL3_g => ; 1;
  // V(327) = K(327,1) * [CUL3_rna];
  R327: CUL3_rna => ; 1;
  // V(328) = K(328,1) * [IRF3_g];
  R328: IRF3_g => ; 1;
  // V(329) = K(329,1) * [IRF3_rna];
  R329: IRF3_rna => ; 1;
  // V(330) = K(330,1) * [NFE2L2_g];
  R330: NFE2L2_g => ; 1;
  // V(331) = K(331,1) * [NFE2L2_rna];
  R331: NFE2L2_rna => ; 1;
  // V(332) = K(332,1) * [SYVN1_g];
  R332: SYVN1_g => ; 1;
  // V(333) = K(333,1) * [SYVN1_rna];
  R333: SYVN1_rna => ; 1;
  // V(334) = K(334,1) * [MFN1_g];
  R334: MFN1_g => ; 1;
  // V(335) = K(335,1) * [MFN1_rna];
  R335: MFN1_rna => ; 1;
  // V(336) = K(336,1) * [BAD_g];
  R336: BAD_g => ; 1;
  // V(337) = K(337,1) * [BAD_rna];
  R337: BAD_rna => ; 1;
  // V(338) = K(338,1) * [PARK7_g];
  R338: PARK7_g => ; 1;
  // V(339) = K(339,1) * [PARK7_rna];
  R339: PARK7_rna => ; 1;
  // V(340) = K(340,1) * [PINK1_g];
  R340: PINK1_g => ; 1;
  // V(341) = K(341,1) * [PINK1_rna];
  R341: PINK1_rna => ; 1;
  // V(342) = K(342,1) * [MFF_g];
  R342: MFF_g => ; 1;
  // V(343) = K(343,1) * [MFF_rna];
  R343: MFF_rna => ; 1;
  // V(344) = K(344,1) * [HIPK2_g];
  R344: HIPK2_g => ; 1;
  // V(345) = K(345,1) * [HIPK2_rna];
  R345: HIPK2_rna => ; 1;
  // V(346) = K(346,1) * [EIF2AK3_g];
  R346: EIF2AK3_g => ; 1;
  // V(347) = K(347,1) * [EIF2AK3_rna];
  R347: EIF2AK3_rna => ; 1;
  // V(348) = K(348,1) * [RNF7_g];
  R348: RNF7_g => ; 1;
  // V(349) = K(349,1) * [RNF7_rna];
  R349: RNF7_rna => ; 1;
  // V(350) = K(350,1) * [ERN1_p];
  R350: ERN1_p => ; 1;
  // V(351) = K(351,1) * [NR3C1_p];
  R351: NR3C1_p => ; 1;
  // V(352) = K(352,1) * [HSPB1_p];
  R352: HSPB1_p => ; 1;
  // V(353) = K(353,1) * [JUN_p];
  R353: JUN_p => ; 1;
  // V(354) = K(354,1) * [INSR_p];
  R354: INSR_p => ; 1;
  // V(355) = K(355,1) * [VIM_p];
  R355: VIM_p => ; 1;
  // V(356) = K(356,1) * [UBC_p];
  R356: UBC_p => ; 1;
  // V(357) = K(357,1) * [CALM1_p];
  R357: CALM1_p => ; 1;
  // V(358) = K(358,1) * [NCF1_p];
  R358: NCF1_p => ; 1;
  // V(359) = K(359,1) * [PKM_p];
  R359: PKM_p => ; 1;
  // V(360) = K(360,1) * [XBP1_p];
  R360: XBP1_p => ; 1;
  // V(361) = K(361,1) * [NR4A1_p];
  R361: NR4A1_p => ; 1;
  // V(362) = K(362,1) * [JAK1_p];
  R362: JAK1_p => ; 1;
  // V(363) = K(363,1) * [PTPN6_p];
  R363: PTPN6_p => ; 1;
  // V(364) = K(364,1) * [AKT1_p];
  R364: AKT1_p => ; 1;
  // V(365) = K(365,1) * [CTNNB1_p];
  R365: CTNNB1_p => ; 1;
  // V(366) = K(366,1) * [DDIT3_p];
  R366: DDIT3_p => ; 1;
  // V(367) = K(367,1) * [CDKN1A_p];
  R367: CDKN1A_p => ; 1;
  // V(368) = K(368,1) * [STAT3_p];
  R368: STAT3_p => ; 1;
  // V(369) = K(369,1) * [STAT1_p];
  R369: STAT1_p => ; 1;
  // V(370) = K(370,1) * [PIK3CA_p];
  R370: PIK3CA_p => ; 1;
  // V(371) = K(371,1) * [CDKN1B_p];
  R371: CDKN1B_p => ; 1;
  // V(372) = K(372,1) * [IRAK1_p];
  R372: IRAK1_p => ; 1;
  // V(373) = K(373,1) * [JAK3_p];
  R373: JAK3_p => ; 1;
  // V(374) = K(374,1) * [PTEN_p];
  R374: PTEN_p => ; 1;
  // V(375) = K(375,1) * [RAC1_p];
  R375: RAC1_p => ; 1;
  // V(376) = K(376,1) * [MDM2_p];
  R376: MDM2_p => ; 1;
  // V(377) = K(377,1) * [RELA_p];
  R377: RELA_p => ; 1;
  // V(378) = K(378,1) * [BTK_p];
  R378: BTK_p => ; 1;
  // V(379) = K(379,1) * [PRDX1_p];
  R379: PRDX1_p => ; 1;
  // V(380) = K(380,1) * [BAX_p];
  R380: BAX_p => ; 1;
  // V(381) = K(381,1) * [STK4_p];
  R381: STK4_p => ; 1;
  // V(382) = K(382,1) * [PRKAA1_p];
  R382: PRKAA1_p => ; 1;
  // V(383) = K(383,1) * [IRF3_p];
  R383: IRF3_p => ; 1;
  // V(384) = K(384,1) * [NFE2L2_p];
  R384: NFE2L2_p => ; 1;
  // V(385) = K(385,1) * [BAD_p];
  R385: BAD_p => ; 1;
  // V(386) = K(386,1) * [PARK7_p];
  R386: PARK7_p => ; 1;
  // V(387) = K(387,1) * [MFF_p];
  R387: MFF_p => ; 1;
  // V(388) = K(388,1) * [HIPK2_p];
  R388: HIPK2_p => ; 1;
  // V(389) = K(389,1) * [EIF2AK3_p];
  R389: EIF2AK3_p => ; 1;
  // V(390) = K(390,1) * [ERN1_rna];
  R390: ERN1_rna => ; 1;
  // V(391) = K(391,1) * [NR3C1_rna];
  R391: NR3C1_rna => ; 1;
  // V(392) = K(392,1) * [HSPB1_rna];
  R392: HSPB1_rna => ; 1;
  // V(393) = K(393,1) * [IGF1_rna];
  R393: IGF1_rna => ; 1;
  // V(394) = K(394,1) * [INSR_rna];
  R394: INSR_rna => ; 1;
  // V(395) = K(395,1) * [VIM_rna];
  R395: VIM_rna => ; 1;
  // V(396) = K(396,1) * [UBC_rna];
  R396: UBC_rna => ; 1;
  // V(397) = K(397,1) * [CALM1_rna];
  R397: CALM1_rna => ; 1;
  // V(398) = K(398,1) * [IRF1_rna];
  R398: IRF1_rna => ; 1;
  // V(399) = K(399,1) * [NCF1_rna];
  R399: NCF1_rna => ; 1;
  // V(400) = K(400,1) * [PKM_rna];
  R400: PKM_rna => ; 1;
  // V(401) = K(401,1) * [PTPN2_rna];
  R401: PTPN2_rna => ; 1;
  // V(402) = K(402,1) * [XBP1_rna];
  R402: XBP1_rna => ; 1;
  // V(403) = K(403,1) * [NR4A1_rna];
  R403: NR4A1_rna => ; 1;
  // V(404) = K(404,1) * [JAK1_rna];
  R404: JAK1_rna => ; 1;
  // V(405) = K(405,1) * [DUSP1_rna];
  R405: DUSP1_rna => ; 1;
  // V(406) = K(406,1) * [PTPN6_rna];
  R406: PTPN6_rna => ; 1;
  // V(407) = K(407,1) * [AKT1_rna];
  R407: AKT1_rna => ; 1;
  // V(408) = K(408,1) * [CTNNB1_rna];
  R408: CTNNB1_rna => ; 1;
  // V(409) = K(409,1) * [DDIT3_rna];
  R409: DDIT3_rna => ; 1;
  // V(410) = K(410,1) * [CDKN1A_rna];
  R410: CDKN1A_rna => ; 1;
  // V(411) = K(411,1) * [STAT3_rna];
  R411: STAT3_rna => ; 1;
  // V(412) = K(412,1) * [PIK3CA_rna];
  R412: PIK3CA_rna => ; 1;
  // V(413) = K(413,1) * [CASP3_rna];
  R413: CASP3_rna => ; 1;
  // V(414) = K(414,1) * [CDKN1B_rna];
  R414: CDKN1B_rna => ; 1;
  // V(415) = K(415,1) * [NUMB_rna];
  R415: NUMB_rna => ; 1;
  // V(416) = K(416,1) * [IRAK1_rna];
  R416: IRAK1_rna => ; 1;
  // V(417) = K(417,1) * [JAK3_rna];
  R417: JAK3_rna => ; 1;
  // V(418) = K(418,1) * [PTEN_rna];
  R418: PTEN_rna => ; 1;
  // V(419) = K(419,1) * [RHOA_rna];
  R419: RHOA_rna => ; 1;
  // V(420) = K(420,1) * [RAC1_rna];
  R420: RAC1_rna => ; 1;
  // V(421) = K(421,1) * [MDM2_rna];
  R421: MDM2_rna => ; 1;
  // V(422) = K(422,1) * [RELA_rna];
  R422: RELA_rna => ; 1;
  // V(423) = K(423,1) * [BTK_rna];
  R423: BTK_rna => ; 1;
  // V(424) = K(424,1) * [PRDX1_rna];
  R424: PRDX1_rna => ; 1;
  // V(425) = K(425,1) * [BAX_rna];
  R425: BAX_rna => ; 1;
  // V(426) = K(426,1) * [STK4_rna];
  R426: STK4_rna => ; 1;
  // V(427) = K(427,1) * [PRKAA1_rna];
  R427: PRKAA1_rna => ; 1;
  // V(428) = K(428,1) * [CUL3_rna];
  R428: CUL3_rna => ; 1;
  // V(429) = K(429,1) * [IRF3_rna];
  R429: IRF3_rna => ; 1;
  // V(430) = K(430,1) * [NFE2L2_rna];
  R430: NFE2L2_rna => ; 1;
  // V(431) = K(431,1) * [SYVN1_rna];
  R431: SYVN1_rna => ; 1;
  // V(432) = K(432,1) * [MFN1_rna];
  R432: MFN1_rna => ; 1;
  // V(433) = K(433,1) * [BAD_rna];
  R433: BAD_rna => ; 1;
  // V(434) = K(434,1) * [PARK7_rna];
  R434: PARK7_rna => ; 1;
  // V(435) = K(435,1) * [PINK1_rna];
  R435: PINK1_rna => ; 1;
  // V(436) = K(436,1) * [MFF_rna];
  R436: MFF_rna => ; 1;
  // V(437) = K(437,1) * [HIPK2_rna];
  R437: HIPK2_rna => ; 1;
  // V(438) = K(438,1) * [EIF2AK3_rna];
  R438: EIF2AK3_rna => ; 1;
  // V(439) = K(439,1) * [RNF7_rna];
  R439: RNF7_rna => ; 1;
end
