// SBML level 3 version 2

model TAL()

  // Compartments:
  compartment cell = 1;

  // Species:
  species AKT1 in cell = 1/cell;
  species AKT1S1 in cell = 1/cell;
  species AKT1S1_g in cell = 1/cell;
  species AKT1S1_p in cell = 1/cell;
  species AKT1S1_rna in cell = 1/cell;
  species AKT1_g in cell = 1/cell;
  species AKT1_p in cell = 1/cell;
  species AKT1_rna in cell = 1/cell;
  species ANGPT2 in cell = 1/cell;
  species ANGPT2_g in cell = 1/cell;
  species ANGPT2_rna in cell = 1/cell;
  species ATF3 in cell = 1/cell;
  species ATF3_g in cell = 1/cell;
  species ATF3_rna in cell = 1/cell;
  species ATR in cell = 1/cell;
  species ATR_g in cell = 1/cell;
  species ATR_rna in cell = 1/cell;
  species AXL in cell = 1/cell;
  species AXL_g in cell = 1/cell;
  species AXL_p in cell = 1/cell;
  species AXL_rna in cell = 1/cell;
  species BAX in cell = 1/cell;
  species BAX_g in cell = 1/cell;
  species BAX_p in cell = 1/cell;
  species BAX_rna in cell = 1/cell;
  species CALM1 in cell = 1/cell;
  species CALM1_g in cell = 1/cell;
  species CALM1_p in cell = 1/cell;
  species CALM1_rna in cell = 1/cell;
  species CCL2 in cell = 1/cell;
  species CCL2_g in cell = 1/cell;
  species CCL2_rna in cell = 1/cell;
  species CCND1 in cell = 1/cell;
  species CCND1_g in cell = 1/cell;
  species CCND1_rna in cell = 1/cell;
  species CDK5 in cell = 1/cell;
  species CDK5_g in cell = 1/cell;
  species CDK5_p in cell = 1/cell;
  species CDK5_rna in cell = 1/cell;
  species CDKN1A in cell = 1/cell;
  species CDKN1A_g in cell = 1/cell;
  species CDKN1A_p in cell = 1/cell;
  species CDKN1A_rna in cell = 1/cell;
  species CDKN1B in cell = 1/cell;
  species CDKN1B_g in cell = 1/cell;
  species CDKN1B_p in cell = 1/cell;
  species CDKN1B_rna in cell = 1/cell;
  species CDKN2A in cell = 1/cell;
  species CDKN2A_g in cell = 1/cell;
  species CDKN2A_p in cell = 1/cell;
  species CDKN2A_rna in cell = 1/cell;
  species COL1A1 in cell = 1/cell;
  species COL1A1_g in cell = 1/cell;
  species COL1A1_rna in cell = 1/cell;
  species CREB1 in cell = 1/cell;
  species CREB1_g in cell = 1/cell;
  species CREB1_p in cell = 1/cell;
  species CREB1_rna in cell = 1/cell;
  species CTNNB1 in cell = 1/cell;
  species CTNNB1_g in cell = 1/cell;
  species CTNNB1_p in cell = 1/cell;
  species CTNNB1_rna in cell = 1/cell;
  species DUSP1 in cell = 1/cell;
  species DUSP1_g in cell = 1/cell;
  species DUSP1_rna in cell = 1/cell;
  species ERN1 in cell = 1/cell;
  species ERN1_g in cell = 1/cell;
  species ERN1_p in cell = 1/cell;
  species ERN1_rna in cell = 1/cell;
  species EZH2 in cell = 1/cell;
  species EZH2_g in cell = 1/cell;
  species EZH2_p in cell = 1/cell;
  species EZH2_rna in cell = 1/cell;
  species FAS in cell = 1/cell;
  species FAS_g in cell = 1/cell;
  species FAS_rna in cell = 1/cell;
  species FOXO1 in cell = 1/cell;
  species FOXO1_g in cell = 1/cell;
  species FOXO1_p in cell = 1/cell;
  species FOXO1_rna in cell = 1/cell;
  species FYN in cell = 1/cell;
  species FYN_g in cell = 1/cell;
  species FYN_p in cell = 1/cell;
  species FYN_rna in cell = 1/cell;
  species GDF15 in cell = 1/cell;
  species GDF15_g in cell = 1/cell;
  species GDF15_rna in cell = 1/cell;
  species GHR in cell = 1/cell;
  species GHR_g in cell = 1/cell;
  species GHR_p in cell = 1/cell;
  species GHR_rna in cell = 1/cell;
  species GJA1 in cell = 1/cell;
  species GJA1_g in cell = 1/cell;
  species GJA1_p in cell = 1/cell;
  species GJA1_rna in cell = 1/cell;
  species GLO1 in cell = 1/cell;
  species GLO1_g in cell = 1/cell;
  species GLO1_p in cell = 1/cell;
  species GLO1_rna in cell = 1/cell;
  species HES1 in cell = 1/cell;
  species HES1_g in cell = 1/cell;
  species HES1_rna in cell = 1/cell;
  species HIF1A in cell = 1/cell;
  species HIF1A_g in cell = 1/cell;
  species HIF1A_p in cell = 1/cell;
  species HIF1A_rna in cell = 1/cell;
  species HIPK2 in cell = 1/cell;
  species HIPK2_g in cell = 1/cell;
  species HIPK2_p in cell = 1/cell;
  species HIPK2_rna in cell = 1/cell;
  species HSPB1 in cell = 1/cell;
  species HSPB1_g in cell = 1/cell;
  species HSPB1_p in cell = 1/cell;
  species HSPB1_rna in cell = 1/cell;
  species IGF1R in cell = 1/cell;
  species IGF1R_g in cell = 1/cell;
  species IGF1R_p in cell = 1/cell;
  species IGF1R_rna in cell = 1/cell;
  species IKBKB in cell = 1/cell;
  species IKBKB_g in cell = 1/cell;
  species IKBKB_p in cell = 1/cell;
  species IKBKB_rna in cell = 1/cell;
  species INSR in cell = 1/cell;
  species INSR_g in cell = 1/cell;
  species INSR_p in cell = 1/cell;
  species INSR_rna in cell = 1/cell;
  species IRS2 in cell = 1/cell;
  species IRS2_g in cell = 1/cell;
  species IRS2_p in cell = 1/cell;
  species IRS2_rna in cell = 1/cell;
  species JAK1 in cell = 1/cell;
  species JAK1_g in cell = 1/cell;
  species JAK1_p in cell = 1/cell;
  species JAK1_rna in cell = 1/cell;
  species JAK2 in cell = 1/cell;
  species JAK2_g in cell = 1/cell;
  species JAK2_p in cell = 1/cell;
  species JAK2_rna in cell = 1/cell;
  species JUN in cell = 1/cell;
  species JUNB in cell = 1/cell;
  species JUNB_g in cell = 1/cell;
  species JUNB_p in cell = 1/cell;
  species JUNB_rna in cell = 1/cell;
  species JUN_g in cell = 1/cell;
  species JUN_p in cell = 1/cell;
  species JUN_rna in cell = 1/cell;
  species KDM6B in cell = 1/cell;
  species KDM6B_g in cell = 1/cell;
  species KDM6B_rna in cell = 1/cell;
  species LEPR in cell = 1/cell;
  species LEPR_g in cell = 1/cell;
  species LEPR_p in cell = 1/cell;
  species LEPR_rna in cell = 1/cell;
  species LYN in cell = 1/cell;
  species LYN_g in cell = 1/cell;
  species LYN_p in cell = 1/cell;
  species LYN_rna in cell = 1/cell;
  species MAPK8 in cell = 1/cell;
  species MAPK8_g in cell = 1/cell;
  species MAPK8_p in cell = 1/cell;
  species MAPK8_rna in cell = 1/cell;
  species MAPKAP1 in cell = 1/cell;
  species MAPKAP1_g in cell = 1/cell;
  species MAPKAP1_p in cell = 1/cell;
  species MAPKAP1_rna in cell = 1/cell;
  species MECP2 in cell = 1/cell;
  species MECP2_g in cell = 1/cell;
  species MECP2_p in cell = 1/cell;
  species MECP2_rna in cell = 1/cell;
  species MFN1 in cell = 1/cell;
  species MFN1_g in cell = 1/cell;
  species MFN1_rna in cell = 1/cell;
  species MFN2 in cell = 1/cell;
  species MFN2_g in cell = 1/cell;
  species MFN2_p in cell = 1/cell;
  species MFN2_rna in cell = 1/cell;
  species NOTCH1 in cell = 1/cell;
  species NOTCH1_g in cell = 1/cell;
  species NOTCH1_p in cell = 1/cell;
  species NOTCH1_rna in cell = 1/cell;
  species NR4A1 in cell = 1/cell;
  species NR4A1_g in cell = 1/cell;
  species NR4A1_p in cell = 1/cell;
  species NR4A1_rna in cell = 1/cell;
  species NUMB in cell = 1/cell;
  species NUMB_g in cell = 1/cell;
  species NUMB_rna in cell = 1/cell;
  species PARK7 in cell = 1/cell;
  species PARK7_g in cell = 1/cell;
  species PARK7_p in cell = 1/cell;
  species PARK7_rna in cell = 1/cell;
  species PARP1 in cell = 1/cell;
  species PARP1_g in cell = 1/cell;
  species PARP1_p in cell = 1/cell;
  species PARP1_rna in cell = 1/cell;
  species PCK1 in cell = 1/cell;
  species PCK1_g in cell = 1/cell;
  species PCK1_rna in cell = 1/cell;
  species PDPK1 in cell = 1/cell;
  species PDPK1_g in cell = 1/cell;
  species PDPK1_p in cell = 1/cell;
  species PDPK1_rna in cell = 1/cell;
  species PIK3C3 in cell = 1/cell;
  species PIK3C3_g in cell = 1/cell;
  species PIK3C3_p in cell = 1/cell;
  species PIK3C3_rna in cell = 1/cell;
  species PIK3R1 in cell = 1/cell;
  species PIK3R1_g in cell = 1/cell;
  species PIK3R1_p in cell = 1/cell;
  species PIK3R1_rna in cell = 1/cell;
  species PINK1 in cell = 1/cell;
  species PINK1_g in cell = 1/cell;
  species PINK1_rna in cell = 1/cell;
  species PKN1 in cell = 1/cell;
  species PKN1_g in cell = 1/cell;
  species PKN1_p in cell = 1/cell;
  species PKN1_rna in cell = 1/cell;
  species PLK2 in cell = 1/cell;
  species PLK2_g in cell = 1/cell;
  species PLK2_rna in cell = 1/cell;
  species PTEN in cell = 1/cell;
  species PTEN_g in cell = 1/cell;
  species PTEN_p in cell = 1/cell;
  species PTEN_rna in cell = 1/cell;
  species PTPN2 in cell = 1/cell;
  species PTPN2_g in cell = 1/cell;
  species PTPN2_rna in cell = 1/cell;
  species PTPN6 in cell = 1/cell;
  species PTPN6_g in cell = 1/cell;
  species PTPN6_p in cell = 1/cell;
  species PTPN6_rna in cell = 1/cell;
  species PTPRJ in cell = 1/cell;
  species PTPRJ_g in cell = 1/cell;
  species PTPRJ_p in cell = 1/cell;
  species PTPRJ_rna in cell = 1/cell;
  species RCAN1 in cell = 1/cell;
  species RCAN1_g in cell = 1/cell;
  species RCAN1_rna in cell = 1/cell;
  species SGK1 in cell = 1/cell;
  species SGK1_g in cell = 1/cell;
  species SGK1_p in cell = 1/cell;
  species SGK1_rna in cell = 1/cell;
  species SIRT2 in cell = 1/cell;
  species SIRT2_g in cell = 1/cell;
  species SIRT2_p in cell = 1/cell;
  species SIRT2_rna in cell = 1/cell;
  species SLC2A1 in cell = 1/cell;
  species SLC2A1_g in cell = 1/cell;
  species SLC2A1_rna in cell = 1/cell;
  species SMAD2 in cell = 1/cell;
  species SMAD2_g in cell = 1/cell;
  species SMAD2_p in cell = 1/cell;
  species SMAD2_rna in cell = 1/cell;
  species SOCS2 in cell = 1/cell;
  species SOCS2_g in cell = 1/cell;
  species SOCS2_rna in cell = 1/cell;
  species SP1 in cell = 1/cell;
  species SP1_g in cell = 1/cell;
  species SP1_p in cell = 1/cell;
  species SP1_rna in cell = 1/cell;
  species STAT1 in cell = 1/cell;
  species STAT1_g in cell = 1/cell;
  species STAT1_p in cell = 1/cell;
  species STAT1_rna in cell = 1/cell;
  species STAT3 in cell = 1/cell;
  species STAT3_g in cell = 1/cell;
  species STAT3_p in cell = 1/cell;
  species STAT3_rna in cell = 1/cell;
  species STAT5A in cell = 1/cell;
  species STAT5A_g in cell = 1/cell;
  species STAT5A_p in cell = 1/cell;
  species STAT5A_rna in cell = 1/cell;
  species STAT6 in cell = 1/cell;
  species STAT6_g in cell = 1/cell;
  species STAT6_p in cell = 1/cell;
  species STAT6_rna in cell = 1/cell;
  species TGFB1 in cell = 1/cell;
  species TGFB1_g in cell = 1/cell;
  species TGFB1_rna in cell = 1/cell;
  species TGFB2 in cell = 1/cell;
  species TGFB2_g in cell = 1/cell;
  species TGFB2_rna in cell = 1/cell;
  species TGFBR1 in cell = 1/cell;
  species TGFBR1_g in cell = 1/cell;
  species TGFBR1_rna in cell = 1/cell;
  species TLR3 in cell = 1/cell;
  species TLR3_g in cell = 1/cell;
  species TLR3_rna in cell = 1/cell;
  species TLR4 in cell = 1/cell;
  species TLR4_g in cell = 1/cell;
  species TLR4_rna in cell = 1/cell;
  species TNC in cell = 1/cell;
  species TNC_g in cell = 1/cell;
  species TNC_rna in cell = 1/cell;
  species TP53 in cell = 1/cell;
  species TP53_g in cell = 1/cell;
  species TP53_p in cell = 1/cell;
  species TP53_rna in cell = 1/cell;
  species UBC in cell = 1/cell;
  species UBC_g in cell = 1/cell;
  species UBC_p in cell = 1/cell;
  species UBC_rna in cell = 1/cell;
  species VCAN in cell = 1/cell;
  species VCAN_g in cell = 1/cell;
  species VCAN_rna in cell = 1/cell;
  species VIM in cell = 1/cell;
  species VIM_g in cell = 1/cell;
  species VIM_p in cell = 1/cell;
  species VIM_rna in cell = 1/cell;
  species WNT7A in cell = 1/cell;
  species WNT7A_g in cell = 1/cell;
  species WNT7A_rna in cell = 1/cell;

  // Reactions:
  // V(1) = K(1,1) * [STAT3_p] * [SP1_p] -K(1,2) * [SIGNOR-C74];
  R1: STAT3_p => SP1_p; 1;
  // V(2) = K(2,1) * [STAT1_p] * [STAT3_p] -K(2,2) * [SIGNOR-C118];
  R2: STAT3_p => STAT1_p; 1;
  // V(3) = K(3,1) * [SIGNOR-C118_p] * [JAK1_p] -K(3,2) * [SIGNOR-C120];
  R3: JAK1_p => ; 1;
  // V(4) = K(4,1) * [TGFBR1] * [SMAD2] -K(4,2) * [TGFBR1 |SMAD2];
  R4: TGFBR1 => SMAD2; 1;
  // V(5) = K(5,1) * [TGFBR1 |SMAD2];
  R5: TGFBR1 => SMAD2; 1;
  // V(6) = K(6,1) * [AKT1_p] * [FOXO1] -K(6,2) * [AKT1_p |FOXO1];
  R6: FOXO1 => AKT1_p; 1;
  // V(7) = K(7,1) * [AKT1_p |FOXO1];
  R7: FOXO1 => AKT1_p; 1;
  // V(8) = K(8,1) * [JAK2_p] * [STAT5A] -K(8,2) * [JAK2_p |STAT5A];
  R8: JAK2_p => STAT5A; 1;
  // V(9) = K(9,1) * [JAK2_p |STAT5A];
  R9: JAK2_p => STAT5A; 1;
  // V(10) = K(10,1) * [IKBKB_p] * [IKBKB] -K(10,2) * [IKBKB_p |IKBKB];
  R10: IKBKB => IKBKB_p; 1;
  // V(11) = K(11,1) * [IKBKB_p |IKBKB];
  R11: IKBKB => IKBKB_p; 1;
  // V(12) = K(12,1) * [JAK2_p] * [JAK2] -K(12,2) * [JAK2_p |JAK2];
  R12: JAK2_p => JAK2; 1;
  // V(13) = K(13,1) * [JAK2_p |JAK2];
  R13: JAK2_p => JAK2; 1;
  // V(14) = K(14,1) * [AKT1_p] * [EZH2] -K(14,2) * [AKT1_p |EZH2];
  R14: AKT1_p => EZH2; 1;
  // V(15) = K(15,1) * [AKT1_p |EZH2];
  R15: AKT1_p => EZH2; 1;
  // V(16) = K(16,1) * [PDPK1_p] * [IKBKB] -K(16,2) * [PDPK1_p |IKBKB];
  R16: PDPK1_p => IKBKB; 1;
  // V(17) = K(17,1) * [PDPK1_p |IKBKB];
  R17: PDPK1_p => IKBKB; 1;
  // V(18) = K(18,1) * [AKT1_p] * [NR4A1] -K(18,2) * [AKT1_p |NR4A1];
  R18: NR4A1 => AKT1_p; 1;
  // V(19) = K(19,1) * [AKT1_p |NR4A1];
  R19: NR4A1 => AKT1_p; 1;
  // V(20) = K(20,1) * [FYN_p] * [PTPN6] -K(20,2) * [FYN_p |PTPN6];
  R20: FYN_p => PTPN6; 1;
  // V(21) = K(21,1) * [FYN_p |PTPN6];
  R21: FYN_p => PTPN6; 1;
  // V(22) = K(22,1) * [INSR_p] * [INSR] -K(22,2) * [INSR_p |INSR];
  R22: INSR_p => INSR; 1;
  // V(23) = K(23,1) * [INSR_p |INSR];
  R23: INSR_p => INSR; 1;
  // V(24) = K(24,1) * [JAK1_p] * [STAT1] -K(24,2) * [JAK1_p |STAT1];
  R24: STAT1 => JAK1_p; 1;
  // V(25) = K(25,1) * [JAK1_p |STAT1];
  R25: STAT1 => JAK1_p; 1;
  // V(26) = K(26,1) * [AKT1_p] * [HSPB1] -K(26,2) * [AKT1_p |HSPB1];
  R26: HSPB1 => AKT1_p; 1;
  // V(27) = K(27,1) * [AKT1_p |HSPB1];
  R27: HSPB1 => AKT1_p; 1;
  // V(28) = K(28,1) * [PKN1_p] * [PKN1] -K(28,2) * [PKN1_p |PKN1];
  R28: PKN1 => PKN1_p; 1;
  // V(29) = K(29,1) * [PKN1_p |PKN1];
  R29: PKN1 => PKN1_p; 1;
  // V(30) = K(30,1) * [AKT1_p] * [CDKN1A] -K(30,2) * [AKT1_p |CDKN1A];
  R30: AKT1_p => CDKN1A; 1;
  // V(31) = K(31,1) * [AKT1_p |CDKN1A];
  R31: AKT1_p => CDKN1A; 1;
  // V(32) = K(32,1) * [IKBKB_p] * [CDKN2A] -K(32,2) * [IKBKB_p |CDKN2A];
  R32: CDKN2A => IKBKB_p; 1;
  // V(33) = K(33,1) * [IKBKB_p |CDKN2A];
  R33: CDKN2A => IKBKB_p; 1;
  // V(34) = K(34,1) * [MAPK8_p] * [TP53] -K(34,2) * [MAPK8_p |TP53];
  R34: TP53 => MAPK8_p; 1;
  // V(35) = K(35,1) * [MAPK8_p |TP53];
  R35: TP53 => MAPK8_p; 1;
  // V(36) = K(36,1) * [MAPK8_p] * [MFN2] -K(36,2) * [MAPK8_p |MFN2];
  R36: MAPK8_p => MFN2; 1;
  // V(37) = K(37,1) * [MAPK8_p |MFN2];
  R37: MAPK8_p => MFN2; 1;
  // V(38) = K(38,1) * [ATR] * [PARP1] -K(38,2) * [ATR |PARP1];
  R38: PARP1 => ATR; 1;
  // V(39) = K(39,1) * [ATR |PARP1];
  R39: PARP1 => ATR; 1;
  // V(40) = K(40,1) * [MAPK8_p] * [FOXO1] -K(40,2) * [MAPK8_p |FOXO1];
  R40: MAPK8_p => FOXO1; 1;
  // V(41) = K(41,1) * [MAPK8_p |FOXO1];
  R41: MAPK8_p => FOXO1; 1;
  // V(42) = K(42,1) * [JAK2_p] * [STAT1] -K(42,2) * [JAK2_p |STAT1];
  R42: JAK2_p => STAT1; 1;
  // V(43) = K(43,1) * [JAK2_p |STAT1];
  R43: JAK2_p => STAT1; 1;
  // V(44) = K(44,1) * [PDPK1_p] * [SGK1] -K(44,2) * [PDPK1_p |SGK1];
  R44: PDPK1_p => SGK1; 1;
  // V(45) = K(45,1) * [PDPK1_p |SGK1];
  R45: PDPK1_p => SGK1; 1;
  // V(46) = K(46,1) * [INSR_p] * [CALM1] -K(46,2) * [INSR_p |CALM1];
  R46: INSR_p => CALM1; 1;
  // V(47) = K(47,1) * [INSR_p |CALM1];
  R47: INSR_p => CALM1; 1;
  // V(48) = K(48,1) * [ERN1_p] * [ERN1] -K(48,2) * [ERN1_p |ERN1];
  R48: ERN1_p => ERN1; 1;
  // V(49) = K(49,1) * [ERN1_p |ERN1];
  R49: ERN1_p => ERN1; 1;
  // V(50) = K(50,1) * [MAPK8_p] * [AKT1] -K(50,2) * [MAPK8_p |AKT1];
  R50: MAPK8_p => AKT1; 1;
  // V(51) = K(51,1) * [MAPK8_p |AKT1];
  R51: MAPK8_p => AKT1; 1;
  // V(52) = K(52,1) * [AKT1_p] * [CDKN1B] -K(52,2) * [AKT1_p |CDKN1B];
  R52: CDKN1B => AKT1_p; 1;
  // V(53) = K(53,1) * [AKT1_p |CDKN1B];
  R53: CDKN1B => AKT1_p; 1;
  // V(54) = K(54,1) * [MAPK8_p] * [CTNNB1] -K(54,2) * [MAPK8_p |CTNNB1];
  R54: MAPK8_p => CTNNB1; 1;
  // V(55) = K(55,1) * [MAPK8_p |CTNNB1];
  R55: MAPK8_p => CTNNB1; 1;
  // V(56) = K(56,1) * [PINK1] * [UBC] -K(56,2) * [PINK1 |UBC];
  R56: PINK1 => UBC; 1;
  // V(57) = K(57,1) * [PINK1 |UBC];
  R57: PINK1 => UBC; 1;
  // V(58) = K(58,1) * [PDPK1_p] * [AKT1] -K(58,2) * [PDPK1_p |AKT1];
  R58: PDPK1_p => AKT1; 1;
  // V(59) = K(59,1) * [PDPK1_p |AKT1];
  R59: PDPK1_p => AKT1; 1;
  // V(60) = K(60,1) * [IGF1R_p] * [IGF1R] -K(60,2) * [IGF1R_p |IGF1R];
  R60: IGF1R_p => IGF1R; 1;
  // V(61) = K(61,1) * [IGF1R_p |IGF1R];
  R61: IGF1R_p => IGF1R; 1;
  // V(62) = K(62,1) * [SGK1_p] * [FOXO1] -K(62,2) * [SGK1_p |FOXO1];
  R62: SGK1_p => FOXO1; 1;
  // V(63) = K(63,1) * [SGK1_p |FOXO1];
  R63: SGK1_p => FOXO1; 1;
  // V(64) = K(64,1) * [HIPK2_p] * [HIPK2] -K(64,2) * [HIPK2_p |HIPK2];
  R64: HIPK2_p => HIPK2; 1;
  // V(65) = K(65,1) * [HIPK2_p |HIPK2];
  R65: HIPK2_p => HIPK2; 1;
  // V(66) = K(66,1) * [PDPK1_p] * [PDPK1] -K(66,2) * [PDPK1_p |PDPK1];
  R66: PDPK1_p => PDPK1; 1;
  // V(67) = K(67,1) * [PDPK1_p |PDPK1];
  R67: PDPK1_p => PDPK1; 1;
  // V(68) = K(68,1) * [SGK1_p] * [CDKN1B] -K(68,2) * [SGK1_p |CDKN1B];
  R68: CDKN1B => SGK1_p; 1;
  // V(69) = K(69,1) * [SGK1_p |CDKN1B];
  R69: CDKN1B => SGK1_p; 1;
  // V(70) = K(70,1) * [IKBKB_p] * [FOXO1] -K(70,2) * [IKBKB_p |FOXO1];
  R70: FOXO1 => IKBKB_p; 1;
  // V(71) = K(71,1) * [IKBKB_p |FOXO1];
  R71: FOXO1 => IKBKB_p; 1;
  // V(72) = K(72,1) * [FYN_p] * [FYN] -K(72,2) * [FYN_p |FYN];
  R72: FYN_p => FYN; 1;
  // V(73) = K(73,1) * [FYN_p |FYN];
  R73: FYN_p => FYN; 1;
  // V(74) = K(74,1) * [MAPK8_p] * [STAT6] -K(74,2) * [MAPK8_p |STAT6];
  R74: STAT6 => MAPK8_p; 1;
  // V(75) = K(75,1) * [MAPK8_p |STAT6];
  R75: STAT6 => MAPK8_p; 1;
  // V(76) = K(76,1) * [AKT1_p] * [VIM] -K(76,2) * [AKT1_p |VIM];
  R76: VIM => AKT1_p; 1;
  // V(77) = K(77,1) * [AKT1_p |VIM];
  R77: VIM => AKT1_p; 1;
  // V(78) = K(78,1) * [AXL_p] * [AXL] -K(78,2) * [AXL_p |AXL];
  R78: AXL => AXL_p; 1;
  // V(79) = K(79,1) * [AXL_p |AXL];
  R79: AXL => AXL_p; 1;
  // V(80) = K(80,1) * [CDK5_p] * [TP53] -K(80,2) * [CDK5_p |TP53];
  R80: TP53 => CDK5_p; 1;
  // V(81) = K(81,1) * [CDK5_p |TP53];
  R81: TP53 => CDK5_p; 1;
  // V(82) = K(82,1) * [MAPK8_p] * [CDKN1A] -K(82,2) * [MAPK8_p |CDKN1A];
  R82: MAPK8_p => CDKN1A; 1;
  // V(83) = K(83,1) * [MAPK8_p |CDKN1A];
  R83: MAPK8_p => CDKN1A; 1;
  // V(84) = K(84,1) * [AKT1_p] * [AKT1S1] -K(84,2) * [AKT1_p |AKT1S1];
  R84: AKT1S1 => AKT1_p; 1;
  // V(85) = K(85,1) * [AKT1_p |AKT1S1];
  R85: AKT1S1 => AKT1_p; 1;
  // V(86) = K(86,1) * [MAPK8_p] * [JUN] -K(86,2) * [MAPK8_p |JUN];
  R86: MAPK8_p => JUN; 1;
  // V(87) = K(87,1) * [MAPK8_p |JUN];
  R87: MAPK8_p => JUN; 1;
  // V(88) = K(88,1) * [JAK1_p] * [STAT3] -K(88,2) * [JAK1_p |STAT3];
  R88: STAT3 => JAK1_p; 1;
  // V(89) = K(89,1) * [JAK1_p |STAT3];
  R89: STAT3 => JAK1_p; 1;
  // V(90) = K(90,1) * [IGF1R_p] * [PDPK1] -K(90,2) * [IGF1R_p |PDPK1];
  R90: IGF1R_p => PDPK1; 1;
  // V(91) = K(91,1) * [IGF1R_p |PDPK1];
  R91: IGF1R_p => PDPK1; 1;
  // V(92) = K(92,1) * [JAK2_p] * [STAT6] -K(92,2) * [JAK2_p |STAT6];
  R92: STAT6 => JAK2_p; 1;
  // V(93) = K(93,1) * [JAK2_p |STAT6];
  R93: STAT6 => JAK2_p; 1;
  // V(94) = K(94,1) * [PKN1_p] * [FOXO1] -K(94,2) * [PKN1_p |FOXO1];
  R94: FOXO1 => PKN1_p; 1;
  // V(95) = K(95,1) * [PKN1_p |FOXO1];
  R95: FOXO1 => PKN1_p; 1;
  // V(96) = K(96,1) * [MAPK8_p] * [SP1] -K(96,2) * [MAPK8_p |SP1];
  R96: MAPK8_p => SP1; 1;
  // V(97) = K(97,1) * [MAPK8_p |SP1];
  R97: MAPK8_p => SP1; 1;
  // V(98) = K(98,1) * [PLK2] * [TP53] -K(98,2) * [PLK2 |TP53];
  R98: TP53 => PLK2; 1;
  // V(99) = K(99,1) * [PLK2 |TP53];
  R99: TP53 => PLK2; 1;
  // V(100) = K(100,1) * [JAK1_p] * [STAT6] -K(100,2) * [JAK1_p |STAT6];
  R100: STAT6 => JAK1_p; 1;
  // V(101) = K(101,1) * [JAK1_p |STAT6];
  R101: STAT6 => JAK1_p; 1;
  // V(102) = K(102,1) * [IGF1R_p] * [IRS2] -K(102,2) * [IGF1R_p |IRS2];
  R102: IGF1R_p => IRS2; 1;
  // V(103) = K(103,1) * [IGF1R_p |IRS2];
  R103: IGF1R_p => IRS2; 1;
  // V(104) = K(104,1) * [JAK2_p] * [CDKN1B] -K(104,2) * [JAK2_p |CDKN1B];
  R104: JAK2_p => CDKN1B; 1;
  // V(105) = K(105,1) * [JAK2_p |CDKN1B];
  R105: JAK2_p => CDKN1B; 1;
  // V(106) = K(106,1) * [HIPK2_p] * [MECP2] -K(106,2) * [HIPK2_p |MECP2];
  R106: MECP2 => HIPK2_p; 1;
  // V(107) = K(107,1) * [HIPK2_p |MECP2];
  R107: MECP2 => HIPK2_p; 1;
  // V(108) = K(108,1) * [AKT1_p] * [CTNNB1] -K(108,2) * [AKT1_p |CTNNB1];
  R108: CTNNB1 => AKT1_p; 1;
  // V(109) = K(109,1) * [AKT1_p |CTNNB1];
  R109: CTNNB1 => AKT1_p; 1;
  // V(110) = K(110,1) * [MAPK8_p] * [JUNB] -K(110,2) * [MAPK8_p |JUNB];
  R110: MAPK8_p => JUNB; 1;
  // V(111) = K(111,1) * [MAPK8_p |JUNB];
  R111: MAPK8_p => JUNB; 1;
  // V(112) = K(112,1) * [CDK5_p] * [PARP1] -K(112,2) * [CDK5_p |PARP1];
  R112: PARP1 => CDK5_p; 1;
  // V(113) = K(113,1) * [CDK5_p |PARP1];
  R113: PARP1 => CDK5_p; 1;
  // V(114) = K(114,1) * [LYN_p] * [LYN] -K(114,2) * [LYN_p |LYN];
  R114: LYN => LYN_p; 1;
  // V(115) = K(115,1) * [LYN_p |LYN];
  R115: LYN => LYN_p; 1;
  // V(116) = K(116,1) * [AKT1_p] * [MAPKAP1] -K(116,2) * [AKT1_p |MAPKAP1];
  R116: MAPKAP1 => AKT1_p; 1;
  // V(117) = K(117,1) * [AKT1_p |MAPKAP1];
  R117: MAPKAP1 => AKT1_p; 1;
  // V(118) = K(118,1) * [FYN_p] * [PTPRJ] -K(118,2) * [FYN_p |PTPRJ];
  R118: FYN_p => PTPRJ; 1;
  // V(119) = K(119,1) * [FYN_p |PTPRJ];
  R119: FYN_p => PTPRJ; 1;
  // V(120) = K(120,1) * [AKT1_p] * [PARK7] -K(120,2) * [AKT1_p |PARK7];
  R120: AKT1_p => PARK7; 1;
  // V(121) = K(121,1) * [AKT1_p |PARK7];
  R121: AKT1_p => PARK7; 1;
  // V(122) = K(122,1) * [SGK1_p] * [SP1] -K(122,2) * [SGK1_p |SP1];
  R122: SP1 => SGK1_p; 1;
  // V(123) = K(123,1) * [SGK1_p |SP1];
  R123: SP1 => SGK1_p; 1;
  // V(124) = K(124,1) * [PDPK1_p] * [PKN1] -K(124,2) * [PDPK1_p |PKN1];
  R124: PDPK1_p => PKN1; 1;
  // V(125) = K(125,1) * [PDPK1_p |PKN1];
  R125: PDPK1_p => PKN1; 1;
  // V(126) = K(126,1) * [INSR_p] * [IRS2] -K(126,2) * [INSR_p |IRS2];
  R126: INSR_p => IRS2; 1;
  // V(127) = K(127,1) * [INSR_p |IRS2];
  R127: INSR_p => IRS2; 1;
  // V(128) = K(128,1) * [JAK2_p] * [GHR] -K(128,2) * [JAK2_p |GHR];
  R128: JAK2_p => GHR; 1;
  // V(129) = K(129,1) * [JAK2_p |GHR];
  R129: JAK2_p => GHR; 1;
  // V(130) = K(130,1) * [CDK5_p] * [NOTCH1] -K(130,2) * [CDK5_p |NOTCH1];
  R130: NOTCH1 => CDK5_p; 1;
  // V(131) = K(131,1) * [CDK5_p |NOTCH1];
  R131: NOTCH1 => CDK5_p; 1;
  // V(132) = K(132,1) * [CDK5_p] * [CREB1] -K(132,2) * [CDK5_p |CREB1];
  R132: CREB1 => CDK5_p; 1;
  // V(133) = K(133,1) * [CDK5_p |CREB1];
  R133: CREB1 => CDK5_p; 1;
  // V(134) = K(134,1) * [JAK2_p] * [LEPR] -K(134,2) * [JAK2_p |LEPR];
  R134: JAK2_p => LEPR; 1;
  // V(135) = K(135,1) * [JAK2_p |LEPR];
  R135: JAK2_p => LEPR; 1;
  // V(136) = K(136,1) * [CDK5_p] * [PIK3C3] -K(136,2) * [CDK5_p |PIK3C3];
  R136: PIK3C3 => CDK5_p; 1;
  // V(137) = K(137,1) * [CDK5_p |PIK3C3];
  R137: PIK3C3 => CDK5_p; 1;
  // V(138) = K(138,1) * [AKT1_p] * [AKT1] -K(138,2) * [AKT1_p |AKT1];
  R138: AKT1 => AKT1_p; 1;
  // V(139) = K(139,1) * [AKT1_p |AKT1];
  R139: AKT1 => AKT1_p; 1;
  // V(140) = K(140,1) * [INSR_p] * [PTPN6] -K(140,2) * [INSR_p |PTPN6];
  R140: PTPN6 => INSR_p; 1;
  // V(141) = K(141,1) * [INSR_p |PTPN6];
  R141: PTPN6 => INSR_p; 1;
  // V(142) = K(142,1) * [PINK1] * [TP53] -K(142,2) * [PINK1 |TP53];
  R142: TP53 => PINK1; 1;
  // V(143) = K(143,1) * [PINK1 |TP53];
  R143: TP53 => PINK1; 1;
  // V(144) = K(144,1) * [JAK2_p] * [STAT3] -K(144,2) * [JAK2_p |STAT3];
  R144: JAK2_p => STAT3; 1;
  // V(145) = K(145,1) * [JAK2_p |STAT3];
  R145: JAK2_p => STAT3; 1;
  // V(146) = K(146,1) * [INSR_p] * [PTEN] -K(146,2) * [INSR_p |PTEN];
  R146: PTEN => INSR_p; 1;
  // V(147) = K(147,1) * [INSR_p |PTEN];
  R147: PTEN => INSR_p; 1;
  // V(148) = K(148,1) * [INSR_p] * [PIK3R1] -K(148,2) * [INSR_p |PIK3R1];
  R148: PIK3R1 => INSR_p; 1;
  // V(149) = K(149,1) * [INSR_p |PIK3R1];
  R149: PIK3R1 => INSR_p; 1;
  // V(150) = K(150,1) * [MAPK8_p] * [STAT3] -K(150,2) * [MAPK8_p |STAT3];
  R150: MAPK8_p => STAT3; 1;
  // V(151) = K(151,1) * [MAPK8_p |STAT3];
  R151: MAPK8_p => STAT3; 1;
  // V(152) = K(152,1) * [LYN_p] * [GLO1] -K(152,2) * [LYN_p |GLO1];
  R152: GLO1 => LYN_p; 1;
  // V(153) = K(153,1) * [LYN_p |GLO1];
  R153: GLO1 => LYN_p; 1;
  // V(154) = K(154,1) * [CDK5_p] * [STAT3] -K(154,2) * [CDK5_p |STAT3];
  R154: CDK5_p => STAT3; 1;
  // V(155) = K(155,1) * [CDK5_p |STAT3];
  R155: CDK5_p => STAT3; 1;
  // V(156) = K(156,1) * [AKT1_p] * [CREB1] -K(156,2) * [AKT1_p |CREB1];
  R156: CREB1 => AKT1_p; 1;
  // V(157) = K(157,1) * [AKT1_p |CREB1];
  R157: CREB1 => AKT1_p; 1;
  // V(158) = K(158,1) * [PINK1] * [MFN2] -K(158,2) * [PINK1 |MFN2];
  R158: PINK1 => MFN2; 1;
  // V(159) = K(159,1) * [PINK1 |MFN2];
  R159: PINK1 => MFN2; 1;
  // V(160) = K(160,1) * [MAPK8_p] * [STAT1] -K(160,2) * [MAPK8_p |STAT1];
  R160: MAPK8_p => STAT1; 1;
  // V(161) = K(161,1) * [MAPK8_p |STAT1];
  R161: MAPK8_p => STAT1; 1;
  // V(162) = K(162,1) * [FYN_p] * [CDK5] -K(162,2) * [FYN_p |CDK5];
  R162: CDK5 => FYN_p; 1;
  // V(163) = K(163,1) * [FYN_p |CDK5];
  R163: CDK5 => FYN_p; 1;
  // V(164) = K(164,1) * [LYN_p] * [CDKN1B] -K(164,2) * [LYN_p |CDKN1B];
  R164: CDKN1B => LYN_p; 1;
  // V(165) = K(165,1) * [LYN_p |CDKN1B];
  R165: CDKN1B => LYN_p; 1;
  // V(166) = K(166,1) * [IKBKB_p] * [TP53] -K(166,2) * [IKBKB_p |TP53];
  R166: TP53 => IKBKB_p; 1;
  // V(167) = K(167,1) * [IKBKB_p |TP53];
  R167: TP53 => IKBKB_p; 1;
  // V(168) = K(168,1) * [MAPK8_p] * [NR4A1] -K(168,2) * [MAPK8_p |NR4A1];
  R168: NR4A1 => MAPK8_p; 1;
  // V(169) = K(169,1) * [MAPK8_p |NR4A1];
  R169: NR4A1 => MAPK8_p; 1;
  // V(170) = K(170,1) * [ATR] * [TP53] -K(170,2) * [ATR |TP53];
  R170: TP53 => ATR; 1;
  // V(171) = K(171,1) * [ATR |TP53];
  R171: TP53 => ATR; 1;
  // V(172) = K(172,1) * [ATR] * [CREB1] -K(172,2) * [ATR |CREB1];
  R172: ATR => CREB1; 1;
  // V(173) = K(173,1) * [ATR |CREB1];
  R173: ATR => CREB1; 1;
  // V(174) = K(174,1) * [FYN_p] * [CTNNB1] -K(174,2) * [FYN_p |CTNNB1];
  R174: FYN_p => CTNNB1; 1;
  // V(175) = K(175,1) * [FYN_p |CTNNB1];
  R175: FYN_p => CTNNB1; 1;
  // V(176) = K(176,1) * [LYN_p] * [STAT3] -K(176,2) * [LYN_p |STAT3];
  R176: STAT3 => LYN_p; 1;
  // V(177) = K(177,1) * [LYN_p |STAT3];
  R177: STAT3 => LYN_p; 1;
  // V(178) = K(178,1) * [HIPK2_p] * [CDKN1B] -K(178,2) * [HIPK2_p |CDKN1B];
  R178: CDKN1B => HIPK2_p; 1;
  // V(179) = K(179,1) * [HIPK2_p |CDKN1B];
  R179: CDKN1B => HIPK2_p; 1;
  // V(180) = K(180,1) * [HIPK2_p] * [TP53] -K(180,2) * [HIPK2_p |TP53];
  R180: TP53 => HIPK2_p; 1;
  // V(181) = K(181,1) * [HIPK2_p |TP53];
  R181: TP53 => HIPK2_p; 1;
  // V(182) = K(182,1) * [SGK1_p] * [STAT1] -K(182,2) * [SGK1_p |STAT1];
  R182: SGK1_p => STAT1; 1;
  // V(183) = K(183,1) * [SGK1_p |STAT1];
  R183: SGK1_p => STAT1; 1;
  // V(184) = K(184,1) * [LEPR_p] * [STAT3] -K(184,2) * [LEPR_p |STAT3];
  R184: LEPR_p => STAT3; 1;
  // V(185) = K(185,1) * [LEPR_p |STAT3];
  R185: LEPR_p => STAT3; 1;
  // V(186) = K(186,1) * [CDK5_p] * [CDKN1B] -K(186,2) * [CDK5_p |CDKN1B];
  R186: CDKN1B => CDK5_p; 1;
  // V(187) = K(187,1) * [CDK5_p |CDKN1B];
  R187: CDKN1B => CDK5_p; 1;
  // V(188) = K(188,1) * [CDK5_p] * [VIM] -K(188,2) * [CDK5_p |VIM];
  R188: VIM => CDK5_p; 1;
  // V(189) = K(189,1) * [CDK5_p |VIM];
  R189: VIM => CDK5_p; 1;
  // V(190) = K(190,1) * [CDK5_p] * [HIF1A] -K(190,2) * [CDK5_p |HIF1A];
  R190: HIF1A => CDK5_p; 1;
  // V(191) = K(191,1) * [CDK5_p |HIF1A];
  R191: HIF1A => CDK5_p; 1;
  // V(192) = K(192,1) * [CDK5_p] * [CTNNB1] -K(192,2) * [CDK5_p |CTNNB1];
  R192: CTNNB1 => CDK5_p; 1;
  // V(193) = K(193,1) * [CDK5_p |CTNNB1];
  R193: CTNNB1 => CDK5_p; 1;
  // V(194) = K(194,1) * [CDK5_p] * [SIRT2] -K(194,2) * [CDK5_p |SIRT2];
  R194: SIRT2 => CDK5_p; 1;
  // V(195) = K(195,1) * [CDK5_p |SIRT2];
  R195: SIRT2 => CDK5_p; 1;
  // V(196) = K(196,1) * [JAK2_p] * [EZH2] -K(196,2) * [JAK2_p |EZH2];
  R196: JAK2_p => EZH2; 1;
  // V(197) = K(197,1) * [JAK2_p |EZH2];
  R197: JAK2_p => EZH2; 1;
  // V(198) = K(198,1) * [PINK1] * [PTEN] -K(198,2) * [PINK1 |PTEN];
  R198: PTEN => PINK1; 1;
  // V(199) = K(199,1) * [PINK1 |PTEN];
  R199: PTEN => PINK1; 1;
  // V(200) = K(200,1) * [TLR4] * [MAPK8] -K(200,2) * [TLR4 |MAPK8];
  R200: MAPK8 => TLR4; 1;
  // V(201) = K(201,1) * [TLR4 |MAPK8];
  R201: MAPK8 => TLR4; 1;
  // V(202) = K(202,1) * [AKT1_p] * [BAX] -K(202,2) * [AKT1_p |BAX];
  R202: AKT1_p => BAX; 1;
  // V(203) = K(203,1) * [AKT1_p |BAX];
  R203: AKT1_p => BAX; 1;
  // V(204) = K(204,1) * [JAK2_p] * [SIGNOR-C118] -K(204,2) * [JAK2_p |SIGNOR-C118];
  R204: JAK2_p => ; 1;
  // V(205) = K(205,1) * [JAK2_p |SIGNOR-C118];
  R205: JAK2_p => ; 1;
  // V(206) = K(206,1) * [LYN_p] * [PTPN6] -K(206,2) * [LYN_p |PTPN6];
  R206: PTPN6 => LYN_p; 1;
  // V(207) = K(207,1) * [LYN_p |PTPN6];
  R207: PTPN6 => LYN_p; 1;
  // V(208) = K(208,1) * [HIPK2_p] * [CREB1] -K(208,2) * [HIPK2_p |CREB1];
  R208: CREB1 => HIPK2_p; 1;
  // V(209) = K(209,1) * [HIPK2_p |CREB1];
  R209: CREB1 => HIPK2_p; 1;
  // V(210) = K(210,1) * [PTPRJ_p] * [INSR_p] -K(210,2) * [PTPRJ_p |INSR_p];
  R210: PTPRJ_p => INSR_p; 1;
  // V(211) = K(211,1) * [PTPRJ_p |INSR_p];
  R211: PTPRJ_p => INSR_p; 1;
  // V(212) = K(212,1) * [PTPN6_p] * [JAK2_p] -K(212,2) * [PTPN6_p |JAK2_p];
  R212: PTPN6_p => JAK2_p; 1;
  // V(213) = K(213,1) * [PTPN6_p |JAK2_p];
  R213: PTPN6_p => JAK2_p; 1;
  // V(214) = K(214,1) * [PTPRJ_p] * [CTNNB1_p] -K(214,2) * [PTPRJ_p |CTNNB1_p];
  R214: PTPRJ_p => CTNNB1_p; 1;
  // V(215) = K(215,1) * [PTPRJ_p |CTNNB1_p];
  R215: PTPRJ_p => CTNNB1_p; 1;
  // V(216) = K(216,1) * [PTPN2] * [GHR_p] -K(216,2) * [PTPN2 |GHR_p];
  R216: GHR_p => PTPN2; 1;
  // V(217) = K(217,1) * [PTPN2 |GHR_p];
  R217: GHR_p => PTPN2; 1;
  // V(218) = K(218,1) * [PTPN2] * [INSR_p] -K(218,2) * [PTPN2 |INSR_p];
  R218: INSR_p => PTPN2; 1;
  // V(219) = K(219,1) * [PTPN2 |INSR_p];
  R219: INSR_p => PTPN2; 1;
  // V(220) = K(220,1) * [PTPN2] * [FYN_p] -K(220,2) * [PTPN2 |FYN_p];
  R220: FYN_p => PTPN2; 1;
  // V(221) = K(221,1) * [PTPN2 |FYN_p];
  R221: FYN_p => PTPN2; 1;
  // V(222) = K(222,1) * [PTPN6_p] * [INSR_p] -K(222,2) * [PTPN6_p |INSR_p];
  R222: PTPN6_p => INSR_p; 1;
  // V(223) = K(223,1) * [PTPN6_p |INSR_p];
  R223: PTPN6_p => INSR_p; 1;
  // V(224) = K(224,1) * [PTPN2] * [JAK1_p] -K(224,2) * [PTPN2 |JAK1_p];
  R224: PTPN2 => JAK1_p; 1;
  // V(225) = K(225,1) * [PTPN2 |JAK1_p];
  R225: PTPN2 => JAK1_p; 1;
  // V(226) = K(226,1) * [PTPN6_p] * [JAK1_p] -K(226,2) * [PTPN6_p |JAK1_p];
  R226: PTPN6_p => JAK1_p; 1;
  // V(227) = K(227,1) * [PTPN6_p |JAK1_p];
  R227: PTPN6_p => JAK1_p; 1;
  // V(228) = K(228,1) * [PTEN] * [SP1_p] -K(228,2) * [PTEN |SP1_p];
  R228: PTEN => SP1_p; 1;
  // V(229) = K(229,1) * [PTEN |SP1_p];
  R229: PTEN => SP1_p; 1;
  // V(230) = K(230,1) * [PTPN2] * [STAT3_p] -K(230,2) * [PTPN2 |STAT3_p];
  R230: STAT3_p => PTPN2; 1;
  // V(231) = K(231,1) * [PTPN2 |STAT3_p];
  R231: STAT3_p => PTPN2; 1;
  // V(232) = K(232,1) * [PTPN2] * [STAT6_p] -K(232,2) * [PTPN2 |STAT6_p];
  R232: STAT6_p => PTPN2; 1;
  // V(233) = K(233,1) * [PTPN2 |STAT6_p];
  R233: STAT6_p => PTPN2; 1;
  // V(234) = K(234,1) * [DUSP1] * [MAPK8_p] -K(234,2) * [DUSP1 |MAPK8_p];
  R234: MAPK8_p => DUSP1; 1;
  // V(235) = K(235,1) * [DUSP1 |MAPK8_p];
  R235: MAPK8_p => DUSP1; 1;
  // V(236) = K(236,1) * [PTEN] * [PTEN_p] -K(236,2) * [PTEN |PTEN_p];
  R236: PTEN => PTEN_p; 1;
  // V(237) = K(237,1) * [PTEN |PTEN_p];
  R237: PTEN => PTEN_p; 1;
  // V(238) = K(238,1) * [PTPN2] * [GJA1_p] -K(238,2) * [PTPN2 |GJA1_p];
  R238: PTPN2 => GJA1_p; 1;
  // V(239) = K(239,1) * [PTPN2 |GJA1_p];
  R239: PTPN2 => GJA1_p; 1;
  // V(240) = K(240,1) * [PTPRJ_p] * [PIK3R1_p] -K(240,2) * [PTPRJ_p |PIK3R1_p];
  R240: PTPRJ_p => PIK3R1_p; 1;
  // V(241) = K(241,1) * [PTPRJ_p |PIK3R1_p];
  R241: PTPRJ_p => PIK3R1_p; 1;
  // V(242) = K(242,1) * [PTPRJ_p] * [JAK2_p] -K(242,2) * [PTPRJ_p |JAK2_p];
  R242: PTPRJ_p => JAK2_p; 1;
  // V(243) = K(243,1) * [PTPRJ_p |JAK2_p];
  R243: PTPRJ_p => JAK2_p; 1;
  // V(244) = K(244,1) * [PTPN2] * [STAT1_p] -K(244,2) * [PTPN2 |STAT1_p];
  R244: STAT1_p => PTPN2; 1;
  // V(245) = K(245,1) * [PTPN2 |STAT1_p];
  R245: STAT1_p => PTPN2; 1;
  // V(246) = K(246,1) * [PTPN6_p] * [STAT3_p] -K(246,2) * [PTPN6_p |STAT3_p];
  R246: PTPN6_p => STAT3_p; 1;
  // V(247) = K(247,1) * [PTPN6_p |STAT3_p];
  R247: PTPN6_p => STAT3_p; 1;
  // V(248) = K(248,1) * [PTEN] * [STAT5A_p] -K(248,2) * [PTEN |STAT5A_p];
  R248: PTEN => STAT5A_p; 1;
  // V(249) = K(249,1) * [PTEN |STAT5A_p];
  R249: PTEN => STAT5A_p; 1;
  // V(250) = K(250,1) * [PTEN] * [CREB1_p] -K(250,2) * [PTEN |CREB1_p];
  R250: PTEN => CREB1_p; 1;
  // V(251) = K(251,1) * [PTEN |CREB1_p];
  R251: PTEN => CREB1_p; 1;
  // V(252) = K(252,1) * [DUSP1] * [JUN_p] -K(252,2) * [DUSP1 |JUN_p];
  R252: JUN_p => DUSP1; 1;
  // V(253) = K(253,1) * [DUSP1 |JUN_p];
  R253: JUN_p => DUSP1; 1;
  // V(254) = K(254,1) * [PTPN6_p] * [CTNNB1_p] -K(254,2) * [PTPN6_p |CTNNB1_p];
  R254: PTPN6_p => CTNNB1_p; 1;
  // V(255) = K(255,1) * [PTPN6_p |CTNNB1_p];
  R255: PTPN6_p => CTNNB1_p; 1;
  // V(256) = K(256,1) * [PTPN2] * [STAT5A_p] -K(256,2) * [PTPN2 |STAT5A_p];
  R256: STAT5A_p => PTPN2; 1;
  // V(257) = K(257,1) * [PTPN2 |STAT5A_p];
  R257: STAT5A_p => PTPN2; 1;
  // V(258) = K(258,1) * [PTPN6_p] * [LYN_p] -K(258,2) * [PTPN6_p |LYN_p];
  R258: PTPN6_p => LYN_p; 1;
  // V(259) = K(259,1) * [PTPN6_p |LYN_p];
  R259: PTPN6_p => LYN_p; 1;
  // V(260) = K(260,1) * [PINK1 |MFN2];
  R260: PINK1 => MFN2; 1;
  // V(261) = K(261,1) * [PINK1] * [MFN1] -K(261,2) * [PINK1 |MFN1];
  R261: PINK1 => MFN1; 1;
  // V(262) = K(262,1) * [PINK1 |MFN1];
  R262: PINK1 => MFN1; 1;
  // V(263) = K(263,1) * [NUMB] * [NOTCH1] -K(263,2) * [NUMB |NOTCH1];
  R263: NOTCH1 => NUMB; 1;
  // V(264) = K(264,1) * [NUMB |NOTCH1];
  R264: NOTCH1 => NUMB; 1;
  // V(265) = K(265,1) * [JUN_p] * [SP1_p] * [TGFB1_g] -K(265,2) * [JUN_p |SP1_p |TGFB1_g];
  R265: SP1_p => TGFB1_g; 1;
  // V(266) = K(266,1) * [JUN_p |SP1_p |TGFB1_g];
  R266: SP1_p => TGFB1_g; 1;
  // V(267) = K(267,1) * [TGFB1_rna];
  R267: TGFB1_rna => ; 1;
  // V(268) = K(268,1) * [TP53_p] * [VCAN_g] -K(268,2) * [TP53_p |VCAN_g];
  R268: VCAN_g => TP53_p; 1;
  // V(269) = K(269,1) * [TP53_p |VCAN_g];
  R269: VCAN_g => TP53_p; 1;
  // V(270) = K(270,1) * [VCAN_rna];
  R270: VCAN_rna => ; 1;
  // V(271) = K(271,1) * [TP53_p] * [CDKN1A_g] -K(271,2) * [TP53_p |CDKN1A_g];
  R271: CDKN1A_g => TP53_p; 1;
  // V(272) = K(272,1) * [TP53_p |CDKN1A_g];
  R272: CDKN1A_g => TP53_p; 1;
  // V(273) = K(273,1) * [CDKN1A_rna];
  R273: CDKN1A_rna => ; 1;
  // V(274) = K(274,1) * [HIF1A_p] * [CCL2_g] -K(274,2) * [HIF1A_p |CCL2_g];
  R274: CCL2_g => HIF1A_p; 1;
  // V(275) = K(275,1) * [HIF1A_p |CCL2_g];
  R275: CCL2_g => HIF1A_p; 1;
  // V(276) = K(276,1) * [CCL2_rna];
  R276: CCL2_rna => ; 1;
  // V(277) = K(277,1) * [CTNNB1_p] * [CCND1_g] -K(277,2) * [CTNNB1_p |CCND1_g];
  R277: CTNNB1_p => CCND1_g; 1;
  // V(278) = K(278,1) * [CTNNB1_p |CCND1_g];
  R278: CTNNB1_p => CCND1_g; 1;
  // V(279) = K(279,1) * [CCND1_rna];
  R279: CCND1_rna => ; 1;
  // V(280) = K(280,1) * [ATF3] * [GDF15_g] -K(280,2) * [ATF3 |GDF15_g];
  R280: GDF15_g => ATF3; 1;
  // V(281) = K(281,1) * [ATF3 |GDF15_g];
  R281: GDF15_g => ATF3; 1;
  // V(282) = K(282,1) * [GDF15_rna];
  R282: GDF15_rna => ; 1;
  // V(283) = K(283,1) * [TP53_p] * [BAX_g] -K(283,2) * [TP53_p |BAX_g];
  R283: BAX_g => TP53_p; 1;
  // V(284) = K(284,1) * [TP53_p |BAX_g];
  R284: BAX_g => TP53_p; 1;
  // V(285) = K(285,1) * [BAX_rna];
  R285: BAX_rna => ; 1;
  // V(286) = K(286,1) * [FOXO1_p] * [CDKN1B_g] -K(286,2) * [FOXO1_p |CDKN1B_g];
  R286: FOXO1_p => CDKN1B_g; 1;
  // V(287) = K(287,1) * [FOXO1_p |CDKN1B_g];
  R287: FOXO1_p => CDKN1B_g; 1;
  // V(288) = K(288,1) * [CDKN1B_rna];
  R288: CDKN1B_rna => ; 1;
  // V(289) = K(289,1) * [TP53_p] * [FAS_g] -K(289,2) * [TP53_p |FAS_g];
  R289: FAS_g => TP53_p; 1;
  // V(290) = K(290,1) * [TP53_p |FAS_g];
  R290: FAS_g => TP53_p; 1;
  // V(291) = K(291,1) * [FAS_rna];
  R291: FAS_rna => ; 1;
  // V(292) = K(292,1) * [FOXO1_p] * [PCK1_g] -K(292,2) * [FOXO1_p |PCK1_g];
  R292: FOXO1_p => PCK1_g; 1;
  // V(293) = K(293,1) * [FOXO1_p |PCK1_g];
  R293: FOXO1_p => PCK1_g; 1;
  // V(294) = K(294,1) * [PCK1_rna];
  R294: PCK1_rna => ; 1;
  // V(295) = K(295,1) * [HIF1A_p] * [KDM6B_g] -K(295,2) * [HIF1A_p |KDM6B_g];
  R295: KDM6B_g => HIF1A_p; 1;
  // V(296) = K(296,1) * [HIF1A_p |KDM6B_g];
  R296: KDM6B_g => HIF1A_p; 1;
  // V(297) = K(297,1) * [KDM6B_rna];
  R297: KDM6B_rna => ; 1;
  // V(298) = K(298,1) * [CREB1_p] * [IRS2_g] -K(298,2) * [CREB1_p |IRS2_g];
  R298: CREB1_p => IRS2_g; 1;
  // V(299) = K(299,1) * [CREB1_p |IRS2_g];
  R299: CREB1_p => IRS2_g; 1;
  // V(300) = K(300,1) * [IRS2_rna];
  R300: IRS2_rna => ; 1;
  // V(301) = K(301,1) * [TGFB1] * [COL1A1_g] -K(301,2) * [TGFB1 |COL1A1_g];
  R301: TGFB1 => COL1A1_g; 1;
  // V(302) = K(302,1) * [TGFB1 |COL1A1_g];
  R302: TGFB1 => COL1A1_g; 1;
  // V(303) = K(303,1) * [COL1A1_rna];
  R303: COL1A1_rna => ; 1;
  // V(304) = K(304,1) * [STAT5A_p] * [SOCS2_g] -K(304,2) * [STAT5A_p |SOCS2_g];
  R304: STAT5A_p => SOCS2_g; 1;
  // V(305) = K(305,1) * [STAT5A_p |SOCS2_g];
  R305: STAT5A_p => SOCS2_g; 1;
  // V(306) = K(306,1) * [SOCS2_rna];
  R306: SOCS2_rna => ; 1;
  // V(307) = K(307,1) * [SP1_p] * [TNC_g] -K(307,2) * [SP1_p |TNC_g];
  R307: TNC_g => SP1_p; 1;
  // V(308) = K(308,1) * [SP1_p |TNC_g];
  R308: TNC_g => SP1_p; 1;
  // V(309) = K(309,1) * [TNC_rna];
  R309: TNC_rna => ; 1;
  // V(310) = K(310,1) * [STAT3_p] * [STAT1_g] -K(310,2) * [STAT3_p |STAT1_g];
  R310: STAT3_p => STAT1_g; 1;
  // V(311) = K(311,1) * [STAT3_p |STAT1_g];
  R311: STAT3_p => STAT1_g; 1;
  // V(312) = K(312,1) * [STAT1_rna];
  R312: STAT1_rna => ; 1;
  // V(313) = K(313,1) * [MECP2_p] * [NOTCH1_g] -K(313,2) * [MECP2_p |NOTCH1_g];
  R313: MECP2_p => NOTCH1_g; 1;
  // V(314) = K(314,1) * [NOTCH1_g];
  R314: NOTCH1_g => ; 1;
  // V(315) = K(315,1) * [NOTCH1_rna];
  R315: NOTCH1_rna => ; 1;
  // V(316) = K(316,1) * [MECP2_p] * [SGK1_g] -K(316,2) * [MECP2_p |SGK1_g];
  R316: MECP2_p => SGK1_g; 1;
  // V(317) = K(317,1) * [SGK1_g];
  R317: SGK1_g => ; 1;
  // V(318) = K(318,1) * [SGK1_rna];
  R318: SGK1_rna => ; 1;
  // V(319) = K(319,1) * [HES1] * [RCAN1_g] -K(319,2) * [HES1 |RCAN1_g];
  R319: HES1 => RCAN1_g; 1;
  // V(320) = K(320,1) * [RCAN1_g];
  R320: RCAN1_g => ; 1;
  // V(321) = K(321,1) * [RCAN1_rna];
  R321: RCAN1_rna => ; 1;
  // V(322) = K(322,1) * [TP53_p] * [SLC2A1_g] -K(322,2) * [TP53_p |SLC2A1_g];
  R322: SLC2A1_g => TP53_p; 1;
  // V(323) = K(323,1) * [SLC2A1_g];
  R323: SLC2A1_g => ; 1;
  // V(324) = K(324,1) * [SLC2A1_rna];
  R324: SLC2A1_rna => ; 1;
  // V(325) = K(325,1) * [SGK1];
  R325: SGK1 => ; 1;
  // V(326) = K(326,1) * [TLR4];
  R326: TLR4 => ; 1;
  // V(327) = K(327,1) * [WNT7A];
  R327: WNT7A => ; 1;
  // V(328) = K(328,1) * [SOCS2];
  R328: SOCS2 => ; 1;
  // V(329) = K(329,1) * [IKBKB];
  R329: IKBKB => ; 1;
  // V(330) = K(330,1) * [KDM6B];
  R330: KDM6B => ; 1;
  // V(331) = K(331,1) * [ANGPT2];
  R331: ANGPT2 => ; 1;
  // V(332) = K(332,1) * [TLR3];
  R332: TLR3 => ; 1;
  // V(333) = K(333,1) * [PDPK1];
  R333: PDPK1 => ; 1;
  // V(334) = K(334,1) * [JAK2];
  R334: JAK2 => ; 1;
  // V(335) = K(335,1) * [ERN1];
  R335: ERN1 => ; 1;
  // V(336) = K(336,1) * [MFN2];
  R336: MFN2 => ; 1;
  // V(337) = K(337,1) * [TGFB1];
  R337: TGFB1 => ; 1;
  // V(338) = K(338,1) * [COL1A1];
  R338: COL1A1 => ; 1;
  // V(339) = K(339,1) * [TP53];
  R339: TP53 => ; 1;
  // V(340) = K(340,1) * [HSPB1];
  R340: HSPB1 => ; 1;
  // V(341) = K(341,1) * [JUN];
  R341: JUN => ; 1;
  // V(342) = K(342,1) * [INSR];
  R342: INSR => ; 1;
  // V(343) = K(343,1) * [FYN];
  R343: FYN => ; 1;
  // V(344) = K(344,1) * [LYN];
  R344: LYN => ; 1;
  // V(345) = K(345,1) * [SP1];
  R345: SP1 => ; 1;
  // V(346) = K(346,1) * [IGF1R];
  R346: IGF1R => ; 1;
  // V(347) = K(347,1) * [VIM];
  R347: VIM => ; 1;
  // V(348) = K(348,1) * [PARP1];
  R348: PARP1 => ; 1;
  // V(349) = K(349,1) * [UBC];
  R349: UBC => ; 1;
  // V(350) = K(350,1) * [CALM1];
  R350: CALM1 => ; 1;
  // V(351) = K(351,1) * [GHR];
  R351: GHR => ; 1;
  // V(352) = K(352,1) * [SLC2A1];
  R352: SLC2A1 => ; 1;
  // V(353) = K(353,1) * [CCL2];
  R353: CCL2 => ; 1;
  // V(354) = K(354,1) * [VCAN];
  R354: VCAN => ; 1;
  // V(355) = K(355,1) * [CREB1];
  R355: CREB1 => ; 1;
  // V(356) = K(356,1) * [JUNB];
  R356: JUNB => ; 1;
  // V(357) = K(357,1) * [GJA1];
  R357: GJA1 => ; 1;
  // V(358) = K(358,1) * [PTPN2];
  R358: PTPN2 => ; 1;
  // V(359) = K(359,1) * [ATF3];
  R359: ATF3 => ; 1;
  // V(360) = K(360,1) * [NR4A1];
  R360: NR4A1 => ; 1;
  // V(361) = K(361,1) * [JAK1];
  R361: JAK1 => ; 1;
  // V(362) = K(362,1) * [CCND1];
  R362: CCND1 => ; 1;
  // V(363) = K(363,1) * [TNC];
  R363: TNC => ; 1;
  // V(364) = K(364,1) * [FAS];
  R364: FAS => ; 1;
  // V(365) = K(365,1) * [PIK3R1];
  R365: PIK3R1 => ; 1;
  // V(366) = K(366,1) * [DUSP1];
  R366: DUSP1 => ; 1;
  // V(367) = K(367,1) * [PTPN6];
  R367: PTPN6 => ; 1;
  // V(368) = K(368,1) * [AXL];
  R368: AXL => ; 1;
  // V(369) = K(369,1) * [AKT1];
  R369: AKT1 => ; 1;
  // V(370) = K(370,1) * [CTNNB1];
  R370: CTNNB1 => ; 1;
  // V(371) = K(371,1) * [PCK1];
  R371: PCK1 => ; 1;
  // V(372) = K(372,1) * [TGFBR1];
  R372: TGFBR1 => ; 1;
  // V(373) = K(373,1) * [CDKN1A];
  R373: CDKN1A => ; 1;
  // V(374) = K(374,1) * [STAT3];
  R374: STAT3 => ; 1;
  // V(375) = K(375,1) * [STAT1];
  R375: STAT1 => ; 1;
  // V(376) = K(376,1) * [STAT6];
  R376: STAT6 => ; 1;
  // V(377) = K(377,1) * [STAT5A];
  R377: STAT5A => ; 1;
  // V(378) = K(378,1) * [CDKN2A];
  R378: CDKN2A => ; 1;
  // V(379) = K(379,1) * [MAPK8];
  R379: MAPK8 => ; 1;
  // V(380) = K(380,1) * [CDKN1B];
  R380: CDKN1B => ; 1;
  // V(381) = K(381,1) * [NOTCH1];
  R381: NOTCH1 => ; 1;
  // V(382) = K(382,1) * [LEPR];
  R382: LEPR => ; 1;
  // V(383) = K(383,1) * [NUMB];
  R383: NUMB => ; 1;
  // V(384) = K(384,1) * [MECP2];
  R384: MECP2 => ; 1;
  // V(385) = K(385,1) * [RCAN1];
  R385: RCAN1 => ; 1;
  // V(386) = K(386,1) * [PTEN];
  R386: PTEN => ; 1;
  // V(387) = K(387,1) * [TGFB2];
  R387: TGFB2 => ; 1;
  // V(388) = K(388,1) * [CDK5];
  R388: CDK5 => ; 1;
  // V(389) = K(389,1) * [GLO1];
  R389: GLO1 => ; 1;
  // V(390) = K(390,1) * [BAX];
  R390: BAX => ; 1;
  // V(391) = K(391,1) * [FOXO1];
  R391: FOXO1 => ; 1;
  // V(392) = K(392,1) * [PTPRJ];
  R392: PTPRJ => ; 1;
  // V(393) = K(393,1) * [ATR];
  R393: ATR => ; 1;
  // V(394) = K(394,1) * [HES1];
  R394: HES1 => ; 1;
  // V(395) = K(395,1) * [SMAD2];
  R395: SMAD2 => ; 1;
  // V(396) = K(396,1) * [EZH2];
  R396: EZH2 => ; 1;
  // V(397) = K(397,1) * [PKN1];
  R397: PKN1 => ; 1;
  // V(398) = K(398,1) * [HIF1A];
  R398: HIF1A => ; 1;
  // V(399) = K(399,1) * [MFN1];
  R399: MFN1 => ; 1;
  // V(400) = K(400,1) * [SIRT2];
  R400: SIRT2 => ; 1;
  // V(401) = K(401,1) * [PIK3C3];
  R401: PIK3C3 => ; 1;
  // V(402) = K(402,1) * [AKT1S1];
  R402: AKT1S1 => ; 1;
  // V(403) = K(403,1) * [PARK7];
  R403: PARK7 => ; 1;
  // V(404) = K(404,1) * [GDF15];
  R404: GDF15 => ; 1;
  // V(405) = K(405,1) * [MAPKAP1];
  R405: MAPKAP1 => ; 1;
  // V(406) = K(406,1) * [PINK1];
  R406: PINK1 => ; 1;
  // V(407) = K(407,1) * [HIPK2];
  R407: HIPK2 => ; 1;
  // V(408) = K(408,1) * [PLK2];
  R408: PLK2 => ; 1;
  // V(409) = K(409,1) * [IRS2];
  R409: IRS2 => ; 1;
  // V(410) = K(410,1) * [SGK1_rna];
  R410: SGK1_rna => ; 1;
  // V(411) = K(411,1) * [SOCS2_rna];
  R411: SOCS2_rna => ; 1;
  // V(412) = K(412,1) * [KDM6B_rna];
  R412: KDM6B_rna => ; 1;
  // V(413) = K(413,1) * [TGFB1_rna];
  R413: TGFB1_rna => ; 1;
  // V(414) = K(414,1) * [COL1A1_rna];
  R414: COL1A1_rna => ; 1;
  // V(415) = K(415,1) * [SLC2A1_rna];
  R415: SLC2A1_rna => ; 1;
  // V(416) = K(416,1) * [CCL2_rna];
  R416: CCL2_rna => ; 1;
  // V(417) = K(417,1) * [VCAN_rna];
  R417: VCAN_rna => ; 1;
  // V(418) = K(418,1) * [CCND1_rna];
  R418: CCND1_rna => ; 1;
  // V(419) = K(419,1) * [TNC_rna];
  R419: TNC_rna => ; 1;
  // V(420) = K(420,1) * [FAS_rna];
  R420: FAS_rna => ; 1;
  // V(421) = K(421,1) * [PCK1_rna];
  R421: PCK1_rna => ; 1;
  // V(422) = K(422,1) * [CDKN1A_rna];
  R422: CDKN1A_rna => ; 1;
  // V(423) = K(423,1) * [STAT1_rna];
  R423: STAT1_rna => ; 1;
  // V(424) = K(424,1) * [CDKN1B_rna];
  R424: CDKN1B_rna => ; 1;
  // V(425) = K(425,1) * [NOTCH1_rna];
  R425: NOTCH1_rna => ; 1;
  // V(426) = K(426,1) * [RCAN1_rna];
  R426: RCAN1_rna => ; 1;
  // V(427) = K(427,1) * [BAX_rna];
  R427: BAX_rna => ; 1;
  // V(428) = K(428,1) * [GDF15_rna];
  R428: GDF15_rna => ; 1;
  // V(429) = K(429,1) * [IRS2_rna];
  R429: IRS2_rna => ; 1;
  // V(430) = K(430,1) * [TLR4_g];
  R430: TLR4_g => ; 1;
  // V(431) = K(431,1) * [TLR4_rna];
  R431: TLR4_rna => ; 1;
  // V(432) = K(432,1) * [WNT7A_g];
  R432: WNT7A_g => ; 1;
  // V(433) = K(433,1) * [WNT7A_rna];
  R433: WNT7A_rna => ; 1;
  // V(434) = K(434,1) * [IKBKB_g];
  R434: IKBKB_g => ; 1;
  // V(435) = K(435,1) * [IKBKB_rna];
  R435: IKBKB_rna => ; 1;
  // V(436) = K(436,1) * [ANGPT2_g];
  R436: ANGPT2_g => ; 1;
  // V(437) = K(437,1) * [ANGPT2_rna];
  R437: ANGPT2_rna => ; 1;
  // V(438) = K(438,1) * [TLR3_g];
  R438: TLR3_g => ; 1;
  // V(439) = K(439,1) * [TLR3_rna];
  R439: TLR3_rna => ; 1;
  // V(440) = K(440,1) * [PDPK1_g];
  R440: PDPK1_g => ; 1;
  // V(441) = K(441,1) * [PDPK1_rna];
  R441: PDPK1_rna => ; 1;
  // V(442) = K(442,1) * [JAK2_g];
  R442: JAK2_g => ; 1;
  // V(443) = K(443,1) * [JAK2_rna];
  R443: JAK2_rna => ; 1;
  // V(444) = K(444,1) * [ERN1_g];
  R444: ERN1_g => ; 1;
  // V(445) = K(445,1) * [ERN1_rna];
  R445: ERN1_rna => ; 1;
  // V(446) = K(446,1) * [MFN2_g];
  R446: MFN2_g => ; 1;
  // V(447) = K(447,1) * [MFN2_rna];
  R447: MFN2_rna => ; 1;
  // V(448) = K(448,1) * [TP53_g];
  R448: TP53_g => ; 1;
  // V(449) = K(449,1) * [TP53_rna];
  R449: TP53_rna => ; 1;
  // V(450) = K(450,1) * [HSPB1_g];
  R450: HSPB1_g => ; 1;
  // V(451) = K(451,1) * [HSPB1_rna];
  R451: HSPB1_rna => ; 1;
  // V(452) = K(452,1) * [JUN_g];
  R452: JUN_g => ; 1;
  // V(453) = K(453,1) * [JUN_rna];
  R453: JUN_rna => ; 1;
  // V(454) = K(454,1) * [INSR_g];
  R454: INSR_g => ; 1;
  // V(455) = K(455,1) * [INSR_rna];
  R455: INSR_rna => ; 1;
  // V(456) = K(456,1) * [FYN_g];
  R456: FYN_g => ; 1;
  // V(457) = K(457,1) * [FYN_rna];
  R457: FYN_rna => ; 1;
  // V(458) = K(458,1) * [LYN_g];
  R458: LYN_g => ; 1;
  // V(459) = K(459,1) * [LYN_rna];
  R459: LYN_rna => ; 1;
  // V(460) = K(460,1) * [SP1_g];
  R460: SP1_g => ; 1;
  // V(461) = K(461,1) * [SP1_rna];
  R461: SP1_rna => ; 1;
  // V(462) = K(462,1) * [IGF1R_g];
  R462: IGF1R_g => ; 1;
  // V(463) = K(463,1) * [IGF1R_rna];
  R463: IGF1R_rna => ; 1;
  // V(464) = K(464,1) * [VIM_g];
  R464: VIM_g => ; 1;
  // V(465) = K(465,1) * [VIM_rna];
  R465: VIM_rna => ; 1;
  // V(466) = K(466,1) * [PARP1_g];
  R466: PARP1_g => ; 1;
  // V(467) = K(467,1) * [PARP1_rna];
  R467: PARP1_rna => ; 1;
  // V(468) = K(468,1) * [UBC_g];
  R468: UBC_g => ; 1;
  // V(469) = K(469,1) * [UBC_rna];
  R469: UBC_rna => ; 1;
  // V(470) = K(470,1) * [CALM1_g];
  R470: CALM1_g => ; 1;
  // V(471) = K(471,1) * [CALM1_rna];
  R471: CALM1_rna => ; 1;
  // V(472) = K(472,1) * [GHR_g];
  R472: GHR_g => ; 1;
  // V(473) = K(473,1) * [GHR_rna];
  R473: GHR_rna => ; 1;
  // V(474) = K(474,1) * [CREB1_g];
  R474: CREB1_g => ; 1;
  // V(475) = K(475,1) * [CREB1_rna];
  R475: CREB1_rna => ; 1;
  // V(476) = K(476,1) * [JUNB_g];
  R476: JUNB_g => ; 1;
  // V(477) = K(477,1) * [JUNB_rna];
  R477: JUNB_rna => ; 1;
  // V(478) = K(478,1) * [GJA1_g];
  R478: GJA1_g => ; 1;
  // V(479) = K(479,1) * [GJA1_rna];
  R479: GJA1_rna => ; 1;
  // V(480) = K(480,1) * [PTPN2_g];
  R480: PTPN2_g => ; 1;
  // V(481) = K(481,1) * [PTPN2_rna];
  R481: PTPN2_rna => ; 1;
  // V(482) = K(482,1) * [ATF3_g];
  R482: ATF3_g => ; 1;
  // V(483) = K(483,1) * [ATF3_rna];
  R483: ATF3_rna => ; 1;
  // V(484) = K(484,1) * [NR4A1_g];
  R484: NR4A1_g => ; 1;
  // V(485) = K(485,1) * [NR4A1_rna];
  R485: NR4A1_rna => ; 1;
  // V(486) = K(486,1) * [JAK1_g];
  R486: JAK1_g => ; 1;
  // V(487) = K(487,1) * [JAK1_rna];
  R487: JAK1_rna => ; 1;
  // V(488) = K(488,1) * [PIK3R1_g];
  R488: PIK3R1_g => ; 1;
  // V(489) = K(489,1) * [PIK3R1_rna];
  R489: PIK3R1_rna => ; 1;
  // V(490) = K(490,1) * [DUSP1_g];
  R490: DUSP1_g => ; 1;
  // V(491) = K(491,1) * [DUSP1_rna];
  R491: DUSP1_rna => ; 1;
  // V(492) = K(492,1) * [PTPN6_g];
  R492: PTPN6_g => ; 1;
  // V(493) = K(493,1) * [PTPN6_rna];
  R493: PTPN6_rna => ; 1;
  // V(494) = K(494,1) * [AXL_g];
  R494: AXL_g => ; 1;
  // V(495) = K(495,1) * [AXL_rna];
  R495: AXL_rna => ; 1;
  // V(496) = K(496,1) * [AKT1_g];
  R496: AKT1_g => ; 1;
  // V(497) = K(497,1) * [AKT1_rna];
  R497: AKT1_rna => ; 1;
  // V(498) = K(498,1) * [CTNNB1_g];
  R498: CTNNB1_g => ; 1;
  // V(499) = K(499,1) * [CTNNB1_rna];
  R499: CTNNB1_rna => ; 1;
  // V(500) = K(500,1) * [TGFBR1_g];
  R500: TGFBR1_g => ; 1;
  // V(501) = K(501,1) * [TGFBR1_rna];
  R501: TGFBR1_rna => ; 1;
  // V(502) = K(502,1) * [STAT3_g];
  R502: STAT3_g => ; 1;
  // V(503) = K(503,1) * [STAT3_rna];
  R503: STAT3_rna => ; 1;
  // V(504) = K(504,1) * [STAT6_g];
  R504: STAT6_g => ; 1;
  // V(505) = K(505,1) * [STAT6_rna];
  R505: STAT6_rna => ; 1;
  // V(506) = K(506,1) * [STAT5A_g];
  R506: STAT5A_g => ; 1;
  // V(507) = K(507,1) * [STAT5A_rna];
  R507: STAT5A_rna => ; 1;
  // V(508) = K(508,1) * [CDKN2A_g];
  R508: CDKN2A_g => ; 1;
  // V(509) = K(509,1) * [CDKN2A_rna];
  R509: CDKN2A_rna => ; 1;
  // V(510) = K(510,1) * [MAPK8_g];
  R510: MAPK8_g => ; 1;
  // V(511) = K(511,1) * [MAPK8_rna];
  R511: MAPK8_rna => ; 1;
  // V(512) = K(512,1) * [LEPR_g];
  R512: LEPR_g => ; 1;
  // V(513) = K(513,1) * [LEPR_rna];
  R513: LEPR_rna => ; 1;
  // V(514) = K(514,1) * [NUMB_g];
  R514: NUMB_g => ; 1;
  // V(515) = K(515,1) * [NUMB_rna];
  R515: NUMB_rna => ; 1;
  // V(516) = K(516,1) * [MECP2_g];
  R516: MECP2_g => ; 1;
  // V(517) = K(517,1) * [MECP2_rna];
  R517: MECP2_rna => ; 1;
  // V(518) = K(518,1) * [PTEN_g];
  R518: PTEN_g => ; 1;
  // V(519) = K(519,1) * [PTEN_rna];
  R519: PTEN_rna => ; 1;
  // V(520) = K(520,1) * [TGFB2_g];
  R520: TGFB2_g => ; 1;
  // V(521) = K(521,1) * [TGFB2_rna];
  R521: TGFB2_rna => ; 1;
  // V(522) = K(522,1) * [CDK5_g];
  R522: CDK5_g => ; 1;
  // V(523) = K(523,1) * [CDK5_rna];
  R523: CDK5_rna => ; 1;
  // V(524) = K(524,1) * [GLO1_g];
  R524: GLO1_g => ; 1;
  // V(525) = K(525,1) * [GLO1_rna];
  R525: GLO1_rna => ; 1;
  // V(526) = K(526,1) * [FOXO1_g];
  R526: FOXO1_g => ; 1;
  // V(527) = K(527,1) * [FOXO1_rna];
  R527: FOXO1_rna => ; 1;
  // V(528) = K(528,1) * [PTPRJ_g];
  R528: PTPRJ_g => ; 1;
  // V(529) = K(529,1) * [PTPRJ_rna];
  R529: PTPRJ_rna => ; 1;
  // V(530) = K(530,1) * [ATR_g];
  R530: ATR_g => ; 1;
  // V(531) = K(531,1) * [ATR_rna];
  R531: ATR_rna => ; 1;
  // V(532) = K(532,1) * [HES1_g];
  R532: HES1_g => ; 1;
  // V(533) = K(533,1) * [HES1_rna];
  R533: HES1_rna => ; 1;
  // V(534) = K(534,1) * [SMAD2_g];
  R534: SMAD2_g => ; 1;
  // V(535) = K(535,1) * [SMAD2_rna];
  R535: SMAD2_rna => ; 1;
  // V(536) = K(536,1) * [EZH2_g];
  R536: EZH2_g => ; 1;
  // V(537) = K(537,1) * [EZH2_rna];
  R537: EZH2_rna => ; 1;
  // V(538) = K(538,1) * [PKN1_g];
  R538: PKN1_g => ; 1;
  // V(539) = K(539,1) * [PKN1_rna];
  R539: PKN1_rna => ; 1;
  // V(540) = K(540,1) * [HIF1A_g];
  R540: HIF1A_g => ; 1;
  // V(541) = K(541,1) * [HIF1A_rna];
  R541: HIF1A_rna => ; 1;
  // V(542) = K(542,1) * [MFN1_g];
  R542: MFN1_g => ; 1;
  // V(543) = K(543,1) * [MFN1_rna];
  R543: MFN1_rna => ; 1;
  // V(544) = K(544,1) * [SIRT2_g];
  R544: SIRT2_g => ; 1;
  // V(545) = K(545,1) * [SIRT2_rna];
  R545: SIRT2_rna => ; 1;
  // V(546) = K(546,1) * [PIK3C3_g];
  R546: PIK3C3_g => ; 1;
  // V(547) = K(547,1) * [PIK3C3_rna];
  R547: PIK3C3_rna => ; 1;
  // V(548) = K(548,1) * [AKT1S1_g];
  R548: AKT1S1_g => ; 1;
  // V(549) = K(549,1) * [AKT1S1_rna];
  R549: AKT1S1_rna => ; 1;
  // V(550) = K(550,1) * [PARK7_g];
  R550: PARK7_g => ; 1;
  // V(551) = K(551,1) * [PARK7_rna];
  R551: PARK7_rna => ; 1;
  // V(552) = K(552,1) * [MAPKAP1_g];
  R552: MAPKAP1_g => ; 1;
  // V(553) = K(553,1) * [MAPKAP1_rna];
  R553: MAPKAP1_rna => ; 1;
  // V(554) = K(554,1) * [PINK1_g];
  R554: PINK1_g => ; 1;
  // V(555) = K(555,1) * [PINK1_rna];
  R555: PINK1_rna => ; 1;
  // V(556) = K(556,1) * [HIPK2_g];
  R556: HIPK2_g => ; 1;
  // V(557) = K(557,1) * [HIPK2_rna];
  R557: HIPK2_rna => ; 1;
  // V(558) = K(558,1) * [PLK2_g];
  R558: PLK2_g => ; 1;
  // V(559) = K(559,1) * [PLK2_rna];
  R559: PLK2_rna => ; 1;
  // V(560) = K(560,1) * [SGK1_p];
  R560: SGK1_p => ; 1;
  // V(561) = K(561,1) * [IKBKB_p];
  R561: IKBKB_p => ; 1;
  // V(562) = K(562,1) * [PDPK1_p];
  R562: PDPK1_p => ; 1;
  // V(563) = K(563,1) * [JAK2_p];
  R563: JAK2_p => ; 1;
  // V(564) = K(564,1) * [ERN1_p];
  R564: ERN1_p => ; 1;
  // V(565) = K(565,1) * [MFN2_p];
  R565: MFN2_p => ; 1;
  // V(566) = K(566,1) * [TP53_p];
  R566: TP53_p => ; 1;
  // V(567) = K(567,1) * [HSPB1_p];
  R567: HSPB1_p => ; 1;
  // V(568) = K(568,1) * [JUN_p];
  R568: JUN_p => ; 1;
  // V(569) = K(569,1) * [INSR_p];
  R569: INSR_p => ; 1;
  // V(570) = K(570,1) * [FYN_p];
  R570: FYN_p => ; 1;
  // V(571) = K(571,1) * [LYN_p];
  R571: LYN_p => ; 1;
  // V(572) = K(572,1) * [SP1_p];
  R572: SP1_p => ; 1;
  // V(573) = K(573,1) * [IGF1R_p];
  R573: IGF1R_p => ; 1;
  // V(574) = K(574,1) * [VIM_p];
  R574: VIM_p => ; 1;
  // V(575) = K(575,1) * [PARP1_p];
  R575: PARP1_p => ; 1;
  // V(576) = K(576,1) * [UBC_p];
  R576: UBC_p => ; 1;
  // V(577) = K(577,1) * [CALM1_p];
  R577: CALM1_p => ; 1;
  // V(578) = K(578,1) * [GHR_p];
  R578: GHR_p => ; 1;
  // V(579) = K(579,1) * [CREB1_p];
  R579: CREB1_p => ; 1;
  // V(580) = K(580,1) * [JUNB_p];
  R580: JUNB_p => ; 1;
  // V(581) = K(581,1) * [GJA1_p];
  R581: GJA1_p => ; 1;
  // V(582) = K(582,1) * [NR4A1_p];
  R582: NR4A1_p => ; 1;
  // V(583) = K(583,1) * [JAK1_p];
  R583: JAK1_p => ; 1;
  // V(584) = K(584,1) * [PIK3R1_p];
  R584: PIK3R1_p => ; 1;
  // V(585) = K(585,1) * [PTPN6_p];
  R585: PTPN6_p => ; 1;
  // V(586) = K(586,1) * [AXL_p];
  R586: AXL_p => ; 1;
  // V(587) = K(587,1) * [AKT1_p];
  R587: AKT1_p => ; 1;
  // V(588) = K(588,1) * [CTNNB1_p];
  R588: CTNNB1_p => ; 1;
  // V(589) = K(589,1) * [CDKN1A_p];
  R589: CDKN1A_p => ; 1;
  // V(590) = K(590,1) * [STAT3_p];
  R590: STAT3_p => ; 1;
  // V(591) = K(591,1) * [STAT1_p];
  R591: STAT1_p => ; 1;
  // V(592) = K(592,1) * [STAT6_p];
  R592: STAT6_p => ; 1;
  // V(593) = K(593,1) * [STAT5A_p];
  R593: STAT5A_p => ; 1;
  // V(594) = K(594,1) * [CDKN2A_p];
  R594: CDKN2A_p => ; 1;
  // V(595) = K(595,1) * [MAPK8_p];
  R595: MAPK8_p => ; 1;
  // V(596) = K(596,1) * [CDKN1B_p];
  R596: CDKN1B_p => ; 1;
  // V(597) = K(597,1) * [NOTCH1_p];
  R597: NOTCH1_p => ; 1;
  // V(598) = K(598,1) * [LEPR_p];
  R598: LEPR_p => ; 1;
  // V(599) = K(599,1) * [MECP2_p];
  R599: MECP2_p => ; 1;
  // V(600) = K(600,1) * [PTEN_p];
  R600: PTEN_p => ; 1;
  // V(601) = K(601,1) * [CDK5_p];
  R601: CDK5_p => ; 1;
  // V(602) = K(602,1) * [GLO1_p];
  R602: GLO1_p => ; 1;
  // V(603) = K(603,1) * [BAX_p];
  R603: BAX_p => ; 1;
  // V(604) = K(604,1) * [FOXO1_p];
  R604: FOXO1_p => ; 1;
  // V(605) = K(605,1) * [PTPRJ_p];
  R605: PTPRJ_p => ; 1;
  // V(606) = K(606,1) * [SMAD2_p];
  R606: SMAD2_p => ; 1;
  // V(607) = K(607,1) * [EZH2_p];
  R607: EZH2_p => ; 1;
  // V(608) = K(608,1) * [PKN1_p];
  R608: PKN1_p => ; 1;
  // V(609) = K(609,1) * [HIF1A_p];
  R609: HIF1A_p => ; 1;
  // V(610) = K(610,1) * [SIRT2_p];
  R610: SIRT2_p => ; 1;
  // V(611) = K(611,1) * [PIK3C3_p];
  R611: PIK3C3_p => ; 1;
  // V(612) = K(612,1) * [AKT1S1_p];
  R612: AKT1S1_p => ; 1;
  // V(613) = K(613,1) * [PARK7_p];
  R613: PARK7_p => ; 1;
  // V(614) = K(614,1) * [MAPKAP1_p];
  R614: MAPKAP1_p => ; 1;
  // V(615) = K(615,1) * [HIPK2_p];
  R615: HIPK2_p => ; 1;
  // V(616) = K(616,1) * [IRS2_p];
  R616: IRS2_p => ; 1;
  // V(617) = K(617,1) * [SIGNOR-C118_p];
  R617: => ; 1;
  // V(618) = K(618,1) * [TLR4_rna];
  R618: TLR4_rna => ; 1;
  // V(619) = K(619,1) * [WNT7A_rna];
  R619: WNT7A_rna => ; 1;
  // V(620) = K(620,1) * [IKBKB_rna];
  R620: IKBKB_rna => ; 1;
  // V(621) = K(621,1) * [ANGPT2_rna];
  R621: ANGPT2_rna => ; 1;
  // V(622) = K(622,1) * [TLR3_rna];
  R622: TLR3_rna => ; 1;
  // V(623) = K(623,1) * [PDPK1_rna];
  R623: PDPK1_rna => ; 1;
  // V(624) = K(624,1) * [JAK2_rna];
  R624: JAK2_rna => ; 1;
  // V(625) = K(625,1) * [ERN1_rna];
  R625: ERN1_rna => ; 1;
  // V(626) = K(626,1) * [MFN2_rna];
  R626: MFN2_rna => ; 1;
  // V(627) = K(627,1) * [TP53_rna];
  R627: TP53_rna => ; 1;
  // V(628) = K(628,1) * [HSPB1_rna];
  R628: HSPB1_rna => ; 1;
  // V(629) = K(629,1) * [JUN_rna];
  R629: JUN_rna => ; 1;
  // V(630) = K(630,1) * [INSR_rna];
  R630: INSR_rna => ; 1;
  // V(631) = K(631,1) * [FYN_rna];
  R631: FYN_rna => ; 1;
  // V(632) = K(632,1) * [LYN_rna];
  R632: LYN_rna => ; 1;
  // V(633) = K(633,1) * [SP1_rna];
  R633: SP1_rna => ; 1;
  // V(634) = K(634,1) * [IGF1R_rna];
  R634: IGF1R_rna => ; 1;
  // V(635) = K(635,1) * [VIM_rna];
  R635: VIM_rna => ; 1;
  // V(636) = K(636,1) * [PARP1_rna];
  R636: PARP1_rna => ; 1;
  // V(637) = K(637,1) * [UBC_rna];
  R637: UBC_rna => ; 1;
  // V(638) = K(638,1) * [CALM1_rna];
  R638: CALM1_rna => ; 1;
  // V(639) = K(639,1) * [GHR_rna];
  R639: GHR_rna => ; 1;
  // V(640) = K(640,1) * [CREB1_rna];
  R640: CREB1_rna => ; 1;
  // V(641) = K(641,1) * [JUNB_rna];
  R641: JUNB_rna => ; 1;
  // V(642) = K(642,1) * [GJA1_rna];
  R642: GJA1_rna => ; 1;
  // V(643) = K(643,1) * [PTPN2_rna];
  R643: PTPN2_rna => ; 1;
  // V(644) = K(644,1) * [ATF3_rna];
  R644: ATF3_rna => ; 1;
  // V(645) = K(645,1) * [NR4A1_rna];
  R645: NR4A1_rna => ; 1;
  // V(646) = K(646,1) * [JAK1_rna];
  R646: JAK1_rna => ; 1;
  // V(647) = K(647,1) * [PIK3R1_rna];
  R647: PIK3R1_rna => ; 1;
  // V(648) = K(648,1) * [DUSP1_rna];
  R648: DUSP1_rna => ; 1;
  // V(649) = K(649,1) * [PTPN6_rna];
  R649: PTPN6_rna => ; 1;
  // V(650) = K(650,1) * [AXL_rna];
  R650: AXL_rna => ; 1;
  // V(651) = K(651,1) * [AKT1_rna];
  R651: AKT1_rna => ; 1;
  // V(652) = K(652,1) * [CTNNB1_rna];
  R652: CTNNB1_rna => ; 1;
  // V(653) = K(653,1) * [TGFBR1_rna];
  R653: TGFBR1_rna => ; 1;
  // V(654) = K(654,1) * [STAT3_rna];
  R654: STAT3_rna => ; 1;
  // V(655) = K(655,1) * [STAT6_rna];
  R655: STAT6_rna => ; 1;
  // V(656) = K(656,1) * [STAT5A_rna];
  R656: STAT5A_rna => ; 1;
  // V(657) = K(657,1) * [CDKN2A_rna];
  R657: CDKN2A_rna => ; 1;
  // V(658) = K(658,1) * [MAPK8_rna];
  R658: MAPK8_rna => ; 1;
  // V(659) = K(659,1) * [LEPR_rna];
  R659: LEPR_rna => ; 1;
  // V(660) = K(660,1) * [NUMB_rna];
  R660: NUMB_rna => ; 1;
  // V(661) = K(661,1) * [MECP2_rna];
  R661: MECP2_rna => ; 1;
  // V(662) = K(662,1) * [PTEN_rna];
  R662: PTEN_rna => ; 1;
  // V(663) = K(663,1) * [TGFB2_rna];
  R663: TGFB2_rna => ; 1;
  // V(664) = K(664,1) * [CDK5_rna];
  R664: CDK5_rna => ; 1;
  // V(665) = K(665,1) * [GLO1_rna];
  R665: GLO1_rna => ; 1;
  // V(666) = K(666,1) * [FOXO1_rna];
  R666: FOXO1_rna => ; 1;
  // V(667) = K(667,1) * [PTPRJ_rna];
  R667: PTPRJ_rna => ; 1;
  // V(668) = K(668,1) * [ATR_rna];
  R668: ATR_rna => ; 1;
  // V(669) = K(669,1) * [HES1_rna];
  R669: HES1_rna => ; 1;
  // V(670) = K(670,1) * [SMAD2_rna];
  R670: SMAD2_rna => ; 1;
  // V(671) = K(671,1) * [EZH2_rna];
  R671: EZH2_rna => ; 1;
  // V(672) = K(672,1) * [PKN1_rna];
  R672: PKN1_rna => ; 1;
  // V(673) = K(673,1) * [HIF1A_rna];
  R673: HIF1A_rna => ; 1;
  // V(674) = K(674,1) * [MFN1_rna];
  R674: MFN1_rna => ; 1;
  // V(675) = K(675,1) * [SIRT2_rna];
  R675: SIRT2_rna => ; 1;
  // V(676) = K(676,1) * [PIK3C3_rna];
  R676: PIK3C3_rna => ; 1;
  // V(677) = K(677,1) * [AKT1S1_rna];
  R677: AKT1S1_rna => ; 1;
  // V(678) = K(678,1) * [PARK7_rna];
  R678: PARK7_rna => ; 1;
  // V(679) = K(679,1) * [MAPKAP1_rna];
  R679: MAPKAP1_rna => ; 1;
  // V(680) = K(680,1) * [PINK1_rna];
  R680: PINK1_rna => ; 1;
  // V(681) = K(681,1) * [HIPK2_rna];
  R681: HIPK2_rna => ; 1;
  // V(682) = K(682,1) * [PLK2_rna];
  R682: PLK2_rna => ; 1;
end
