// SBML level 3 version 2

model Tcell()

  // Compartments:
  compartment cell = 1;

  // Species:
  species ADD3 in cell = 1/cell;
  species ADD3_g in cell = 1/cell;
  species ADD3_p in cell = 1/cell;
  species ADD3_rna in cell = 1/cell;
  species AKT1 in cell = 1/cell;
  species AKT1_g in cell = 1/cell;
  species AKT1_p in cell = 1/cell;
  species AKT1_rna in cell = 1/cell;
  species ANXA1 in cell = 1/cell;
  species ANXA1_g in cell = 1/cell;
  species ANXA1_p in cell = 1/cell;
  species ANXA1_rna in cell = 1/cell;
  species ATR in cell = 1/cell;
  species ATR_g in cell = 1/cell;
  species ATR_rna in cell = 1/cell;
  species BAD in cell = 1/cell;
  species BAD_g in cell = 1/cell;
  species BAD_p in cell = 1/cell;
  species BAD_rna in cell = 1/cell;
  species BAX in cell = 1/cell;
  species BAX_g in cell = 1/cell;
  species BAX_p in cell = 1/cell;
  species BAX_rna in cell = 1/cell;
  species BCL2 in cell = 1/cell;
  species BCL2_g in cell = 1/cell;
  species BCL2_p in cell = 1/cell;
  species BCL2_rna in cell = 1/cell;
  species BECN1 in cell = 1/cell;
  species BECN1_g in cell = 1/cell;
  species BECN1_p in cell = 1/cell;
  species BECN1_rna in cell = 1/cell;
  species CAT in cell = 1/cell;
  species CAT_g in cell = 1/cell;
  species CAT_rna in cell = 1/cell;
  species CDKN1B in cell = 1/cell;
  species CDKN1B_g in cell = 1/cell;
  species CDKN1B_p in cell = 1/cell;
  species CDKN1B_rna in cell = 1/cell;
  species CREB1 in cell = 1/cell;
  species CREB1_g in cell = 1/cell;
  species CREB1_p in cell = 1/cell;
  species CREB1_rna in cell = 1/cell;
  species CTLA4 in cell = 1/cell;
  species CTLA4_g in cell = 1/cell;
  species CTLA4_p in cell = 1/cell;
  species CTLA4_rna in cell = 1/cell;
  species CTNNB1 in cell = 1/cell;
  species CTNNB1_g in cell = 1/cell;
  species CTNNB1_p in cell = 1/cell;
  species CTNNB1_rna in cell = 1/cell;
  species CUL3 in cell = 1/cell;
  species CUL3_g in cell = 1/cell;
  species CUL3_rna in cell = 1/cell;
  species CYBA in cell = 1/cell;
  species CYBA_g in cell = 1/cell;
  species CYBA_p in cell = 1/cell;
  species CYBA_rna in cell = 1/cell;
  species DDIT3 in cell = 1/cell;
  species DDIT3_g in cell = 1/cell;
  species DDIT3_p in cell = 1/cell;
  species DDIT3_rna in cell = 1/cell;
  species DNMT1 in cell = 1/cell;
  species DNMT1_g in cell = 1/cell;
  species DNMT1_p in cell = 1/cell;
  species DNMT1_rna in cell = 1/cell;
  species DUSP1 in cell = 1/cell;
  species DUSP1_g in cell = 1/cell;
  species DUSP1_p in cell = 1/cell;
  species DUSP1_rna in cell = 1/cell;
  species EP300 in cell = 1/cell;
  species EP300_g in cell = 1/cell;
  species EP300_p in cell = 1/cell;
  species EP300_rna in cell = 1/cell;
  species ERN1 in cell = 1/cell;
  species ERN1_g in cell = 1/cell;
  species ERN1_p in cell = 1/cell;
  species ERN1_rna in cell = 1/cell;
  species ETS1 in cell = 1/cell;
  species ETS1_g in cell = 1/cell;
  species ETS1_rna in cell = 1/cell;
  species FOS in cell = 1/cell;
  species FOS_g in cell = 1/cell;
  species FOS_p in cell = 1/cell;
  species FOS_rna in cell = 1/cell;
  species FOXO1 in cell = 1/cell;
  species FOXO1_g in cell = 1/cell;
  species FOXO1_p in cell = 1/cell;
  species FOXO1_rna in cell = 1/cell;
  species FYN in cell = 1/cell;
  species FYN_g in cell = 1/cell;
  species FYN_p in cell = 1/cell;
  species FYN_rna in cell = 1/cell;
  species GCLM in cell = 1/cell;
  species GCLM_g in cell = 1/cell;
  species GCLM_rna in cell = 1/cell;
  species GPX4 in cell = 1/cell;
  species GPX4_g in cell = 1/cell;
  species GPX4_rna in cell = 1/cell;
  species GSTA1 in cell = 1/cell;
  species GSTA1_g in cell = 1/cell;
  species GSTA1_rna in cell = 1/cell;
  species HDAC1 in cell = 1/cell;
  species HDAC1_g in cell = 1/cell;
  species HDAC1_rna in cell = 1/cell;
  species HIF1A in cell = 1/cell;
  species HIF1A_g in cell = 1/cell;
  species HIF1A_p in cell = 1/cell;
  species HIF1A_rna in cell = 1/cell;
  species HIPK2 in cell = 1/cell;
  species HIPK2_g in cell = 1/cell;
  species HIPK2_p in cell = 1/cell;
  species HIPK2_rna in cell = 1/cell;
  species HMGN1 in cell = 1/cell;
  species HMGN1_g in cell = 1/cell;
  species HMGN1_p in cell = 1/cell;
  species HMGN1_rna in cell = 1/cell;
  species HSPB1 in cell = 1/cell;
  species HSPB1_g in cell = 1/cell;
  species HSPB1_p in cell = 1/cell;
  species HSPB1_rna in cell = 1/cell;
  species IKBKB in cell = 1/cell;
  species IKBKB_g in cell = 1/cell;
  species IKBKB_p in cell = 1/cell;
  species IKBKB_rna in cell = 1/cell;
  species ILK in cell = 1/cell;
  species ILK_g in cell = 1/cell;
  species ILK_p in cell = 1/cell;
  species ILK_rna in cell = 1/cell;
  species IRF1 in cell = 1/cell;
  species IRF1_g in cell = 1/cell;
  species IRF1_rna in cell = 1/cell;
  species IRF3 in cell = 1/cell;
  species IRF3_g in cell = 1/cell;
  species IRF3_p in cell = 1/cell;
  species IRF3_rna in cell = 1/cell;
  species JAK1 in cell = 1/cell;
  species JAK1_g in cell = 1/cell;
  species JAK1_p in cell = 1/cell;
  species JAK1_rna in cell = 1/cell;
  species JAK3 in cell = 1/cell;
  species JAK3_g in cell = 1/cell;
  species JAK3_p in cell = 1/cell;
  species JAK3_rna in cell = 1/cell;
  species JUN in cell = 1/cell;
  species JUN_g in cell = 1/cell;
  species JUN_p in cell = 1/cell;
  species JUN_rna in cell = 1/cell;
  species KDM6B in cell = 1/cell;
  species KDM6B_g in cell = 1/cell;
  species KDM6B_rna in cell = 1/cell;
  species KLF9 in cell = 1/cell;
  species KLF9_g in cell = 1/cell;
  species KLF9_rna in cell = 1/cell;
  species MAPK1 in cell = 1/cell;
  species MAPK1_g in cell = 1/cell;
  species MAPK1_p in cell = 1/cell;
  species MAPK1_rna in cell = 1/cell;
  species MAPK9 in cell = 1/cell;
  species MAPK9_g in cell = 1/cell;
  species MAPK9_p in cell = 1/cell;
  species MAPK9_rna in cell = 1/cell;
  species MAPKAP1 in cell = 1/cell;
  species MAPKAP1_g in cell = 1/cell;
  species MAPKAP1_p in cell = 1/cell;
  species MAPKAP1_rna in cell = 1/cell;
  species MDM2 in cell = 1/cell;
  species MDM2_g in cell = 1/cell;
  species MDM2_p in cell = 1/cell;
  species MDM2_rna in cell = 1/cell;
  species MECP2 in cell = 1/cell;
  species MECP2_g in cell = 1/cell;
  species MECP2_p in cell = 1/cell;
  species MECP2_rna in cell = 1/cell;
  species MFF in cell = 1/cell;
  species MFF_g in cell = 1/cell;
  species MFF_p in cell = 1/cell;
  species MFF_rna in cell = 1/cell;
  species NCF1 in cell = 1/cell;
  species NCF1_g in cell = 1/cell;
  species NCF1_p in cell = 1/cell;
  species NCF1_rna in cell = 1/cell;
  species NFE2L2 in cell = 1/cell;
  species NFE2L2_g in cell = 1/cell;
  species NFE2L2_p in cell = 1/cell;
  species NFE2L2_rna in cell = 1/cell;
  species NFKB1 in cell = 1/cell;
  species NFKB1_g in cell = 1/cell;
  species NFKB1_p in cell = 1/cell;
  species NFKB1_rna in cell = 1/cell;
  species NR3C1 in cell = 1/cell;
  species NR3C1_g in cell = 1/cell;
  species NR3C1_p in cell = 1/cell;
  species NR3C1_rna in cell = 1/cell;
  species NR4A1 in cell = 1/cell;
  species NR4A1_g in cell = 1/cell;
  species NR4A1_p in cell = 1/cell;
  species NR4A1_rna in cell = 1/cell;
  species NUMB in cell = 1/cell;
  species NUMB_g in cell = 1/cell;
  species NUMB_rna in cell = 1/cell;
  species PARK7 in cell = 1/cell;
  species PARK7_g in cell = 1/cell;
  species PARK7_p in cell = 1/cell;
  species PARK7_rna in cell = 1/cell;
  species PARP1 in cell = 1/cell;
  species PARP1_g in cell = 1/cell;
  species PARP1_p in cell = 1/cell;
  species PARP1_rna in cell = 1/cell;
  species PIK3CA in cell = 1/cell;
  species PIK3CA_g in cell = 1/cell;
  species PIK3CA_p in cell = 1/cell;
  species PIK3CA_rna in cell = 1/cell;
  species PIK3R1 in cell = 1/cell;
  species PIK3R1_g in cell = 1/cell;
  species PIK3R1_p in cell = 1/cell;
  species PIK3R1_rna in cell = 1/cell;
  species PKM in cell = 1/cell;
  species PKM_g in cell = 1/cell;
  species PKM_p in cell = 1/cell;
  species PKM_rna in cell = 1/cell;
  species PKN1 in cell = 1/cell;
  species PKN1_g in cell = 1/cell;
  species PKN1_p in cell = 1/cell;
  species PKN1_rna in cell = 1/cell;
  species PRDX1 in cell = 1/cell;
  species PRDX1_g in cell = 1/cell;
  species PRDX1_p in cell = 1/cell;
  species PRDX1_rna in cell = 1/cell;
  species PRDX6 in cell = 1/cell;
  species PRDX6_g in cell = 1/cell;
  species PRDX6_p in cell = 1/cell;
  species PRDX6_rna in cell = 1/cell;
  species PRKAA1 in cell = 1/cell;
  species PRKAA1_g in cell = 1/cell;
  species PRKAA1_p in cell = 1/cell;
  species PRKAA1_rna in cell = 1/cell;
  species PRKCA in cell = 1/cell;
  species PRKCA_g in cell = 1/cell;
  species PRKCA_p in cell = 1/cell;
  species PRKCA_rna in cell = 1/cell;
  species PTEN in cell = 1/cell;
  species PTEN_g in cell = 1/cell;
  species PTEN_p in cell = 1/cell;
  species PTEN_rna in cell = 1/cell;
  species PTPN11 in cell = 1/cell;
  species PTPN11_g in cell = 1/cell;
  species PTPN11_p in cell = 1/cell;
  species PTPN11_rna in cell = 1/cell;
  species PTPN2 in cell = 1/cell;
  species PTPN2_g in cell = 1/cell;
  species PTPN2_rna in cell = 1/cell;
  species PTPN6 in cell = 1/cell;
  species PTPN6_g in cell = 1/cell;
  species PTPN6_p in cell = 1/cell;
  species PTPN6_rna in cell = 1/cell;
  species RAC1 in cell = 1/cell;
  species RAC1_g in cell = 1/cell;
  species RAC1_p in cell = 1/cell;
  species RAC1_rna in cell = 1/cell;
  species RHOA in cell = 1/cell;
  species RHOA_g in cell = 1/cell;
  species RHOA_p in cell = 1/cell;
  species RHOA_rna in cell = 1/cell;
  species RNF7 in cell = 1/cell;
  species RNF7_g in cell = 1/cell;
  species RNF7_rna in cell = 1/cell;
  species ROCK1 in cell = 1/cell;
  species ROCK1_g in cell = 1/cell;
  species ROCK1_rna in cell = 1/cell;
  species ROCK2 in cell = 1/cell;
  species ROCK2_g in cell = 1/cell;
  species ROCK2_rna in cell = 1/cell;
  species RORA in cell = 1/cell;
  species RORA_g in cell = 1/cell;
  species RORA_p in cell = 1/cell;
  species RORA_rna in cell = 1/cell;
  species RPS6KA3 in cell = 1/cell;
  species RPS6KA3_g in cell = 1/cell;
  species RPS6KA3_p in cell = 1/cell;
  species RPS6KA3_rna in cell = 1/cell;
  species RUNX2 in cell = 1/cell;
  species RUNX2_g in cell = 1/cell;
  species RUNX2_p in cell = 1/cell;
  species RUNX2_rna in cell = 1/cell;
  species SIRT1 in cell = 1/cell;
  species SIRT1_g in cell = 1/cell;
  species SIRT1_p in cell = 1/cell;
  species SIRT1_rna in cell = 1/cell;
  species SIRT7 in cell = 1/cell;
  species SIRT7_g in cell = 1/cell;
  species SIRT7_p in cell = 1/cell;
  species SIRT7_rna in cell = 1/cell;
  species SMAD2 in cell = 1/cell;
  species SMAD2_g in cell = 1/cell;
  species SMAD2_p in cell = 1/cell;
  species SMAD2_rna in cell = 1/cell;
  species SMAD3 in cell = 1/cell;
  species SMAD3_g in cell = 1/cell;
  species SMAD3_p in cell = 1/cell;
  species SMAD3_rna in cell = 1/cell;
  species SOCS3 in cell = 1/cell;
  species SOCS3_g in cell = 1/cell;
  species SOCS3_rna in cell = 1/cell;
  species SOD1 in cell = 1/cell;
  species SOD1_g in cell = 1/cell;
  species SOD1_rna in cell = 1/cell;
  species SOD2 in cell = 1/cell;
  species SOD2_g in cell = 1/cell;
  species SOD2_rna in cell = 1/cell;
  species STAT1 in cell = 1/cell;
  species STAT1_g in cell = 1/cell;
  species STAT1_p in cell = 1/cell;
  species STAT1_rna in cell = 1/cell;
  species STAT3 in cell = 1/cell;
  species STAT3_g in cell = 1/cell;
  species STAT3_p in cell = 1/cell;
  species STAT3_rna in cell = 1/cell;
  species STAT5A in cell = 1/cell;
  species STAT5A_g in cell = 1/cell;
  species STAT5A_p in cell = 1/cell;
  species STAT5A_rna in cell = 1/cell;
  species STK11 in cell = 1/cell;
  species STK11_g in cell = 1/cell;
  species STK11_p in cell = 1/cell;
  species STK11_rna in cell = 1/cell;
  species STK4 in cell = 1/cell;
  species STK4_g in cell = 1/cell;
  species STK4_p in cell = 1/cell;
  species STK4_rna in cell = 1/cell;
  species TGFB1 in cell = 1/cell;
  species TGFB1_g in cell = 1/cell;
  species TGFB1_rna in cell = 1/cell;
  species TGFBR1 in cell = 1/cell;
  species TGFBR1_g in cell = 1/cell;
  species TGFBR1_rna in cell = 1/cell;
  species TXNIP in cell = 1/cell;
  species TXNIP_g in cell = 1/cell;
  species TXNIP_p in cell = 1/cell;
  species TXNIP_rna in cell = 1/cell;
  species VIM in cell = 1/cell;
  species VIM_g in cell = 1/cell;
  species VIM_p in cell = 1/cell;
  species VIM_rna in cell = 1/cell;
  species XBP1 in cell = 1/cell;
  species XBP1_g in cell = 1/cell;
  species XBP1_p in cell = 1/cell;
  species XBP1_rna in cell = 1/cell;
  species ZFP36 in cell = 1/cell;
  species ZFP36_g in cell = 1/cell;
  species ZFP36_p in cell = 1/cell;
  species ZFP36_rna in cell = 1/cell;

  // Reactions:
  // V(1) = K(1,1) * [NR3C1] * [STAT5A_p] -K(1,2) * [SIGNOR-C84];
  R1: STAT5A_p => NR3C1; 1;
  // V(2) = K(2,1) * [JUN_p] * [SMAD3_p] -K(2,2) * [SIGNOR-C86];
  R2: JUN_p => SMAD3_p; 1;
  // V(3) = K(3,1) * [STAT1_p] * [STAT3_p] -K(3,2) * [SIGNOR-C118];
  R3: STAT3_p => STAT1_p; 1;
  // V(4) = K(4,1) * [SIGNOR-C118] * [JAK1_p] -K(4,2) * [SIGNOR-C120];
  R4: JAK1_p => ; 1;
  // V(5) = K(5,1) * [FOS_p] * [JUN_p] * [JUN_p] * [FOS_p] * [JUN_p] * [FOS_p] * [FOS_p] * [JUN_p] -K(5,2) * [SIGNOR-C154];
  R5: JUN_p => FOS_p; 1;
  // V(6) = K(6,1) * [PIK3R1_p] * [PIK3CA] -K(6,2) * [SIGNOR-C156];
  R6: PIK3CA => PIK3R1_p; 1;
  // V(7) = K(7,1) * [TGFBR1] * [SMAD2] -K(7,2) * [TGFBR1 |SMAD2];
  R7: TGFBR1 => SMAD2; 1;
  // V(8) = K(8,1) * [TGFBR1 |SMAD2];
  R8: TGFBR1 => SMAD2; 1;
  // V(9) = K(9,1) * [MAPK1_p] * [EP300] -K(9,2) * [MAPK1_p |EP300];
  R9: EP300 => MAPK1_p; 1;
  // V(10) = K(10,1) * [MAPK1_p |EP300];
  R10: EP300 => MAPK1_p; 1;
  // V(11) = K(11,1) * [MAPK1_p] * [HIF1A] -K(11,2) * [MAPK1_p |HIF1A];
  R11: HIF1A => MAPK1_p; 1;
  // V(12) = K(12,1) * [MAPK1_p |HIF1A];
  R12: HIF1A => MAPK1_p; 1;
  // V(13) = K(13,1) * [MAPK1_p] * [NR3C1] -K(13,2) * [MAPK1_p |NR3C1];
  R13: NR3C1 => MAPK1_p; 1;
  // V(14) = K(14,1) * [MAPK1_p |NR3C1];
  R14: NR3C1 => MAPK1_p; 1;
  // V(15) = K(15,1) * [MAPK1_p] * [RPS6KA3] -K(15,2) * [MAPK1_p |RPS6KA3];
  R15: RPS6KA3 => MAPK1_p; 1;
  // V(16) = K(16,1) * [MAPK1_p |RPS6KA3];
  R16: RPS6KA3 => MAPK1_p; 1;
  // V(17) = K(17,1) * [AKT1_p] * [FOXO1] -K(17,2) * [AKT1_p |FOXO1];
  R17: FOXO1 => AKT1_p; 1;
  // V(18) = K(18,1) * [AKT1_p |FOXO1];
  R18: FOXO1 => AKT1_p; 1;
  // V(19) = K(19,1) * [MAPK1_p] * [PRDX6] -K(19,2) * [MAPK1_p |PRDX6];
  R19: PRDX6 => MAPK1_p; 1;
  // V(20) = K(20,1) * [MAPK1_p |PRDX6];
  R20: PRDX6 => MAPK1_p; 1;
  // V(21) = K(21,1) * [FYN_p] * [STK11] -K(21,2) * [FYN_p |STK11];
  R21: FYN_p => STK11; 1;
  // V(22) = K(22,1) * [FYN_p |STK11];
  R22: FYN_p => STK11; 1;
  // V(23) = K(23,1) * [PRKCA_p] * [CTNNB1] -K(23,2) * [PRKCA_p |CTNNB1];
  R23: CTNNB1 => PRKCA_p; 1;
  // V(24) = K(24,1) * [PRKCA_p |CTNNB1];
  R24: CTNNB1 => PRKCA_p; 1;
  // V(25) = K(25,1) * [AKT1_p] * [MDM2] -K(25,2) * [AKT1_p |MDM2];
  R25: AKT1_p => MDM2; 1;
  // V(26) = K(26,1) * [AKT1_p |MDM2];
  R26: AKT1_p => MDM2; 1;
  // V(27) = K(27,1) * [AKT1_p] * [PRKAA1] -K(27,2) * [AKT1_p |PRKAA1];
  R27: PRKAA1 => AKT1_p; 1;
  // V(28) = K(28,1) * [AKT1_p |PRKAA1];
  R28: PRKAA1 => AKT1_p; 1;
  // V(29) = K(29,1) * [IKBKB] * [IKBKB] -K(29,2) * [IKBKB |IKBKB];
  R29: IKBKB => ; 1;
  // V(30) = K(30,1) * [IKBKB |IKBKB];
  R30: IKBKB => ; 1;
  // V(31) = K(31,1) * [PRKCA_p] * [VIM] -K(31,2) * [PRKCA_p |VIM];
  R31: PRKCA_p => VIM; 1;
  // V(32) = K(32,1) * [PRKCA_p |VIM];
  R32: PRKCA_p => VIM; 1;
  // V(33) = K(33,1) * [MAPK1_p] * [CDKN1B] -K(33,2) * [MAPK1_p |CDKN1B];
  R33: CDKN1B => MAPK1_p; 1;
  // V(34) = K(34,1) * [MAPK1_p |CDKN1B];
  R34: CDKN1B => MAPK1_p; 1;
  // V(35) = K(35,1) * [PRKCA_p] * [PTPN6] -K(35,2) * [PRKCA_p |PTPN6];
  R35: PTPN6 => PRKCA_p; 1;
  // V(36) = K(36,1) * [PRKCA_p |PTPN6];
  R36: PTPN6 => PRKCA_p; 1;
  // V(37) = K(37,1) * [MAPK1_p] * [STK11] -K(37,2) * [MAPK1_p |STK11];
  R37: STK11 => MAPK1_p; 1;
  // V(38) = K(38,1) * [MAPK1_p |STK11];
  R38: STK11 => MAPK1_p; 1;
  // V(39) = K(39,1) * [MAPK1_p] * [JUN] -K(39,2) * [MAPK1_p |JUN];
  R39: JUN => MAPK1_p; 1;
  // V(40) = K(40,1) * [MAPK1_p |JUN];
  R40: JUN => MAPK1_p; 1;
  // V(41) = K(41,1) * [PRKCA_p] * [NCF1] -K(41,2) * [PRKCA_p |NCF1];
  R41: NCF1 => PRKCA_p; 1;
  // V(42) = K(42,1) * [PRKCA_p |NCF1];
  R42: NCF1 => PRKCA_p; 1;
  // V(43) = K(43,1) * [FYN_p] * [CTLA4] -K(43,2) * [FYN_p |CTLA4];
  R43: FYN_p => CTLA4; 1;
  // V(44) = K(44,1) * [FYN_p |CTLA4];
  R44: FYN_p => CTLA4; 1;
  // V(45) = K(45,1) * [AKT1_p] * [NR4A1] -K(45,2) * [AKT1_p |NR4A1];
  R45: NR4A1 => AKT1_p; 1;
  // V(46) = K(46,1) * [AKT1_p |NR4A1];
  R46: NR4A1 => AKT1_p; 1;
  // V(47) = K(47,1) * [MAPK1_p] * [FOS] -K(47,2) * [MAPK1_p |FOS];
  R47: FOS => MAPK1_p; 1;
  // V(48) = K(48,1) * [MAPK1_p |FOS];
  R48: FOS => MAPK1_p; 1;
  // V(49) = K(49,1) * [STK11_p] * [STK11] -K(49,2) * [STK11_p |STK11];
  R49: STK11_p => STK11; 1;
  // V(50) = K(50,1) * [STK11_p |STK11];
  R50: STK11_p => STK11; 1;
  // V(51) = K(51,1) * [JAK3_p] * [CTNNB1] -K(51,2) * [JAK3_p |CTNNB1];
  R51: CTNNB1 => JAK3_p; 1;
  // V(52) = K(52,1) * [JAK3_p |CTNNB1];
  R52: CTNNB1 => JAK3_p; 1;
  // V(53) = K(53,1) * [FYN_p] * [PTPN6] -K(53,2) * [FYN_p |PTPN6];
  R53: FYN_p => PTPN6; 1;
  // V(54) = K(54,1) * [FYN_p |PTPN6];
  R54: FYN_p => PTPN6; 1;
  // V(55) = K(55,1) * [MAPK1_p] * [SMAD2] -K(55,2) * [MAPK1_p |SMAD2];
  R55: SMAD2 => MAPK1_p; 1;
  // V(56) = K(56,1) * [MAPK1_p |SMAD2];
  R56: SMAD2 => MAPK1_p; 1;
  // V(57) = K(57,1) * [MAPK1_p] * [RORA] -K(57,2) * [MAPK1_p |RORA];
  R57: RORA => MAPK1_p; 1;
  // V(58) = K(58,1) * [MAPK1_p |RORA];
  R58: RORA => MAPK1_p; 1;
  // V(59) = K(59,1) * [MAPK9_p] * [JUN] -K(59,2) * [MAPK9_p |JUN];
  R59: JUN => MAPK9_p; 1;
  // V(60) = K(60,1) * [MAPK9_p |JUN];
  R60: JUN => MAPK9_p; 1;
  // V(61) = K(61,1) * [MAPK1_p] * [BCL2] -K(61,2) * [MAPK1_p |BCL2];
  R61: BCL2 => MAPK1_p; 1;
  // V(62) = K(62,1) * [MAPK1_p |BCL2];
  R62: BCL2 => MAPK1_p; 1;
  // V(63) = K(63,1) * [AKT1_p] * [BAD] -K(63,2) * [AKT1_p |BAD];
  R63: BAD => AKT1_p; 1;
  // V(64) = K(64,1) * [AKT1_p |BAD];
  R64: BAD => AKT1_p; 1;
  // V(65) = K(65,1) * [MAPK1_p] * [NCF1] -K(65,2) * [MAPK1_p |NCF1];
  R65: NCF1 => MAPK1_p; 1;
  // V(66) = K(66,1) * [MAPK1_p |NCF1];
  R66: NCF1 => MAPK1_p; 1;
  // V(67) = K(67,1) * [JAK1_p] * [STAT1] -K(67,2) * [JAK1_p |STAT1];
  R67: STAT1 => JAK1_p; 1;
  // V(68) = K(68,1) * [JAK1_p |STAT1];
  R68: STAT1 => JAK1_p; 1;
  // V(69) = K(69,1) * [MAPK1_p] * [DUSP1] -K(69,2) * [MAPK1_p |DUSP1];
  R69: DUSP1 => MAPK1_p; 1;
  // V(70) = K(70,1) * [MAPK1_p |DUSP1];
  R70: DUSP1 => MAPK1_p; 1;
  // V(71) = K(71,1) * [AKT1_p] * [HSPB1] -K(71,2) * [AKT1_p |HSPB1];
  R71: HSPB1 => AKT1_p; 1;
  // V(72) = K(72,1) * [AKT1_p |HSPB1];
  R72: HSPB1 => AKT1_p; 1;
  // V(73) = K(73,1) * [AKT1_p] * [NCF1] -K(73,2) * [AKT1_p |NCF1];
  R73: NCF1 => AKT1_p; 1;
  // V(74) = K(74,1) * [AKT1_p |NCF1];
  R74: NCF1 => AKT1_p; 1;
  // V(75) = K(75,1) * [RPS6KA3_p] * [HMGN1] -K(75,2) * [RPS6KA3_p |HMGN1];
  R75: HMGN1 => RPS6KA3_p; 1;
  // V(76) = K(76,1) * [RPS6KA3_p |HMGN1];
  R76: HMGN1 => RPS6KA3_p; 1;
  // V(77) = K(77,1) * [PKN1_p] * [PKN1] -K(77,2) * [PKN1_p |PKN1];
  R77: PKN1 => PKN1_p; 1;
  // V(78) = K(78,1) * [PKN1_p |PKN1];
  R78: PKN1 => PKN1_p; 1;
  // V(79) = K(79,1) * [JAK3_p] * [STAT5A] -K(79,2) * [JAK3_p |STAT5A];
  R79: JAK3_p => STAT5A; 1;
  // V(80) = K(80,1) * [JAK3_p |STAT5A];
  R80: JAK3_p => STAT5A; 1;
  // V(81) = K(81,1) * [JAK3_p] * [JAK1] -K(81,2) * [JAK3_p |JAK1];
  R81: JAK1 => JAK3_p; 1;
  // V(82) = K(82,1) * [JAK3_p |JAK1];
  R82: JAK1 => JAK3_p; 1;
  // V(83) = K(83,1) * [STK4_p] * [FOXO1] -K(83,2) * [STK4_p |FOXO1];
  R83: STK4_p => FOXO1; 1;
  // V(84) = K(84,1) * [STK4_p |FOXO1];
  R84: STK4_p => FOXO1; 1;
  // V(85) = K(85,1) * [MAPK1_p] * [RHOA] -K(85,2) * [MAPK1_p |RHOA];
  R85: RHOA => MAPK1_p; 1;
  // V(86) = K(86,1) * [MAPK1_p |RHOA];
  R86: RHOA => MAPK1_p; 1;
  // V(87) = K(87,1) * [MAPK1_p] * [FOXO1] -K(87,2) * [MAPK1_p |FOXO1];
  R87: FOXO1 => MAPK1_p; 1;
  // V(88) = K(88,1) * [MAPK1_p |FOXO1];
  R88: FOXO1 => MAPK1_p; 1;
  // V(89) = K(89,1) * [ATR] * [PARP1] -K(89,2) * [ATR |PARP1];
  R89: PARP1 => ATR; 1;
  // V(90) = K(90,1) * [ATR |PARP1];
  R90: PARP1 => ATR; 1;
  // V(91) = K(91,1) * [PRKCA_p] * [PRKCA] -K(91,2) * [PRKCA_p |PRKCA];
  R91: PRKCA => PRKCA_p; 1;
  // V(92) = K(92,1) * [PRKCA_p |PRKCA];
  R92: PRKCA => PRKCA_p; 1;
  // V(93) = K(93,1) * [MAPK1_p] * [SMAD3] -K(93,2) * [MAPK1_p |SMAD3];
  R93: SMAD3 => MAPK1_p; 1;
  // V(94) = K(94,1) * [MAPK1_p |SMAD3];
  R94: SMAD3 => MAPK1_p; 1;
  // V(95) = K(95,1) * [PRKCA_p] * [HMGN1] -K(95,2) * [PRKCA_p |HMGN1];
  R95: HMGN1 => PRKCA_p; 1;
  // V(96) = K(96,1) * [PRKCA_p |HMGN1];
  R96: HMGN1 => PRKCA_p; 1;
  // V(97) = K(97,1) * [ERN1_p] * [ERN1] -K(97,2) * [ERN1_p |ERN1];
  R97: ERN1_p => ERN1; 1;
  // V(98) = K(98,1) * [ERN1_p |ERN1];
  R98: ERN1_p => ERN1; 1;
  // V(99) = K(99,1) * [AKT1_p] * [CDKN1B] -K(99,2) * [AKT1_p |CDKN1B];
  R99: CDKN1B => AKT1_p; 1;
  // V(100) = K(100,1) * [AKT1_p |CDKN1B];
  R100: CDKN1B => AKT1_p; 1;
  // V(101) = K(101,1) * [ATR] * [MDM2] -K(101,2) * [ATR |MDM2];
  R101: ATR => MDM2; 1;
  // V(102) = K(102,1) * [ATR |MDM2];
  R102: ATR => MDM2; 1;
  // V(103) = K(103,1) * [MAPK1_p] * [SIGNOR-C154] -K(103,2) * [MAPK1_p |SIGNOR-C154];
  R103: MAPK1_p => ; 1;
  // V(104) = K(104,1) * [MAPK1_p |SIGNOR-C154];
  R104: MAPK1_p => ; 1;
  // V(105) = K(105,1) * [RPS6KA3_p] * [BAD] -K(105,2) * [RPS6KA3_p |BAD];
  R105: RPS6KA3_p => BAD; 1;
  // V(106) = K(106,1) * [RPS6KA3_p |BAD];
  R106: RPS6KA3_p => BAD; 1;
  // V(107) = K(107,1) * [MAPK9_p] * [CTNNB1] -K(107,2) * [MAPK9_p |CTNNB1];
  R107: CTNNB1 => MAPK9_p; 1;
  // V(108) = K(108,1) * [MAPK9_p |CTNNB1];
  R108: CTNNB1 => MAPK9_p; 1;
  // V(109) = K(109,1) * [AKT1_p] * [RAC1] -K(109,2) * [AKT1_p |RAC1];
  R109: RAC1 => AKT1_p; 1;
  // V(110) = K(110,1) * [AKT1_p |RAC1];
  R110: RAC1 => AKT1_p; 1;
  // V(111) = K(111,1) * [STK4_p] * [STK4] -K(111,2) * [STK4_p |STK4];
  R111: STK4_p => STK4; 1;
  // V(112) = K(112,1) * [STK4_p |STK4];
  R112: STK4_p => STK4; 1;
  // V(113) = K(113,1) * [STK11_p] * [PTEN] -K(113,2) * [STK11_p |PTEN];
  R113: PTEN => STK11_p; 1;
  // V(114) = K(114,1) * [STK11_p |PTEN];
  R114: PTEN => STK11_p; 1;
  // V(115) = K(115,1) * [HIPK2_p] * [HIPK2] -K(115,2) * [HIPK2_p |HIPK2];
  R115: HIPK2_p => HIPK2; 1;
  // V(116) = K(116,1) * [HIPK2_p |HIPK2];
  R116: HIPK2_p => HIPK2; 1;
  // V(117) = K(117,1) * [MAPK9_p] * [FOXO1] -K(117,2) * [MAPK9_p |FOXO1];
  R117: FOXO1 => MAPK9_p; 1;
  // V(118) = K(118,1) * [MAPK9_p |FOXO1];
  R118: FOXO1 => MAPK9_p; 1;
  // V(119) = K(119,1) * [RPS6KA3_p] * [CREB1] -K(119,2) * [RPS6KA3_p |CREB1];
  R119: RPS6KA3_p => CREB1; 1;
  // V(120) = K(120,1) * [RPS6KA3_p |CREB1];
  R120: RPS6KA3_p => CREB1; 1;
  // V(121) = K(121,1) * [PRKCA_p] * [PRKAA1] -K(121,2) * [PRKCA_p |PRKAA1];
  R121: PRKAA1 => PRKCA_p; 1;
  // V(122) = K(122,1) * [PRKCA_p |PRKAA1];
  R122: PRKAA1 => PRKCA_p; 1;
  // V(123) = K(123,1) * [AKT1_p] * [EP300] -K(123,2) * [AKT1_p |EP300];
  R123: EP300 => AKT1_p; 1;
  // V(124) = K(124,1) * [AKT1_p |EP300];
  R124: EP300 => AKT1_p; 1;
  // V(125) = K(125,1) * [IKBKB] * [FOXO1] -K(125,2) * [IKBKB |FOXO1];
  R125: FOXO1 => IKBKB; 1;
  // V(126) = K(126,1) * [IKBKB |FOXO1];
  R126: FOXO1 => IKBKB; 1;
  // V(127) = K(127,1) * [FYN_p] * [FYN] -K(127,2) * [FYN_p |FYN];
  R127: FYN_p => FYN; 1;
  // V(128) = K(128,1) * [FYN_p |FYN];
  R128: FYN_p => FYN; 1;
  // V(129) = K(129,1) * [SIGNOR-C156] * [BAD] -K(129,2) * [SIGNOR-C156 |BAD];
  R129: BAD => ; 1;
  // V(130) = K(130,1) * [SIGNOR-C156 |BAD];
  R130: BAD => ; 1;
  // V(131) = K(131,1) * [AKT1_p] * [VIM] -K(131,2) * [AKT1_p |VIM];
  R131: VIM => AKT1_p; 1;
  // V(132) = K(132,1) * [AKT1_p |VIM];
  R132: VIM => AKT1_p; 1;
  // V(133) = K(133,1) * [PRKAA1_p] * [SIRT7] -K(133,2) * [PRKAA1_p |SIRT7];
  R133: PRKAA1_p => SIRT7; 1;
  // V(134) = K(134,1) * [PRKAA1_p |SIRT7];
  R134: PRKAA1_p => SIRT7; 1;
  // V(135) = K(135,1) * [PRKAA1_p] * [DNMT1] -K(135,2) * [PRKAA1_p |DNMT1];
  R135: DNMT1 => PRKAA1_p; 1;
  // V(136) = K(136,1) * [PRKAA1_p |DNMT1];
  R136: DNMT1 => PRKAA1_p; 1;
  // V(137) = K(137,1) * [IKBKB] * [NFKB1] -K(137,2) * [IKBKB |NFKB1];
  R137: NFKB1 => IKBKB; 1;
  // V(138) = K(138,1) * [IKBKB |NFKB1];
  R138: NFKB1 => IKBKB; 1;
  // V(139) = K(139,1) * [ILK_p] * [AKT1] -K(139,2) * [ILK_p |AKT1];
  R139: ILK_p => AKT1; 1;
  // V(140) = K(140,1) * [ILK_p |AKT1];
  R140: ILK_p => AKT1; 1;
  // V(141) = K(141,1) * [ROCK1] * [PTEN] -K(141,2) * [ROCK1 |PTEN];
  R141: PTEN => ROCK1; 1;
  // V(142) = K(142,1) * [ROCK1 |PTEN];
  R142: PTEN => ROCK1; 1;
  // V(143) = K(143,1) * [MAPK1_p] * [STAT5A] -K(143,2) * [MAPK1_p |STAT5A];
  R143: STAT5A => MAPK1_p; 1;
  // V(144) = K(144,1) * [MAPK1_p |STAT5A];
  R144: STAT5A => MAPK1_p; 1;
  // V(145) = K(145,1) * [MAPK1_p] * [BAD] -K(145,2) * [MAPK1_p |BAD];
  R145: BAD => MAPK1_p; 1;
  // V(146) = K(146,1) * [MAPK1_p |BAD];
  R146: BAD => MAPK1_p; 1;
  // V(147) = K(147,1) * [PRKAA1_p] * [FOXO1] -K(147,2) * [PRKAA1_p |FOXO1];
  R147: FOXO1 => PRKAA1_p; 1;
  // V(148) = K(148,1) * [PRKAA1_p |FOXO1];
  R148: FOXO1 => PRKAA1_p; 1;
  // V(149) = K(149,1) * [JAK3_p] * [JAK3] -K(149,2) * [JAK3_p |JAK3];
  R149: JAK3_p => JAK3; 1;
  // V(150) = K(150,1) * [JAK3_p |JAK3];
  R150: JAK3_p => JAK3; 1;
  // V(151) = K(151,1) * [JAK1_p] * [STAT3] -K(151,2) * [JAK1_p |STAT3];
  R151: STAT3 => JAK1_p; 1;
  // V(152) = K(152,1) * [JAK1_p |STAT3];
  R152: STAT3 => JAK1_p; 1;
  // V(153) = K(153,1) * [MAPK1_p] * [PARP1] -K(153,2) * [MAPK1_p |PARP1];
  R153: PARP1 => MAPK1_p; 1;
  // V(154) = K(154,1) * [MAPK1_p |PARP1];
  R154: PARP1 => MAPK1_p; 1;
  // V(155) = K(155,1) * [AKT1_p] * [NR3C1] -K(155,2) * [AKT1_p |NR3C1];
  R155: AKT1_p => NR3C1; 1;
  // V(156) = K(156,1) * [AKT1_p |NR3C1];
  R156: AKT1_p => NR3C1; 1;
  // V(157) = K(157,1) * [PRKCA_p] * [ANXA1] -K(157,2) * [PRKCA_p |ANXA1];
  R157: PRKCA_p => ANXA1; 1;
  // V(158) = K(158,1) * [PRKCA_p |ANXA1];
  R158: PRKCA_p => ANXA1; 1;
  // V(159) = K(159,1) * [PKN1_p] * [FOXO1] -K(159,2) * [PKN1_p |FOXO1];
  R159: FOXO1 => PKN1_p; 1;
  // V(160) = K(160,1) * [PKN1_p |FOXO1];
  R160: FOXO1 => PKN1_p; 1;
  // V(161) = K(161,1) * [STK4_p] * [PIK3CA] -K(161,2) * [STK4_p |PIK3CA];
  R161: STK4_p => PIK3CA; 1;
  // V(162) = K(162,1) * [STK4_p |PIK3CA];
  R162: STK4_p => PIK3CA; 1;
  // V(163) = K(163,1) * [SIGNOR-C156] * [AKT1] -K(163,2) * [SIGNOR-C156 |AKT1];
  R163: AKT1 => ; 1;
  // V(164) = K(164,1) * [SIGNOR-C156 |AKT1];
  R164: AKT1 => ; 1;
  // V(165) = K(165,1) * [STK4_p] * [IRF3] -K(165,2) * [STK4_p |IRF3];
  R165: STK4_p => IRF3; 1;
  // V(166) = K(166,1) * [STK4_p |IRF3];
  R166: STK4_p => IRF3; 1;
  // V(167) = K(167,1) * [RPS6KA3_p] * [FOS] -K(167,2) * [RPS6KA3_p |FOS];
  R167: RPS6KA3_p => FOS; 1;
  // V(168) = K(168,1) * [RPS6KA3_p |FOS];
  R168: RPS6KA3_p => FOS; 1;
  // V(169) = K(169,1) * [AKT1_p] * [RPS6KA3] -K(169,2) * [AKT1_p |RPS6KA3];
  R169: RPS6KA3 => AKT1_p; 1;
  // V(170) = K(170,1) * [AKT1_p |RPS6KA3];
  R170: RPS6KA3 => AKT1_p; 1;
  // V(171) = K(171,1) * [AKT1_p] * [DNMT1] -K(171,2) * [AKT1_p |DNMT1];
  R171: DNMT1 => AKT1_p; 1;
  // V(172) = K(172,1) * [AKT1_p |DNMT1];
  R172: DNMT1 => AKT1_p; 1;
  // V(173) = K(173,1) * [STK11_p] * [SIRT1] -K(173,2) * [STK11_p |SIRT1];
  R173: STK11_p => SIRT1; 1;
  // V(174) = K(174,1) * [STK11_p |SIRT1];
  R174: STK11_p => SIRT1; 1;
  // V(175) = K(175,1) * [RPS6KA3_p] * [RPS6KA3] -K(175,2) * [RPS6KA3_p |RPS6KA3];
  R175: RPS6KA3_p => RPS6KA3; 1;
  // V(176) = K(176,1) * [RPS6KA3_p |RPS6KA3];
  R176: RPS6KA3_p => RPS6KA3; 1;
  // V(177) = K(177,1) * [PRKAA1_p] * [EP300] -K(177,2) * [PRKAA1_p |EP300];
  R177: PRKAA1_p => EP300; 1;
  // V(178) = K(178,1) * [PRKAA1_p |EP300];
  R178: PRKAA1_p => EP300; 1;
  // V(179) = K(179,1) * [HIPK2_p] * [MECP2] -K(179,2) * [HIPK2_p |MECP2];
  R179: MECP2 => HIPK2_p; 1;
  // V(180) = K(180,1) * [HIPK2_p |MECP2];
  R180: MECP2 => HIPK2_p; 1;
  // V(181) = K(181,1) * [AKT1_p] * [CTNNB1] -K(181,2) * [AKT1_p |CTNNB1];
  R181: CTNNB1 => AKT1_p; 1;
  // V(182) = K(182,1) * [AKT1_p |CTNNB1];
  R182: CTNNB1 => AKT1_p; 1;
  // V(183) = K(183,1) * [PRKCA_p] * [CYBA] -K(183,2) * [PRKCA_p |CYBA];
  R183: PRKCA_p => CYBA; 1;
  // V(184) = K(184,1) * [PRKCA_p |CYBA];
  R184: PRKCA_p => CYBA; 1;
  // V(185) = K(185,1) * [AKT1_p] * [STK4] -K(185,2) * [AKT1_p |STK4];
  R185: STK4 => AKT1_p; 1;
  // V(186) = K(186,1) * [AKT1_p |STK4];
  R186: STK4 => AKT1_p; 1;
  // V(187) = K(187,1) * [RPS6KA3_p] * [NR4A1] -K(187,2) * [RPS6KA3_p |NR4A1];
  R187: NR4A1 => RPS6KA3_p; 1;
  // V(188) = K(188,1) * [RPS6KA3_p |NR4A1];
  R188: NR4A1 => RPS6KA3_p; 1;
  // V(189) = K(189,1) * [PRKAA1_p] * [SIRT1] -K(189,2) * [PRKAA1_p |SIRT1];
  R189: PRKAA1_p => SIRT1; 1;
  // V(190) = K(190,1) * [PRKAA1_p |SIRT1];
  R190: PRKAA1_p => SIRT1; 1;
  // V(191) = K(191,1) * [PRKCA_p] * [BAD] -K(191,2) * [PRKCA_p |BAD];
  R191: PRKCA_p => BAD; 1;
  // V(192) = K(192,1) * [PRKCA_p |BAD];
  R192: PRKCA_p => BAD; 1;
  // V(193) = K(193,1) * [STK4_p] * [PRKCA] -K(193,2) * [STK4_p |PRKCA];
  R193: STK4_p => PRKCA; 1;
  // V(194) = K(194,1) * [STK4_p |PRKCA];
  R194: STK4_p => PRKCA; 1;
  // V(195) = K(195,1) * [AKT1_p] * [RUNX2] -K(195,2) * [AKT1_p |RUNX2];
  R195: RUNX2 => AKT1_p; 1;
  // V(196) = K(196,1) * [AKT1_p |RUNX2];
  R196: RUNX2 => AKT1_p; 1;
  // V(197) = K(197,1) * [MAPK1_p] * [MAPK1] -K(197,2) * [MAPK1_p |MAPK1];
  R197: MAPK1 => MAPK1_p; 1;
  // V(198) = K(198,1) * [MAPK1_p |MAPK1];
  R198: MAPK1 => MAPK1_p; 1;
  // V(199) = K(199,1) * [MAPK9_p] * [SMAD3] -K(199,2) * [MAPK9_p |SMAD3];
  R199: SMAD3 => MAPK9_p; 1;
  // V(200) = K(200,1) * [MAPK9_p |SMAD3];
  R200: SMAD3 => MAPK9_p; 1;
  // V(201) = K(201,1) * [MAPK1_p] * [ZFP36] -K(201,2) * [MAPK1_p |ZFP36];
  R201: ZFP36 => MAPK1_p; 1;
  // V(202) = K(202,1) * [MAPK1_p |ZFP36];
  R202: ZFP36 => MAPK1_p; 1;
  // V(203) = K(203,1) * [AKT1_p] * [MAPKAP1] -K(203,2) * [AKT1_p |MAPKAP1];
  R203: MAPKAP1 => AKT1_p; 1;
  // V(204) = K(204,1) * [AKT1_p |MAPKAP1];
  R204: MAPKAP1 => AKT1_p; 1;
  // V(205) = K(205,1) * [AKT1_p] * [PARK7] -K(205,2) * [AKT1_p |PARK7];
  R205: AKT1_p => PARK7; 1;
  // V(206) = K(206,1) * [AKT1_p |PARK7];
  R206: AKT1_p => PARK7; 1;
  // V(207) = K(207,1) * [PRKAA1_p] * [HIPK2] -K(207,2) * [PRKAA1_p |HIPK2];
  R207: PRKAA1_p => HIPK2; 1;
  // V(208) = K(208,1) * [PRKAA1_p |HIPK2];
  R208: PRKAA1_p => HIPK2; 1;
  // V(209) = K(209,1) * [PRKAA1_p] * [DDIT3] -K(209,2) * [PRKAA1_p |DDIT3];
  R209: DDIT3 => PRKAA1_p; 1;
  // V(210) = K(210,1) * [PRKAA1_p |DDIT3];
  R210: DDIT3 => PRKAA1_p; 1;
  // V(211) = K(211,1) * [ROCK1] * [BECN1] -K(211,2) * [ROCK1 |BECN1];
  R211: ROCK1 => BECN1; 1;
  // V(212) = K(212,1) * [ROCK1 |BECN1];
  R212: ROCK1 => BECN1; 1;
  // V(213) = K(213,1) * [MAPK1_p] * [XBP1] -K(213,2) * [MAPK1_p |XBP1];
  R213: XBP1 => MAPK1_p; 1;
  // V(214) = K(214,1) * [MAPK1_p |XBP1];
  R214: XBP1 => MAPK1_p; 1;
  // V(215) = K(215,1) * [HIPK2_p] * [EP300] -K(215,2) * [HIPK2_p |EP300];
  R215: EP300 => HIPK2_p; 1;
  // V(216) = K(216,1) * [HIPK2_p |EP300];
  R216: EP300 => HIPK2_p; 1;
  // V(217) = K(217,1) * [PKM_p] * [STAT3] -K(217,2) * [PKM_p |STAT3];
  R217: PKM_p => STAT3; 1;
  // V(218) = K(218,1) * [PKM_p |STAT3];
  R218: PKM_p => STAT3; 1;
  // V(219) = K(219,1) * [AKT1_p] * [AKT1] -K(219,2) * [AKT1_p |AKT1];
  R219: AKT1 => AKT1_p; 1;
  // V(220) = K(220,1) * [AKT1_p |AKT1];
  R220: AKT1 => AKT1_p; 1;
  // V(221) = K(221,1) * [JAK1_p] * [PTPN11] -K(221,2) * [JAK1_p |PTPN11];
  R221: PTPN11 => JAK1_p; 1;
  // V(222) = K(222,1) * [JAK1_p |PTPN11];
  R222: PTPN11 => JAK1_p; 1;
  // V(223) = K(223,1) * [STK4_p] * [BECN1] -K(223,2) * [STK4_p |BECN1];
  R223: STK4_p => BECN1; 1;
  // V(224) = K(224,1) * [STK4_p |BECN1];
  R224: STK4_p => BECN1; 1;
  // V(225) = K(225,1) * [STK4_p] * [PRDX1] -K(225,2) * [STK4_p |PRDX1];
  R225: STK4_p => PRDX1; 1;
  // V(226) = K(226,1) * [STK4_p |PRDX1];
  R226: STK4_p => PRDX1; 1;
  // V(227) = K(227,1) * [PRKAA1_p] * [MFF] -K(227,2) * [PRKAA1_p |MFF];
  R227: PRKAA1_p => MFF; 1;
  // V(228) = K(228,1) * [PRKAA1_p |MFF];
  R228: PRKAA1_p => MFF; 1;
  // V(229) = K(229,1) * [PRKCA_p] * [ADD3] -K(229,2) * [PRKCA_p |ADD3];
  R229: ADD3 => PRKCA_p; 1;
  // V(230) = K(230,1) * [PRKCA_p |ADD3];
  R230: ADD3 => PRKCA_p; 1;
  // V(231) = K(231,1) * [PIK3CA] * [AKT1] -K(231,2) * [PIK3CA |AKT1];
  R231: PIK3CA => AKT1; 1;
  // V(232) = K(232,1) * [PIK3CA |AKT1];
  R232: PIK3CA => AKT1; 1;
  // V(233) = K(233,1) * [AKT1_p] * [CREB1] -K(233,2) * [AKT1_p |CREB1];
  R233: CREB1 => AKT1_p; 1;
  // V(234) = K(234,1) * [AKT1_p |CREB1];
  R234: CREB1 => AKT1_p; 1;
  // V(235) = K(235,1) * [AKT1_p] * [MAPK1] -K(235,2) * [AKT1_p |MAPK1];
  R235: MAPK1 => AKT1_p; 1;
  // V(236) = K(236,1) * [AKT1_p |MAPK1];
  R236: MAPK1 => AKT1_p; 1;
  // V(237) = K(237,1) * [ROCK1] * [VIM] -K(237,2) * [ROCK1 |VIM];
  R237: ROCK1 => VIM; 1;
  // V(238) = K(238,1) * [ROCK1 |VIM];
  R238: ROCK1 => VIM; 1;
  // V(239) = K(239,1) * [PRKCA_p] * [NFE2L2] -K(239,2) * [PRKCA_p |NFE2L2];
  R239: PRKCA_p => NFE2L2; 1;
  // V(240) = K(240,1) * [PRKCA_p |NFE2L2];
  R240: PRKCA_p => NFE2L2; 1;
  // V(241) = K(241,1) * [STK4_p] * [SIRT1] -K(241,2) * [STK4_p |SIRT1];
  R241: STK4_p => SIRT1; 1;
  // V(242) = K(242,1) * [STK4_p |SIRT1];
  R242: STK4_p => SIRT1; 1;
  // V(243) = K(243,1) * [MAPK9_p] * [BCL2] -K(243,2) * [MAPK9_p |BCL2];
  R243: BCL2 => MAPK9_p; 1;
  // V(244) = K(244,1) * [MAPK9_p |BCL2];
  R244: BCL2 => MAPK9_p; 1;
  // V(245) = K(245,1) * [ATR] * [CREB1] -K(245,2) * [ATR |CREB1];
  R245: ATR => CREB1; 1;
  // V(246) = K(246,1) * [ATR |CREB1];
  R246: ATR => CREB1; 1;
  // V(247) = K(247,1) * [TGFBR1] * [SMAD3] -K(247,2) * [TGFBR1 |SMAD3];
  R247: TGFBR1 => SMAD3; 1;
  // V(248) = K(248,1) * [TGFBR1 |SMAD3];
  R248: TGFBR1 => SMAD3; 1;
  // V(249) = K(249,1) * [STK11_p] * [PRKAA1] -K(249,2) * [STK11_p |PRKAA1];
  R249: PRKAA1 => STK11_p; 1;
  // V(250) = K(250,1) * [STK11_p |PRKAA1];
  R250: PRKAA1 => STK11_p; 1;
  // V(251) = K(251,1) * [FYN_p] * [CTNNB1] -K(251,2) * [FYN_p |CTNNB1];
  R251: FYN_p => CTNNB1; 1;
  // V(252) = K(252,1) * [FYN_p |CTNNB1];
  R252: FYN_p => CTNNB1; 1;
  // V(253) = K(253,1) * [PRKCA_p] * [BCL2] -K(253,2) * [PRKCA_p |BCL2];
  R253: PRKCA_p => BCL2; 1;
  // V(254) = K(254,1) * [PRKCA_p |BCL2];
  R254: PRKCA_p => BCL2; 1;
  // V(255) = K(255,1) * [PRKCA_p] * [PTPN11] -K(255,2) * [PRKCA_p |PTPN11];
  R255: PTPN11 => PRKCA_p; 1;
  // V(256) = K(256,1) * [PRKCA_p |PTPN11];
  R256: PTPN11 => PRKCA_p; 1;
  // V(257) = K(257,1) * [PRKAA1_p] * [NFE2L2] -K(257,2) * [PRKAA1_p |NFE2L2];
  R257: PRKAA1_p => NFE2L2; 1;
  // V(258) = K(258,1) * [PRKAA1_p |NFE2L2];
  R258: PRKAA1_p => NFE2L2; 1;
  // V(259) = K(259,1) * [HIPK2_p] * [CDKN1B] -K(259,2) * [HIPK2_p |CDKN1B];
  R259: CDKN1B => HIPK2_p; 1;
  // V(260) = K(260,1) * [HIPK2_p |CDKN1B];
  R260: CDKN1B => HIPK2_p; 1;
  // V(261) = K(261,1) * [PRKAA1_p] * [PRKAA1] -K(261,2) * [PRKAA1_p |PRKAA1];
  R261: PRKAA1 => PRKAA1_p; 1;
  // V(262) = K(262,1) * [PRKAA1_p |PRKAA1];
  R262: PRKAA1 => PRKAA1_p; 1;
  // V(263) = K(263,1) * [RPS6KA3_p] * [STK11] -K(263,2) * [RPS6KA3_p |STK11];
  R263: RPS6KA3_p => STK11; 1;
  // V(264) = K(264,1) * [RPS6KA3_p |STK11];
  R264: RPS6KA3_p => STK11; 1;
  // V(265) = K(265,1) * [ERN1_p] * [XBP1] -K(265,2) * [ERN1_p |XBP1];
  R265: ERN1_p => XBP1; 1;
  // V(266) = K(266,1) * [ERN1_p |XBP1];
  R266: ERN1_p => XBP1; 1;
  // V(267) = K(267,1) * [FYN_p] * [RPS6KA3] -K(267,2) * [FYN_p |RPS6KA3];
  R267: FYN_p => RPS6KA3; 1;
  // V(268) = K(268,1) * [FYN_p |RPS6KA3];
  R268: FYN_p => RPS6KA3; 1;
  // V(269) = K(269,1) * [ILK_p] * [ILK] -K(269,2) * [ILK_p |ILK];
  R269: ILK_p => ILK; 1;
  // V(270) = K(270,1) * [ILK_p |ILK];
  R270: ILK_p => ILK; 1;
  // V(271) = K(271,1) * [PRKCA_p] * [RORA] -K(271,2) * [PRKCA_p |RORA];
  R271: PRKCA_p => RORA; 1;
  // V(272) = K(272,1) * [PRKCA_p |RORA];
  R272: PRKCA_p => RORA; 1;
  // V(273) = K(273,1) * [FYN_p] * [NFE2L2] -K(273,2) * [FYN_p |NFE2L2];
  R273: FYN_p => NFE2L2; 1;
  // V(274) = K(274,1) * [FYN_p |NFE2L2];
  R274: FYN_p => NFE2L2; 1;
  // V(275) = K(275,1) * [HIPK2_p] * [MDM2] -K(275,2) * [HIPK2_p |MDM2];
  R275: HIPK2_p => MDM2; 1;
  // V(276) = K(276,1) * [HIPK2_p |MDM2];
  R276: HIPK2_p => MDM2; 1;
  // V(277) = K(277,1) * [ROCK2] * [EP300] -K(277,2) * [ROCK2 |EP300];
  R277: EP300 => ROCK2; 1;
  // V(278) = K(278,1) * [ROCK2 |EP300];
  R278: EP300 => ROCK2; 1;
  // V(279) = K(279,1) * [MAPK1_p] * [STAT3] -K(279,2) * [MAPK1_p |STAT3];
  R279: STAT3 => MAPK1_p; 1;
  // V(280) = K(280,1) * [MAPK1_p |STAT3];
  R280: STAT3 => MAPK1_p; 1;
  // V(281) = K(281,1) * [AKT1_p] * [BECN1] -K(281,2) * [AKT1_p |BECN1];
  R281: BECN1 => AKT1_p; 1;
  // V(282) = K(282,1) * [AKT1_p |BECN1];
  R282: BECN1 => AKT1_p; 1;
  // V(283) = K(283,1) * [MAPK1_p] * [NR4A1] -K(283,2) * [MAPK1_p |NR4A1];
  R283: NR4A1 => MAPK1_p; 1;
  // V(284) = K(284,1) * [MAPK1_p |NR4A1];
  R284: NR4A1 => MAPK1_p; 1;
  // V(285) = K(285,1) * [IKBKB] * [BAD] -K(285,2) * [IKBKB |BAD];
  R285: BAD => IKBKB; 1;
  // V(286) = K(286,1) * [IKBKB |BAD];
  R286: BAD => IKBKB; 1;
  // V(287) = K(287,1) * [JAK1_p] * [JAK3] -K(287,2) * [JAK1_p |JAK3];
  R287: JAK1_p => JAK3; 1;
  // V(288) = K(288,1) * [JAK1_p |JAK3];
  R288: JAK1_p => JAK3; 1;
  // V(289) = K(289,1) * [MAPK1_p] * [TXNIP] -K(289,2) * [MAPK1_p |TXNIP];
  R289: TXNIP => MAPK1_p; 1;
  // V(290) = K(290,1) * [MAPK1_p |TXNIP];
  R290: TXNIP => MAPK1_p; 1;
  // V(291) = K(291,1) * [MAPK9_p] * [STAT3] -K(291,2) * [MAPK9_p |STAT3];
  R291: STAT3 => MAPK9_p; 1;
  // V(292) = K(292,1) * [MAPK9_p |STAT3];
  R292: STAT3 => MAPK9_p; 1;
  // V(293) = K(293,1) * [JAK3_p] * [STAT3] -K(293,2) * [JAK3_p |STAT3];
  R293: STAT3 => JAK3_p; 1;
  // V(294) = K(294,1) * [JAK3_p |STAT3];
  R294: STAT3 => JAK3_p; 1;
  // V(295) = K(295,1) * [PIK3CA] * [PIK3R1] -K(295,2) * [PIK3CA |PIK3R1];
  R295: PIK3CA => PIK3R1; 1;
  // V(296) = K(296,1) * [PIK3CA |PIK3R1];
  R296: PIK3CA => PIK3R1; 1;
  // V(297) = K(297,1) * [AKT1_p] * [BAX] -K(297,2) * [AKT1_p |BAX];
  R297: AKT1_p => BAX; 1;
  // V(298) = K(298,1) * [AKT1_p |BAX];
  R298: AKT1_p => BAX; 1;
  // V(299) = K(299,1) * [PRKAA1_p] * [CDKN1B] -K(299,2) * [PRKAA1_p |CDKN1B];
  R299: CDKN1B => PRKAA1_p; 1;
  // V(300) = K(300,1) * [PRKAA1_p |CDKN1B];
  R300: CDKN1B => PRKAA1_p; 1;
  // V(301) = K(301,1) * [HIPK2_p] * [CREB1] -K(301,2) * [HIPK2_p |CREB1];
  R301: CREB1 => HIPK2_p; 1;
  // V(302) = K(302,1) * [HIPK2_p |CREB1];
  R302: CREB1 => HIPK2_p; 1;
  // V(303) = K(303,1) * [DUSP1_p] * [MAPK9_p] -K(303,2) * [DUSP1_p |MAPK9_p];
  R303: DUSP1_p => MAPK9_p; 1;
  // V(304) = K(304,1) * [DUSP1_p |MAPK9_p];
  R304: DUSP1_p => MAPK9_p; 1;
  // V(305) = K(305,1) * [PTPN2] * [FYN_p] -K(305,2) * [PTPN2 |FYN_p];
  R305: FYN_p => PTPN2; 1;
  // V(306) = K(306,1) * [PTPN2 |FYN_p];
  R306: FYN_p => PTPN2; 1;
  // V(307) = K(307,1) * [PTPN6_p] * [PKM_p] -K(307,2) * [PTPN6_p |PKM_p];
  R307: PTPN6_p => PKM_p; 1;
  // V(308) = K(308,1) * [PTPN6_p |PKM_p];
  R308: PTPN6_p => PKM_p; 1;
  // V(309) = K(309,1) * [DUSP1_p] * [MAPK1_p] -K(309,2) * [DUSP1_p |MAPK1_p];
  R309: DUSP1_p => MAPK1_p; 1;
  // V(310) = K(310,1) * [DUSP1_p |MAPK1_p];
  R310: DUSP1_p => MAPK1_p; 1;
  // V(311) = K(311,1) * [PTPN2] * [JAK1_p] -K(311,2) * [PTPN2 |JAK1_p];
  R311: PTPN2 => JAK1_p; 1;
  // V(312) = K(312,1) * [PTPN2 |JAK1_p];
  R312: PTPN2 => JAK1_p; 1;
  // V(313) = K(313,1) * [PTPN6_p] * [JAK1_p] -K(313,2) * [PTPN6_p |JAK1_p];
  R313: PTPN6_p => JAK1_p; 1;
  // V(314) = K(314,1) * [PTPN6_p |JAK1_p];
  R314: PTPN6_p => JAK1_p; 1;
  // V(315) = K(315,1) * [PTPN2] * [STAT3_p] -K(315,2) * [PTPN2 |STAT3_p];
  R315: STAT3_p => PTPN2; 1;
  // V(316) = K(316,1) * [PTPN2 |STAT3_p];
  R316: STAT3_p => PTPN2; 1;
  // V(317) = K(317,1) * [PTEN_p] * [PTEN_p] -K(317,2) * [PTEN_p |PTEN_p];
  R317: PTEN_p => ; 1;
  // V(318) = K(318,1) * [PTEN_p |PTEN_p];
  R318: PTEN_p => ; 1;
  // V(319) = K(319,1) * [PTPN2] * [STAT1_p] -K(319,2) * [PTPN2 |STAT1_p];
  R319: STAT1_p => PTPN2; 1;
  // V(320) = K(320,1) * [PTPN2 |STAT1_p];
  R320: STAT1_p => PTPN2; 1;
  // V(321) = K(321,1) * [PTPN11_p] * [CDKN1B_p] -K(321,2) * [PTPN11_p |CDKN1B_p];
  R321: PTPN11_p => CDKN1B_p; 1;
  // V(322) = K(322,1) * [PTPN11_p |CDKN1B_p];
  R322: PTPN11_p => CDKN1B_p; 1;
  // V(323) = K(323,1) * [PTPN6_p] * [STAT3_p] -K(323,2) * [PTPN6_p |STAT3_p];
  R323: PTPN6_p => STAT3_p; 1;
  // V(324) = K(324,1) * [PTPN6_p |STAT3_p];
  R324: PTPN6_p => STAT3_p; 1;
  // V(325) = K(325,1) * [PTEN_p] * [IRF3_p] -K(325,2) * [PTEN_p |IRF3_p];
  R325: PTEN_p => IRF3_p; 1;
  // V(326) = K(326,1) * [PTEN_p |IRF3_p];
  R326: PTEN_p => IRF3_p; 1;
  // V(327) = K(327,1) * [PTEN_p] * [STAT5A_p] -K(327,2) * [PTEN_p |STAT5A_p];
  R327: PTEN_p => STAT5A_p; 1;
  // V(328) = K(328,1) * [PTEN_p |STAT5A_p];
  R328: PTEN_p => STAT5A_p; 1;
  // V(329) = K(329,1) * [DUSP1_p] * [RUNX2_p] -K(329,2) * [DUSP1_p |RUNX2_p];
  R329: RUNX2_p => DUSP1_p; 1;
  // V(330) = K(330,1) * [DUSP1_p |RUNX2_p];
  R330: RUNX2_p => DUSP1_p; 1;
  // V(331) = K(331,1) * [PTPN11_p] * [STAT1_p] -K(331,2) * [PTPN11_p |STAT1_p];
  R331: STAT1_p => PTPN11_p; 1;
  // V(332) = K(332,1) * [PTPN11_p |STAT1_p];
  R332: STAT1_p => PTPN11_p; 1;
  // V(333) = K(333,1) * [PTEN_p] * [CREB1_p] -K(333,2) * [PTEN_p |CREB1_p];
  R333: PTEN_p => CREB1_p; 1;
  // V(334) = K(334,1) * [PTEN_p |CREB1_p];
  R334: PTEN_p => CREB1_p; 1;
  // V(335) = K(335,1) * [DUSP1_p] * [JUN_p] -K(335,2) * [DUSP1_p |JUN_p];
  R335: JUN_p => DUSP1_p; 1;
  // V(336) = K(336,1) * [DUSP1_p |JUN_p];
  R336: JUN_p => DUSP1_p; 1;
  // V(337) = K(337,1) * [PTPN6_p] * [CTNNB1_p] -K(337,2) * [PTPN6_p |CTNNB1_p];
  R337: PTPN6_p => CTNNB1_p; 1;
  // V(338) = K(338,1) * [PTPN6_p |CTNNB1_p];
  R338: PTPN6_p => CTNNB1_p; 1;
  // V(339) = K(339,1) * [PTPN11_p] * [STAT3_p] -K(339,2) * [PTPN11_p |STAT3_p];
  R339: STAT3_p => PTPN11_p; 1;
  // V(340) = K(340,1) * [PTPN11_p |STAT3_p];
  R340: STAT3_p => PTPN11_p; 1;
  // V(341) = K(341,1) * [PTPN2] * [STAT5A_p] -K(341,2) * [PTPN2 |STAT5A_p];
  R341: STAT5A_p => PTPN2; 1;
  // V(342) = K(342,1) * [PTPN2 |STAT5A_p];
  R342: STAT5A_p => PTPN2; 1;
  // V(343) = K(343,1) * [PTPN2] * [JAK3_p] -K(343,2) * [PTPN2 |JAK3_p];
  R343: PTPN2 => JAK3_p; 1;
  // V(344) = K(344,1) * [PTPN2 |JAK3_p];
  R344: PTPN2 => JAK3_p; 1;
  // V(345) = K(345,1) * [PTPN6_p] * [JAK3_p] -K(345,2) * [PTPN6_p |JAK3_p];
  R345: PTPN6_p => JAK3_p; 1;
  // V(346) = K(346,1) * [PTPN6_p |JAK3_p];
  R346: PTPN6_p => JAK3_p; 1;
  // V(347) = K(347,1) * [MDM2_p] * [IRF1] -K(347,2) * [MDM2_p |IRF1];
  R347: IRF1 => MDM2_p; 1;
  // V(348) = K(348,1) * [MDM2_p |IRF1];
  R348: IRF1 => MDM2_p; 1;
  // V(349) = K(349,1) * [MDM2_p] * [HIF1A] -K(349,2) * [MDM2_p |HIF1A];
  R349: HIF1A => MDM2_p; 1;
  // V(350) = K(350,1) * [MDM2_p |HIF1A];
  R350: HIF1A => MDM2_p; 1;
  // V(351) = K(351,1) * [RNF7] * [HIF1A] -K(351,2) * [RNF7 |HIF1A];
  R351: HIF1A => RNF7; 1;
  // V(352) = K(352,1) * [RNF7 |HIF1A];
  R352: HIF1A => RNF7; 1;
  // V(353) = K(353,1) * [MDM2_p] * [NUMB] -K(353,2) * [MDM2_p |NUMB];
  R353: MDM2_p => NUMB; 1;
  // V(354) = K(354,1) * [MDM2_p |NUMB];
  R354: MDM2_p => NUMB; 1;
  // V(355) = K(355,1) * [RNF7] * [CDKN1B] -K(355,2) * [RNF7 |CDKN1B];
  R355: CDKN1B => RNF7; 1;
  // V(356) = K(356,1) * [RNF7 |CDKN1B];
  R356: CDKN1B => RNF7; 1;
  // V(357) = K(357,1) * [MDM2_p] * [HDAC1] -K(357,2) * [MDM2_p |HDAC1];
  R357: MDM2_p => HDAC1; 1;
  // V(358) = K(358,1) * [MDM2_p |HDAC1];
  R358: MDM2_p => HDAC1; 1;
  // V(359) = K(359,1) * [CUL3] * [RHOA] -K(359,2) * [CUL3 |RHOA];
  R359: RHOA => CUL3; 1;
  // V(360) = K(360,1) * [CUL3 |RHOA];
  R360: RHOA => CUL3; 1;
  // V(361) = K(361,1) * [RNF7] * [JUN] -K(361,2) * [RNF7 |JUN];
  R361: JUN => RNF7; 1;
  // V(362) = K(362,1) * [RNF7 |JUN];
  R362: JUN => RNF7; 1;
  // V(363) = K(363,1) * [JUN_p] * [TGFB1_g] -K(363,2) * [JUN_p |TGFB1_g];
  R363: JUN_p => TGFB1_g; 1;
  // V(364) = K(364,1) * [JUN_p |TGFB1_g];
  R364: JUN_p => TGFB1_g; 1;
  // V(365) = K(365,1) * [TGFB1_rna];
  R365: TGFB1_rna => ; 1;
  // V(366) = K(366,1) * [NFE2L2_p] * [SOD1_g] -K(366,2) * [NFE2L2_p |SOD1_g];
  R366: SOD1_g => NFE2L2_p; 1;
  // V(367) = K(367,1) * [NFE2L2_p |SOD1_g];
  R367: SOD1_g => NFE2L2_p; 1;
  // V(368) = K(368,1) * [SOD1_rna];
  R368: SOD1_rna => ; 1;
  // V(369) = K(369,1) * [STAT3_p] * [STAT1_p] * [STAT5A_p] * [SOCS3_g] -K(369,2) * [STAT3_p |STAT1_p |STAT5A_p |SOCS3_g];
  R369: STAT3_p => STAT5A_p; 1;
  // V(370) = K(370,1) * [STAT3_p |STAT1_p |STAT5A_p |SOCS3_g];
  R370: STAT3_p => STAT5A_p; 1;
  // V(371) = K(371,1) * [SOCS3_rna];
  R371: SOCS3_rna => ; 1;
  // V(372) = K(372,1) * [FOXO1_p] * [CDKN1B_g] -K(372,2) * [FOXO1_p |CDKN1B_g];
  R372: FOXO1_p => CDKN1B_g; 1;
  // V(373) = K(373,1) * [FOXO1_p |CDKN1B_g];
  R373: FOXO1_p => CDKN1B_g; 1;
  // V(374) = K(374,1) * [CDKN1B_rna];
  R374: CDKN1B_rna => ; 1;
  // V(375) = K(375,1) * [NFE2L2_p] * [CAT_g] -K(375,2) * [NFE2L2_p |CAT_g];
  R375: CAT_g => NFE2L2_p; 1;
  // V(376) = K(376,1) * [NFE2L2_p |CAT_g];
  R376: CAT_g => NFE2L2_p; 1;
  // V(377) = K(377,1) * [CAT_rna];
  R377: CAT_rna => ; 1;
  // V(378) = K(378,1) * [HIF1A_p] * [KDM6B_g] -K(378,2) * [HIF1A_p |KDM6B_g];
  R378: KDM6B_g => HIF1A_p; 1;
  // V(379) = K(379,1) * [HIF1A_p |KDM6B_g];
  R379: KDM6B_g => HIF1A_p; 1;
  // V(380) = K(380,1) * [KDM6B_rna];
  R380: KDM6B_rna => ; 1;
  // V(381) = K(381,1) * [NR3C1] * [KLF9_g] -K(381,2) * [NR3C1 |KLF9_g];
  R381: KLF9_g => NR3C1; 1;
  // V(382) = K(382,1) * [NR3C1 |KLF9_g];
  R382: KLF9_g => NR3C1; 1;
  // V(383) = K(383,1) * [KLF9_rna];
  R383: KLF9_rna => ; 1;
  // V(384) = K(384,1) * [NFE2L2_p] * [GPX4_g] -K(384,2) * [NFE2L2_p |GPX4_g];
  R384: GPX4_g => NFE2L2_p; 1;
  // V(385) = K(385,1) * [NFE2L2_p |GPX4_g];
  R385: GPX4_g => NFE2L2_p; 1;
  // V(386) = K(386,1) * [GPX4_rna];
  R386: GPX4_rna => ; 1;
  // V(387) = K(387,1) * [NFE2L2_p] * [GCLM_g] -K(387,2) * [NFE2L2_p |GCLM_g];
  R387: GCLM_g => NFE2L2_p; 1;
  // V(388) = K(388,1) * [NFE2L2_p |GCLM_g];
  R388: GCLM_g => NFE2L2_p; 1;
  // V(389) = K(389,1) * [GCLM_rna];
  R389: GCLM_rna => ; 1;
  // V(390) = K(390,1) * [NFE2L2_p] * [GSTA1_g] -K(390,2) * [NFE2L2_p |GSTA1_g];
  R390: GSTA1_g => NFE2L2_p; 1;
  // V(391) = K(391,1) * [NFE2L2_p |GSTA1_g];
  R391: GSTA1_g => NFE2L2_p; 1;
  // V(392) = K(392,1) * [GSTA1_rna];
  R392: GSTA1_rna => ; 1;
  // V(393) = K(393,1) * [NFE2L2_p] * [SOD2_g] -K(393,2) * [NFE2L2_p |SOD2_g];
  R393: SOD2_g => NFE2L2_p; 1;
  // V(394) = K(394,1) * [NFE2L2_p |SOD2_g];
  R394: SOD2_g => NFE2L2_p; 1;
  // V(395) = K(395,1) * [SOD2_rna];
  R395: SOD2_rna => ; 1;
  // V(396) = K(396,1) * [STAT3_p] * [STAT1_g] -K(396,2) * [STAT3_p |STAT1_g];
  R396: STAT3_p => STAT1_g; 1;
  // V(397) = K(397,1) * [STAT3_p |STAT1_g];
  R397: STAT3_p => STAT1_g; 1;
  // V(398) = K(398,1) * [STAT1_rna];
  R398: STAT1_rna => ; 1;
  // V(399) = K(399,1) * [ETS1] * [FOS_g] -K(399,2) * [ETS1 |FOS_g];
  R399: FOS_g => ETS1; 1;
  // V(400) = K(400,1) * [ETS1 |FOS_g];
  R400: FOS_g => ETS1; 1;
  // V(401) = K(401,1) * [FOS_rna];
  R401: FOS_rna => ; 1;
  // V(402) = K(402,1) * [NR3C1] * [JUN_g] -K(402,2) * [NR3C1 |JUN_g];
  R402: JUN_g => NR3C1; 1;
  // V(403) = K(403,1) * [JUN_g];
  R403: JUN_g => ; 1;
  // V(404) = K(404,1) * [JUN_rna];
  R404: JUN_rna => ; 1;
  // V(405) = K(405,1) * [NR3C1] * [NFKB1_g] -K(405,2) * [NR3C1 |NFKB1_g];
  R405: NFKB1_g => NR3C1; 1;
  // V(406) = K(406,1) * [NFKB1_g];
  R406: NFKB1_g => ; 1;
  // V(407) = K(407,1) * [NFKB1_rna];
  R407: NFKB1_rna => ; 1;
  // V(408) = K(408,1) * [SOCS3];
  R408: SOCS3 => ; 1;
  // V(409) = K(409,1) * [IKBKB];
  R409: IKBKB => ; 1;
  // V(410) = K(410,1) * [KDM6B];
  R410: KDM6B => ; 1;
  // V(411) = K(411,1) * [ROCK2];
  R411: ROCK2 => ; 1;
  // V(412) = K(412,1) * [ERN1];
  R412: ERN1 => ; 1;
  // V(413) = K(413,1) * [SOD1];
  R413: SOD1 => ; 1;
  // V(414) = K(414,1) * [FOS];
  R414: FOS => ; 1;
  // V(415) = K(415,1) * [TGFB1];
  R415: TGFB1 => ; 1;
  // V(416) = K(416,1) * [CAT];
  R416: CAT => ; 1;
  // V(417) = K(417,1) * [ANXA1];
  R417: ANXA1 => ; 1;
  // V(418) = K(418,1) * [NR3C1];
  R418: NR3C1 => ; 1;
  // V(419) = K(419,1) * [SOD2];
  R419: SOD2 => ; 1;
  // V(420) = K(420,1) * [HSPB1];
  R420: HSPB1 => ; 1;
  // V(421) = K(421,1) * [HMGN1];
  R421: HMGN1 => ; 1;
  // V(422) = K(422,1) * [JUN];
  R422: JUN => ; 1;
  // V(423) = K(423,1) * [FYN];
  R423: FYN => ; 1;
  // V(424) = K(424,1) * [GSTA1];
  R424: GSTA1 => ; 1;
  // V(425) = K(425,1) * [VIM];
  R425: VIM => ; 1;
  // V(426) = K(426,1) * [PARP1];
  R426: PARP1 => ; 1;
  // V(427) = K(427,1) * [BCL2];
  R427: BCL2 => ; 1;
  // V(428) = K(428,1) * [IRF1];
  R428: IRF1 => ; 1;
  // V(429) = K(429,1) * [CYBA];
  R429: CYBA => ; 1;
  // V(430) = K(430,1) * [NCF1];
  R430: NCF1 => ; 1;
  // V(431) = K(431,1) * [PKM];
  R431: PKM => ; 1;
  // V(432) = K(432,1) * [ETS1];
  R432: ETS1 => ; 1;
  // V(433) = K(433,1) * [CREB1];
  R433: CREB1 => ; 1;
  // V(434) = K(434,1) * [CTLA4];
  R434: CTLA4 => ; 1;
  // V(435) = K(435,1) * [PRKCA];
  R435: PRKCA => ; 1;
  // V(436) = K(436,1) * [PTPN2];
  R436: PTPN2 => ; 1;
  // V(437) = K(437,1) * [XBP1];
  R437: XBP1 => ; 1;
  // V(438) = K(438,1) * [NFKB1];
  R438: NFKB1 => ; 1;
  // V(439) = K(439,1) * [NR4A1];
  R439: NR4A1 => ; 1;
  // V(440) = K(440,1) * [JAK1];
  R440: JAK1 => ; 1;
  // V(441) = K(441,1) * [DNMT1];
  R441: DNMT1 => ; 1;
  // V(442) = K(442,1) * [ZFP36];
  R442: ZFP36 => ; 1;
  // V(443) = K(443,1) * [PIK3R1];
  R443: PIK3R1 => ; 1;
  // V(444) = K(444,1) * [MAPK1];
  R444: MAPK1 => ; 1;
  // V(445) = K(445,1) * [DUSP1];
  R445: DUSP1 => ; 1;
  // V(446) = K(446,1) * [PTPN6];
  R446: PTPN6 => ; 1;
  // V(447) = K(447,1) * [PRDX6];
  R447: PRDX6 => ; 1;
  // V(448) = K(448,1) * [AKT1];
  R448: AKT1 => ; 1;
  // V(449) = K(449,1) * [CTNNB1];
  R449: CTNNB1 => ; 1;
  // V(450) = K(450,1) * [RORA];
  R450: RORA => ; 1;
  // V(451) = K(451,1) * [DDIT3];
  R451: DDIT3 => ; 1;
  // V(452) = K(452,1) * [TGFBR1];
  R452: TGFBR1 => ; 1;
  // V(453) = K(453,1) * [GPX4];
  R453: GPX4 => ; 1;
  // V(454) = K(454,1) * [STAT3];
  R454: STAT3 => ; 1;
  // V(455) = K(455,1) * [STAT1];
  R455: STAT1 => ; 1;
  // V(456) = K(456,1) * [STAT5A];
  R456: STAT5A => ; 1;
  // V(457) = K(457,1) * [PIK3CA];
  R457: PIK3CA => ; 1;
  // V(458) = K(458,1) * [MAPK9];
  R458: MAPK9 => ; 1;
  // V(459) = K(459,1) * [CDKN1B];
  R459: CDKN1B => ; 1;
  // V(460) = K(460,1) * [GCLM];
  R460: GCLM => ; 1;
  // V(461) = K(461,1) * [NUMB];
  R461: NUMB => ; 1;
  // V(462) = K(462,1) * [MECP2];
  R462: MECP2 => ; 1;
  // V(463) = K(463,1) * [RPS6KA3];
  R463: RPS6KA3 => ; 1;
  // V(464) = K(464,1) * [JAK3];
  R464: JAK3 => ; 1;
  // V(465) = K(465,1) * [PTEN];
  R465: PTEN => ; 1;
  // V(466) = K(466,1) * [RHOA];
  R466: RHOA => ; 1;
  // V(467) = K(467,1) * [RAC1];
  R467: RAC1 => ; 1;
  // V(468) = K(468,1) * [SMAD3];
  R468: SMAD3 => ; 1;
  // V(469) = K(469,1) * [MDM2];
  R469: MDM2 => ; 1;
  // V(470) = K(470,1) * [PTPN11];
  R470: PTPN11 => ; 1;
  // V(471) = K(471,1) * [PRDX1];
  R471: PRDX1 => ; 1;
  // V(472) = K(472,1) * [BAX];
  R472: BAX => ; 1;
  // V(473) = K(473,1) * [EP300];
  R473: EP300 => ; 1;
  // V(474) = K(474,1) * [FOXO1];
  R474: FOXO1 => ; 1;
  // V(475) = K(475,1) * [STK4];
  R475: STK4 => ; 1;
  // V(476) = K(476,1) * [PRKAA1];
  R476: PRKAA1 => ; 1;
  // V(477) = K(477,1) * [ILK];
  R477: ILK => ; 1;
  // V(478) = K(478,1) * [ROCK1];
  R478: ROCK1 => ; 1;
  // V(479) = K(479,1) * [ATR];
  R479: ATR => ; 1;
  // V(480) = K(480,1) * [HDAC1];
  R480: HDAC1 => ; 1;
  // V(481) = K(481,1) * [CUL3];
  R481: CUL3 => ; 1;
  // V(482) = K(482,1) * [KLF9];
  R482: KLF9 => ; 1;
  // V(483) = K(483,1) * [RUNX2];
  R483: RUNX2 => ; 1;
  // V(484) = K(484,1) * [BECN1];
  R484: BECN1 => ; 1;
  // V(485) = K(485,1) * [IRF3];
  R485: IRF3 => ; 1;
  // V(486) = K(486,1) * [SMAD2];
  R486: SMAD2 => ; 1;
  // V(487) = K(487,1) * [STK11];
  R487: STK11 => ; 1;
  // V(488) = K(488,1) * [NFE2L2];
  R488: NFE2L2 => ; 1;
  // V(489) = K(489,1) * [PKN1];
  R489: PKN1 => ; 1;
  // V(490) = K(490,1) * [HIF1A];
  R490: HIF1A => ; 1;
  // V(491) = K(491,1) * [BAD];
  R491: BAD => ; 1;
  // V(492) = K(492,1) * [SIRT1];
  R492: SIRT1 => ; 1;
  // V(493) = K(493,1) * [PARK7];
  R493: PARK7 => ; 1;
  // V(494) = K(494,1) * [MAPKAP1];
  R494: MAPKAP1 => ; 1;
  // V(495) = K(495,1) * [MFF];
  R495: MFF => ; 1;
  // V(496) = K(496,1) * [HIPK2];
  R496: HIPK2 => ; 1;
  // V(497) = K(497,1) * [TXNIP];
  R497: TXNIP => ; 1;
  // V(498) = K(498,1) * [SIRT7];
  R498: SIRT7 => ; 1;
  // V(499) = K(499,1) * [RNF7];
  R499: RNF7 => ; 1;
  // V(500) = K(500,1) * [ADD3];
  R500: ADD3 => ; 1;
  // V(501) = K(501,1) * [SOCS3_rna];
  R501: SOCS3_rna => ; 1;
  // V(502) = K(502,1) * [KDM6B_rna];
  R502: KDM6B_rna => ; 1;
  // V(503) = K(503,1) * [SOD1_rna];
  R503: SOD1_rna => ; 1;
  // V(504) = K(504,1) * [FOS_rna];
  R504: FOS_rna => ; 1;
  // V(505) = K(505,1) * [TGFB1_rna];
  R505: TGFB1_rna => ; 1;
  // V(506) = K(506,1) * [CAT_rna];
  R506: CAT_rna => ; 1;
  // V(507) = K(507,1) * [SOD2_rna];
  R507: SOD2_rna => ; 1;
  // V(508) = K(508,1) * [JUN_rna];
  R508: JUN_rna => ; 1;
  // V(509) = K(509,1) * [GSTA1_rna];
  R509: GSTA1_rna => ; 1;
  // V(510) = K(510,1) * [NFKB1_rna];
  R510: NFKB1_rna => ; 1;
  // V(511) = K(511,1) * [GPX4_rna];
  R511: GPX4_rna => ; 1;
  // V(512) = K(512,1) * [STAT1_rna];
  R512: STAT1_rna => ; 1;
  // V(513) = K(513,1) * [CDKN1B_rna];
  R513: CDKN1B_rna => ; 1;
  // V(514) = K(514,1) * [GCLM_rna];
  R514: GCLM_rna => ; 1;
  // V(515) = K(515,1) * [KLF9_rna];
  R515: KLF9_rna => ; 1;
  // V(516) = K(516,1) * [IKBKB_g];
  R516: IKBKB_g => ; 1;
  // V(517) = K(517,1) * [IKBKB_rna];
  R517: IKBKB_rna => ; 1;
  // V(518) = K(518,1) * [ROCK2_g];
  R518: ROCK2_g => ; 1;
  // V(519) = K(519,1) * [ROCK2_rna];
  R519: ROCK2_rna => ; 1;
  // V(520) = K(520,1) * [ERN1_g];
  R520: ERN1_g => ; 1;
  // V(521) = K(521,1) * [ERN1_rna];
  R521: ERN1_rna => ; 1;
  // V(522) = K(522,1) * [ANXA1_g];
  R522: ANXA1_g => ; 1;
  // V(523) = K(523,1) * [ANXA1_rna];
  R523: ANXA1_rna => ; 1;
  // V(524) = K(524,1) * [NR3C1_g];
  R524: NR3C1_g => ; 1;
  // V(525) = K(525,1) * [NR3C1_rna];
  R525: NR3C1_rna => ; 1;
  // V(526) = K(526,1) * [HSPB1_g];
  R526: HSPB1_g => ; 1;
  // V(527) = K(527,1) * [HSPB1_rna];
  R527: HSPB1_rna => ; 1;
  // V(528) = K(528,1) * [HMGN1_g];
  R528: HMGN1_g => ; 1;
  // V(529) = K(529,1) * [HMGN1_rna];
  R529: HMGN1_rna => ; 1;
  // V(530) = K(530,1) * [FYN_g];
  R530: FYN_g => ; 1;
  // V(531) = K(531,1) * [FYN_rna];
  R531: FYN_rna => ; 1;
  // V(532) = K(532,1) * [VIM_g];
  R532: VIM_g => ; 1;
  // V(533) = K(533,1) * [VIM_rna];
  R533: VIM_rna => ; 1;
  // V(534) = K(534,1) * [PARP1_g];
  R534: PARP1_g => ; 1;
  // V(535) = K(535,1) * [PARP1_rna];
  R535: PARP1_rna => ; 1;
  // V(536) = K(536,1) * [BCL2_g];
  R536: BCL2_g => ; 1;
  // V(537) = K(537,1) * [BCL2_rna];
  R537: BCL2_rna => ; 1;
  // V(538) = K(538,1) * [IRF1_g];
  R538: IRF1_g => ; 1;
  // V(539) = K(539,1) * [IRF1_rna];
  R539: IRF1_rna => ; 1;
  // V(540) = K(540,1) * [CYBA_g];
  R540: CYBA_g => ; 1;
  // V(541) = K(541,1) * [CYBA_rna];
  R541: CYBA_rna => ; 1;
  // V(542) = K(542,1) * [NCF1_g];
  R542: NCF1_g => ; 1;
  // V(543) = K(543,1) * [NCF1_rna];
  R543: NCF1_rna => ; 1;
  // V(544) = K(544,1) * [PKM_g];
  R544: PKM_g => ; 1;
  // V(545) = K(545,1) * [PKM_rna];
  R545: PKM_rna => ; 1;
  // V(546) = K(546,1) * [ETS1_g];
  R546: ETS1_g => ; 1;
  // V(547) = K(547,1) * [ETS1_rna];
  R547: ETS1_rna => ; 1;
  // V(548) = K(548,1) * [CREB1_g];
  R548: CREB1_g => ; 1;
  // V(549) = K(549,1) * [CREB1_rna];
  R549: CREB1_rna => ; 1;
  // V(550) = K(550,1) * [CTLA4_g];
  R550: CTLA4_g => ; 1;
  // V(551) = K(551,1) * [CTLA4_rna];
  R551: CTLA4_rna => ; 1;
  // V(552) = K(552,1) * [PRKCA_g];
  R552: PRKCA_g => ; 1;
  // V(553) = K(553,1) * [PRKCA_rna];
  R553: PRKCA_rna => ; 1;
  // V(554) = K(554,1) * [PTPN2_g];
  R554: PTPN2_g => ; 1;
  // V(555) = K(555,1) * [PTPN2_rna];
  R555: PTPN2_rna => ; 1;
  // V(556) = K(556,1) * [XBP1_g];
  R556: XBP1_g => ; 1;
  // V(557) = K(557,1) * [XBP1_rna];
  R557: XBP1_rna => ; 1;
  // V(558) = K(558,1) * [NR4A1_g];
  R558: NR4A1_g => ; 1;
  // V(559) = K(559,1) * [NR4A1_rna];
  R559: NR4A1_rna => ; 1;
  // V(560) = K(560,1) * [JAK1_g];
  R560: JAK1_g => ; 1;
  // V(561) = K(561,1) * [JAK1_rna];
  R561: JAK1_rna => ; 1;
  // V(562) = K(562,1) * [DNMT1_g];
  R562: DNMT1_g => ; 1;
  // V(563) = K(563,1) * [DNMT1_rna];
  R563: DNMT1_rna => ; 1;
  // V(564) = K(564,1) * [ZFP36_g];
  R564: ZFP36_g => ; 1;
  // V(565) = K(565,1) * [ZFP36_rna];
  R565: ZFP36_rna => ; 1;
  // V(566) = K(566,1) * [PIK3R1_g];
  R566: PIK3R1_g => ; 1;
  // V(567) = K(567,1) * [PIK3R1_rna];
  R567: PIK3R1_rna => ; 1;
  // V(568) = K(568,1) * [MAPK1_g];
  R568: MAPK1_g => ; 1;
  // V(569) = K(569,1) * [MAPK1_rna];
  R569: MAPK1_rna => ; 1;
  // V(570) = K(570,1) * [DUSP1_g];
  R570: DUSP1_g => ; 1;
  // V(571) = K(571,1) * [DUSP1_rna];
  R571: DUSP1_rna => ; 1;
  // V(572) = K(572,1) * [PTPN6_g];
  R572: PTPN6_g => ; 1;
  // V(573) = K(573,1) * [PTPN6_rna];
  R573: PTPN6_rna => ; 1;
  // V(574) = K(574,1) * [PRDX6_g];
  R574: PRDX6_g => ; 1;
  // V(575) = K(575,1) * [PRDX6_rna];
  R575: PRDX6_rna => ; 1;
  // V(576) = K(576,1) * [AKT1_g];
  R576: AKT1_g => ; 1;
  // V(577) = K(577,1) * [AKT1_rna];
  R577: AKT1_rna => ; 1;
  // V(578) = K(578,1) * [CTNNB1_g];
  R578: CTNNB1_g => ; 1;
  // V(579) = K(579,1) * [CTNNB1_rna];
  R579: CTNNB1_rna => ; 1;
  // V(580) = K(580,1) * [RORA_g];
  R580: RORA_g => ; 1;
  // V(581) = K(581,1) * [RORA_rna];
  R581: RORA_rna => ; 1;
  // V(582) = K(582,1) * [DDIT3_g];
  R582: DDIT3_g => ; 1;
  // V(583) = K(583,1) * [DDIT3_rna];
  R583: DDIT3_rna => ; 1;
  // V(584) = K(584,1) * [TGFBR1_g];
  R584: TGFBR1_g => ; 1;
  // V(585) = K(585,1) * [TGFBR1_rna];
  R585: TGFBR1_rna => ; 1;
  // V(586) = K(586,1) * [STAT3_g];
  R586: STAT3_g => ; 1;
  // V(587) = K(587,1) * [STAT3_rna];
  R587: STAT3_rna => ; 1;
  // V(588) = K(588,1) * [STAT5A_g];
  R588: STAT5A_g => ; 1;
  // V(589) = K(589,1) * [STAT5A_rna];
  R589: STAT5A_rna => ; 1;
  // V(590) = K(590,1) * [PIK3CA_g];
  R590: PIK3CA_g => ; 1;
  // V(591) = K(591,1) * [PIK3CA_rna];
  R591: PIK3CA_rna => ; 1;
  // V(592) = K(592,1) * [MAPK9_g];
  R592: MAPK9_g => ; 1;
  // V(593) = K(593,1) * [MAPK9_rna];
  R593: MAPK9_rna => ; 1;
  // V(594) = K(594,1) * [NUMB_g];
  R594: NUMB_g => ; 1;
  // V(595) = K(595,1) * [NUMB_rna];
  R595: NUMB_rna => ; 1;
  // V(596) = K(596,1) * [MECP2_g];
  R596: MECP2_g => ; 1;
  // V(597) = K(597,1) * [MECP2_rna];
  R597: MECP2_rna => ; 1;
  // V(598) = K(598,1) * [RPS6KA3_g];
  R598: RPS6KA3_g => ; 1;
  // V(599) = K(599,1) * [RPS6KA3_rna];
  R599: RPS6KA3_rna => ; 1;
  // V(600) = K(600,1) * [JAK3_g];
  R600: JAK3_g => ; 1;
  // V(601) = K(601,1) * [JAK3_rna];
  R601: JAK3_rna => ; 1;
  // V(602) = K(602,1) * [PTEN_g];
  R602: PTEN_g => ; 1;
  // V(603) = K(603,1) * [PTEN_rna];
  R603: PTEN_rna => ; 1;
  // V(604) = K(604,1) * [RHOA_g];
  R604: RHOA_g => ; 1;
  // V(605) = K(605,1) * [RHOA_rna];
  R605: RHOA_rna => ; 1;
  // V(606) = K(606,1) * [RAC1_g];
  R606: RAC1_g => ; 1;
  // V(607) = K(607,1) * [RAC1_rna];
  R607: RAC1_rna => ; 1;
  // V(608) = K(608,1) * [SMAD3_g];
  R608: SMAD3_g => ; 1;
  // V(609) = K(609,1) * [SMAD3_rna];
  R609: SMAD3_rna => ; 1;
  // V(610) = K(610,1) * [MDM2_g];
  R610: MDM2_g => ; 1;
  // V(611) = K(611,1) * [MDM2_rna];
  R611: MDM2_rna => ; 1;
  // V(612) = K(612,1) * [PTPN11_g];
  R612: PTPN11_g => ; 1;
  // V(613) = K(613,1) * [PTPN11_rna];
  R613: PTPN11_rna => ; 1;
  // V(614) = K(614,1) * [PRDX1_g];
  R614: PRDX1_g => ; 1;
  // V(615) = K(615,1) * [PRDX1_rna];
  R615: PRDX1_rna => ; 1;
  // V(616) = K(616,1) * [BAX_g];
  R616: BAX_g => ; 1;
  // V(617) = K(617,1) * [BAX_rna];
  R617: BAX_rna => ; 1;
  // V(618) = K(618,1) * [EP300_g];
  R618: EP300_g => ; 1;
  // V(619) = K(619,1) * [EP300_rna];
  R619: EP300_rna => ; 1;
  // V(620) = K(620,1) * [FOXO1_g];
  R620: FOXO1_g => ; 1;
  // V(621) = K(621,1) * [FOXO1_rna];
  R621: FOXO1_rna => ; 1;
  // V(622) = K(622,1) * [STK4_g];
  R622: STK4_g => ; 1;
  // V(623) = K(623,1) * [STK4_rna];
  R623: STK4_rna => ; 1;
  // V(624) = K(624,1) * [PRKAA1_g];
  R624: PRKAA1_g => ; 1;
  // V(625) = K(625,1) * [PRKAA1_rna];
  R625: PRKAA1_rna => ; 1;
  // V(626) = K(626,1) * [ILK_g];
  R626: ILK_g => ; 1;
  // V(627) = K(627,1) * [ILK_rna];
  R627: ILK_rna => ; 1;
  // V(628) = K(628,1) * [ROCK1_g];
  R628: ROCK1_g => ; 1;
  // V(629) = K(629,1) * [ROCK1_rna];
  R629: ROCK1_rna => ; 1;
  // V(630) = K(630,1) * [ATR_g];
  R630: ATR_g => ; 1;
  // V(631) = K(631,1) * [ATR_rna];
  R631: ATR_rna => ; 1;
  // V(632) = K(632,1) * [HDAC1_g];
  R632: HDAC1_g => ; 1;
  // V(633) = K(633,1) * [HDAC1_rna];
  R633: HDAC1_rna => ; 1;
  // V(634) = K(634,1) * [CUL3_g];
  R634: CUL3_g => ; 1;
  // V(635) = K(635,1) * [CUL3_rna];
  R635: CUL3_rna => ; 1;
  // V(636) = K(636,1) * [RUNX2_g];
  R636: RUNX2_g => ; 1;
  // V(637) = K(637,1) * [RUNX2_rna];
  R637: RUNX2_rna => ; 1;
  // V(638) = K(638,1) * [BECN1_g];
  R638: BECN1_g => ; 1;
  // V(639) = K(639,1) * [BECN1_rna];
  R639: BECN1_rna => ; 1;
  // V(640) = K(640,1) * [IRF3_g];
  R640: IRF3_g => ; 1;
  // V(641) = K(641,1) * [IRF3_rna];
  R641: IRF3_rna => ; 1;
  // V(642) = K(642,1) * [SMAD2_g];
  R642: SMAD2_g => ; 1;
  // V(643) = K(643,1) * [SMAD2_rna];
  R643: SMAD2_rna => ; 1;
  // V(644) = K(644,1) * [STK11_g];
  R644: STK11_g => ; 1;
  // V(645) = K(645,1) * [STK11_rna];
  R645: STK11_rna => ; 1;
  // V(646) = K(646,1) * [NFE2L2_g];
  R646: NFE2L2_g => ; 1;
  // V(647) = K(647,1) * [NFE2L2_rna];
  R647: NFE2L2_rna => ; 1;
  // V(648) = K(648,1) * [PKN1_g];
  R648: PKN1_g => ; 1;
  // V(649) = K(649,1) * [PKN1_rna];
  R649: PKN1_rna => ; 1;
  // V(650) = K(650,1) * [HIF1A_g];
  R650: HIF1A_g => ; 1;
  // V(651) = K(651,1) * [HIF1A_rna];
  R651: HIF1A_rna => ; 1;
  // V(652) = K(652,1) * [BAD_g];
  R652: BAD_g => ; 1;
  // V(653) = K(653,1) * [BAD_rna];
  R653: BAD_rna => ; 1;
  // V(654) = K(654,1) * [SIRT1_g];
  R654: SIRT1_g => ; 1;
  // V(655) = K(655,1) * [SIRT1_rna];
  R655: SIRT1_rna => ; 1;
  // V(656) = K(656,1) * [PARK7_g];
  R656: PARK7_g => ; 1;
  // V(657) = K(657,1) * [PARK7_rna];
  R657: PARK7_rna => ; 1;
  // V(658) = K(658,1) * [MAPKAP1_g];
  R658: MAPKAP1_g => ; 1;
  // V(659) = K(659,1) * [MAPKAP1_rna];
  R659: MAPKAP1_rna => ; 1;
  // V(660) = K(660,1) * [MFF_g];
  R660: MFF_g => ; 1;
  // V(661) = K(661,1) * [MFF_rna];
  R661: MFF_rna => ; 1;
  // V(662) = K(662,1) * [HIPK2_g];
  R662: HIPK2_g => ; 1;
  // V(663) = K(663,1) * [HIPK2_rna];
  R663: HIPK2_rna => ; 1;
  // V(664) = K(664,1) * [TXNIP_g];
  R664: TXNIP_g => ; 1;
  // V(665) = K(665,1) * [TXNIP_rna];
  R665: TXNIP_rna => ; 1;
  // V(666) = K(666,1) * [SIRT7_g];
  R666: SIRT7_g => ; 1;
  // V(667) = K(667,1) * [SIRT7_rna];
  R667: SIRT7_rna => ; 1;
  // V(668) = K(668,1) * [RNF7_g];
  R668: RNF7_g => ; 1;
  // V(669) = K(669,1) * [RNF7_rna];
  R669: RNF7_rna => ; 1;
  // V(670) = K(670,1) * [ADD3_g];
  R670: ADD3_g => ; 1;
  // V(671) = K(671,1) * [ADD3_rna];
  R671: ADD3_rna => ; 1;
  // V(672) = K(672,1) * [IKBKB_p];
  R672: IKBKB_p => ; 1;
  // V(673) = K(673,1) * [ERN1_p];
  R673: ERN1_p => ; 1;
  // V(674) = K(674,1) * [FOS_p];
  R674: FOS_p => ; 1;
  // V(675) = K(675,1) * [ANXA1_p];
  R675: ANXA1_p => ; 1;
  // V(676) = K(676,1) * [NR3C1_p];
  R676: NR3C1_p => ; 1;
  // V(677) = K(677,1) * [HSPB1_p];
  R677: HSPB1_p => ; 1;
  // V(678) = K(678,1) * [HMGN1_p];
  R678: HMGN1_p => ; 1;
  // V(679) = K(679,1) * [JUN_p];
  R679: JUN_p => ; 1;
  // V(680) = K(680,1) * [FYN_p];
  R680: FYN_p => ; 1;
  // V(681) = K(681,1) * [VIM_p];
  R681: VIM_p => ; 1;
  // V(682) = K(682,1) * [PARP1_p];
  R682: PARP1_p => ; 1;
  // V(683) = K(683,1) * [BCL2_p];
  R683: BCL2_p => ; 1;
  // V(684) = K(684,1) * [CYBA_p];
  R684: CYBA_p => ; 1;
  // V(685) = K(685,1) * [NCF1_p];
  R685: NCF1_p => ; 1;
  // V(686) = K(686,1) * [PKM_p];
  R686: PKM_p => ; 1;
  // V(687) = K(687,1) * [CREB1_p];
  R687: CREB1_p => ; 1;
  // V(688) = K(688,1) * [CTLA4_p];
  R688: CTLA4_p => ; 1;
  // V(689) = K(689,1) * [PRKCA_p];
  R689: PRKCA_p => ; 1;
  // V(690) = K(690,1) * [XBP1_p];
  R690: XBP1_p => ; 1;
  // V(691) = K(691,1) * [NFKB1_p];
  R691: NFKB1_p => ; 1;
  // V(692) = K(692,1) * [NR4A1_p];
  R692: NR4A1_p => ; 1;
  // V(693) = K(693,1) * [JAK1_p];
  R693: JAK1_p => ; 1;
  // V(694) = K(694,1) * [DNMT1_p];
  R694: DNMT1_p => ; 1;
  // V(695) = K(695,1) * [ZFP36_p];
  R695: ZFP36_p => ; 1;
  // V(696) = K(696,1) * [PIK3R1_p];
  R696: PIK3R1_p => ; 1;
  // V(697) = K(697,1) * [MAPK1_p];
  R697: MAPK1_p => ; 1;
  // V(698) = K(698,1) * [DUSP1_p];
  R698: DUSP1_p => ; 1;
  // V(699) = K(699,1) * [PTPN6_p];
  R699: PTPN6_p => ; 1;
  // V(700) = K(700,1) * [PRDX6_p];
  R700: PRDX6_p => ; 1;
  // V(701) = K(701,1) * [AKT1_p];
  R701: AKT1_p => ; 1;
  // V(702) = K(702,1) * [CTNNB1_p];
  R702: CTNNB1_p => ; 1;
  // V(703) = K(703,1) * [RORA_p];
  R703: RORA_p => ; 1;
  // V(704) = K(704,1) * [DDIT3_p];
  R704: DDIT3_p => ; 1;
  // V(705) = K(705,1) * [STAT3_p];
  R705: STAT3_p => ; 1;
  // V(706) = K(706,1) * [STAT1_p];
  R706: STAT1_p => ; 1;
  // V(707) = K(707,1) * [STAT5A_p];
  R707: STAT5A_p => ; 1;
  // V(708) = K(708,1) * [PIK3CA_p];
  R708: PIK3CA_p => ; 1;
  // V(709) = K(709,1) * [MAPK9_p];
  R709: MAPK9_p => ; 1;
  // V(710) = K(710,1) * [CDKN1B_p];
  R710: CDKN1B_p => ; 1;
  // V(711) = K(711,1) * [MECP2_p];
  R711: MECP2_p => ; 1;
  // V(712) = K(712,1) * [RPS6KA3_p];
  R712: RPS6KA3_p => ; 1;
  // V(713) = K(713,1) * [JAK3_p];
  R713: JAK3_p => ; 1;
  // V(714) = K(714,1) * [PTEN_p];
  R714: PTEN_p => ; 1;
  // V(715) = K(715,1) * [RHOA_p];
  R715: RHOA_p => ; 1;
  // V(716) = K(716,1) * [RAC1_p];
  R716: RAC1_p => ; 1;
  // V(717) = K(717,1) * [SMAD3_p];
  R717: SMAD3_p => ; 1;
  // V(718) = K(718,1) * [MDM2_p];
  R718: MDM2_p => ; 1;
  // V(719) = K(719,1) * [PTPN11_p];
  R719: PTPN11_p => ; 1;
  // V(720) = K(720,1) * [PRDX1_p];
  R720: PRDX1_p => ; 1;
  // V(721) = K(721,1) * [BAX_p];
  R721: BAX_p => ; 1;
  // V(722) = K(722,1) * [EP300_p];
  R722: EP300_p => ; 1;
  // V(723) = K(723,1) * [FOXO1_p];
  R723: FOXO1_p => ; 1;
  // V(724) = K(724,1) * [STK4_p];
  R724: STK4_p => ; 1;
  // V(725) = K(725,1) * [PRKAA1_p];
  R725: PRKAA1_p => ; 1;
  // V(726) = K(726,1) * [ILK_p];
  R726: ILK_p => ; 1;
  // V(727) = K(727,1) * [RUNX2_p];
  R727: RUNX2_p => ; 1;
  // V(728) = K(728,1) * [BECN1_p];
  R728: BECN1_p => ; 1;
  // V(729) = K(729,1) * [IRF3_p];
  R729: IRF3_p => ; 1;
  // V(730) = K(730,1) * [SMAD2_p];
  R730: SMAD2_p => ; 1;
  // V(731) = K(731,1) * [STK11_p];
  R731: STK11_p => ; 1;
  // V(732) = K(732,1) * [NFE2L2_p];
  R732: NFE2L2_p => ; 1;
  // V(733) = K(733,1) * [PKN1_p];
  R733: PKN1_p => ; 1;
  // V(734) = K(734,1) * [HIF1A_p];
  R734: HIF1A_p => ; 1;
  // V(735) = K(735,1) * [BAD_p];
  R735: BAD_p => ; 1;
  // V(736) = K(736,1) * [SIRT1_p];
  R736: SIRT1_p => ; 1;
  // V(737) = K(737,1) * [PARK7_p];
  R737: PARK7_p => ; 1;
  // V(738) = K(738,1) * [MAPKAP1_p];
  R738: MAPKAP1_p => ; 1;
  // V(739) = K(739,1) * [MFF_p];
  R739: MFF_p => ; 1;
  // V(740) = K(740,1) * [HIPK2_p];
  R740: HIPK2_p => ; 1;
  // V(741) = K(741,1) * [TXNIP_p];
  R741: TXNIP_p => ; 1;
  // V(742) = K(742,1) * [SIRT7_p];
  R742: SIRT7_p => ; 1;
  // V(743) = K(743,1) * [ADD3_p];
  R743: ADD3_p => ; 1;
  // V(744) = K(744,1) * [SIGNOR-C154_p];
  R744: => ; 1;
  // V(745) = K(745,1) * [IKBKB_rna];
  R745: IKBKB_rna => ; 1;
  // V(746) = K(746,1) * [ROCK2_rna];
  R746: ROCK2_rna => ; 1;
  // V(747) = K(747,1) * [ERN1_rna];
  R747: ERN1_rna => ; 1;
  // V(748) = K(748,1) * [ANXA1_rna];
  R748: ANXA1_rna => ; 1;
  // V(749) = K(749,1) * [NR3C1_rna];
  R749: NR3C1_rna => ; 1;
  // V(750) = K(750,1) * [HSPB1_rna];
  R750: HSPB1_rna => ; 1;
  // V(751) = K(751,1) * [HMGN1_rna];
  R751: HMGN1_rna => ; 1;
  // V(752) = K(752,1) * [FYN_rna];
  R752: FYN_rna => ; 1;
  // V(753) = K(753,1) * [VIM_rna];
  R753: VIM_rna => ; 1;
  // V(754) = K(754,1) * [PARP1_rna];
  R754: PARP1_rna => ; 1;
  // V(755) = K(755,1) * [BCL2_rna];
  R755: BCL2_rna => ; 1;
  // V(756) = K(756,1) * [IRF1_rna];
  R756: IRF1_rna => ; 1;
  // V(757) = K(757,1) * [CYBA_rna];
  R757: CYBA_rna => ; 1;
  // V(758) = K(758,1) * [NCF1_rna];
  R758: NCF1_rna => ; 1;
  // V(759) = K(759,1) * [PKM_rna];
  R759: PKM_rna => ; 1;
  // V(760) = K(760,1) * [ETS1_rna];
  R760: ETS1_rna => ; 1;
  // V(761) = K(761,1) * [CREB1_rna];
  R761: CREB1_rna => ; 1;
  // V(762) = K(762,1) * [CTLA4_rna];
  R762: CTLA4_rna => ; 1;
  // V(763) = K(763,1) * [PRKCA_rna];
  R763: PRKCA_rna => ; 1;
  // V(764) = K(764,1) * [PTPN2_rna];
  R764: PTPN2_rna => ; 1;
  // V(765) = K(765,1) * [XBP1_rna];
  R765: XBP1_rna => ; 1;
  // V(766) = K(766,1) * [NR4A1_rna];
  R766: NR4A1_rna => ; 1;
  // V(767) = K(767,1) * [JAK1_rna];
  R767: JAK1_rna => ; 1;
  // V(768) = K(768,1) * [DNMT1_rna];
  R768: DNMT1_rna => ; 1;
  // V(769) = K(769,1) * [ZFP36_rna];
  R769: ZFP36_rna => ; 1;
  // V(770) = K(770,1) * [PIK3R1_rna];
  R770: PIK3R1_rna => ; 1;
  // V(771) = K(771,1) * [MAPK1_rna];
  R771: MAPK1_rna => ; 1;
  // V(772) = K(772,1) * [DUSP1_rna];
  R772: DUSP1_rna => ; 1;
  // V(773) = K(773,1) * [PTPN6_rna];
  R773: PTPN6_rna => ; 1;
  // V(774) = K(774,1) * [PRDX6_rna];
  R774: PRDX6_rna => ; 1;
  // V(775) = K(775,1) * [AKT1_rna];
  R775: AKT1_rna => ; 1;
  // V(776) = K(776,1) * [CTNNB1_rna];
  R776: CTNNB1_rna => ; 1;
  // V(777) = K(777,1) * [RORA_rna];
  R777: RORA_rna => ; 1;
  // V(778) = K(778,1) * [DDIT3_rna];
  R778: DDIT3_rna => ; 1;
  // V(779) = K(779,1) * [TGFBR1_rna];
  R779: TGFBR1_rna => ; 1;
  // V(780) = K(780,1) * [STAT3_rna];
  R780: STAT3_rna => ; 1;
  // V(781) = K(781,1) * [STAT5A_rna];
  R781: STAT5A_rna => ; 1;
  // V(782) = K(782,1) * [PIK3CA_rna];
  R782: PIK3CA_rna => ; 1;
  // V(783) = K(783,1) * [MAPK9_rna];
  R783: MAPK9_rna => ; 1;
  // V(784) = K(784,1) * [NUMB_rna];
  R784: NUMB_rna => ; 1;
  // V(785) = K(785,1) * [MECP2_rna];
  R785: MECP2_rna => ; 1;
  // V(786) = K(786,1) * [RPS6KA3_rna];
  R786: RPS6KA3_rna => ; 1;
  // V(787) = K(787,1) * [JAK3_rna];
  R787: JAK3_rna => ; 1;
  // V(788) = K(788,1) * [PTEN_rna];
  R788: PTEN_rna => ; 1;
  // V(789) = K(789,1) * [RHOA_rna];
  R789: RHOA_rna => ; 1;
  // V(790) = K(790,1) * [RAC1_rna];
  R790: RAC1_rna => ; 1;
  // V(791) = K(791,1) * [SMAD3_rna];
  R791: SMAD3_rna => ; 1;
  // V(792) = K(792,1) * [MDM2_rna];
  R792: MDM2_rna => ; 1;
  // V(793) = K(793,1) * [PTPN11_rna];
  R793: PTPN11_rna => ; 1;
  // V(794) = K(794,1) * [PRDX1_rna];
  R794: PRDX1_rna => ; 1;
  // V(795) = K(795,1) * [BAX_rna];
  R795: BAX_rna => ; 1;
  // V(796) = K(796,1) * [EP300_rna];
  R796: EP300_rna => ; 1;
  // V(797) = K(797,1) * [FOXO1_rna];
  R797: FOXO1_rna => ; 1;
  // V(798) = K(798,1) * [STK4_rna];
  R798: STK4_rna => ; 1;
  // V(799) = K(799,1) * [PRKAA1_rna];
  R799: PRKAA1_rna => ; 1;
  // V(800) = K(800,1) * [ILK_rna];
  R800: ILK_rna => ; 1;
  // V(801) = K(801,1) * [ROCK1_rna];
  R801: ROCK1_rna => ; 1;
  // V(802) = K(802,1) * [ATR_rna];
  R802: ATR_rna => ; 1;
  // V(803) = K(803,1) * [HDAC1_rna];
  R803: HDAC1_rna => ; 1;
  // V(804) = K(804,1) * [CUL3_rna];
  R804: CUL3_rna => ; 1;
  // V(805) = K(805,1) * [RUNX2_rna];
  R805: RUNX2_rna => ; 1;
  // V(806) = K(806,1) * [BECN1_rna];
  R806: BECN1_rna => ; 1;
  // V(807) = K(807,1) * [IRF3_rna];
  R807: IRF3_rna => ; 1;
  // V(808) = K(808,1) * [SMAD2_rna];
  R808: SMAD2_rna => ; 1;
  // V(809) = K(809,1) * [STK11_rna];
  R809: STK11_rna => ; 1;
  // V(810) = K(810,1) * [NFE2L2_rna];
  R810: NFE2L2_rna => ; 1;
  // V(811) = K(811,1) * [PKN1_rna];
  R811: PKN1_rna => ; 1;
  // V(812) = K(812,1) * [HIF1A_rna];
  R812: HIF1A_rna => ; 1;
  // V(813) = K(813,1) * [BAD_rna];
  R813: BAD_rna => ; 1;
  // V(814) = K(814,1) * [SIRT1_rna];
  R814: SIRT1_rna => ; 1;
  // V(815) = K(815,1) * [PARK7_rna];
  R815: PARK7_rna => ; 1;
  // V(816) = K(816,1) * [MAPKAP1_rna];
  R816: MAPKAP1_rna => ; 1;
  // V(817) = K(817,1) * [MFF_rna];
  R817: MFF_rna => ; 1;
  // V(818) = K(818,1) * [HIPK2_rna];
  R818: HIPK2_rna => ; 1;
  // V(819) = K(819,1) * [TXNIP_rna];
  R819: TXNIP_rna => ; 1;
  // V(820) = K(820,1) * [SIRT7_rna];
  R820: SIRT7_rna => ; 1;
  // V(821) = K(821,1) * [RNF7_rna];
  R821: RNF7_rna => ; 1;
  // V(822) = K(822,1) * [ADD3_rna];
  R822: ADD3_rna => ; 1;
end
